# [reference: inputs.xmcd]
# [reference: SedTankwithlamina.xmcd]
# [reference: new_floctank.xmcd]
# [reference: Sed.eff.xmcd]
# [reference: platform.xmcd]
Plantscript1 :=
    Sedtank ← Sedtank(grey, ltgrey, blue, blue2, blue3, green, purple, tank_origin, tank_dim, tank_thick, channel_dim, channel_thick, pipe9_length, sedpipe_inr, manifold_inr, waste_inr, manifoldorifice_rad, manifoldorifice_dist, wasteorifice_rad, manifoldorifice_dist, waterlevel, manifold_depth, num_tanks, ϕ)
    Floctank ← Floctank
    layerthaw1 ← layer_thaw("channel")
    layerthaw2 ← layer_thaw("floctank")
    union1 ← concat("_union", sp, "ALL", sp)
    layerfreeze1 ← layer_freeze("floctank")
    one ← stack(layerthaw1, layerthaw2, union1, layerfreeze1)
    return stack(Sedtank, Floctank, one)
Plant1 := Plantscript1
Drawing_Plant1 := Plant1
# [component: inputs Drawing_Plant1]
