# [reference: basics.xmcd]
# [reference: inputs.xmcd]
sedslopescript(origin, p2, p3, p4, slope_width, slope_height) :=
    pline1 ← pline([origin[0]; origin[1]], [origin[0] - slope_width; origin[1]], [origin[0]; origin[1] + slope_height])
    extrude1 ← extrude(origin, tank_dim[0])
    rotate3d1 ← rotateA_3d(origin, "xaxis", origin, 90)
    rotate3d2 ← rotateA_3d(origin, "zaxis", origin, 270)
    mirror3d1 ← mirror3dA(origin, p2)
    one ← stack(pline1, extrude1, rotate3d1, rotate3d2, mirror3d1)
    return one
sedslope(origin, p2, p3, p4, slope_width, slope_height) := sedslopescript([origin[0]; origin[1]; origin[2]], [origin[0]; origin[1] + tank_dim[1]/2; origin[2]], [-tank_dim[0]; tank_dim[1]/2; 0], [-tank_dim[0]; -tank_dim[1]/2; slope_height], slope_width, slope_height)
Drawing_sedslope := sedslope([0; 0; 0], [0; 2.5; 0], [-20; 2.5; 0], [-20; 2.5; 7.5], slope_width, slope_height)
# [component: inputs Drawing_sedslope]
