# Automated Design: AutoCAD: Sedimentation Tank
# References
# [reference: basics.xmcd]
# [reference: pipe.xmcd]
# [reference: elbow.xmcd]
# [reference: Channel.xmcd]
# [reference: tank.xmcd]
# [reference: Manifold.xmcd]
# [reference: Sludge.xmcd]
# [reference: inputs.xmcd]
# [reference: lamina.xmcd]
# [reference: SedTankslopes.xmcd]
# Pipe origins
sedtankpipe1_origin := [
    tank_origin[0] - tank_dim[0] + channel_dim[1]/2;
    tank_origin[1] + tank_dim[1]/2 + outerradius(2*manifold_inr) + 3*(tank_dim[1]/2 - outerradius(2*manifold_inr))/4;
    tank_origin[2] + tank_dim[2] - channel_dim[2]
]
sedtankpipe2_origin := [
    tank_origin[0] - tank_dim[0] + channel_dim[1]/2;
    tank_origin[1] + tank_dim[1]/2 + outerradius(2*manifold_inr) + 1*(tank_dim[1]/2 - outerradius(2*manifold_inr))/4;
    tank_origin[2] + tank_dim[2] - channel_dim[2]
]
sedtankpipe3_origin := [
    tank_origin[0] - tank_dim[0] + channel_dim[1]/2;
    tank_origin[1] + tank_dim[1]/2 - outerradius(2*manifold_inr) - 1*(tank_dim[1]/2 - outerradius(2*manifold_inr))/4;
    tank_origin[2] + tank_dim[2] - channel_dim[2]
]
sedtankpipe4_origin := [
    tank_origin[0] - tank_dim[0] + channel_dim[1]/2;
    tank_origin[1] + tank_dim[1]/2 - outerradius(2*manifold_inr) - 3*(tank_dim[1]/2 - outerradius(2*manifold_inr))/4;
    tank_origin[2] + tank_dim[2] - channel_dim[2]
]
sedtankpipe5_origin := [
    tank_origin[0] - tank_dim[0] + channel_dim[1]/2 + ElbowRadius(2*sedpipe_inr);
    tank_origin[1] + tank_dim[1]/2 + outerradius(2*manifold_inr) + 3*(tank_dim[1]/2 - outerradius(2*manifold_inr))/4;
    tank_origin[2] + sedtankpipe9_length + offfloor_length + ElbowRadius(2*sedpipe_inr)
]
sedtankpipe6_origin := [
    tank_origin[0] - tank_dim[0] + channel_dim[1]/2 + ElbowRadius(2*sedpipe_inr);
    tank_origin[1] + tank_dim[1]/2 + outerradius(2*manifold_inr) + 1*(tank_dim[1]/2 - outerradius(2*manifold_inr))/4;
    tank_origin[2] + sedtankpipe9_length + offfloor_length + ElbowRadius(2*sedpipe_inr)
]
sedtankpipe7_origin := [
    tank_origin[0] - tank_dim[0] + channel_dim[1]/2 + ElbowRadius(2*sedpipe_inr);
    tank_origin[1] + tank_dim[1]/2 - outerradius(2*manifold_inr) - 1*(tank_dim[1]/2 - outerradius(2*manifold_inr))/4;
    tank_origin[2] + sedtankpipe9_length + offfloor_length + ElbowRadius(2*sedpipe_inr)
]
sedtankpipe8_origin := [
    tank_origin[0] - tank_dim[0] + channel_dim[1]/2 + ElbowRadius(2*sedpipe_inr);
    tank_origin[1] + tank_dim[1]/2 - outerradius(2*manifold_inr) - 3*(tank_dim[1]/2 - outerradius(2*manifold_inr))/4;
    tank_origin[2] + sedtankpipe9_length + offfloor_length + ElbowRadius(2*sedpipe_inr)
]
sedtankpipe9_origin := [tank_origin[0] - 7*tank_dim[0]/8; tank_origin[1] + tank_dim[1]/2; tank_origin[2] + offfloor_length]
sedtankpipe10_origin := [tank_origin[0] - 5*tank_dim[0]/8; tank_origin[1] + tank_dim[1]/2; tank_origin[2] + offfloor_length]
sedtankpipe11_origin := [tank_origin[0] - 3*tank_dim[0]/8; tank_origin[1] + tank_dim[1]/2; tank_origin[2] + offfloor_length]
sedtankpipe12_origin := [tank_origin[0] - 1*tank_dim[0]/8; tank_origin[1] + tank_dim[1]/2; tank_origin[2] + offfloor_length]
sedtankpipe13_origin := [
    tank_origin[0] - tank_dim[0] + channel_dim[1] + channel_thick + 2*ElbowRadius(2*sedpipe_inr);
    tank_origin[1] + tank_dim[1]/2;
    tank_origin[2] + tank_dim[2] - waterlevel - manifold_depth - ElbowRadius(2*sedpipe_inr)
]
sedtankpipe14_origin := [
    tank_origin[0] - tank_dim[0];
    tank_origin[1] + tank_dim[1]/2;
    tank_origin[2] + tank_dim[2] - channel_dim[2] - channel_thick - (2*ElbowRadius(2*sedpipe_inr))
]
sedtankbox1_origin := [
    tank_origin[0] - tank_dim[0];
    tank_origin[1] + tank_dim[1]/2 - outerradius(2*waste_inr);
    tank_origin[2] - (2*outerradius(2*waste_inr))
]
sedtankbox1_dim := [tank_dim[0]; 2*outerradius(2*waste_inr); tank_dim[1]/2/tan(ϕ)]
# Pipe Lengths
sedtankpipe1_length := tank_dim[2] - channel_dim[2] - sedtankpipe9_length - offfloor_length - (2*ElbowRadius(2*sedpipe_inr))
sedtankpipe5_length := ((5*tank_dim[0]/8 - channel_dim[1]/2)^2 + (outerradius(2*manifold_inr) + 3*(tank_dim[1]/2 - outerradius(2*manifold_inr))/4)^2)^(1/2) - 2*ElbowRadius(2*sedpipe_inr)
sedtankpipe6_length := ((tank_dim[0]/8 - channel_dim[1]/2)^2 + (outerradius(2*manifold_inr) + 1*(tank_dim[1]/2 - outerradius(2*manifold_inr))/4)^2)^(1/2) - 2*ElbowRadius(2*sedpipe_inr)
sedtankpipe7_length := ((3*tank_dim[0]/8 - channel_dim[1]/2)^2 + (outerradius(2*manifold_inr) - 1*(tank_dim[1]/2 - outerradius(2*manifold_inr))/4)^2)^(1/2) - 2*ElbowRadius(2*sedpipe_inr)
sedtankpipe8_length := ((7*tank_dim[0]/8 - channel_dim[1]/2)^2 + (outerradius(2*manifold_inr) - 3*(tank_dim[1]/2 - outerradius(2*manifold_inr))/4)^2)^(1/2) - 2*ElbowRadius(2*sedpipe_inr)
sedtankpipe13_length := channel_dim[2] + channel_thick + ElbowRadius(2*sedpipe_inr) - waterlevel - manifold_depth - ElbowRadius(2*sedpipe_inr)
sedtankpipe14_length := channel_dim[1] + channel_thick + ElbowRadius(2*sedpipe_inr)
# Pipe Rotation Angles
sedtankpipe5_angle := -(rad/deg)*atan(((5*tank_dim[0]/8 - channel_dim[1]/2)/((3*(tank_dim[1]/2 - outerradius(2*manifold_inr))/4) + outerradius(2*manifold_inr)))^-1)
sedtankpipe6_angle := -(rad/deg)*((tank_dim[0]/8 - channel_dim[1]/2)/(((tank_dim[1]/2 - outerradius(2*manifold_inr))/4) + outerradius(2*manifold_inr)))^-1
sedtankpipe7_angle := (rad/deg)*atan(((3*tank_dim[0]/8 - channel_dim[1]/2)/(((tank_dim[1]/2 - outerradius(2*manifold_inr))/4) + outerradius(2*manifold_inr)))^-1)
sedtankpipe8_angle := (rad/deg)*atan(((7*tank_dim[0]/8 - channel_dim[1]/2)/((3*(tank_dim[1]/2 - outerradius(2*manifold_inr))/4) + outerradius(2*manifold_inr)))^-1)
# Elbow Origins
sedtankelbow1_origin := [
    tank_origin[0] - tank_dim[0] + channel_dim[1]/2;
    tank_origin[1] + tank_dim[1]/2 + outerradius(2*manifold_inr) + 3*(tank_dim[1]/2 - outerradius(2*manifold_inr))/4 - ElbowRadius(2*sedpipe_inr);
    tank_origin[2] + sedtankpipe9_length + offfloor_length + 2*ElbowRadius(2*sedpipe_inr)
]
sedtankelbow2_origin := [
    tank_origin[0] - tank_dim[0] + channel_dim[1]/2;
    tank_origin[1] + tank_dim[1]/2 + outerradius(2*manifold_inr) + 1*(tank_dim[1]/2 - outerradius(2*manifold_inr))/4 - ElbowRadius(2*sedpipe_inr);
    tank_origin[2] + sedtankpipe9_length + offfloor_length + 2*ElbowRadius(2*sedpipe_inr)
]
sedtankelbow3_origin := [
    tank_origin[0] - tank_dim[0] + channel_dim[1]/2;
    tank_origin[1] + tank_dim[1]/2 - outerradius(2*manifold_inr) - 1*(tank_dim[1]/2 - outerradius(2*manifold_inr))/4 - ElbowRadius(2*sedpipe_inr);
    tank_origin[2] + sedtankpipe9_length + offfloor_length + 2*ElbowRadius(2*sedpipe_inr)
]
sedtankelbow4_origin := [
    tank_origin[0] - tank_dim[0] + channel_dim[1]/2;
    tank_origin[1] + tank_dim[1]/2 - outerradius(2*manifold_inr) - 3*(tank_dim[1]/2 - outerradius(2*manifold_inr))/4 - ElbowRadius(2*sedpipe_inr);
    tank_origin[2] + sedtankpipe9_length + offfloor_length + 2*ElbowRadius(2*sedpipe_inr)
]
sedtankelbow5_origin := [
    tank_origin[0] - 7*tank_dim[0]/8 - ElbowRadius(2*sedpipe_inr);
    tank_origin[1] + tank_dim[1]/2 - ElbowRadius(2*sedpipe_inr);
    tank_origin[2] + offfloor_length + sedtankpipe9_length + ElbowRadius(2*sedpipe_inr)
]
sedtankelbow6_origin := [
    tank_origin[0] - 5*tank_dim[0]/8 - ElbowRadius(2*sedpipe_inr);
    tank_origin[1] + tank_dim[1]/2 - ElbowRadius(2*sedpipe_inr);
    tank_origin[2] + offfloor_length + sedtankpipe9_length + ElbowRadius(2*sedpipe_inr)
]
sedtankelbow7_origin := [
    tank_origin[0] - 3*tank_dim[0]/8 - ElbowRadius(2*sedpipe_inr);
    tank_origin[1] + tank_dim[1]/2 - ElbowRadius(2*sedpipe_inr);
    tank_origin[2] + offfloor_length + sedtankpipe9_length + ElbowRadius(2*sedpipe_inr)
]
sedtankelbow8_origin := [
    tank_origin[0] - 1*tank_dim[0]/8 - ElbowRadius(2*sedpipe_inr);
    tank_origin[1] + tank_dim[1]/2 - ElbowRadius(2*sedpipe_inr);
    tank_origin[2] + offfloor_length + sedtankpipe9_length + ElbowRadius(2*sedpipe_inr)
]
sedtankelbow9_origin := [
    tank_origin[0] - tank_dim[0] + channel_dim[1] + channel_thick + 2*ElbowRadius(2*manifold_inr);
    tank_origin[1] + tank_dim[1]/2 - ElbowRadius(2*manifold_inr);
    tank_origin[2] + tank_dim[2] - waterlevel - manifold_depth - ElbowRadius(2*manifold_inr)
]
sedtankelbow10_origin := [
    tank_origin[0] - tank_dim[0] + channel_dim[1] + channel_thick + ElbowRadius(2*manifold_inr);
    tank_origin[1] + tank_dim[1]/2 - ElbowRadius(2*manifold_inr);
    tank_origin[2] + tank_dim[2] - channel_dim[2] - channel_thick - 2*ElbowRadius(2*manifold_inr)
]
# Sedtank Scripts
Sedtankscript1 :=
    layer1 ← layer_new("tank", grey)
    tank1 ← Tank(tank_origin, tank_dim, tank_thick)
    cylinder5 ← cylinderA(sedtankpipe14_origin, outerradius(2*manifold_inr), -tank_thick)
    rotate2 ← rotate_3d([sedtankpipe14_origin[0] + manifold_inr; sedtankpipe14_origin[1]; sedtankpipe14_origin[2]], sedtankpipe14_origin, "y", 90)
    subtract2 ← subtractD(tank_origin, [sedtankpipe14_origin[0]; sedtankpipe14_origin[1] + manifold_inr; sedtankpipe1_origin[2]])
    holes1 ← concat(cylinder5, rotate2)
    layerset ← layer_set("0")
    layerfreeze1 ← layer_freeze("tank")
    layerslopes ← layer_new("slopes", ltgrey)
    slopes ← sedslope(tank_origin, tank_dim, ϕ)
    box1 ← box(sedtankbox1_origin, [
        sedtankbox1_origin[0] + sedtankbox1_dim[0];
        sedtankbox1_origin[1] + sedtankbox1_dim[1];
        sedtankbox1_origin[2] + sedtankbox1_dim[2]
    ])
    tankthaw ← layer_thaw("tank")
    subtractbox ← subtractJ(tank_origin, [tank_origin[0]; tank_origin[1] + tank_dim[1]; tank_origin[2]], [tank_origin[0]; tank_origin[1] - tank_thick; tank_origin[2]], sedtankbox1_origin)
    layerfreezeslope ← layer_freeze("slopes")
    layer2 ← layer_new("channel", ltgrey)
    channel1 ← ChannelDrawing(channel_origin, channel_dim, channel_thick)
    rotate1 ← rotate(channel_origin, 90)
    cylinder1 ← cylinderA(sedtankpipe1_origin, outerradius(2*sedpipe_inr), -channel_thick)
    cylinder2 ← cylinderA(sedtankpipe2_origin, outerradius(2*sedpipe_inr), -channel_thick)
    cylinder3 ← cylinderC(sedtankpipe3_origin, outerradius(2*sedpipe_inr), -channel_thick)
    cylinder4 ← cylinderA(sedtankpipe4_origin, outerradius(2*sedpipe_inr), -channel_thick)
    subtract1 ← subtractH(channel_origin, [
        sedtankpipe1_origin[0] + outerradius(sedpipe_inr);
        sedtankpipe1_origin[1] + outerradius(sedpipe_inr);
        sedtankpipe1_origin[2]
    ], [
        sedtankpipe4_origin[0] - outerradius(sedpipe_inr);
        sedtankpipe4_origin[1] - outerradius(sedpipe_inr);
        sedtankpipe4_origin[2]
    ])
    holes2 ← concat(cylinder1, cylinder2, cylinder3)
    holes3 ← concat(cylinder4, subtract1)
    layerfreeze2 ← layer_freeze("channel")
    one ← stack(layer1, tank1, holes1, subtract2, layerset, layerfreeze1, layerslopes, slopes, box1, tankthaw, viewtop1, subtractbox, layerset, layerfreezeslope, layer2, channel1, rotate1, viewtop1, holes2, holes3, layerset, layerfreeze2)
    return one
Sedtankscript2 :=
    layerset ← layer_set("0")
    layer3 ← layer_new("pipe", blue)
    pipe1 ← Pipe(sedtankpipe1_origin, sedpipe_inr, -sedtankpipe1_length)
    pipe2 ← Pipe(sedtankpipe2_origin, sedpipe_inr, -sedtankpipe1_length)
    pipe3 ← Pipe(sedtankpipe3_origin, sedpipe_inr, -sedtankpipe1_length)
    pipe4 ← Pipe(sedtankpipe4_origin, sedpipe_inr, -sedtankpipe1_length)
    pipe5 ← Pipe(sedtankpipe5_origin, sedpipe_inr, sedtankpipe5_length)
    rotate2 ← rotate_3d([sedtankpipe5_origin[0] + sedpipe_inr; sedtankpipe5_origin[1]; sedtankpipe5_origin[2]], sedtankpipe5_origin, "y", 90)
    rotate2a ← rotate_3d([sedtankpipe5_origin[0]; sedtankpipe5_origin[1] + sedpipe_inr; sedtankpipe5_origin[2] + sedpipe_inr], sedtankpipe1_origin, "z", sedtankpipe5_angle)
    pipe6 ← Pipe(sedtankpipe6_origin, sedpipe_inr, sedtankpipe6_length)
    rotate3 ← rotate_3d([sedtankpipe6_origin[0] + sedpipe_inr; sedtankpipe6_origin[1]; sedtankpipe6_origin[2]], sedtankpipe6_origin, "y", 90)
    rotate3a ← rotate_3d([sedtankpipe6_origin[0]; sedtankpipe6_origin[1] + sedpipe_inr; sedtankpipe6_origin[2] + sedpipe_inr], sedtankpipe2_origin, "z", sedtankpipe6_angle)
    pipe7 ← Pipe(sedtankpipe7_origin, sedpipe_inr, sedtankpipe7_length)
    rotate4 ← rotate_3d([sedtankpipe7_origin[0] + sedpipe_inr; sedtankpipe7_origin[1]; sedtankpipe7_origin[2]], sedtankpipe7_origin, "y", 90)
    rotate4a ← rotate_3d([sedtankpipe7_origin[0]; sedtankpipe7_origin[1] + sedpipe_inr; sedtankpipe7_origin[2] + sedpipe_inr], sedtankpipe3_origin, "z", sedtankpipe7_angle)
    pipe8 ← Pipe(sedtankpipe8_origin, sedpipe_inr, sedtankpipe8_length)
    rotate5 ← rotate_3d([sedtankpipe8_origin[0] + sedpipe_inr; sedtankpipe8_origin[1]; sedtankpipe8_origin[2]], sedtankpipe8_origin, "y", 90)
    rotate5a ← rotate_3d([sedtankpipe8_origin[0]; sedtankpipe8_origin[1] + sedpipe_inr; sedtankpipe8_origin[2] + sedpipe_inr], sedtankpipe4_origin, "z", sedtankpipe8_angle)
    pipe9 ← Pipe(sedtankpipe9_origin, sedpipe_inr, sedtankpipe9_length)
    pipe10 ← Pipe(sedtankpipe10_origin, sedpipe_inr, sedtankpipe9_length)
    pipe11 ← Pipe(sedtankpipe11_origin, sedpipe_inr, sedtankpipe9_length)
    pipe12 ← Pipe(sedtankpipe12_origin, sedpipe_inr, sedtankpipe9_length)
    pipe13 ← Pipe(sedtankpipe13_origin, manifold_inr, -sedtankpipe13_length)
    pipe14 ← Pipe(sedtankpipe14_origin, manifold_inr, sedtankpipe14_length)
    rotate6 ← rotate_3d([sedtankpipe14_origin[0] + sedpipe_inr; sedtankpipe14_origin[1]; sedtankpipe14_origin[2]], sedtankpipe14_origin, "y", 90)
    layerfreeze3 ← layer_freeze("pipe")
    one ← stack(layer3, pipe1, pipe2, pipe3, pipe4, pipe5, rotate2, rotate2a, pipe6, rotate3, rotate3a, pipe7, rotate4, rotate4a, pipe8, rotate5, rotate5a, pipe9, pipe10, pipe11, pipe12, pipe13, pipe14, rotate6, layerset, layerfreeze3)
    return one
# pipe2_origin | pipe3_origin | pipe11_origin | pipe14_origin | pipe6_1ength | pipe7_length | pipe8_length | pipe13_length | pipe14_length
# pipe4_origin | pipe5_origin | pipe6_origin | pipe7_origin | pipe8_origin | pipe9_origin | pipe10_origin | pipe13_origin | pipe1_length | pipe5_1ength
pipe12_origin
Sedtankscript3 :=
    layer4 ← layer_new("elbow", green)
    elbow1 ← elbow(sedtankelbow1_origin, sedpipe_inr)
    rotate6 ← rotate_3d([
        sedtankelbow1_origin[0];
        sedtankelbow1_origin[1] + ElbowRadius(2*sedpipe_inr);
        sedtankelbow1_origin[2] + sedpipe_inr
    ], [
        sedtankelbow1_origin[0];
        sedtankelbow1_origin[1] + ElbowRadius(2*sedpipe_inr);
        sedtankelbow1_origin[2]
    ], "x", -90)
    rotate7 ← rotate_3d([
        sedtankelbow1_origin[0];
        sedtankelbow1_origin[1] + ElbowRadius(2*sedpipe_inr);
        sedtankelbow1_origin[2] + sedpipe_inr
    ], [
        sedtankelbow1_origin[0];
        sedtankelbow1_origin[1] + ElbowRadius(2*sedpipe_inr);
        sedtankelbow1_origin[2]
    ], "y", 90)
    copy1 ← copyDa([
        sedtankpipe5_origin[0];
        sedtankpipe5_origin[1];
        sedtankpipe5_origin[2] - outerradius(2*sedpipe_inr)
    ], sedtankpipe5_origin, sedtankpipe6_origin, sedtankpipe7_origin, sedtankpipe8_origin)
    rotate8 ← rotate_3d([
        sedtankpipe5_origin[0];
        sedtankpipe5_origin[1];
        sedtankpipe5_origin[2] - outerradius(2*sedpipe_inr)
    ], sedtankpipe1_origin, "z", sedtankpipe5_angle)
    rotate9 ← rotate_3d([
        sedtankpipe6_origin[0];
        sedtankpipe6_origin[1];
        sedtankpipe6_origin[2] - outerradius(2*sedpipe_inr)
    ], sedtankpipe2_origin, "z", sedtankpipe6_angle)
    rotate10 ← rotate_3d([
        sedtankpipe7_origin[0];
        sedtankpipe7_origin[1];
        sedtankpipe7_origin[2] - outerradius(2*sedpipe_inr)
    ], sedtankpipe3_origin, "z", sedtankpipe7_angle)
    rotate11 ← rotate_3d([
        sedtankpipe8_origin[0];
        sedtankpipe8_origin[1];
        sedtankpipe8_origin[2] - outerradius(2*sedpipe_inr)
    ], sedtankpipe4_origin, "z", sedtankpipe8_angle)
    layerset ← layer_set("0")
    layerfreeze4 ← layer_freeze("elbow")
    layer5 ← layer_new("elbowa", green)
    elbow5 ← elbow(sedtankelbow5_origin, sedpipe_inr)
    rotate14 ← rotate_3d([
        sedtankelbow5_origin[0];
        sedtankelbow5_origin[1] + ElbowRadius(2*sedpipe_inr);
        sedtankelbow5_origin[2] + sedpipe_inr
    ], [
        sedtankelbow5_origin[0];
        sedtankelbow5_origin[1] + ElbowRadius(2*sedpipe_inr);
        sedtankelbow5_origin[2]
    ], "x", 90)
    copy2 ← copyDa([
        sedtankpipe9_origin[0] - ElbowRadius(2*sedpipe_inr);
        sedtankpipe9_origin[1];
        sedtankpipe9_origin[2]
    ], sedtankelbow5_origin, sedtankelbow6_origin, sedtankelbow7_origin, sedtankelbow8_origin)
    rotate15 ← rotate_3d([
        sedtankpipe9_origin[0];
        sedtankpipe9_origin[1] - outerradius(2*sedpipe_inr);
        sedtankpipe9_origin[2]
    ], sedtankpipe9_origin, "z", sedtankpipe6_angle)
    rotate16 ← rotate_3d([
        sedtankpipe10_origin[0];
        sedtankpipe10_origin[1] - outerradius(2*sedpipe_inr);
        sedtankpipe10_origin[2]
    ], sedtankpipe10_origin, "z", sedtankpipe7_angle)
    rotate17 ← rotate_3d([
        sedtankpipe11_origin[0];
        sedtankpipe11_origin[1] - outerradius(2*sedpipe_inr);
        sedtankpipe11_origin[2]
    ], sedtankpipe11_origin, "z", sedtankpipe5_angle)
    rotate18 ← rotate_3d([
        sedtankpipe12_origin[0];
        sedtankpipe12_origin[1] - outerradius(2*sedpipe_inr);
        sedtankpipe12_origin[2]
    ], sedtankpipe12_origin, "z", sedtankpipe8_angle)
    layerset ← layer_set("0")
    layerfreeze5 ← layer_freeze("elbowa")
    layer6 ← layer_new("elbowb", green)
    elbow9 ← elbow(sedtankelbow9_origin, manifold_inr)
    rotate19 ← rotate_3d([
        sedtankelbow9_origin[0];
        sedtankelbow9_origin[1] + ElbowRadius(2*manifold_inr);
        sedtankelbow9_origin[2] + manifold_inr
    ], [
        sedtankelbow9_origin[0];
        sedtankelbow9_origin[1] + ElbowRadius(2*manifold_inr);
        sedtankelbow9_origin[2]
    ], "z", 90)
    rotate20 ← rotate_3d([
        sedtankelbow9_origin[0];
        sedtankelbow9_origin[1] + ElbowRadius(2*manifold_inr);
        sedtankelbow9_origin[2] + sedpipe_inr
    ], [
        sedtankelbow9_origin[0];
        sedtankelbow9_origin[1] + ElbowRadius(2*manifold_inr);
        sedtankelbow9_origin[2]
    ], "x", 90)
    elbow10 ← elbow(sedtankelbow10_origin, manifold_inr)
    rotate21 ← rotate_3d([
        sedtankelbow10_origin[0];
        sedtankelbow10_origin[1] + ElbowRadius(2*manifold_inr);
        sedtankelbow10_origin[2] + sedpipe_inr
    ], [
        sedtankelbow10_origin[0];
        sedtankelbow10_origin[1] + ElbowRadius(2*manifold_inr);
        sedtankelbow10_origin[2]
    ], "x", -90)
    layerset ← layer_set("0")
    layerfreeze6 ← layer_freeze("elbowb")
    one ← stack(layer4, elbow1, rotate6, rotate7, copy1, viewtop1, rotate8, rotate9, rotate10, rotate11, layerset, layerfreeze4)
    two ← stack(layer5, elbow5, rotate14, copy2, viewtop1, rotate15, rotate16, rotate17, rotate18, layerset, layerfreeze5)
    three ← stack(layer6, elbow9, rotate19, rotate20, elbow10, rotate21, layerset, layerfreeze6)
    return stack(one, two)
# elbow3_origin | elbow4_origin | elbow5_origin | elbow7_origin | elbow9_origin | elbow10_origin
# elbow6_origin | elbow8_origin
Sedtankscript4(blue2, blue3, purple, tank_origin, tank_dim, tank_thick, channel_origin, channel_dim, channel_thick, manifold_origin, waste_origin, manifold_inr, manifold_outr, manifoldorifice_rad, manifoldorifice_dist, waste_inr, waste_outr, wasteorifice_rad, wasteorifice_dist, L, lamina_origin, lamina_amp, lamina_width, lamina_length, lamina_thick, lamina_periods, lamina_slope, lamina_num, lamina_col, lamina_x, lamina_y) :=
    layer5 ← layer_new("manifold", blue2)
    manifold1 ← Manifold(manifold_origin, manifold_inr, manifoldorifice_rad, L, manifoldorifice_dist)
    rotate18 ← rotate_3d([manifold_origin[0] + manifold_inr; manifold_origin[1]; manifold_origin[2]], manifold_origin, "y", 90)
    rotate19 ← rotate_3d([manifold_origin[0]; manifold_origin[1] + manifold_inr; manifold_origin[2]], manifold_origin, "x", -60)
    layerset ← layer_set("0")
    layerfreeze5 ← layer_freeze("manifold")
    layer6 ← layer_new("sludgepipe", blue3)
    sludgepipe1 ← Sludgepipe(waste_origin, waste_inr, tank_dim[0], wasteorifice_rad, wasteorifice_dist)
    rotate20 ← rotate_3d([waste_origin[0] + waste_inr; waste_origin[1]; waste_origin[2]], waste_origin, "y", 90)
    rotate21 ← rotate_3d([waste_origin[0]; waste_origin[1] + waste_inr; waste_origin[2]], waste_origin, "x", 90)
    layerfreeze6 ← layer_freeze("sludgepipe")
    layer7 ← layer_new("lamina", purple)
    lamina1 ← lamina(lamina_origin, lamina_amp, lamina_width, lamina_length, lamina_thick, lamina_periods, lamina_slope, lamina_num, lamina_col, lamina_x, lamina_y)
    layerfreeze7 ← layer_freeze("lamina")
    one ← stack(layer5, manifold1, rotate18, rotate19, layerset, layerfreeze5)
    two ← stack(layer6, sludgepipe1, rotate20, rotate21, layerset, layerfreeze6, layer7, lamina1, layerset, layerfreeze7)
    return stack(one, two)
Sedtank4A(blue2, blue3, purple, tank_origin, tank_dim, tank_thick, channel_dim, channel_thick, manifold_depth, manifold_inr, manifold_outr, waste_inr, waste_outr, lamina_origin, lamina_amp, lamina_width, lamina_length, lamina_thick, lamina_periods, lamina_slope, lamina_num, lamina_col, lamina_x, lamina_y) := Sedtankscript4(blue2, blue3, purple, tank_origin, tank_dim, tank_thick, [
    tank_origin[0] - tank_dim[0] + channel_dim[1];
    tank_origin[1] - tank_thick;
    tank_origin[2] + tank_dim[2] - channel_dim[2]
], channel_dim, channel_thick, [
    tank_origin[0] - tank_dim[0] + channel_dim[1] + channel_thick + 3*ElbowRadius(2*manifold_inr);
    tank_origin[1] + tank_dim[1]/2;
    tank_origin[2] + tank_dim[2] - waterlevel - manifold_depth
], [tank_origin[0] - tank_dim[0]; tank_origin[1] + tank_dim[1]/2; tank_origin[2] - waste_inr], manifold_inr, manifold_outr, manifoldorifice_rad, manifoldorifice_dist, waste_inr, waste_outr, wasteorifice_rad, wasteorifice_dist, tank_dim[0] - channel_dim[1] - channel_thick - 3*ElbowRadius(2*manifold_inr), lamina_origin, lamina_amp, lamina_width, lamina_length, lamina_thick, lamina_periods, lamina_slope, lamina_num, lamina_col, lamina_x, lamina_y)
# manifold_origin | waste_origin
Sedtank4(blue2, blue3, purple, tank_origin, tank_dim, tank_thick, channel_dim, channel_thick, manifold_depth, manifold_inr, waste_inr, manifoldorifice_rad, manifoldorifice_dist, wasteorifice_rad, wasteorifice_dist) := Sedtank4A(blue2, blue3, purple, tank_origin, tank_dim, tank_thick, channel_dim, channel_thick, manifold_depth, manifold_inr, outerradius(2*manifold_inr), waste_inr, outerradius(2*waste_inr), lamina_origin, lamina_amp, lamina_width, lamina_length, lamina_thick, lamina_periods, lamina_slope, lamina_num, lamina_col, lamina_x, lamina_y)
Sedtankscript5(tank_origin, box_origin, box_dim, num_tanks, array_dist) :=
    layerthaw1 ← layer_thaw("slopes")
    layerthaw2 ← layer_thaw("channel")
    layerthaw3 ← layer_thaw("pipe")
    layerthaw4 ← layer_thaw("elbow")
    layerthaw5 ← layer_thaw("manifold")
    layerthaw6 ← layer_thaw("sludgepipe")
    layerthaw7 ← layer_thaw("lamina")
    viewtop ← viewtop1
    arraytank1 ← concat("-array", sp, "ALL", sp, sp, "r", sp, stringit_nounits(num_tanks), sp, "1", sp, stringit(array_dist))
    layerfreeze7 ← layer_freeze("pipe")
    layerfreeze8 ← layer_freeze("elbow")
    layerfreeze9 ← layer_freeze("sludgepipe")
    layerfreeze10 ← layer_freeze("manifold")
    layerfreeze12 ← layer_freeze("lamina")
    union1 ← concat("_union", sp, "ALL", sp)
    box1 ← box(box_origin, [box_origin[0] + box_dim[0]; box_origin[1] + box_dim[1]; box_origin[2] + box_dim[2]])
    subtract1 ← subtractD(tank_origin, box_origin)
    layerfreeze11 ← layer_freeze("channel")
    one ← stack(layerthaw1, layerthaw2, layerthaw3, layerthaw4, layerthaw5, layerthaw6, layerthaw7)
    two ← stack(viewtop, arraytank1, layerfreeze7, layerfreeze8, layerfreeze9, layerfreeze10, layerfreeze12, union1, viewtop, box1, subtract1, layerfreeze11)
    return stack(one, two)
Sedtank5(tank_origin, channel_dim, num_tanks, tank_dim, tank_thick) := Sedtankscript5(tank_origin, [tank_origin[0] - tank_dim[0]; tank_origin[1]; tank_origin[2] + tank_dim[2] - channel_dim[2]], [channel_dim[1]; 3*channel_dim[0] - 3*tank_thick; channel_dim[2]], num_tanks, tank_dim[1] + tank_thick)
# box_origin | box_dim
Sedtank := stack(Sedtankscript1, Sedtankscript2, Sedtankscript3)
Drawing_Sedtank := Sedtank
# [component: inputs Drawing_Sedtank]
