## References
# [reference: cross.xmcd]
# [reference: Tee.xmcd]
# [reference: elbow.xmcd]
# [reference: pipe.xmcd]
# [reference: tank.xmcd]
# [reference: basics.xmcd]
# [reference: inputs.xmcd]
# [reference: Sludge.xmcd]
## Origins
origin := grit_origin
grittank_origin := [
    origin[0] - Δx_grit - grit_thick;
    origin[1] + Δy_grit + grit_thick;
    origin[2] + Δz_grit + platform_thick
]
## Pipe Origins
pipe2_origin := [
    origin[0] - gritdisp1 - ElbowRadius(2*gritpipe_inr);
    origin[1];
    origin[2] + ElbowRadius(2*gritpipe_inr)
]
pipe3_origin := [
    origin[0] - gritdisp1 - 2*ElbowRadius(2*gritpipe_inr);
    origin[1];
    origin[2] + Δz_grit - ElbowRadius(2*gritpipe_inr) - SocketDepth(2*gritpipe_inr)
]
pipe4_origin := [
    origin[0] - Δx_grit - 2*grit_thick - grit_dim[0] - ShortTeeLength(2*gritpipe_inr) - SocketDepth(2*gritpipe_inr);
    origin[1] + Δy_grit + grit_thick + grit_dim[1]/2;
    origin[2] + Δz_grit + platform_thick + grit_dim[2]/2 + TeeLength(2*gritpipe_inr)/2
]
pipe5_origin := [
    origin[0] - Δx_grit - 2*grit_thick - grit_dim[0] - ShortTeeLength(2*gritpipe_inr) - SocketDepth(2*gritpipe_inr);
    origin[1] + Δy_grit + grit_thick + grit_dim[1]/2;
    origin[2] + Δz_grit - SocketDepth(2*gritpipe_inr)
]
pipe6_origin := [
    origin[0] - Δx_grit - grit_thick - grit_dim[0];
    origin[1] + Δy_grit + grit_thick + grit_dim[1]/2;
    origin[2] + Δz_grit + platform_thick + grit_dim[2]/2
]
pipe7_origin := [
    origin[0] - Δx_grit - grit_thick - grit_dim[0] + gritdisp2 + CrossLength(2*gritpipe_inr);
    origin[1] + Δy_grit + grit_thick + grit_dim[1]/2;
    origin[2] + Δz_grit + platform_thick + grit_dim[2]/2
]
riser1_origin := [
    pipe7_origin[0] + ShortTeeLength(2*gritpipe_inr) + 2*SocketDepth(2*gritpipe_inr);
    pipe7_origin[1] - TeeLength(2*gritpipe_inr)/2 - ElbowRadius(2*gritpipe_inr) - 2*SocketDepth(2*gritpipe_inr);
    pipe7_origin[2] + ElbowRadius(2*gritpipe_inr)
]
## Elbow Origins
elbow1_origin := [origin[0] - gritdisp1 - ElbowRadius(2*gritpipe_inr); origin[1]; origin[2]]
elbow2_origin := [
    pipe2_origin[0] - ElbowRadius(2*gritpipe_inr);
    pipe2_origin[1];
    pipe2_origin[2] + Δz_grit - 3*ElbowRadius(2*gritpipe_inr) - SocketDepth(2*gritpipe_inr)
]
elbow3_origin := [pipe5_origin[0]; pipe5_origin[1]; pipe5_origin[2] - ElbowRadius(2*gritpipe_inr)]
elbow4_origin := [
    pipe7_origin[0] - CrossLength(2*gritpipe_inr)/2 - ElbowRadius(2*gritpipe_inr);
    pipe7_origin[1] - CrossLength(2*gritpipe_inr)/2 - 2*SocketDepth(2*gritpipe_inr);
    pipe7_origin[2]
]
## Tee Origins
tee1_origin := pipe4_origin
tee2_origin := [
    pipe7_origin[0] + (ShortTeeLength(2*gritpipe_inr) + 2*SocketDepth(2*gritpipe_inr));
    pipe7_origin[1];
    pipe7_origin[2] - TeeLength(2*gritpipe_inr)/2
]
## Pipe Lengths
pipe1_length := gritdisp1
pipe2_length := Δz_grit - 3*ElbowRadius(2*gritpipe_inr) - SocketDepth(2*gritpipe_inr)
pipe3_length := ((Δx_grit + 2*grit_thick + grit_dim[0] + ShortTeeLength(2*gritpipe_inr) + SocketDepth(2*gritpipe_inr) - ElbowRadius(2*gritpipe_inr) - gritdisp1)^2 + (Δy_grit + grit_thick + grit_dim[1]/2)^2)^.5 - 2*ElbowRadius(2*gritpipe_inr)
pipe4_length := grit_dim[2]/2
pipe5_length := platform_thick + grit_dim[2]/2 - TeeLength(2*gritpipe_inr)/2
pipe6_length := gritdisp2
pipe7_length := 2*SocketDepth(2*gritpipe_inr)
Grit_script :=
    layer1 ← layer_new("grit-pipe", blue)
    Pipe1 ← Pipe(origin, gritpipe_inr, pipe1_length)
    Rotate1 ← rotate_3d([origin[0] + gritpipe_inr; origin[1]; origin[2]], origin, "y", -90)
    Pipe2 ← Pipe(pipe2_origin, gritpipe_inr, pipe2_length)
    Pipe3 ← Pipe(pipe3_origin, gritpipe_inr, pipe3_length)
    Rotate2 ← rotate_3d([pipe3_origin[0] + gritpipe_inr; pipe3_origin[1]; pipe3_origin[2]], pipe3_origin, "y", -90)
    layer2 ← layer_new("grit-elbow", green)
    layer3 ← layer_freeze("grit-pipe")
    elbow1 ← elbow(elbow1_origin, gritpipe_inr)
    Rotate3 ← rotate_3d([elbow1_origin[0] + ElbowRadius(2*gritpipe_inr); elbow1_origin[1]; elbow1_origin[2]], [elbow1_origin[0] + ElbowRadius(2*gritpipe_inr); elbow1_origin[1]; elbow1_origin[2]], "z", 90)
    Rotate4 ← rotate_3d([elbow1_origin[0] + ElbowRadius(2*gritpipe_inr); elbow1_origin[1]; elbow1_origin[2]], [elbow1_origin[0] + ElbowRadius(2*gritpipe_inr); elbow1_origin[1]; elbow1_origin[2]], "x", -90)
    elbow2 ← elbow(elbow2_origin, gritpipe_inr)
    Rotate5 ← rotate_3d([elbow2_origin[0] + ElbowRadius(2*gritpipe_inr); elbow2_origin[1]; elbow2_origin[2]], elbow2_origin, "x", 90)
    layer4 ← layer_thaw("grit-pipe")
    Rotate6 ← rotate_3dA([pipe3_origin[0]; pipe3_origin[1] - ConRadius(2*gritpipe_inr) - zc; pipe3_origin[2]], [
        pipe3_origin[0] - SocketDepth(2*gritpipe_inr) - zc;
        pipe3_origin[1] + ConRadius(2*gritpipe_inr) + zc;
        pipe3_origin[2]
    ], [
        pipe2_origin[0];
        pipe2_origin[1];
        pipe2_origin[2] + Δz_grit - 3*ElbowRadius(2*gritpipe_inr) - SocketDepth(2*gritpipe_inr)
    ], "z", -(90 - atan((Δx_grit + 2*grit_thick + grit_dim[0] + ShortTeeLength(2*gritpipe_inr) + SocketDepth(2*gritpipe_inr) - ElbowRadius(2*gritpipe_inr) - gritdisp1)/(Δy_grit + grit_thick + grit_dim[1]/2))*180/π))
    elbow3 ← elbow(elbow3_origin, gritpipe_inr)
    Rotate7 ← rotate_3d([elbow3_origin[0] + ElbowRadius(2*gritpipe_inr); elbow3_origin[1]; elbow3_origin[2]], [elbow3_origin[0] + ElbowRadius(2*gritpipe_inr); elbow3_origin[1]; elbow3_origin[2]], "z", 90)
    Rotate8 ← rotate_3d([elbow3_origin[0] + ElbowRadius(2*gritpipe_inr); elbow3_origin[1]; elbow3_origin[2]], [elbow3_origin[0] + ElbowRadius(2*gritpipe_inr); elbow3_origin[1]; elbow3_origin[2]], "x", -90)
    Rotate9 ← rotate_3d(pipe5_origin, pipe5_origin, "z", -atan((Δy_grit + grit_thick + grit_dim[1]/2)/(Δx_grit + 2*grit_thick + grit_dim[0] + ShortTeeLength(2*gritpipe_inr) + SocketDepth(2*gritpipe_inr) - ElbowRadius(2*gritpipe_inr) - gritdisp1))*180/π)
    layer5 ← layer_set("grit-pipe")
    layer6 ← layer_freeze("grit-elbow")
    Pipe4 ← Pipe(pipe4_origin, gritpipe_inr, pipe4_length)
    Pipe5 ← Pipe(pipe5_origin, gritpipe_inr, pipe5_length)
    Pipe6 ← Pipe(pipe6_origin, gritpipe_inr, pipe6_length)
    Rotate10 ← rotate_3d([pipe6_origin[0] + gritpipe_inr; pipe6_origin[1]; pipe6_origin[2]], pipe6_origin, "y", 90)
    Pipe7 ← Pipe(pipe7_origin, gritpipe_inr, pipe7_length)
    Rotate11 ← rotate_3d([pipe7_origin[0] + gritpipe_inr; pipe7_origin[1]; pipe7_origin[2]], pipe7_origin, "y", 90)
    Pipe8 ← arrayA([pipe7_origin[0]; pipe7_origin[1] + gritpipe_inr; pipe7_origin[2]], [pipe7_origin[0] - CrossLength(2*gritpipe_inr)/2; pipe7_origin[1]; pipe7_origin[2]], 2, -90)
    Pipe9 ← arrayA([pipe7_origin[0]; pipe7_origin[1] + gritpipe_inr; pipe7_origin[2]], [pipe7_origin[0] - CrossLength(2*gritpipe_inr)/2; pipe7_origin[1]; pipe7_origin[2]], 2, 90)
    zoom1 ← zoom_win(grittank_origin, [
        grittank_origin[0] - grit_dim[0];
        grittank_origin[1] + grit_dim[1];
        grittank_origin[2] + grit_dim[2]
    ])
    Pipe_10and11 ← copyG([
        pipe7_origin[0] - CrossLength(2*gritpipe_inr)/2 + outerradius(2*gritpipe_inr);
        pipe7_origin[1] - CrossLength(2*gritpipe_inr)/2;
        pipe7_origin[2]
    ], [
        pipe7_origin[0] - CrossLength(2*gritpipe_inr)/2 + outerradius(2*gritpipe_inr);
        pipe7_origin[1] + CrossLength(2*gritpipe_inr)/2;
        pipe7_origin[2]
    ], [
        pipe7_origin[0] - CrossLength(2*gritpipe_inr)/2;
        pipe7_origin[1] - CrossLength(2*gritpipe_inr)/2;
        pipe7_origin[2]
    ], [
        pipe7_origin[0] + (2*SocketDepth(2*gritpipe_inr) + ShortTeeLength(2*gritpipe_inr));
        pipe7_origin[1] - CrossLength(2*gritpipe_inr)/2;
        pipe7_origin[2]
    ])
    layer7 ← layer_new("grit-riser", blue)
    layer8 ← layer_freeze("grit-pipe")
    Riser1 ← Sludgepipe(riser1_origin, gritpipe_inr, gritriser_h, grit_rad, gritriser_h/grit_holes)
    Riser_234 ← copyD([riser1_origin[0]; riser1_origin[1] - gritpipe_inr; riser1_origin[2]], [riser1_origin[0]; riser1_origin[1] + 2*SocketDepth(2*gritpipe_inr); riser1_origin[2]], [
        -2*SocketDepth(2*gritpipe_inr) - ShortTeeLength(2*gritpipe_inr) - CrossLength(2*gritpipe_inr)/2;
        0;
        0
    ], [0; TeeLength(2*gritpipe_inr) + 2*ElbowRadius(2*gritpipe_inr) + 4*SocketDepth(2*gritpipe_inr); 0], [
        -2*SocketDepth(2*gritpipe_inr) - ShortTeeLength(2*gritpipe_inr) - CrossLength(2*gritpipe_inr)/2;
        TeeLength(2*gritpipe_inr) + 2*ElbowRadius(2*gritpipe_inr) + 4*SocketDepth(2*gritpipe_inr);
        0
    ])
    layer9 ← layer_new("grit-cross", purple)
    layer10 ← layer_freeze("grit-riser")
    cross ← Cross(pipe7_origin, gritpipe_inr)
    Rotate12 ← rotate_3d([pipe7_origin[0]; pipe7_origin[1] + gritpipe_inr; pipe7_origin[2]], pipe7_origin, "y", -90)
    Rotate13 ← rotate_3d([pipe7_origin[0]; pipe7_origin[1] + gritpipe_inr; pipe7_origin[2]], pipe7_origin, "x", -90)
    layer11 ← layer_thaw("grit-elbow")
    layer12 ← layer_set("grit-elbow")
    layer13 ← layer_freeze("grit-cross")
    elbow4 ← elbow(elbow4_origin, gritpipe_inr)
    Rotate14 ← rotate_3d([elbow4_origin[0] + ElbowRadius(2*gritpipe_inr); elbow4_origin[1]; elbow4_origin[2]], [elbow4_origin[0] + ElbowRadius(2*gritpipe_inr); elbow4_origin[1]; elbow4_origin[2]], "z", -180)
    Rotate15 ← rotate_3d([elbow4_origin[0] + ElbowRadius(2*gritpipe_inr); elbow4_origin[1]; elbow4_origin[2]], [elbow4_origin[0] + ElbowRadius(2*gritpipe_inr); elbow4_origin[1]; elbow4_origin[2]], "y", -90)
    elbow5 ← copyF([elbow4_origin[0] + ElbowRadius(2*gritpipe_inr); elbow4_origin[1]; elbow4_origin[2]], [elbow4_origin[0] + ElbowRadius(2*gritpipe_inr); elbow4_origin[1]; elbow4_origin[2]], [
        CrossLength(2*gritpipe_inr)/2 + ShortTeeLength(2*gritpipe_inr) + 2*SocketDepth(2*gritpipe_inr);
        0;
        0
    ])
    elbow_67 ← mirrorC([elbow4_origin[0] + ElbowRadius(2*gritpipe_inr); elbow4_origin[1]; elbow4_origin[2]], [
        pipe7_origin[0] + ShortTeeLength(2*gritpipe_inr) + 2*SocketDepth(2*gritpipe_inr);
        pipe7_origin[1] - CrossLength(2*gritpipe_inr)/2 - 2*SocketDepth(2*gritpipe_inr);
        pipe7_origin[2]
    ], [pipe7_origin[0]; pipe7_origin[1]], [pipe7_origin[0] + CrossLength(2*gritpipe_inr); pipe7_origin[1]])
    layer14 ← layer_new("grit-tee", blue3)
    layer15 ← layer_freeze("grit-elbow")
    Tee1 ← Tee(tee1_origin, gritpipe_inr)
    move ← move([tee1_origin[0]; tee1_origin[1] + gritpipe_inr; tee1_origin[2]], tee1_origin, [0; 0; -TeeLength(2*gritpipe_inr)])
    Tee2 ← Tee(tee2_origin, gritpipe_inr)
    Rotate16 ← rotate_3d([tee2_origin[0]; tee2_origin[1] + gritpipe_inr; tee2_origin[2]], [tee2_origin[0]; tee2_origin[1]; tee2_origin[2] + TeeLength(2*gritpipe_inr)/2], "x", -90)
    Rotate17 ← rotate_3d([tee2_origin[0]; tee2_origin[1] + gritpipe_inr; tee2_origin[2]], [tee2_origin[0]; tee2_origin[1]; tee2_origin[2] + TeeLength(2*gritpipe_inr)/2], "y", -180)
    layer16 ← layer_new("grit-tank", grey)
    Tank ← Tank(grittank_origin, grit_dim, grit_thick)
    layer17 ← layer_set("0")
    layer18 ← layer_freeze("grit-tank")
    layer19 ← layer_freeze("grit-tee")
    one ← stack(layer1, Pipe1, Rotate1, Pipe2, Pipe3, Rotate2, layer2, layer3, elbow1, Rotate3, Rotate4, elbow2, Rotate5, layer4, Rotate6, elbow3, Rotate7, Rotate8, Rotate9, layer5, layer6, Pipe4, Pipe5)
    two ← stack(Pipe6, Rotate10, Pipe7, Rotate11, Pipe8, Pipe9, zoom1, Pipe_10and11, layer7, layer8, Riser1, Riser_234, layer9, layer10, cross, Rotate12, Rotate13, layer11, layer12, layer13, elbow4, Rotate14)
    three ← stack(Rotate15, elbow5, elbow_67, layer14, layer15, Tee1, move, Tee2, Rotate16, Rotate17, layer16, Tank, layer17, layer18, layer19)
    test ← stack(layer1, Pipe1, Rotate1, Pipe2, Pipe3, Rotate2, layer2, layer3, elbow1, Rotate3, Rotate4, elbow2, Rotate5, layer4, Rotate6, elbow3, Rotate7, Rotate8)
    return test
    = [
        "-layer m grit-pipe";
        "c t 0,255,255";
        "grit-pipe";
        "  ";
        "_zoom w -4.36195,5.58585,0.4572 -4.24765,5.70015,0.4572 _cylinder -4.3048,5.643,0.4572 0.05715 0.2032 _cylinder -4.3048,5.643,0.4572 0.0508 0.2032 _subtract -4.24765,5.643,0.4572  -4.254,5.643,0.4572 ";
        "_rotate3d -4.254,5.643,0.4572  y -4.3048,5.643,0.4572 -90";
        "_zoom w -4.71755,5.58585,0.6096 -4.60325,5.70015,0.6096 _cylinder -4.6604,5.643,0.6096 0.05715 1.0286 _cylinder -4.6604,5.643,0.6096 0.0508 1.0286 _subtract -4.60325,5.643,0.6096  -4.6096,5.643,0.6096 ";
        "_zoom w -4.86995,5.58585,1.7906 -4.75565,5.70015,1.7906 _cylinder -4.8128,5.643,1.7906 0.05715 2.95573 _cylinder -4.8128,5.643,1.7906 0.0508 2.95573 _subtract -4.75565,5.643,1.7906  -4.762,5.643,1.7906 ";
        "_rotate3d -4.762,5.643,1.7906  y -4.8128,5.643,1.7906 -90";
        "-layer m grit-elbow"
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    ]
# [component: inputs Grit_script]
