# [reference: basics.2006.xmcd]
Pipescript(p1, p2, p3, R1, R2, L) :=
    viewtop ← viewtop
    cylinder1 ← cylinderA(p1, R1, L)
    cylinder2 ← cylinderA(p1, R2, L)
    zoom ← zoom
    subtract1 ← subtractD(p2, p3)
    return concat(viewtop, cylinder1, cylinder2, zoom, subtract1)
Pipe(o, R1, R2, L) := Pipescript([o[0]; o[1]; o[2]], [o[0] + R1; o[1]; o[2]], [o[0] + R2; o[1]; o[2]], R1, R2, L)
# p1 | p2 | p3
Drawing_Pipe := Pipe([1; 2; 3], 2.5/12, 2/12, 1.5)
# [component: inputs Drawing_Pipe]
