# [reference: MasterProgram2.xmcd]
# Automated Design: AutoCAD: Plant Drawing Inputs
sedlayout = 3
ND_SedPipeEntrance = 0.2032 m
L_Sed = 2.65753 m
T_PlantWall = 0.15 m
L_SedInletSlope = 2.65753 m
EN_PipeSpec = 4
W_Sed = 1.0668 m
T_Mp = 0.3 m
H_SedInlet = 0.0570029 m
ND_SedSludge = 0.0508 m
H_Sed = 1.3 m
HW_Sed = 1.2 m
T_SedInletSlope = 0.05 m
AN_SedBottom = 10 deg
H_SedAbove = 0.12 m
N_SedSlopeInlets = 1
AN_SedTopInlet = 48.3629 deg
ND_SedLaunder = 0.1016 m
ND_PltWeir = 6 in
W_InletChannel = 0.281424 m
W_ExitChannel = 0.281424 m
ND_SedLaunder = 4 in
H_InletChannel = 0.55 m
H_ExitChannel = 0.55 m
H_PltWeir := □  # error: This placeholder is empty.
T_ChannelWall = 0.15 m
T_ChannelWall = 0.15 m
N_SedTanks = 3
H_SedBelow = 0.6 m
D_SedSludgeOrifice = 0.006 m
D_SedLaunderOrifice = 0.009 m
N_SedSludgeOrifices = 26
N_SedLaunderOrifices = 38
B_SedSludgeOrifices = 0.1 m
B_SedLaunderOrifices = 0.1 m
L_SedPlate = 0.554256 m
AN_SedPlate = 60 deg
N_SedPlates = 57
Amp_SedPlate = 0.0127 m
B_SedPlate = 0.0300869 m
T_SedPlate = 0.003 m
Per_SedPlate = 8.5
N_SedPlateCol = 1
lamina_y = 0.07 m
