# [reference: basics - Copy.xmcd]
# [reference: pipe - Copy.xmcd]
# [reference: PipeDatabase.xmcd]
# [reference: Sludge - Copy.xmcd]
Manifoldscript(p1, p2, p3, p4, p5, p6, p7, ND, R3, L, n1, n2, d1, win1, win2, EN) :=
    sludgepipe ← Sludgepipe(p1, ND, L, R3, d1, EN)
    viewtop ← viewtop
    zoom_win ← zoom_win(win1, win2)
    cylinder3 ← cylinderB(p2, R3, p4)
    viewrightside ← viewrightside
    array1 ← arrayB(p5, n1, n2, -d1)
    subtract2 ← subtractH(p3, p7, p6)
    one ← concat(cylinder3, viewrightside, array1)
    two ← concat(viewtop, subtract2)
    return stack(sludgepipe, zoom_win, one, two)
Manifold1(manifold_origin, ND_Manifold, manifold_outr, manifold_inr, orifice_rad, tank_length, orifice_dist, EN_PipeSpec) := Manifoldscript(manifold_origin, [manifold_origin[0]; manifold_origin[1]; manifold_origin[2] + tank_length - orifice_dist], [manifold_origin[0]; manifold_origin[1] - manifold_outr], [
    manifold_origin[0] + (manifold_outr*cos(π/6)) + manifold_outr;
    manifold_origin[1] + (manifold_outr*sin(π/6)) + manifold_outr;
    manifold_origin[2] + tank_length - orifice_dist
], [
    manifold_origin[1] + (manifold_outr*sin(π/6)) + manifold_outr;
    manifold_origin[2] + tank_length - orifice_dist
], [manifold_origin[0]; manifold_origin[1]], [
    manifold_origin[0] + (manifold_outr*cos(π/3)) + 2*zc;
    manifold_origin[0] + (manifold_outr*sin(π/3)) + 2*zc
], ND_Manifold, orifice_rad, tank_length, floor(tank_length/orifice_dist), 1, orifice_dist, [manifold_origin[0] - manifold_outr; manifold_origin[1] - manifold_outr; manifold_origin[2]], [
    manifold_origin[0] + manifold_outr + zc;
    manifold_origin[1] + manifold_outr + zc;
    manifold_origin[2]
], EN_PipeSpec)
# p5 | p6
# p1 | p2 | p3 | p4
Manifold(manifold_origin, ND_Manifold, orifice_rad, tank_length, orifice_dist, EN_PipeSpec) := Manifold1(manifold_origin, ND_Manifold, outerradius(ND_Manifold), innerD(ND_Manifold, EN_PipeSpec)/2, orifice_rad, tank_length, orifice_dist, EN_PipeSpec)
# [component: inputs Manifold([-2.626; 0.5; 0.94]*m, 3 in, 9 mm/2, 2.381 m, .1 m, 4)]
