# [reference: basics - Copy.xmcd]
# [reference: pipe - Copy.xmcd]
# [reference: PipeDatabase.xmcd]
# [reference: tee - Copy1.xmcd]
Crossscript1(p1, p17, p18, p19, p20, p21, p22, p23, p24, ND, R1, R2, R3, L, H, win1, win2, EN) :=
    Tee1 ← Tee(p1, ND, EN)
    mirror3 ← mirrorA(p17, p18, p19)
    cylinder7 ← cylinderB(p20, R2, p21)
    subtract4 ← subtractB(p22, p23, p24)
    viewfront2 ← concat("_-view", sp, "o", sp, "f")
    one ← concat(zoom, mirror3, viewtop1)
    two ← concat(cylinder7, subtract4, viewfront1)
    return stack(Tee1, one, two)
# p1 | p17 | p18 | p19 | p20 | p21 | p22 | p23 | p24
Cross1(origin, ND, R1, R2, R3, L, H, EN) := Crossscript1([origin[0]; origin[1]; origin[2]], [origin[0]; origin[2] + R2; origin[1]], [origin[0]; origin[2]], [origin[0]; origin[2] + zc], [origin[0] - L/2; origin[1]; origin[2] + L/2], [origin[0] + L/2; origin[1]; origin[2] + L/2], [origin[0] - L/4; origin[1] - R1; origin[2]], [origin[0] + L/4; origin[1] - R1; origin[2]], [origin[0]; origin[1]; origin[2] + L/2 - R3], ND, R1, R2, R3, L, H, [origin[0] - (L/2 + H); origin[1] - R3; origin[2]], [origin[0] + (L/2 + H); origin[1] + R3; origin[2]], EN)
Cross(origin, ND, EN) := Cross1(origin, ND, outerradius(ND), innerD(ND, EN)/2, ConRadius(ND), ShortTeeLength(ND)*2, SocketDepth(ND), EN)
Drawing_Cross := Cross([50; -57; 3]*m, 2 in, 4)
# [component: inputs Drawing_Cross]
