# [reference: basics - Copy.xmcd]
Inletslopescripttrapezoid(verticalorigin, verticalorigin_dim, slopeorigin, box_dim, sideorigin, sideoriginrotate, orifice_origin, orifice_dim, nrow, ncol, dist, bigslope, mirror_point1, mirror_point2, win1, win2) :=
    viewtop ← viewtop1
    zoomwin ← zoom_win(win1, win2)
    verticalbox ← box(verticalorigin, verticalorigin_dim)
    bigslopebox ← box(slopeorigin, box_dim)
    sideview ← viewrightside1
    rotate ← rotate_3d(sideorigin, sideoriginrotate, "z", 90 - bigslope*(180/π))
    orificebox ← box(orifice_origin, orifice_dim)
    subtractorifice ← subtractDall(verticalorigin)
    array ← arrayB(verticalorigin, nrow, ncol, dist)
    union ← union_allA
    mirror ← mirror_all(mirror_point1, mirror_point2)
    bigunion ← union_allA
    one ← stack(viewtop, zoomwin, verticalbox, bigslopebox, sideview, rotate, bigunion, viewtop, orificebox, viewtop, subtractorifice, viewtop, array, viewtop, union, mirror, bigunion)
    return one
Inletslopescripttrapezoida(verticalorigin, verticaldim, slopeorigin, dim, Length, l_orifice, h_orifice, b_orifice, n, bigslope, littleslope, thick, origin) := Inletslopescripttrapezoid(verticalorigin, verticalorigin + verticaldim, slopeorigin, slopeorigin + dim, [slopeorigin[1] + thick; slopeorigin[2] + dim[2]; slopeorigin[0]], [slopeorigin[1] + thick; slopeorigin[2]; slopeorigin[0]], [verticalorigin[0] + verticaldim[0]/2 - l_orifice/2; verticalorigin[1]; verticalorigin[2]], [
    verticalorigin[0] + verticaldim[0]/2 + l_orifice/2;
    verticalorigin[1] + verticaldim[1];
    verticalorigin[2] + h_orifice + b_orifice*tan(littleslope)
], 1, n, Length/n, bigslope, [origin[0]; origin[1]], [origin[0] + zc; origin[1]], [origin[0] - zc; origin[1] - zc; origin[2] - zc], [origin[0] + dim[0] + zc; origin[1] + dim[1] + zc; origin[2] + dim[2] + zc])
Inletslopetrapezoid(origin, Length, W_Sed, l_orifice, h_orifice, b_orifice, thick, n, bigslope, littleslope, H_Trapezoid) := Inletslopescripttrapezoida([origin[0]; origin[1] - b_orifice - thick; origin[2]], [Length/n; thick; H_Trapezoid + thick*cos(bigslope)], [origin[0]; origin[1] - b_orifice - thick; origin[2] + H_Trapezoid + thick*cos(bigslope)], [Length/n; thick; (W_Sed/2 - b_orifice - thick)*(1/cos(bigslope))], Length, l_orifice, h_orifice, b_orifice, n, bigslope, littleslope, thick, origin)
origin := [0; 0; 0]*m
W_Sed := 44 in
L_SedInletOrifice := 7 cm
H_Trapezoid := 8 cm
L_Sed := 2 m
bigslope := 60 deg
H_SedInletOrifice := 5 cm
B_SedInlet := 5 cm
N_Orifices := 5
littleslope := 30 deg
T_SedInletSlope := 2 in
Drawing_Inletslopetrapezoid := Inletslopetrapezoid(origin, L_Sed, W_Sed, L_SedInletOrifice, H_SedInletOrifice, B_SedInlet, T_SedInletSlope, N_Orifices, bigslope, littleslope, H_Trapezoid)
# [component: inputs Drawing_Inletslopetrapezoid]
