# [reference: basics - Copy.xmcd]
laminaplainscript1(origin, dim, angle, win1, win2) :=
    viewtoplam ← viewtop
    zoom ← zoom_wina(win1, win2)
    box_rotate ← boxA(origin, origin + dim)
    box_norotate ← box(origin, origin + dim)
    rotate ← rotate_3d1(origin, origin, "y", angle)
    sum ← concat(viewtoplam, zoom, box_norotate) if angle == 0
    sum ← concat(viewtoplam, zoom, box_rotate, rotate) otherwise
laminaplain1(origin, w, l, t, angle) := laminaplainscript1(origin, [t; w; l], 90 - angle/deg, [origin[0] - zc; origin[1] - zc; origin[2] - zc], [origin[0] + t + zc; origin[1] + w + zc; origin[2] + l + zc])
xspace := 1 ft
width := 1 m
periods := 2
origin := [0; 0; 0]*m
anglel := 60 deg
yspace := 3 ft
lengthl := 2 m
thick := 1 cm
num_baffles := 6
amplitude := 5 cm
num_bafflecols := 1
draw := laminaplain1(origin, width, lengthl, thick, anglel)
# [component: inputs draw]
