# [reference: basics.xmcd]
# [reference: PipeDatabase.xmcd]
Pipescript(origin, p2, p3, win1, win2, pipe_outr, pipe_inr, pipe_length) :=
    zoom_win ← zoom_wina(win1, win2)
    cylinder1 ← cylinderA(origin, pipe_outr, pipe_length)
    cylinder2 ← cylinderA(origin, pipe_inr, pipe_length)
    subtract1 ← subtractD(p2, p3)
    return concat(viewtop, zoom_win, cylinder1, cylinder2, subtract1)
Pipe(origin, pipe_inr, pipe_length) := Pipescript([origin[0]; origin[1]; origin[2]], [origin[0] + outerradius(2*pipe_inr); origin[1]; origin[2]], [origin[0] + pipe_inr; origin[1]; origin[2]], [origin[0] - outerradius(2*pipe_inr) - zc; origin[1] - outerradius(2*pipe_inr) - zc; origin[2]], [origin[0] + outerradius(2*pipe_inr) + zc; origin[1] + outerradius(2*pipe_inr) + zc; origin[2]], outerradius(2*pipe_inr), pipe_inr, pipe_length)
# p2 | p3
Drawing_Pipe := Pipe([1; 2; 3]*m, 2 in, 1.5 ft)
# [component: inputs Drawing_Pipe]
