# Automated Design: AutoCAD:Sludge Drain Cover
# [reference: MasterProgram.xmcd]
# [reference: basics.xmcd]
AN_SedTopInlet = 60 deg
B_SedSludgeOrifices = 0.15 m
T_SedSludge = 0.0933013 m
N_SedSludgeOrifices = 63
H_SedSludge = 0.0897425 m
L_Sed = 9.52822 m
W_SedSludge = 0.179485 m
W_SedDrainCover = 0.21547 m
ID_SedSludge = 0.143208 m
W_Sed = 2.159 m
D_SedSludgeOrifice = 0.0142875 m
# Origins
DrainCover_origin := [Plant_Origin[0]; Plant_Origin[1] + W_Sed/2 - W_SedDrainCover/2; Plant_Origin[2]] = [0; 0.971765; 0] m
Notch_origin := [DrainCover_origin[1] + W_SedDrainCover - 0.025 m; T_SedSludge] = [1.16224; 0.0933013] m
Draincoverscript :=
    viewtops ← viewtop1
    layer1 ← layer_new("draincover", red)
    box1 ← box(DrainCover_origin, [-L_Sed; W_SedDrainCover; T_SedSludge] + [DrainCover_origin[0]; DrainCover_origin[1]; DrainCover_origin[2]])
    layerset ← layer_set("0")
    layerfreeze ← layer_freeze("draincover")
    one ← stack(viewtops, layer1, box1, layerset, layerfreeze)
    return one
Orificescript :=
    viewtops ← viewtop1
    layerset2 ← layer_set("draincover")
    cylinder1 ← cylinderC(DrainCover_origin + [-L_Sed + B_SedSludgeOrifices; W_SedDrainCover/2; 0], D_SedSludgeOrifice/2, T_SedSludge)
    viewtops2 ← viewtop1
    layerset2 ← layer_set("0")
    layerfreeze2 ← layer_freeze("draincover")
    cylinders ← array_all(1, 63, B_SedSludgeOrifices)
    union1 ← union_allA
    layerthaw1 ← layer_thaw("draincover")
    viewtops3 ← viewtop1
    holes ← subtractD(DrainCover_origin, DrainCover_origin + [-L_Sed + B_SedSludgeOrifices + D_SedSludgeOrifice/2; W_SedDrainCover/2; 0])
    one ← stack(viewtops, layerset2, cylinder1, viewtops2, cylinders, union1, layerthaw1, viewtops3, holes)
    return one
Notchscript :=
    view1 ← viewrightside1
    layerset3 ← layer_set("draincover")
    notch1 ← pline(Notch_origin, [
        Notch_origin[0] - (T_SedInletSlope*cos(AN_SedTopInlet)^2);
        Notch_origin[1] - cos(AN_SedTopInlet)*T_SedInletSlope
    ], [Notch_origin[0] - (T_SedInletSlope*(cos(AN_SedTopInlet)^2 + sin(AN_SedTopInlet))); Notch_origin[1]])
    notch2 ← pline([Notch_origin[0] - W_SedDrainCover + 0.05 m; Notch_origin[1]], [
        Notch_origin[0] - W_SedDrainCover + 0.05 m + T_SedInletSlope*cos(AN_SedTopInlet)^2;
        Notch_origin[1] - cos(AN_SedTopInlet)*T_SedInletSlope
    ], [
        Notch_origin[0] - W_SedDrainCover + 0.05 m + T_SedInletSlope*(cos(AN_SedTopInlet)^2 + sin(AN_SedTopInlet));
        Notch_origin[1]
    ])
    notchl1 ← extrude([
        Notch_origin[0] - (T_SedInletSlope*cos(AN_SedTopInlet)^2);
        Notch_origin[1] - cos(AN_SedTopInlet)*T_SedInletSlope
    ], -L_Sed)
    notchl2 ← extrude([
        Notch_origin[0] - W_SedDrainCover + 0.05 m + T_SedInletSlope*cos(AN_SedTopInlet)^2;
        Notch_origin[1] - cos(AN_SedTopInlet)*T_SedInletSlope
    ], -L_Sed)
    layerset4 ← layer_set("0")
    hole1 ← subtractD([DrainCover_origin[1]; Notch_origin[1]], [
        Notch_origin[0] - (T_SedInletSlope*cos(AN_SedTopInlet)^2);
        Notch_origin[1] - cos(AN_SedTopInlet)*T_SedInletSlope
    ])
    hole2 ← subtractD([DrainCover_origin[1]; Notch_origin[1]], [
        Notch_origin[0] - W_SedDrainCover + 0.05 m + T_SedInletSlope*cos(AN_SedTopInlet)^2;
        Notch_origin[1] - cos(AN_SedTopInlet)*T_SedInletSlope
    ])
    one ← stack(view1, layerset3, notch1, notch2, notchl1, notchl2, layerset4, hole1, hole2)
    return one
DrainCover := stack(Draincoverscript, Orificescript, Notchscript)
# [component: inputs DrainCover]
