# Automated Design: AutoCAD: Plant Drawing Inputs
# References
# [reference: MasterProgramWWW.xmcd]
# [reference: PipeDatabase.xmcd]
# [reference: DesignAssumptions.xmcd]
# Colors
grey := [132; 132; 132]
ltgrey := [214; 214; 214]
dkgrey := [91; 91; 91]
blue := [0; 255; 255]
blue2 := [0; 191; 255]
blue3 := [0; 127; 255]
green := [0; 255; 0]
purple := [127; 0; 255]
ltpurple := [125; 0; 160]
zc := .1 m
zc_point := [0; .1; 0]*m
# Sedimentation Tank
tank_origin := [0; 0; 0]*m
tank_dim := sedtank_dim*m
channel_dim := [tank_dim[1] + 2*tank_thick; Channel_dim[1]; Channel_dim[2]]
waterlevel := tank_dim[2] - water_depth*m
manifold_depth := spaceabove/2*m
num_tanks := n_sedtanks
sedpipe_inr := (NominalPipeSize(D_launder*in)/2)
sedtankpipe9_length := Pipe9_length*m
offfloor_length := offfloor_length*m  # ** this should have a box
manifold_inr := (NominalPipeSize(D_launder*in)/2)
manifoldorifice_rad := D_laundOrf/2*in
manifoldorifice_dist := laundOrf_dist*m
waste_inr := (NominalPipeSize(waste_ind*in)/2)
wasteorifice_rad := D_sludgeOrf/2*m
wasteorifice_dist := sludgeOrf_dist*cm
waste_inr = 0.0254 m
offfloorlamina_dist := spacebelow_total  # **this should have a box
lamina_amp := .5 in
lamina_thick := 4 mm
lamina_width := tank_dim[1]
lamina_length := L_lamella
lamina_periods := 8.5
lamina_slope := α = 60 deg
lamina_num := N_lamella
lamina_col := 1  # this is a constant!
lamina_x := lamella_spacing
lamina_y := 7 cm
z_rotation := 0
rotate_angle := 90
ϕ := beta = 55 deg  # sedtank slope angle
# Flocculation Tank
numfloc_tanks := 2
floc_dim := floc_dim*m
flochole_dim := [uturnhole_dim[0]*m; tank_thick; uturnhole_dim[1]*m]  # **this should have a box
baffletank1_location := baffle_positions[:, 0][0]*m
baffletank1_num := rows(baffletank1_location)
baffletank2_location := baffle_positions[:, 1][0]*m
baffletank2_num := rows(baffletank2_location)
baffle_positions = [[
    0.09, 2.17296, 0.278537;
    0.18, 0, 2.03796;
    0.27, 2.17296, 0.278537;
    0.36, 0, 2.03796;
    0.45, 2.17296, 0.278537;
    0.54, 0, 2.03796;
    0.63, 2.17296, 0.278537;
    0.75, 0, 0;
    0.87, 2.17296, 0.323537;
    0.99, 0, 1.99296;
    1.11, 2.17296, 0.323537;
    1.23, 0, 1.99296;
    1.35, 2.17296, 0.323537;
    1.47, 0, 1.99296;
    1.59, 2.17296, 0.323537;
    1.84, 0, 0
], [
    2.017, 2.17296, 0.518537;
    1.767, 0, 1.79796;
    1.517, 2.17296, 0.518537;
    1.267, 0, 1.79796;
    1.017, 2.17296, 0.518537;
    0.766998, 0, 1.79796;
    0.516998, 2.17296, 0.518537;
    0.266998, 0, 1.79796
]]
baffle_amp := .5 in
baffle_thick := 4 mm
baffle_slope := 90 deg
baffle_width := floc_dim[1]
baffle_col := 1  # this is a constant!
baffle_periods := 8.5
baffle_y := 7 cm
baffle_num := 1
baffle_x := 4 in
# Platform
column_dim := [column_width; column_length; tank_dim[2] + tank_thick - channel_dim[2] - channel_thick]
# Plant Level Tank
D_weir = 2 1/m
lvlpipe_inr := manifold_inr
effluent_inr := (D_weir*in/2)
sedpipe_inr = 2 in
sedeff_origin := [
    tank_origin[0] - tank_dim[0] - tank_thick;
    tank_origin[1] + 2.5*tank_dim[1] + 2*tank_thick;
    tank_origin[2] + tank_dim[2] - channel_dim[2] - channel_thick - 2*ElbowRadius(2*sedpipe_inr)
]
lvltank_dim := lvltank_dim*m
lvltank_waterlvl := HW_plantleveling*m
wall_disp := 3/12*ft + outerradius(2*effluent_inr)  # error: This value has units: Unitless, but must have units: Length.
Δz_effluent := ElbowRadius(2*sedpipe_inr) + platform_thick - channel_dim[2]
# Grit Tank
grit_thick = 0.15 m
walk_space := 18 in
grit_origin := [
    tank_origin[0] - tank_dim[0] - tank_thick;
    tank_origin[1] + (num_tanks*tank_dim[1]) + (num_tanks*tank_thick) + 3*floc_dim[1]/4;
    tank_origin[2] + floc_inleth + platform_thick
]
grit_dim := grit_dim*m
grit_holes := 7
Δx_grit := walkway_width
grit_rad := .25 in
gritriser_h := 30/12*ft
Δy_grit := (numfloc_tanks*tank_dim[1] + (numfloc_tanks - 1)*tank_thick)/4 + tank_thick + walkway_width - grit_dim[1] - 2*grit_thick
gritpipe_inr := D_GritRiser*m/2
gritdisp1 := 8 in
Δz_grit := tank_dim[2] - channel_dim[2] - grit_thick
gritdisp2 := 6 in
# Chemical Stock Platform
stockplat_dim1 := [
    4*r_drum + 3*drum_disp + lvltank_dim[0] + 2*lvltank_thick - grit_dim[0] - 2*grit_thick;
    2*r_drum + 2*drum_disp;
    stockplat_thick
]  # error: This value has units: Unitless, but must have units: Length.
stockplat1_origin := [
    tank_origin[0] - tank_dim[0] - tank_thick - walkway_width - grit_dim[0] - 2*grit_thick - ShortTeeLength(NominalPipeSize(2*gritpipe_inr)) - walk_space;
    tank_origin[1] + num_tanks*tank_dim[1] + (num_tanks + 1)*tank_thick + floc_dim[1] + walkway_width;
    tank_origin[2] + tank_dim[2] - channel_dim[2] + stockplatcol_dim[2]
]
stockplat_dim2 := [4*r_drum + 3*drum_disp; 2*r_drum + 2*drum_disp; stockplat_thick]
stockplat2_origin := [
    tank_origin[0] - tank_dim[0] - tank_thick - walkway_width - lvltank_dim[0] - 2*lvltank_thick;
    tank_origin[1] + num_tanks*tank_dim[1] + (num_tanks + 1)*tank_thick + floc_dim[1] - grit_dim[1] - 2*grit_thick;
    tank_origin[2] + tank_dim[2] - channel_dim[2] + stockplatcol_dim[2]
]  # error: This value has units: Unitless, but must have units: Length.
