# AguaClara Water Treatment Plants -- 4 Communities
# Automated Design
# User Inputs:
HW_Sed := 1.55 m
# Design References
# [reference: UserInputs- 4 Communities.xmcd]
# [reference: DesignAssumptions- 4 Communities.xmcd]
# [reference: MathFunctions.xmcd]
# [reference: PipeDatabase.xmcd]
# [reference: MinorLossCoefficients.xmcd]
# [reference: FluidsFunctions.xmcd]
# Sed Tanks and Slopes:
# [reference: Sed. Inlet Slopes - 4 comm.xmcd]
N_SedTanks = 2
H_SedBetween = 0.0762 m
HW_Sed = 1.55 m
B_SedPort = 6.85462 cm
.
L_Sed = 3.62072 m
L_SedPort = 7.91503 cm
W_SedPort = 7.91503 cm
N_TrianglesperTank = 2
B_SedPort = 6.85462 cm
W_Sed = 1.0795 m
N_SedPorts = 13
ND_SedPipeEntrance = 8 in
# H.SedRectangle needs to be greater than H.SedPort
Π_SedCell = 2
L_Sed = 3.62072 m
L_SedMax = 2.93711 m
N_SedPorts*W_SedPort = 1.02895 m
V_SedPort = 2.7921 cm/s
# Sedimentation Tank Sludge Drain:
# [reference: SludgeDrain-SetNumOrifices.xmcd]
N_SedSludgeOrifices = 26
Time_SludgeDrain = 0.319562 hr
ND_SedSludge = 3 in
Q_SludgeDrainInitial = 26.4016 L/min
D_SedSludgeOrifice = 0.5 in
# Sedimentation Tank Dimensions:
# [reference: Sedimentation Dimensions.xmcd]
H_SedBottomSlope = 0.0951725 m
H_SedTopSlope = 0.845797 m
H_SlopeRectangle = 0
Z_SedSlopes = 0.934697 m
H_Sed = 1.65 m
W_Sed = 1.0795 m
# Inlet Channel:
# [reference: Inlet Channel.xmcd]
W_InletChannel = 0.259075 m
L_Channel = 2.459 m
ND_SedPipeEntrance = 8 in
N_SedInletPipes = 2
H_InletChannel = 0.565303 m
Q_Plant = 100.385 gal/min
# Sedimentation Tank Effluent Launder:
# [reference: Launder.xmcd]
N_SedLaunderOrifices = 64
Q_SedLaunderOrifices = 1.48438 L/min
# Exit Channel:
# [reference: Exit Channel.xmcd]
W_ExitChannel = 0.259075 m
ND_SedLaunder = 4 in
H_ExitChannel = 0.565303 m
L_SedLaunder = 3.26487 m
L_ExitChannel = 2.459 m
D_SedLaunderOrifice = 0.3125 in
H_PltWeir = 0.387518 m
Z_SedLaunder = 1.45285 m
HW_ExitChannel = 0.425303 m
ZW_ExitChannel = 1.51 m
# Lamella:
# [reference: Lamella.xmcd]
L_SedPlate = 0.444333 m
B_SedPlate = 2.4402 cm
S_SedPlate = 2.1402 cm
N_SedPlates = 104
AN_SedPlate = 60 deg
V_SedC = 10.0183 m/day
V_SedUp = 64.4418 m/day
H_SedPlate = 0.384803 m
H_SedAbove = 0.1543 m
# Flow Controller:
# [reference: FCM.xmcd]
N_Fcm = 1
ID_FcmTube = 3.175 mm
ID_FcmTube = 0.125 in
L_FcmTube = 99.0625 cm
Q_FcmTubeMax = 285 mL/min
HL_FcmValve = 15.0907 cm
# Flocculator:
# [reference: Flocculation.xmcd]
W_FlocChannel = 0.53975 m
S_FlocBaffle = [0.0814312; 0.0974128; 0.129144; 0.234601] m
B_FlocBaffle = [0.0854312; 0.101413; 0.133144; 0.238601] m
N_FlocBafflesMin = 53
HL_Floc = 9.191 cm
X_FlocBaffles = [
    0.68975, 3.68341, 0.249601;
    0.775181, 3.55027, 0.488202;
    0.860612, 3.41713, 0.726803;
    0.946044, 3.28398, 0.965404;
    1.03147, 3.15084, 1.20401;
    1.11691, 3.0177, 1.44261;
    1.20234, 2.88455, 1.68121;
    1.28777, 2.75141, 1.91981;
    1.3732, 2.51281, 2.15841;
    1.45863, 2.27421, 2.39701;
    1.54406, 2.03561, 2.63561;
    1.62949, 1.797, 2.87421;
    1.71492, 1.5584, 3.11281;
    1.81634, 1.3198, 3.35142;
    1.91775, 1.0812, 3.59002;
    2.01916, 0.8426, 0;
    2.12058, 0.603998, 0;
    2.22199, 0.365397, 0;
    2.3234, 0, 0;
    2.42481, 0, 0;
    2.52623, 0, 0;
    2.62764, 0, 0;
    2.72905, 0, 0;
    2.83047, 0, 0;
    2.93188, 0, 0;
    3.06502, 0, 0;
    3.19817, 0, 0;
    3.33131, 0, 0;
    3.46445, 0, 0;
    3.5976, 0, 0
] m
HW_FlocStart = 1.64191 m
L_FlocBaffles = [
    1.46857, 1.42086, 1.3154;
    1.56857, 1.52086, 1.4154;
    1.46857, 1.42086, 1.3154;
    1.56857, 1.52086, 1.4154;
    1.46857, 1.42086, 1.3154;
    1.56857, 1.52086, 1.4154;
    1.46857, 1.42086, 1.3154;
    1.56857, 1.52086, 1.4154;
    1.46857, 1.3154, 1.3154;
    1.56857, 1.4154, 1.4154;
    1.46857, 1.3154, 1.3154;
    1.56857, 1.4154, 1.4154;
    1.46857, 1.3154, 1.3154;
    1.55259, 1.4154, 1.4154;
    1.45259, 1.3154, 1.3154;
    1.55259, 1.4154, 0;
    1.45259, 1.3154, 0;
    1.55259, 1.4154, 0;
    1.45259, 0, 0;
    1.55259, 0, 0;
    1.45259, 0, 0;
    1.55259, 0, 0;
    1.45259, 0, 0;
    1.55259, 0, 0;
    1.45259, 0, 0;
    1.52086, 0, 0;
    1.42086, 0, 0;
    1.52086, 0, 0;
    1.42086, 0, 0;
    1.52086, 0, 0
] m
W_FlocPort = 0.234601 m
H_FlocPort = 0.53975 m
N_FlocBaffles = 63
Z_FlocBaffles = [
    0, 0, 0;
    0.0814312, 0.129144, 0.234601;
    0, 0, 0;
    0.0814312, 0.129144, 0.234601;
    0, 0, 0;
    0.0814312, 0.129144, 0.234601;
    0, 0, 0;
    0.0814312, 0.129144, 0.234601;
    0, 0, 0;
    0.0814312, 0.234601, 0.234601;
    0, 0, 0;
    0.0814312, 0.234601, 0.234601;
    0, 0, 0;
    0.0974128, 0.234601, 0.234601;
    0, 0, 0;
    0.0974128, 0.234601, 0;
    0, 0, 0;
    0.0974128, 0.234601, 0;
    0, 0, 0;
    0.0974128, 0, 0;
    0, 0, 0;
    0.0974128, 0, 0;
    0, 0, 0;
    0.0974128, 0, 0;
    0, 0, 0;
    0.129144, 0, 0;
    0, 0, 0;
    0.129144, 0, 0;
    0, 0, 0;
    0.129144, 0, 0
] m
Gt_FlocMinFlow = 8358.07
N_FlocChannels = 3
# Entrance Tank:
# [reference: EntranceTank.xmcd]
ND_Lfom = 12 in
HL_Rm = 0.898175 cm
N_Lfom = 1
D_LfomOrifices = 9.525 mm
Q_LfomErrorMax = 0.0474448 %
N_LfomOrifices = [59; 19; 20; 14; 12; 12; 9; 10; 9; 9; 8; 7; 8; 7; 7; 7; 6; 6; 7; 5; 7]
L_Et = 1.5 m
W_Et = 0.75 m
HW_EtMin = 0.2 m
HW_EtMax = 0.4 m
H_Et = 2.04191 m
ZW_Et = 1.94191 m
# Any additional needed elevations should be calculated in the files above.
# Elevations:
ZW_ExitChannel = 1.51 m  # Water Level at the end of the plant in the exit channel and exit channel box
HW_Sed = 1.55 m
HW_FlocStart = 1.64191 m  # Water level at the beginning of the floc tank
HL_Floc = 9.191 cm  # just for ref. the head loss throught the floc tank
ZW_Et = 1.94191 m  # the height of the water in the entrance tank.
# AutoCAD References
# [reference: basics.xmcd]
# [reference: pipe.xmcd]
# [reference: tank.xmcd]
# [reference: lamina.xmcd]
# [reference: laminaplain.xmcd]
# [reference: cross.xmcd]
# [reference: Tee.xmcd]
# [reference: elbow.xmcd]
# [reference: Sludge.xmcd]
# [reference: Channel.xmcd]
# [reference: Manifold.xmcd]
# [reference: SedTankslopes.xmcd]
# [reference: inletslope.xmcd]
# [reference: inletslopetrapezoid.xmcd]
# [reference: chemicalstock.xmcd]
# [reference: Sedimentation Tank.xmcd]
# [component: inputs SedTank]
# [reference: Flocculation Tank.xmcd]
# [component: inputs FlocTank]
# [reference: Entrance Tank.xmcd]
# [component: inputs EntranceTank]
