# AguaClara Water Treatment Plants -- Ecuador
# Automated Design
# User Inputs:
HW_Sed := 1.55 m
# Design References
# [reference: UserInputs- Ecuador.xmcd]
# [reference: DesignAssumptions- Ecuador.xmcd]
# [reference: MathFunctions - Ecuador.xmcd]
# [reference: PipeDatabase - Ecuador.xmcd]
# [reference: MinorLossCoefficients - Ecuador.xmcd]
# [reference: FluidsFunctions - Ecuador.xmcd]
# Sed Tanks and Slopes:
# [reference: Sed. Inlet Slopes - Triangles - Ecuador.xmcd]
N_SedTanks = 2
H_SedBetween = 0.0762 m
HW_Sed = 1.55 m
B_SedPort = 6.85462 cm
.
L_Sed = 2.93711 m
L_SedPort = 7.91503 cm
W_SedPort = 7.91503 cm
N_TrianglesperTank = 4
B_SedPort = 6.85462 cm
W_Sed = 2.159 m
N_SedPorts = 10
ND_SedPipeEntrance = 8 in
# H.SedRectangle needs to be greater than H.SedPort
Π_SedCell = 2
L_Sed = 2.93711 m
L_SedMax = 2.93711 m
N_SedPorts*W_SedPort = 0.791503 m
V_SedPort = 2.7921 cm/s
# Sedimentation Tank Sludge Drain:
# [reference: SludgeDrain-Ecuador.xmcd]
N_SedSludgeOrifices = 32
Time_SludgeDrain = 0.418699 hr
ND_SedSludge = 3 in
Q_SludgeDrainInitial = 20.2137 L/min
D_SedSludgeOrifice = 0.4375 in
# Sedimentation Tank Dimensions:
# [reference: Sedimentation Dimensions - Ecuador.xmcd]
H_SedBottomSlope = 0.0951725 m
H_SedTopSlope = 0.845797 m
H_SlopeRectangle = 0.08 m
Z_SedSlopes = 1.0147 m
H_Sed = 1.65 m
W_Sed = 1.0795 m
# Inlet Channel:
# [reference: Inlet Channel - Ecuador.xmcd]
W_InletChannel = 25.9075 cm
L_Channel = 2.459 m
ND_SedPipeEntrance = 8 in
N_SedInletPipes = 2
H_InletChannel = 0.485303 m
Q_Plant = 100.385 gal/min
# Sedimentation Tank Effluent Launder:
# [reference: Launder - Ecuador.xmcd]
N_SedLaunderOrifices = 82
Q_SedLaunderOrifices = 1.15854 L/min
# Exit Channel:
# [reference: Exit Channel - Ecuador.xmcd]
W_ExitChannel = 0.259075 m
ND_SedLaunder = 4 in
H_ExitChannel = 0.485303 m
L_SedLaunder = 4.18769 m
L_ExitChannel = 2.459 m
D_SedLaunderOrifice = 0.25 in
H_PltWeir = 0.307518 m
Z_SedLaunder = 1.45285 m
HW_ExitChannel = 0.345303 m
ZW_ExitChannel = 1.51 m
# Lamella:
# [reference: Lamella - Ecuador.xmcd]
L_SedPlate = 0.351957 m
B_SedPlate = 2.68555 cm
S_SedPlate = 2.38555 cm
N_SedPlates = 126
AN_SedPlate = 60 deg
V_SedC = 10.0149 m/day
V_SedUp = 52.195 m/day
H_SedPlate = 0.304803 m
H_SedAbove = 0.1543 m
# Flow Controller:
# [reference: FCM - Ecuador.xmcd]
N_Fcm = 1
ID_FcmTube = 3.175 mm
ID_FcmTube = 0.125 in
L_FcmTube = 99.0625 cm
Q_FcmTubeMax = 285 mL/min
HL_FcmValve = 15.0907 cm
# Flocculator:
# [reference: Flocculation - Ecuador.xmcd]
W_FlocChannel = 0.53975 m
S_FlocBaffle = [9.57755; 13.5447; 23.4601] cm
B_FlocBaffle = [9.97755; 13.9447; 23.8601] cm
N_FlocBafflesMin = 53
HL_Floc = 6.77272 cm
X_FlocBaffles = [
    0.68975, 3.81922, 0.110776;
    0.789526, 3.67978, 0.349377;
    0.889301, 3.54033, 0.587978;
    0.989077, 3.40088, 0.826579;
    1.08885, 3.26144, 1.06518;
    1.18863, 3.02284, 1.30378;
    1.2884, 2.78423, 1.54238;
    1.38818, 2.54563, 1.78098;
    1.48795, 2.30703, 2.01958;
    1.58773, 2.06843, 2.25819;
    1.68751, 1.82983, 2.49679;
    1.78728, 1.59123, 2.73539;
    1.88706, 1.35263, 2.97399;
    1.98683, 1.11403, 3.21259;
    2.08661, 0.875425, 3.45119;
    2.18638, 0.636824, 0;
    2.32583, 0.398223, 0;
    2.46528, 0.159622, 0;
    2.60472, 0, 0;
    2.74417, 0, 0;
    2.88362, 0, 0;
    3.02306, 0, 0;
    3.16251, 0, 0;
    3.30196, 0, 0;
    3.44141, 0, 0;
    3.58085, 0, 0;
    3.7203, 0, 0
] m
HW_FlocStart = 1.61773 m
L_FlocBaffles = [
    1.45422, 1.41455, 1.3154;
    1.55422, 1.51455, 1.4154;
    1.45422, 1.41455, 1.3154;
    1.55422, 1.51455, 1.4154;
    1.45422, 1.41455, 1.3154;
    1.55422, 1.4154, 1.4154;
    1.45422, 1.3154, 1.3154;
    1.55422, 1.4154, 1.4154;
    1.45422, 1.3154, 1.3154;
    1.55422, 1.4154, 1.4154;
    1.45422, 1.3154, 1.3154;
    1.55422, 1.4154, 1.4154;
    1.45422, 1.3154, 1.3154;
    1.55422, 1.4154, 1.4154;
    1.45422, 1.3154, 1.3154;
    1.55422, 1.4154, 0;
    1.41455, 1.3154, 0;
    1.51455, 1.4154, 0;
    1.41455, 0, 0;
    1.51455, 0, 0;
    1.41455, 0, 0;
    1.51455, 0, 0;
    1.41455, 0, 0;
    1.51455, 0, 0;
    1.41455, 0, 0;
    1.51455, 0, 0;
    1.41455, 0, 0
] m
W_FlocPort = 0.0957755 m
H_FlocPort = 1.32211 m
N_FlocBaffles = 60
Z_FlocBaffles = [
    0, 0, 0;
    0.0957755, 0.135447, 0.234601;
    0, 0, 0;
    0.0957755, 0.135447, 0.234601;
    0, 0, 0;
    0.0957755, 0.234601, 0.234601;
    0, 0, 0;
    0.0957755, 0.234601, 0.234601;
    0, 0, 0;
    0.0957755, 0.234601, 0.234601;
    0, 0, 0;
    0.0957755, 0.234601, 0.234601;
    0, 0, 0;
    0.0957755, 0.234601, 0.234601;
    0, 0, 0;
    0.0957755, 0.234601, 0;
    0, 0, 0;
    0.135447, 0.234601, 0;
    0, 0, 0;
    0.135447, 0, 0;
    0, 0, 0;
    0.135447, 0, 0;
    0, 0, 0;
    0.135447, 0, 0;
    0, 0, 0;
    0.135447, 0, 0;
    0, 0, 0
] m
Gt_FlocMinFlow = 7960.07
N_FlocChannels = 3
# Entrance Tank:
# [reference: EntranceTank- Ecuador.xmcd]
ND_Lfom = 12 in
HL_Rm = 0.898175 cm
N_Lfom = 1
D_LfomOrifices = 9.525 mm
Q_LfomErrorMax = 0.0474448 %
N_LfomOrifices = [59; 19; 20; 14; 12; 12; 9; 10; 9; 9; 8; 7; 8; 7; 7; 7; 6; 6; 7; 5; 7]
L_Et = 1.5 m
W_Et = 0.75 m
HW_EtMin = 0.2 m
HW_EtMax = 0.4 m
H_Et = 2.01773 m
ZW_Et = 1.91773 m
# Any additional needed elevations should be calculated in the files above.
# Elevations:
ZW_ExitChannel = 1.51 m  # Water Level at the end of the plant in the exit channel and exit channel box
HW_Sed = 1.55 m
HW_FlocStart = 1.61773 m  # Water level at the beginning of the floc tank
HL_Floc = 6.77272 cm  # just for ref. the head loss throught the floc tank
ZW_Et = 1.91773 m  # the height of the water in the entrance tank.
# AutoCAD References
# [reference: basics.xmcd]
# [reference: pipe.xmcd]
# [reference: tank.xmcd]
# [reference: lamina.xmcd]
# [reference: laminaplain.xmcd]
# [reference: cross.xmcd]
# [reference: Tee.xmcd]
# [reference: elbow.xmcd]
# [reference: Sludge.xmcd]
# [reference: Channel.xmcd]
# [reference: Manifold.xmcd]
# [reference: SedTankslopes.xmcd]
# [reference: inletslope.xmcd]
# [reference: inletslopetrapezoid.xmcd]
# [reference: chemicalstock.xmcd]
# [reference: Sedimentation Tank.xmcd]
# [component: inputs SedTank]
# [reference: Flocculation Tank.xmcd]
# [component: inputs FlocTank]
# [reference: Entrance Tank.xmcd]
# [component: inputs EntranceTank]
