Q_FcmMax := Q_Plant*C_FcmDoseMax/C_FcmAlum = 483.75 mL/min
Vol_Stock := Q_FcmMax*Ti_StockMin = 870.75 L
Q_FcmValveMax := Q_pipeminor(D_FcmValveOrifice, HL_FcmInletDesign, 1) = 520.793 mL/min
N_Fcm := ceil(Q_FcmMax/Q_FcmValveMax) = 1
L_FcmTubeMin := HL_FcmTube
# The length of the tube has to be at least as great as the maximum head loss with some additional length to be able to reach the ports
D_available :=
    D ← ID_FcmTubeEnglish if EN_FcmTube == 0
    D ← ID_FcmTubeMetric otherwise
    return D
D_available =  # error: This variable is undefined.
## Viscosity calculations
Al := 27*gm/mol
Sulfur := 32.064*gm/mol
Oxygen := 16*gm/mol
Hydrogen := 1.008*gm/mol
MW_Al2O3 := 2*Al + 3*Oxygen
MW_alum := 2*Al + 3*(Sulfur + 4*Oxygen) + 14.3*(2*Hydrogen + Oxygen)
m_μ := slope([0; 323.433; 423.403; 546.895], [1*10^-3; 1.2*10^-3; 1.3*10^-3; 1.4*10^-3])*m^2/s = 7.25522e-7 m^2/s
b_μ := intercept([0; 323.433; 423.403; 546.895], [1*10^-3; 1.2*10^-3; 1.3*10^-3; 1.4*10^-3])*kg/(m*s) = 0.000990343 kg/(m*s)
# viscosity and density data from Paper by Gurevich, R.A. A study of density and viscosity of aluminum sulfate solution
μ_Alum(C_FcmAlum) := m_μ*C_FcmAlum + b_μ
ρ_Alum(C_FcmAlum) := 1*gm/cm^3/(-2.308*10^-3*L/gm*MW_Al2O3/MW_alum*C_FcmAlum + 1.012)
ν_Alum(C_FcmAlum) := μ_Alum(C_FcmAlum)/ρ_Alum(C_FcmAlum)
NU_FcmAlum := ν_Alum(C_FcmAlum) = 1.03959e-6 m^2/s
## Tube diameter constraints
# First we write a function that will round up (or down)  to the next available tube size.
forceround(x, xarray, direction) :=
    xarray ← sort(xarray)
    i ← 0
    while x > xarray[i]
        i ← i + 1
    return xarray[i - 1 + direction]  # direction is for rounding up (1) or rounding down (0).
# Calculate the number of modules based on three constraints (maximum laminar flow through a reasonable length tube and maximum head loss through the float valve and available tube diameters)
# Then given the flow per module calculate the optimal ID and tube length.
# This is the maximum flow that can be sent through the alum feeder without requiring extremely long tubes. It is based on eliminating diameter from the Hagen-Poiseuille equation by using the maximum Reynolds number constraint. For higher flows multiple parallel tubes could be used. However the maximum flow rate that can be handled by the float valve needs to be considered.
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Q_FcmMaxLaminar := (L_FcmTubeMax*Re_pipetransition^4*π^3*NU_FcmAlum^5/(2*g*HL_FcmTube))^(1/3)
Q_FcmMaxLaminar =  # error  # given continuously variable diameters!
# Now add constraint of maximum diameter that will give desired max head loss with reasonable length of tubing
D_max := (L_FcmTubeMax*(128*NU_FcmAlum*Q_FcmMaxLaminar)/(HL_FcmTube*g*π))^(1/4) = 4.80716 mm
# Add constraint of available tubing
D_maxforlongtube := forceround(D_max, D_available, 0) = 4.318 mm
# Recalculate maximum laminar flow given actual tubing diameter
Q_FcmMaxLaminar := π*NU_FcmAlum*Re_pipetransition*D_maxforlongtube/4 = 444.228 mL/min
N_FcmTube := ceil(Q_FcmMax/Q_FcmMaxLaminar) = 2
N_Fcm := max(N_Fcm, N_FcmTube) = 2
Q_FcmTubeMax := Q_FcmMax/N_Fcm = 241.875 mL/min
HL_FcmValve := h_e(Q_FcmTubeMax, D_FcmValveOrifice, 1) = 4.31402 cm  # head loss through the float valve
# Minimum diameter required to get laminar flow at max flow based on Reynolds number for transition to turbulence
D_minlaminar := 4*Q_FcmTubeMax/(π*NU_FcmAlum*Re_pipetransition) = 2.35108 mm
# Minimum diameter of tubing to produce the desired head loss at the maximum flow using the minimum feasible length of tubing. Based on the Hagen-Poiseuille equation.
D_minheadloss := (128*NU_FcmAlum*Q_FcmTubeMax*L_FcmTubeMin/(HL_FcmTube*g*π))^(1/4) = 2.04273 mm
# The minimum diameter is the maximum of the diameter calculated by the previous two equations. A larger diameter could be used if a longer tube is used.
D_min := max(D_minheadloss, D_minlaminar) = 2.35108 mm
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# Now we use the forceround function to find the design tube diameter based on the minimum tube diameter and the available tube diameters.
ID_FcmTube := forceround(D_min, D_available, 1) = 3.175 mm
# Length of tube required to get desired head loss at maximum flow based on the Hagen-Poiseuille equation.
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L_FcmTube := HL_FcmTube*g*π*ID_FcmTube^4/(128*NU_FcmAlum*Q_FcmTubeMax)
