## Flow Control Module Design
# Select the set of available tubing diameters
# Select the kinematic viscosity. The kinematic viscosity of water is 1*10^-6*m^2/s.
# Select the maximum for the range of head loss the flow control module will use
# Select the minimum length of tubing. Normally this must be longer than the maximum head loss.
# Select the maximum length of tubing you are willing to use.
# [component: outputs tubediameterunitsystem]
# [component: outputs viscosity]
# [component: outputs h_fmax]
# [component: outputs L_min]
# [component: outputs L_max]
# Select the maximum flow rate required from the flow control module.
# [component: outputs Q_max]
# 10^-6*m^2/s | cm | cm | m
mL/min
h_fmax := h_fmax*cm
L_min := L_min*cm  # The length of the tube has to be at least as great as the maximum head loss with some additional length to be able to reach the ports
D_english := [0.0625; 0.125; 0.17; 0.25; 0.3125; 0.375]*in
D_metric := [2; 3; 4; 5; 6; 7]*mm
L_max := L_max*m  # The maximum length of tubing that we are willing to use.
D_available :=
    D ← D_metric if tubediameterunitsystem
    D ← D_english otherwise
    return D
D_available = [2; 3; 4; 5; 6; 7] mm
Q_max := Q_max*mL/min
ν := viscosity*10^-6*m^2/s
ChemicalFeed(Q_plant) := Q_Plant*Almax_Fcm/Alstock_Fcm  # error: This variable is undefined.
Re_max := 2100
# This is the maximum flow that can be sent through the alum feeder without requiring extremely long tubes. It is based on eliminating diameter from the Hagen-Poiseuille equation by using the maximum Reynolds number constraint. For higher flows multiple parallel tubes could be used. However the maximum flow rate that can be handled by the float valve needs to be considered.
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Q_maxlaminar(L_max, h_fmax, ν) := (L_max*Re_max^4*π^3*ν^5/(2*g*h_fmax))^(1/3)
# Minimum diameter required to get laminar flow at max flow based on Reynolds number for transition to turbulence
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D_minlaminar(Q_max, ν) := 4*Q_max/(π*ν*Re_max)
# Now we can calculate the diameter of tubing required to accomodate the largest flow that a flow control module can deliver withohut requiring an excessively long tube
D_minlaminar(Q_maxlaminar(L_max, h_fmax, ν), ν) = 5.55388 mm
# Length of tube required to get desired head loss at maximum flow based on the Hagen-Poiseuille equation.
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L_tube(Q_max, D, h_fmax, ν) := h_fmax*g*π*D^4/(128*ν*Q_max)
# Minimum diameter of tubing to produce the desired head loss at the maximum flow using the minimum feasible length of tubing. Based on the Hagen-Poiseuille equation.
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D_minheadloss(Q_max, L_min, h_fmax, ν) := (128*ν*Q_max*L_min/(h_fmax*g*π))^(1/4)
# The minimum diameter is the maximum of the diameter calculated by the previous two equations. A larger diameter could be used if a longer tube is used.
D_min(Q_max, L_target, h_fmax, ν) := max(D_minheadloss(Q_max, L_target, h_fmax, ν), D_minlaminar(Q_max, ν))
# Define a range of flows that we will use to plot the results.
Q_range := 10*mL/min, 20*mL/min .. Q_maxlaminar(L_max, h_fmax, ν)
## Tube diameter constraints
# Now let's add the constraint of given tube diameters. First we write a function that will round up  to the next available tube size.
forceround(x, xarray, direction) :=
    xarray ← sort(xarray)
    i ← 0
    while x > xarray[i]
        i ← i + 1
    return xarray[i - 1 + direction]  # direction is for rounding up (1) or rounding down (0).
# Now we use the forceround function to find the design tube diameter based on the minimum tube diameter and the available tube diameters.
D_design(Q_max, L_max, h_fmax, ν) := forceround(D_min(Q_max, L_max, h_fmax, ν), D_available, 1)
# At very low flows the design will fail given a finite set of tube diameters. Thus calculate the minimum design flow that can be produced based on the Hagen-Poiseuille equation.
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Q_min(L_max, h_fmax, D_min, ν) := h_fmax*g*π*D_min^4/(128*ν*L_max)
Q_min(L_max, h_fmax, D_available[0], ν) = 9.24255 mL/min
# Redefine the flow rate to only include the feasible range given the constraints. Note that the minimum flow plotted is the minimum design flow. The design flow is the maximum flow for a flow control module.
Q_range := Q_min(L_max, h_fmax, D_available[0], ν), Q_min(L_max, h_fmax, D_available[0], ν) + 10*mL/min .. Q_maxlaminar(L_max, h_fmax, ν)
# The maximum tube length constraint may be violated if there aren't enough available tubing diameters.
D_tube := D_design(Q_max, L_min, h_fmax, ν) = 6 mm
L_design := L_tube(Q_max, D_tube, h_fmax, ν) = 7.48647 m  # designs for the particular flow rate
D_tube = 6 mm
D_tube = 0.23622 in
L_design = 748.647 cm
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