# Fluids Functions
# Reynolds Number
Re_pipetransition := 2100
R_h(w, b) := w*b/(2*(w + b))
Re(Q, D, ν) := 4*Q/(π*D*ν)
Re_rect(Q, w, b, ν) := 4*Q*R_h(w, b)/(w*b*ν)
# Friction Coefficient
f_rect(Q, w, b, ν, ε) :=
    f ← 0.25/log(ε/(3.7*4*R_h(w, b)) + 5.74/Re_rect(Q, w, b, ν)^0.9)^2 if Re_rect(Q, w, b, ν) > Re_pipetransition
    f ← 64/Re_rect(Q, w, b, ν) otherwise
    return f
f(Q, D, ν, ε) :=
    f ← 0.25/log(ε/(3.7*D) + 5.74/Re(Q, D, ν)^0.9)^2 if Re(Q, D, ν) > Re_pipetransition
    f ← 64/Re(Q, D, ν) otherwise
    return f
# Headloss Calculations
# This is head loss due to major losses (caused by shear).
h_frect(Q, w, b, L, ν, ε) := f_rect(Q, w, b, ν, ε)*L/(4*R_h(w, b))*Q^2/(2*g*(w*b)^2)
h_f(Q, D, L, ν, ε) := f(Q, D, ν, ε)*8/(g*π^2)*L*Q^2/D^5
# This is head loss due to minor losses (caused by flow expansions).
h_erect(Q, w, b, K) := K*Q^2/(2*g*(w*b)^2)
h_e(Q, D, K) := K*8/(g*π^2)*Q^2/D^4
# This is total head loss due to major and minor losses
h_lrect(Q, w, b, L, K, ν, ε) := h_erect(Q, w, b, K) + h_frect(Q, w, b, L, ν, ε)
h_l(Q, D, L, K, ν, ε) := h_e(Q, D, K) + h_f(Q, D, L, ν, ε)
# Headloss not multiplied by v^2/(2*g)
C_p(Q, D, L, K, ν, ε) := f(Q, D, ν, ε)*L/D + K
# This is total head loss through the manifold
HL_Manifold(Q, D, L, K, ν, ε, n) := h_l(Q, D, L, K, ν, ε)*(1/3 + 1/(2*n) + 1/(6*n^2))
# Orifice Equations
A_circle(D_circle) := π*D_circle^2/4
D_circle(A_circle) := sqrt(4*A_circle/π)
Q_orifice(D, h, K_orifice) := K_orifice*A_circle(D)*sqrt(2*g*h)
h_orifice(D, K_orifice, Q) := (Q/(K_orifice*A_circle(D)))^2*1/(2*g)
A_orifice(h, K_orifice, Q) := Q/(K_orifice*sqrt(2*g*h))
n_orifices(Q_plant, K_orifice, Δh_orifice, D_orifice) := ceil(A_orifice(Δh_orifice, K_orifice, Q_plant)/A_circle(D_orifice))
d_orificemanifold(Q_manifoldratio, Q_tank, d_pipe, L_s, L_l, K_total, n_orifice, ν, ε, K_or) := nthroot((1 - Q_manifoldratio)*d_pipe^4/(((K_total + f(Q_tank, d_pipe, ν, ε)*L_l/d_pipe)*Q_manifoldratio - K_total - f(Q_tank, d_pipe, ν, ε)*L_s/d_pipe)*K_or^2*n_orifice^2), 4)
# Flow Equations
Q_transition(D, ν) := π*D*Re_pipetransition*ν/4
# Hagen-Poiseuille
Q_hagen(D, h_f, L, ν) := π*D^4/(128*ν)*g*h_f/L
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Q_SJ(D, h_f, L, ν, ε) := -π/sqrt(2)*D^(5/2)*sqrt(g*h_f/L)*log(ε/(3.7*D) + 2.51*ν*sqrt(L/(2*g*h_f*D^3)))
Q_pipemajor(D, h_f, L, ν, ε) :=
    Q_hagen(D, h_f, L, ν) if Q_hagen(D, h_f, L, ν) < Q_transition(D, ν)
    Q_SJ(D, h_f, L, ν, ε) otherwise  # This function calculates the flow through a pipe under either laminar or turbulent flow when there are only major losses
Q_pipeminor(D, h_e, K) := A_circle(D)*sqrt(2*g*h_e/K)
# This function uses iteration to calculate the flow through a pipe system. It works for laminar or turbulent flow.
Q_pipetotal(D, h_l, L, ν, ε, K) :=
    Q_temp ← 0*m^3/s
    error ← 1
    Q_tempprev ← min(Q_pipemajor(D, h_l, L, ν, ε), Q_pipeminor(D, h_l, K))
    while error > 0.01
        (Q_temp ← Q_tempprev)
        h_fnew ← h_l*h_f(Q_temp, D, L, ν, ε)/(h_f(Q_temp, D, L, ν, ε) + h_e(Q_temp, D, K))
        Q_tempprev ← Q_pipemajor(D, h_fnew, L, ν, ε)
        error ← 0 if Q_tempprev == 0*m^3/s
        error ← |Q_temp - Q_tempprev|/mean(Q_temp, Q_tempprev) otherwise
    return Q_tempprev
# get a better estimate of the major losses. Adjust it by the ratio of the actual head loss to the calculated total head loss
# Pipe Equations
D_pipe(Q, D_available, h_l, L, ν, ε, K) :=
    i ← 0
    while Q > Q_pipetotal(D_available[i], h_l, L, ν, ε, K)
        i ← i + 1
    return D_available[i]
D_pipeschedule(Q, PipeSpecification, h_l, L, ν, ε, K) :=
    D_available ← AvailPipeSizes(PipeSpecification)[:, 0]
    i ← 0
    while Q > Q_pipetotal(D_available[i], h_l, L, ν, ε, K)
        i ← i + 1
    return AvailPipeSizes(PipeSpecification)[:, 1][i]  # error: This variable is undefined.
# Given pipe spec will return nominal pipe size!
D_nextlargest(D, D_available) :=
    i ← 0
    while D_available[i] < D
        i ← i + 1
        break if i == last(D_available)
    return D_available[i]
Dpipelarger(D, D_available) :=
    i ← 0
    while D_available[i] ≤ D
        i ← i + 1
        break if i == last(D_available)
    return D_available[i]
# This one rounds up even if the given pipe size is exactly correct to make it possible to go to a larger pipe if the given pipe isn't actually adequate. It is currently used in the pipe launder program
D_manifold(Q, h, L_manifold, Q_ratio, D_available, ν, ε, K, n) :=
    D_new ← D_available[0]
    D_old ← 0 in
    error ← 1
    while error > 0.01
        D_old ← D_new
        D_new ← (8*Q^2/(g*π^2*h)*(1 + (f(Q, D_old, ν, ε)*L_manifold/D_old + K)*(1/3 + 1/(2*n) + 1/(6*n^2)))/(1 - Q_ratio^2))^(1/4)
        error ← |D_old - D_new|/mean(D_old, D_new)
    D_new ← Dnextlargest(D_new, D_available)
    return D_new  # error: This variable is undefined.
ND_Launder(Q, h, L_manifold, Q_ratio, PipeSpecification, ν, ε, K, n) :=
    D_available ← AvailPipeSizes(PipeSpecification)[:, 0]
    D_new ← D_available[0]
    D_old ← 0 in
    error ← 1
    while error > 0.01
        D_old ← D_new
        D_new ← (8*Q^2/(g*π^2*h)*(1 + (f(Q, D_old, ν, ε)*L_manifold/D_old + K)*(1/3 + 1/(2*n) + 1/(6*n^2)))/(1 - Q_ratio^2))^(1/4)
        error ← |D_old - D_new|/mean(D_old, D_new)
    return NominalDiameter(D_new, PipeSpecification)  # error: This variable is undefined.
# Given pipe spec will return nominal pipe size!
ND(K, Q, NU, G) := (16*K*Q^3/(NU*π^3*G^2))^(1/7)
D_EqualParallelFlow(Q, Q_ratio, h_max, L_min, L_max, K_min, K_max, PipeSpecification, ν, ε) :=
    D_available ← AvailPipeSizes(PipeSpecification)[:, 0]
    D_new ← D_available[0]
    D_old ← 0 in
    error ← 1
    while error > 0.01
        D_old ← D_new
        ΔC_p ← K_max - K_min + f(Q, D_old, ν, ε)*(L_max - L_min)/D_old
        D_new ← (8/(g*π^2*h_max)*ΔC_p*Q_ratio^2/(1 - Q_ratio^2))^(1/4)*sqrt(2*Q/(1 + Q_ratio))
        error ← |D_old - D_new|/mean(D_old, D_new)
    return NominalDiameter(D_new, PipeSpecification)  # error: This variable is undefined.
# This function provides equal flow between parallel pipes
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D_orifices(HL_Launder, Q_Plant, D_Launder, N_Orifices, HW_SedTank, K_Orifice) := D_circle(A_orifice(HW_SedTank - HL_Launder - Q_Plant^2/(2*g*A_circle(D_Launder)^2), K_Orifice, Q_Plant/N_Orifices))
# Weir Headloss
# Monroe changed the coefficient from 0.81 to 0.61
Headloss_weir(Q, D) := (Q/D)^(2/3)*((3/2)/(0.61*π*(2*g)^0.5))^(2/3)
# Minor Loss Coefficients
# Individual K Values | Expansions | Contractions
K_el90 := 0.9
diamratio_exp0.75 := 0
diamratio_cont0.75 := 0
K_el45 := 0.45
diamratio_cont0.25 := 0
diamratio_exp0.25 := 0
K_gatevalve := 0.39
diamratio_cont0.5 := 0
diamratio_exp0.5 := 0
K_chkvalveconv := 4
K_chkvalveball := 4.5
K_exp0.75 := 0.18
K_exp0.25 := 0.25
K_cont0.5 := 0.33
K_globevalve := 10
K_anglevalve := 4.3
K_exp0.5 := 0.55
K_cont0.75 := 0.18
K_cont0.25 := 0.43
K_1 := 0
K_returnbend := 1.5
K_Tflowrun := 0.6
K_Tflowbr := 1.8
K_orifice := 0.63
K_lturn := 0.45  # K.lturn is the K value for a long radius ninety degree turn
K_ent := 0.5  # K.ent is the K value for a pipe entrance
K_exit := 1
K_sum(N_elbow45, N_elbow90, N_teerun, N_teebr, GateValve, GlobeValve, AngleValve, CheckValveConv, CheckValveBall) :=
    K_2 ← N_elbow45*K_el45 + N_elbow90*K_el90
    K_3 ← K_Tflowrun*N_teerun + K_Tflowbr*N_teebr
    K_4 ← GateValve*K_gatevalve + GlobeValve*K_globevalve + AngleValve*K_anglevalve + CheckValveConv*K_chkvalveconv + CheckValveBall*K_chkvalveball
    K_5 ← diamratio_exp0.75*K_exp0.75 + diamratio_exp0.5*K_exp0.5 + diamratio_exp0.25*K_exp0.25 + diamratio_cont0.75*K_cont0.75 + diamratio_cont0.5*K_cont0.5 + diamratio_cont0.25*K_cont0.25
    K_sum ← K_2 + K_3 + K_4 + K_5
    return K_sum
PipeSize(Q_plant, PipeSpecification, L_pipe, K_total, h_lossmax) :=
    Pipe_size ← D_pipe(Q_plant, AvailPipeSizes1(PipeSpecification), h_lossmax, L_pipe, ν, ε_pvc, K_total)
    return Pipe_size  # error: This variable is undefined.
