# AguaClara Water Treatment Plants
# Automated Design
# User Inputs:
HW_Sed := 3.85 m
# Design References
# [reference: UserInputs- test2W.xmcd]
# [reference: DesignAssumptions-test 2W.xmcd]
# [reference: MathFunctions.xmcd]
# [reference: PipeDatabase.xmcd]
# [reference: MinorLossCoefficients.xmcd]
# [reference: FluidsFunctions.xmcd]
# Inlet Channel:
N_SedTanks := 8
N_SedInletPipes := 2
sedlayout := 2
# [reference: Inlet Channel-gracias 2W test.xmcd]
W_InletChannel = 0.452455 m
L_Channel = 18.472 m
ND_SedPipeEntrance = 8 in
N_SedInletPipes = 2
H_InletChannel = 2.00405 m
Q_Plant = 800 gal/min
# Sedimentation Tanks:
# [reference: Sedimentation-gracias 2W test.xmcd]
N_SedTanks = 8
H_SedBelowSlope = 2.06009 m
H_SedBelowStraight = 0.0762 m
H_SedBetween = 0.0762 m
W_Sed = 85 in
HW_Sed = 3.85 m
H_Sed = 3.95 m
H_SedBelow = 2.13629 m
L_Sed = 3.60682 m
ND_SedPipeEntrance = 8 in
# Sedimentation Tank Sludge Drain:
# [reference: SludgeDrain.xmcd]
N_SedSludgeOrifices = 36
ND_SedSludge = 4 in
Q_SludgeDrainInitial = 1998.7 L/min
D_SedSludgeOrifice = 0.25 in
# Sedimentation Tank Inlet Slopes:
# [reference: Sed. Inlet Slopes.xmcd]
B_SedInlet = 6.395 cm
H_SedInlet = 8.34807 cm
AN_SedTopInlet = 60 deg
AN_SedBottom = 10 deg
L_SedTopInlet = 2.159 m
A_SedInlet = 9064.58 cm^2
H_SedTopInlet = 186.975 cm
H_SedInletSlopes = 1.96975 m
H_SedBottom = 0.190345 m
# Sedimentation Tank Effluent Launder:
# [reference: Launder.xmcd]
N_SedLaunderOrifices = 50
Q_SedLaunderOrifices = 3.78541 L/min
# Exit Channel:
# [reference: Exit Channel.xmcd]
W_ExitChannel = 0.452455 m
ND_SedLaunder = 6 in
H_ExitChannel = 2.00405 m
L_SedLaunder = 2.55191 m
L_ExitChannel = 18.472 m
D_SedLaunderOrifice = 0.5 in
H_PltWeir = 1.76908 m
Z_SedLaunder = 3.72586 m
HW_ExitChannel = 1.86405 m
# Lamella:
# [reference: Lamella.xmcd]
L_SedPlate = 1.93063 m
B_SedPlate = 5.02566 cm
S_SedPlate = 4.72566 cm
N_SedPlates = 26
AN_SedPlate = 60 deg
V_SedC = 10.032 m/day
V_SedUp = 70 m/day
H_SedPlate = 1.67198 m
H_SedAbove = 0.208275 m
# Flow Controller:
# [reference: FCM.xmcd]
N_Fcm = 6
ID_FcmTube = 4.318 mm
ID_FcmTube = 0.17 in
L_FcmTube = 255.151 cm
Q_FcmTubeMax = 378.541 mL/min
HL_FcmValve = 26.6223 cm
# Flocculator:
# [reference: Flocculation.xmcd]
W_FlocChannel = 1.0795 m
S_FlocBaffle = [0.229659; 0.274731; 0.364221; 0.935701] m
B_FlocBaffle = [0.233659; 0.278731; 0.368221; 0.939701] m
N_FlocBafflesMin = 27
HL_Floc = 8.31788 cm
X_FlocBaffles = [
    1.2295, 2.65612, 0.950701, 2.65612, 0.950701;
    1.46316, 2.37739, 1.31892, 1.71642, 1.8904;
    1.69682, 2.09866, 1.68714, 0, 2.8301;
    1.93048, 1.81993, 2.05537, 0, 0;
    2.16414, 1.5412, 2.42359, 0, 0;
    2.39779, 1.17298, 0, 0, 0;
    2.67653, 0, 0, 0, 0
] m
HW_FlocStart = 3.93318 m
W_FlocPort = 0.935701 m
L_FlocBaffles = [
    3.62034, 3.57527, 3.48578, 3.48578, 2.9143;
    3.72034, 3.67527, 3.58578, 3.0143, 3.0143;
    3.62034, 3.57527, 3.48578, 0, 2.9143;
    3.72034, 3.67527, 3.58578, 0, 0;
    3.62034, 3.57527, 3.48578, 0, 0;
    3.72034, 3.58578, 0, 0, 0;
    3.57527, 0, 0, 0, 0
] m
H_FlocPort = 1.0795 m
N_FlocBaffles = 23
Z_FlocBaffles = [
    0, 0, 0, 0, 0;
    0.229659, 0.274731, 0.364221, 0.935701, 0.935701;
    0, 0, 0, 0, 0;
    0.229659, 0.274731, 0.364221, 0, 0;
    0, 0, 0, 0, 0;
    0.229659, 0.364221, 0, 0, 0;
    0, 0, 0, 0, 0
] m
Gt_FlocMinFlow = 6090.99
N_FlocChannels = 5
# Entrance Tank:
# [reference: EntranceTank.xmcd]
ND_Lfom = 20 in
HL_Rm = 0.890191 cm
N_Lfom = 1
D_LfomOrifices = 52.3875 mm
Q_LfomErrorMax = 0.74575 %
N_LfomOrifices = [5; 4; 3; 2; 2; 2; 1; 2; 1; 1]
L_Et = 1.0795 m
W_Et = 1.0795 m
HW_EtMin = 0.2 m
HW_EtMax = 0.4 m
H_Et = 0.5 m
ZW_Et = 4.18318 m
# Any additional needed elevations should be calculated in the files above.
# AutoCAD References
# [reference: basics.xmcd]
# [reference: pipe.xmcd]
# [reference: tank.xmcd]
# [reference: lamina.xmcd]
# [reference: cross.xmcd]
# [reference: Tee.xmcd]
# [reference: elbow.xmcd]
# [reference: Sludge.xmcd]
# [reference: Channel.xmcd]
# [reference: Manifold.xmcd]
# [reference: SedTankslopes.xmcd]
# [reference: Sed Tank Inlet Slope.xmcd]
# [reference: chemicalstock.xmcd]
# [reference: Sedimentation Tank.xmcd]
# [component: inputs SedTank]
# [reference: Flocculation Tank.xmcd]
# [component: inputs FlocTank]
# [reference: Entrance Tank.xmcd]
# [component: inputs EntranceTank]
