# AguaClara Water Treatment Plants
# Automated Design
# User Inputs:
HW_Sed := 3.05 m
# Design References
# [reference: PipeDatabase.xmcd]
# [reference: UserInputs- Gracias.xmcd]
sedlayout = 2
# [reference: DesignAssumptions- Gracias.xmcd]
N_SedTanks := 4
# [reference: MathFunctions.xmcd]
# [reference: MinorLossCoefficients.xmcd]
# [reference: FluidsFunctions.xmcd]
# Sedimentation Tanks:
# [reference: Sedimentation - Gracias.xmcd]
N_SedTanks = 4
H_SedBetween = 0.060325 m
HW_Sed = 3.05 m
H_Sed = 3.15 m
L_Sed = 4.76411 m
# Sedimentation Tank Sludge Drain:
# [reference: SludgeDrain.xmcd]
N_SedSludgeOrifices = 47
ND_SedSludge = 6 in
Q_SludgeDrainInitial = 3137.14 L/min
D_SedSludgeOrifice = 0.3125 in
# Height Dimensions within Sedtank
H_SedBelowSlope := .5*W_Sed/N_SlopePairs*tan(AN_SedTopInlet) + T_SedInletSlope/cos(AN_SedTopInlet) + outerdiameter(ND_SedSludge) = 1.67059 m
# This depth of the sloped bottom
H_SedBelow := H_SedBelowSlope + H_SedBetween = 1.73091 m  # the entire area under the lamella will be a part of the sloped bottom
# Inlet Channel:
# [reference: Inlet Channel-gracias 2W test.xmcd]
W_InletChannel = 2.10745 m
L_Channel = 13.554 m
ND_SedPipeEntrance = 12 in
N_SedInletPipes = 6
H_InletChannel = 0.285052 m
Q_Plant = 792.516 gal/min
# Sedimentation Tank Inlet Slopes:
# [reference: Sed. Inlet Slopes- minV.xmcd]
B_SedInlet = 2.97561 cm
L_SedTopFilled = -1.10595 m
H_SedInlet = 8.70009 cm
W_SlopesFilled = -0.552977 m
L_SedBottomFilled = -0.72186 m
AN_SedTopInlet = 60 deg
L_SedTopInlet = 1.61925 m
AN_SedBottom = 40 deg
A_SedInletTotal = 2926.61 cm^2
A_SedInlet = 8289.64 cm^2
H_SedTopSlope = 1.40231 m
A_SedInletActual = 2921.9 cm^2
A_Inlet = 4144.82 cm^2
L_SedBottom = 1.05689 m
Z_SedSlopes = 1.67059 m
H_SedBottomSlope = 0.679356 m
L_SedTopInlet = 1.61925 m
W_SlopesOpen = 1.3626 m
# Sedimentation Tank Effluent Launder:
# [reference: Launder.xmcd]
N_SedLaunderOrifices = 6
Q_SedLaunderOrifices = 20.8333 L/min
# Exit Channel:
# [reference: Exit Channel.xmcd]
W_ExitChannel = 2.10745 m
ND_SedLaunder = 4 in
H_ExitChannel = 0.285052 m
L_SedLaunder = 0.399207 m
L_ExitChannel = 13.554 m
D_SedLaunderOrifice = 1.1875 in
H_PltWeir = 0.0506759 m
Z_SedLaunder = 2.95285 m
HW_ExitChannel = 0.145052 m
# Lamella:
# [reference: Lamella.xmcd]
L_SedPlate = 1.34498 m
B_SedPlate = -0.726187 cm
S_SedPlate = -1.02619 cm
N_SedPlates = 52
AN_SedPlate = 60 deg
V_SedC = 9.9127 m/day
V_SedUp = 70 m/day
H_SedPlate = 1.16479 m
H_SedAbove = 0.1543 m
# Flow Controller:
# [reference: FCM.xmcd]
N_Fcm = 6
ID_FcmTube = 4.318 mm
ID_FcmTube = 0.17 in
L_FcmTube = 257.56 cm
Q_FcmTubeMax = 375 mL/min
HL_FcmValve = 26.1265 cm
# Flocculator:
# [reference: Flocculation.xmcd]
W_FlocChannel = 1.61925 m
S_FlocBaffle = [0.168249; 0.20127; 0.26683; 0.559708] m
B_FlocBaffle = [0.172249; 0.20527; 0.27083; 0.563708] m
N_FlocBafflesMin = 33
HL_Floc = 9.05946 cm
X_FlocBaffles = [
    1.76925, 4.1894, 0.574708;
    1.9415, 3.98413, 1.13842;
    2.11375, 3.77886, 1.70212;
    2.286, 3.50803, 2.26583;
    2.45825, 3.2372, 0;
    2.6305, 2.96637, 0;
    2.80275, 2.69554, 0;
    2.975, 2.42471, 0;
    3.18027, 2.15388, 0;
    3.38553, 1.88305, 0;
    3.5908, 1.31934, 0;
    3.79607, 0.755633, 0;
    4.00134, 0, 0
] m
HW_FlocStart = 3.14059 m
L_FlocBaffles = [
    2.88175, 2.84873, 2.49029;
    2.98175, 2.94873, 2.59029;
    2.88175, 2.84873, 2.49029;
    2.98175, 2.88317, 2.59029;
    2.88175, 2.78317, 0;
    2.98175, 2.88317, 0;
    2.88175, 2.78317, 0;
    2.98175, 2.88317, 0;
    2.84873, 2.78317, 0;
    2.94873, 2.88317, 0;
    2.84873, 2.49029, 0;
    2.94873, 2.59029, 0;
    2.84873, 0, 0
] m
W_FlocPort = 0.559708 m
H_FlocPort = 1.61925 m
N_FlocBaffles = 29
Z_FlocBaffles = [
    0, 0, 0;
    0.168249, 0.20127, 0.559708;
    0, 0, 0;
    0.168249, 0.26683, 0.559708;
    0, 0, 0;
    0.168249, 0.26683, 0;
    0, 0, 0;
    0.168249, 0.26683, 0;
    0, 0, 0;
    0.20127, 0.26683, 0;
    0, 0, 0;
    0.20127, 0.559708, 0;
    0, 0, 0
] m
Gt_FlocMinFlow = 6241.25
N_FlocChannels = 3
# Entrance Tank:
# [reference: EntranceTank.xmcd]
ND_Lfom = 20 in
HL_Rm = 0.890239 cm
N_Lfom = 1
D_LfomOrifices = 52.3875 mm
Q_LfomErrorMax = 1.06583 %
N_LfomOrifices = [5; 4; 3; 2; 2; 1; 2; 2; 1; 1]
L_Et = 3 m
W_Et = 1.5 m
HW_EtMin = 0.2 m
HW_EtMax = 0.4 m
H_Et = 3.54059 m
ZW_Et = 3.44059 m
# Any additional needed elevations should be calculated in the files above.
# Elevations:
ZW_ExitChannel = 3.01 m  # Water Level at the end of the plant in the exit channel and exit channel box
HW_Sed = 3.05 m
HW_FlocStart = 3.14059 m  # Water level at the beginning of the floc tank
HL_Floc = 9.05946 cm  # just for ref. the head loss throught the floc tank
ZW_Et = 3.44059 m  # the height of the water in the entrance tank.
Z_Mp := (HW_Sed - HW_InletChannel)
# AutoCAD References
# [reference: basics.xmcd]
# [reference: pipe.xmcd]
# [reference: tank.xmcd]
# [reference: lamina.xmcd]
# [reference: cross.xmcd]
# [reference: Tee.xmcd]
# [reference: elbow.xmcd]
# [reference: Sludge.xmcd]
# [reference: Channel.xmcd]
# [reference: Manifold.xmcd]
# [reference: SedTankslopes.xmcd]
# [reference: Sed Tank Inlet Slope.xmcd]
# [reference: chemicalstock.xmcd]
# [reference: Sedimentation Tank.xmcd]
# [component: inputs SedTank]
# [reference: Flocculation Tank.xmcd]
# [component: inputs FlocTank]
# [reference: Entrance Tank.xmcd]
# [component: inputs EntranceTank]
