# AguaClara Water Treatment Plants -- Gracias
# Automated Design
# User Inputs:
HW_Sed := 2 m
# Design References
# [reference: UserInputs- Gracias.xmcd]
# [reference: DesignAssumptions- Gracias.xmcd]
# [reference: MathFunctions -Gracias.xmcd]
# [reference: PipeDatabase.xmcd]
# [reference: MinorLossCoefficients - Gracias.xmcd]
# [reference: FluidsFunctions - Gracias.xmcd]
# Sed Tanks and Slopes:
# [reference: Influent sed manifold_UpdatedMonroes - Gracias.xmcd]
N_SedTanks = 3
B_SedPort = 6.20839 cm
H_SedBetween = 0.0762 m
W_SedPort = 6.20839 cm
L_Sed = 9.52822 m
N_SedPorts = 45
.
N_SlopePairs = 2
L_SedPort = 7.16883 cm
W_Sed = 2.159 m
# Sedimentation Tank Sludge Drain:
# [reference: SludgeDrain-Gracias.xmcd]
N_SedSludge = 2
N_SedSludgeOrifices = 63
W_SedSludge = 0.0912073 m
Time_SludgeDrain = 38.7126 min
H_SedSludge = 5 cm
B_SedSludgeOrifices = 15 cm
T_SedSludge = 9.33013 cm
D_SedSludgeOrifice = 0.375 in
# Sedimentation Tank Dimensions:
# [reference: Sedimentation Dimensions - Gracias.xmcd]
Z_SedSludge = 14.3301 cm
H_SedBottomSlope = 0.0831291 m
H_SedTopSlope = 0.773272 m
Z_SedSlopes = 1.01657 m
H_Sed = 2.1 m
W_Sed = 2.159 m
# Inlet Channel:
# [reference: Inlet Channel - Gracias.xmcd]
W_InletChannel = 59.0347 cm
L_Channel = 6.927 m
ND_SedPipeEntrance = 20 in
N_SedInletPipes = 2
H_InletChannel = 0.933427 m
# Sedimentation Tank Effluent Launder:
# [reference: Launder - Gracias.xmcd]
N_SedLaunderOrifices = 162
Q_SedLaunderOrifices = 3.08642 L/min
# Exit Channel:
# [reference: Exit Channel - Gracias.xmcd]
W_ExitChannel = 0.590347 m
ND_SedLaunder = 8 in
H_ExitChannel = 0.933427 m
L_SedLaunder = 8.19753 m
L_ExitChannel = 6.927 m
D_SedLaunderOrifice = 0.4375 in
H_PltWeir = 0.699051 m
Z_SedLaunder = 1.85046 m
HW_ExitChannel = 0.793427 m
ZW_ExitChannel = 1.96 m
# Lamella:
# [reference: Lamella - Gracias.xmcd]
L_SedPlate = 0.748421 m
B_SedPlate = 4.17408 cm
S_SedPlate = 3.87408 cm
N_SedPlates = 161
AN_SedPlate = 60 deg
V_SedC = 10.0087 m/day
V_SedUp = 70 m/day
H_SedPlate = 0.648152 m
H_SedAbove = 0.259075 m
# Flow Controller:
# [reference: FCM - Gracias.xmcd]
N_Fcm = 6
ID_FcmTube = 4.318 mm
ID_FcmTube = 0.17 in
L_FcmTube = 257.56 cm
Q_FcmTubeMax = 375 mL/min
HL_FcmValve = 26.1265 cm
# Flocculator:
Pi_Epsilon := 0.84
W_FlocChannelMin := 45 cm
Pi_FlocCP := 110 m^(2/3)
# [reference: Flocculation - Gracias -Energy Dissapation5.xmcd]
W_FlocChannel = 0.719212 m
L_Sed = 9.52822 m
ED_Floc = [6.4; 1.6; 0.4] mW/kg
# Check the residence time of the flocculator should be at least 20minutes
S_FlocBaffle = [39.685; 62.9961; 100] cm
B_FlocBaffle = [40.085; 63.3961; 100.4] cm
HW_FlocEnd = 2 m
X_FlocBaffles = [
    8.52422, 8.51322, 8.51322, 8.51322, 8.51322;
    8.12337, 8.11237, 7.87926, 7.50922, 7.50922;
    7.72252, 7.71152, 7.2453, 6.50522, 6.50522;
    7.32167, 7.07756, 6.61134, 5.50122, 5.50122;
    6.92082, 6.4436, 5.97738, 4.49722, 4.49722;
    6.51997, 5.80964, 5.34342, 3.49322, 3.49322;
    6.11912, 5.17568, 4.70946, 2.48922, 2.48922;
    5.71827, 4.54172, 4.0755, 1.48522, 1.48522;
    5.31742, 3.90776, 3.44154, 0, 9.52822;
    4.91657, 3.2738, 2.80758, 0, 9.52822;
    4.51572, 2.63984, 2.17362, 0, 9.52822;
    4.11487, 2.00588, 1.16962, 0, 9.52822;
    3.71402, 1.37191, 9.52822, 0, 9.52822;
    3.31317, 0, 9.52822, 0, 9.52822;
    2.91232, 0, 9.52822, 0, 9.52822;
    2.51147, 0, 9.52822, 0, 9.52822;
    2.11062, 0, 9.52822, 0, 9.52822;
    1.70977, 0, 9.52822, 0, 9.52822;
    1.30892, 0, 9.52822, 0, 9.52822
] m
L_FlocBaffles = [
    1.60315, 1.60315, 1.37004, 1, 1;
    1.90744, 1.90744, 1.67433, 1.30429, 1.30429;
    1.60315, 1.60315, 1.37004, 1, 1;
    1.90744, 1.67433, 1.67433, 1.30429, 1.30429;
    1.60315, 1.37004, 1.37004, 1, 1;
    1.90744, 1.67433, 1.67433, 1.30429, 1.30429;
    1.60315, 1.37004, 1.37004, 1, 1;
    1.90744, 1.67433, 1.67433, 1.30429, 1.30429;
    1.60315, 1.37004, 1.37004, 0, 0;
    1.90744, 1.67433, 1.67433, 0, 0;
    1.60315, 1.37004, 1.37004, 0, 0;
    1.90744, 1.67433, 1.30429, 0, 0;
    1.60315, 1.37004, 0, 0, 0;
    1.90744, 0, 0, 0, 0;
    1.60315, 0, 0, 0, 0;
    1.90744, 0, 0, 0, 0;
    1.60315, 0, 0, 0, 0;
    1.90744, 0, 0, 0, 0;
    1.60315, 0, 0, 0, 0
] m
N_FlocChannels = 5
L_FlocTankEst = 42.815 m
N_FlocBaffleSection = [21; 21; 21]
HL_Floc = 20.429 cm
HW_FlocStart = 2.20429 m
Z_FlocBaffles = [
    0, 0, 0, 0, 0;
    0.39685, 0.39685, 0.629961, 1, 1;
    0, 0, 0, 0, 0;
    0.39685, 0.629961, 0.629961, 1, 1;
    0, 0, 0, 0, 0;
    0.39685, 0.629961, 0.629961, 1, 1;
    0, 0, 0, 0, 0;
    0.39685, 0.629961, 0.629961, 1, 1;
    0, 0, 0, 0, 0;
    0.39685, 0.629961, 0.629961, 0, 0;
    0, 0, 0, 0, 0;
    0.39685, 0.629961, 1, 0, 0;
    0, 0, 0, 0, 0;
    0.39685, 0, 0, 0, 0;
    0, 0, 0, 0, 0;
    0.39685, 0, 0, 0, 0;
    0, 0, 0, 0, 0;
    0.39685, 0, 0, 0, 0;
    0, 0, 0, 0, 0
] m
W_FlocPort = 1 m
H_FlocPort = 0.719212 m
# Entrance Tank:
C_d := 0.62
# [reference: EntranceTankDim- Gracias.xmcd]
L_Et = 9.52822 m
W_Et = 0.719212 m
HW_EtMin = 0.2 m
HW_EtMax = 0.4 m
H_Et = 2.60429 m
ZW_Et = 2.50429 m
# Any additional needed elevations should be calculated in the files above.
# Elevations:
ZW_ExitChannel = 1.96 m  # Water Level at the end of the plant in the exit channel and exit channel box
HW_Sed = 2 m
HW_FlocStart = 2.20429 m  # Water level at the beginning of the floc tank
HL_Floc = 20.429 cm  # just for ref. the head loss throught the floc tank
ZW_Et = 2.50429 m  # the height of the water in the entrance tank.
# AutoCAD References
# [reference: basics.xmcd]
# [reference: pipe.xmcd]
# [reference: tank.xmcd]
# [reference: lamina.xmcd]
# [reference: laminaplain.xmcd]
# [reference: cross.xmcd]
# [reference: Tee.xmcd]
# [reference: elbow.xmcd]
# [reference: Sludge.xmcd]
# [reference: Channel.xmcd]
# [reference: Manifold.xmcd]
# [reference: SedTankslopes.xmcd]
# [reference: inletslope.xmcd]
# [reference: inletslopetrapezoid.xmcd]
# [reference: chemicalstock.xmcd]
# [reference: Sedimentation Tank.xmcd]
# [component: inputs SedTank]
# [reference: Flocculation Tank.xmcd]
# [component: inputs FlocTank]
# [reference: Entrance Tank.xmcd]
# [component: inputs EntranceTank]
