# AguaClara Water Treatment Plants -- Gracias
# Automated Design
# User Inputs:
HW_Sed := 2 m
# Design References
# [reference: UserInputs- Gracias.xmcd]
# [reference: DesignAssumptions- Gracias.xmcd]
# [reference: MathFunctions -Gracias.xmcd]
# [reference: PipeDatabase.xmcd]
# [reference: MinorLossCoefficients - Gracias.xmcd]
# [reference: FluidsFunctions - Gracias.xmcd]
# Sed Tanks and Slopes:
# [reference: Influent sed manifold - Gracias.xmcd]
N_SedTanks = 3
H_SedBetween = 0.0762 m
B_SedPort = 6.20839 cm
.
L_Sed = 4.76411 m
L_SedPort = 7.16883 cm
W_SedPort = 6.20839 cm
N_SlopePairs = 4
B_SedPort = 6.20839 cm
W_Sed = 4.318 m
N_SedPorts = 17
ND_SedPipeEntrance = 20 in
# H.SedRectangle needs to be greater than H.SedPort
Π_SedCell = 2
L_Sed = 4.76411 m  # L.Sed should always be less than L.SedMax
L_SedMax = 5.22812 m
# Sedimentation Tank Sludge Drain:
# [reference: SludgeDrain-Gracias.xmcd]
N_SedSludgeOrifices = 31
Time_SludgeDrain = 0.655616 hr
ND_SedSludge = 2 in
Q_SludgeDrainInitial = 16.8695 L/min
D_SedSludgeOrifice = 0.375 in
# Sedimentation Tank Dimensions:
# [reference: Sedimentation Dimensions - Gracias.xmcd]
H_SedBottomSlope = 0.0237931 m
H_SedTopSlope = 0.126186 m
H_SlopeRectangle = 0.08 m
Z_SedSlopes = 0.311784 m
H_Sed = 2.1 m
W_Sed = 4.318 m
# Inlet Channel:
# [reference: Inlet Channel - Gracias.xmcd]
W_InletChannel = 54.8 cm
L_Channel = 13.404 m
ND_SedPipeEntrance = 20 in
N_SedInletPipes = 2
H_InletChannel = 1.63822 m
Q_Plant = 792.516 gal/min
# Sedimentation Tank Effluent Launder:
# [reference: Launder - Gracias.xmcd]
N_SedLaunderOrifices = 70
Q_SedLaunderOrifices = 7.14286 L/min
# Exit Channel:
# [reference: Exit Channel - Gracias.xmcd]
W_ExitChannel = 0.548 m
ND_SedLaunder = 8 in
H_ExitChannel = 1.63822 m
L_SedLaunder = 3.51811 m
L_ExitChannel = 13.404 m
D_SedLaunderOrifice = 0.625 in
H_PltWeir = 1.40384 m
Z_SedLaunder = 1.85046 m
HW_ExitChannel = 1.49822 m
ZW_ExitChannel = 1.96 m
# Lamella:
# [reference: Lamella - Gracias.xmcd]
L_SedPlate = 1.56224 m
B_SedPlate = 5.66372 cm
S_SedPlate = 5.36372 cm
N_SedPlates = 41
AN_SedPlate = 60 deg
V_SedC = 10.0204 m/day
V_SedUp = 70 m/day
H_SedPlate = 1.35294 m
H_SedAbove = 0.259075 m
# Flow Controller:
# [reference: FCM - Gracias.xmcd]
N_Fcm = 6
ID_FcmTube = 4.318 mm
ID_FcmTube = 0.17 in
L_FcmTube = 257.56 cm
Q_FcmTubeMax = 375 mL/min
HL_FcmValve = 26.1265 cm
# Flocculator:
Pi_Epsilon := 0.84
W_FlocChannelMin := 45 cm
Pi_FlocCP := 110 m^(2/3)
# [reference: Flocculation - Gracias -Energy Dissapation5.xmcd]
W_FlocChannel = 0.719212 m
L_Sed = 4.76411 m
ED_Floc = [14.4; 3.6; 0.4] mW/kg
# Check the residence time of the flocculator should be at least 20minutes
S_FlocBaffle = [30.2853; 48.075; 100] cm
B_FlocBaffle = [30.6853; 48.475; 100.4] cm
HW_FlocEnd = 2 m
X_FlocBaffles = [
    1.004, 3.74911, 1.015, 3.74911, 1.015, 3.74911, 1.015, 3.74911;
    1.31085, 3.44226, 1.32185, 3.26436, 1.49975, 3.26436, 1.49975, 2.74511;
    1.61771, 3.1354, 1.62871, 2.77961, 1.9845, 2.77961, 1.9845, 1.74111;
    1.92456, 2.82855, 1.93556, 2.29486, 2.46925, 2.29486, 2.9885, 0.73711;
    2.23141, 2.5217, 2.24241, 1.81011, 2.954, 1.81011, 0, 0;
    2.53827, 2.21484, 2.72716, 1.32536, 3.43875, 1.32536, 0, 0;
    2.84512, 1.90799, 3.21191, 0, 0, 0, 0, 0;
    3.15197, 1.60114, 3.69666, 0, 0, 0, 0, 0;
    3.45883, 1.29428, 0, 0, 0, 0, 0, 0
] m
L_FlocBaffles = [
    1.69715, 1.69715, 1.69715, 1.51925, 1.51925, 1.51925, 1.51925, 1;
    2.13308, 2.13308, 2.13308, 1.95519, 1.95519, 1.95519, 1.95519, 1.43594;
    1.69715, 1.69715, 1.69715, 1.51925, 1.51925, 1.51925, 1.51925, 1;
    2.13308, 2.13308, 2.13308, 1.95519, 1.95519, 1.95519, 1.43594, 1.43594;
    1.69715, 1.69715, 1.69715, 1.51925, 1.51925, 1.51925, 0, 0;
    2.13308, 2.13308, 1.95519, 1.95519, 1.95519, 1.95519, 0, 0;
    1.69715, 1.69715, 1.51925, 0, 0, 0, 0, 0;
    2.13308, 2.13308, 1.95519, 0, 0, 0, 0, 0;
    1.69715, 1.69715, 0, 0, 0, 0, 0, 0
] m
N_FlocChannels = 8
L_FlocTankEst = 37.7077 m
N_FlocBaffleSection = [21; 21; 21]
HL_Floc = 33.5938 cm
HW_FlocStart = 2.33594 m
Z_FlocBaffles = [
    0, 0, 0, 0, 0, 0, 0, 0;
    0.302853, 0.302853, 0.302853, 0.48075, 0.48075, 0.48075, 0.48075, 1;
    0, 0, 0, 0, 0, 0, 0, 0;
    0.302853, 0.302853, 0.302853, 0.48075, 0.48075, 0.48075, 1, 1;
    0, 0, 0, 0, 0, 0, 0, 0;
    0.302853, 0.302853, 0.48075, 0.48075, 0.48075, 0.48075, 0, 0;
    0, 0, 0, 0, 0, 0, 0, 0;
    0.302853, 0.302853, 0.48075, 0, 0, 0, 0, 0;
    0, 0, 0, 0, 0, 0, 0, 0
] m
W_FlocPort = 1 m
H_FlocPort = 0.719212 m
# Entrance Tank:
C_d := 0.62
# [reference: EntranceTank- Gracias.xmcd]
ND_Lfom = 20 in
HL_Rm = 0.890239 cm
N_Lfom = 1
D_LfomOrifices = 9.525 mm
Q_LfomErrorMax = 0.0157319 %
N_LfomOrifices = [178; 55; 60; 43; 37; 33; 31; 29; 26; 26; 24; 24; 21; 22; 21; 20; 19; 20; 18; 17; 18]
L_Et = 4.76411 m
W_Et = 0.719212 m
HW_EtMin = 0.2 m
HW_EtMax = 0.4 m
H_Et = 2.73594 m
ZW_Et = 2.63594 m
# Any additional needed elevations should be calculated in the files above.
# Elevations:
ZW_ExitChannel = 1.96 m  # Water Level at the end of the plant in the exit channel and exit channel box
HW_Sed = 2 m
HW_FlocStart = 2.33594 m  # Water level at the beginning of the floc tank
HL_Floc = 33.5938 cm  # just for ref. the head loss throught the floc tank
ZW_Et = 2.63594 m  # the height of the water in the entrance tank.
# AutoCAD References
# [reference: basics.xmcd]
# [reference: pipe.xmcd]
# [reference: tank.xmcd]
# [reference: lamina.xmcd]
# [reference: laminaplain.xmcd]
# [reference: cross.xmcd]
# [reference: Tee.xmcd]
# [reference: elbow.xmcd]
# [reference: Sludge.xmcd]
# [reference: Channel.xmcd]
# [reference: Manifold.xmcd]
# [reference: SedTankslopes.xmcd]
# [reference: inletslope.xmcd]
# [reference: inletslopetrapezoid.xmcd]
# [reference: chemicalstock.xmcd]
# [reference: Sedimentation Tank.xmcd]
# [component: inputs SedTank]
# [reference: Flocculation Tank.xmcd]
# [component: inputs FlocTank]
# [reference: Entrance Tank.xmcd]
# [component: inputs EntranceTank]
