# Lamella Design
# [reference: UserInputs- 1m deep.xmcd]
# [reference: DesignAssumptions-1m deep.xmcd]
# [reference: MathFunctions.xmcd]
# [reference: PipeDatabase.xmcd]
# [reference: MinorLossCoefficients.xmcd]
# [reference: FluidsFunctions.xmcd]
# [reference: Inlet Channel.xmcd]
# [reference: Sedimentation.xmcd]
# [reference: Launder.xmcd]
# [reference: Exit Channel.xmcd]
L_SedInactive := (L_SedPlate*cos(AN_SedPlate) + W_InletChannel + W_ExitChannel + 2*T_ChannelWall) = 1.30483 m  # Inactive Area of the sedimentation Tank
# Calculate minimum number of plate settlers
V_SedUpActiveBelow := Q_Sed/(W_Sed*(L_Sed - L_SedInactive)) = 108.719 m/day
B_SedPlate := (L_SedPlate*sin(AN_SedPlate)*cos(AN_SedPlate) - T_SedPlate)/(V_SedUpActiveBelow/V_SedCBod - 1) = 2.40076 cm  # The space between the lamella
# Note this doesn't include the area occupies by the thickness of the plate settlers
B_SedPlateHorizontal := B_SedPlate/sin(AN_SedPlate) = 0.0277215 m
S_SedPlate := B_SedPlate - T_SedPlate = 2.10076 cm
L_SedActiveMax := L_Sed - L_SedInactive = 2.359 m
# Number of spaces where water is traveling is one less than the number of plates used to create those spaces
N_SedPlates := ceil(L_SedActiveMax*sin(AN_SedPlate)/B_SedPlate) + 1 = 87
# Now calculate actual values of all parameters!
L_SedActive := L_Sed - L_SedInactive - N_SedPlates*T_SedPlate/sin(AN_SedPlate) = 2.05762 m
V_SedUp := Q_Sed/(L_Sed*W_Sed) = 70 m/day
V_SedUpActive := Q_Sed/(L_SedActive*W_Sed) = 124.643 m/day
V_SedC := V_SedUpActive/(1 + L_SedPlate/S_SedPlate*cos(AN_SedPlate)*sin(AN_SedPlate)) = 10.032 m/day
