# Inlet Slopes
# [reference: UserInputs-sestest.xmcd]
# [reference: DesignAssumptions-sestest.xmcd]
# [reference: MathFunctions.xmcd]
# [reference: PipeDatabase.xmcd]
# [reference: MinorLossCoefficients.xmcd]
# [reference: FluidsFunctions.xmcd]
# [reference: Channel-sestest.xmcd]
# [reference: Sedimentation.xmcd]
# Variables that needs to be added to User inputs and Design Assumptions
# Relative Outputs from other Programs
# Length of sed tank:
L_Sed = 2.88751 m
N_Inlets := 2
# Plant Flow Rate:
Q_Sed = 126.667 L/min
PI_JetDissipation := 5
# Flow rate through each manifold:
Q_man := Q_Sed/N_Inlets = 1055.56 cm^3/s
nu := 10^-6*m^2/s
A_circle(D_circle) := π*D_circle^2/4
# Width of sed tank:
w := 1 m
# Angle of ferrocement:
An_ferro := 45 deg  # Angle of the top panel of the entrance channel
# Angle of bottom:
AN_Bottom := 10 deg
# Height of ferrocement:
H_ferro := .5*w*tan(An_ferro) = 0.5 m
n := 50
# Number of port holes:
# Length of ferrocement:
L_ferro := .5*w/cos(An_ferro) = 0.707107 m
# Size of each port hole:
D_port := 2.5 in
# Height of bottom:
H_bottom := .5*w*tan(AN_Bottom) = 0.0881635 m
# Effective size of port holes:
D_eff := .61*D_port
# Length of bottom:
L_bottom := .5*w/cos(AN_Bottom) = 0.507713 m
# Target G
G_avg := 10*1/sec
# Area of manifold
A_man := w/4*(H_ferro - H_bottom) = 0.102959 m^2
Q_port := Q_man/n
Q_port = 21.1111 cm^3/s  # Flow through port given n and Deff
# Wetted perimeter
P_wetted := (H_ferro - H_bottom) + L_ferro + L_bottom = 1.62666 m
# Hydraulic Diameter:
D_ManHydraulic := 4*A_man/P_wetted = 0.25318 m
V_port := Q_port/A_circle(D_eff)
V_port = 1.79149 cm/s  # Velocity through port given n and Deff
# Hydraulic Radius:
R_hTri := A_man/P_wetted = 0.0632949 m
# Initial velocity in manifold:
V_man := Q_man/A_man
V_man^2/(2*g) = 0.000535898 cm
V_G := (10*G_avg^2*D_eff*nu)^(1/3)
V_G = 3.38351 cm/s  # Velocity needed to get target G
H_man := h_orifice(D_eff, 0.62, Q_port)
H_man = 0.00425691 cm
D_Gf(Q, G_avg, n, PI_JD, nu) := (64/2*1/(G_avg^2*nu*PI_JD)*(Q/(π*n))^3)^(1/7)
D_Gf(Q_Sed, G_avg, n, PI_JetDissipation, nu) = 1.5629 in  # Port diameter needed to get target G given n & Q
A_man/(n*A_circle(D_eff)) = 1.74742
n_test := 10
D_G := D_Gf(Q_man, G_avg, n_test, PI_JetDissipation, nu) = 2.3146 in
ε := 0.12 mm
A_circle(D_G) = 0.00271463 m^2
3 m/50 = 0.06 m
Q_MultiplePort(Q_man, A_man, D_ManHydraulic, L_man, D_G, n) :=
    Q_port[0] ← Q_man/n
    loops ← 0
    error ← 1
    H_man[0] ← h_orifice(D_G, .62, Q_port[0])
    V[0] ← Q_man/A_man
    while |error| > 0.01 and loops < 200
        for i ∈ 1 .. n
            V[i] ← V[i - 1] - Q_port[i - 1]/A_man
            H_expansion ← V[i]*Q_port[i - 1]/(g*A_man)
            H_friction[i] ← h_f(V[i]*A_man, D_ManHydraulic, L_man/n, nu, ε)
            H_man[i] ← H_man[i - 1] - H_friction[i]
            Q_port[i] ← Q_orifice(D_G, H_man[i], 0.62)
        error ← (sum(Q_port) - Q_man)/Q_man
        H_man[0] ← (error + 1)^-2*H_man[0] if error > 0
        H_man[0] ← 2*H_man[0] otherwise
        loops ← loops + 1
    return V  # If we assume that the manifold is divided into 10 sections
N_sec := 10
L_ManSec := L_Sed/N_sec = 0.288751 m
W_rectPort := A_circle(D_G)/L_ManSec = 0.94013 cm
A_port := L_ManSec*W_rectPort = 0.00271463 m^2
Re_Tri := 3*V_man*R_hTri/nu = 1946.73
f_Tri :=
    f ← 0.25/log(ε/(3.7*3*R_hTri) + 5.74/Re_Tri^0.9)^2 if Re_Tri > Re_pipetransition
    f ← 64/Re_Tri otherwise
    return f
    = 0.0328756
H_lTri := f_Tri*L_ManSec/(3*R_hTri)*V_man^2/(2*g) = 2.6791e-5 cm
W_rectPort*L_Sed = 271.463 cm^2
A_man = 1029.59 cm^2
A_man/(W_rectPort*L_Sed) = 3.79275
Pi_VenaContractaOrifice := 0.61
Q_rectPort := Q_man/n_test = 0.000105556 m^3/s
V_rectPort := Q_rectPort/A_man = 0.00102522 m/s
h_orificeTri := (V_rectPort/Pi_VenaContractaOrifice)^2*1/(2*g) = 1.4402e-5 cm
Q_MultiplePort(Q_man, A_man, D_ManHydraulic, L_man, D_G, n) =  # error: This variable is undefined.
Q_man/n = 1.26667 L/min
i := 1 .. n
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flowratio := max(Q_MultiplePort(Q_man, A_man, D_ManHydraulic, L_man, D_G, n))/min(Q_MultiplePort(Q_man, A_man, D_ManHydraulic, L_man, D_G, n)) = -2.58681  # error: This variable is undefined.
A_man = 0.102959 m^2
Q_man = 63.3333 L/min
L_man =  # error
D_ManHydraulic = 0.25318 m
D_G = 0.058791 m
h_f(Q_man/A_man*A_man, D_ManHydraulic, L_man, nu, .12 mm) =  # error
h_orifice(D_G, .62, Q_man/n) = 8.0217e-6 m
