# AguaClara Water Treatment Plants
# Automated Design
# User Inputs:
HW_Sed := 1.638 m
# Design References
# [reference: UserInputs- test.xmcd]
# [reference: DesignAssumptions-test.xmcd]
# [reference: MathFunctions.xmcd]
# [reference: PipeDatabase.xmcd]
# [reference: MinorLossCoefficients.xmcd]
# [reference: FluidsFunctions.xmcd]
# Inlet Channel:
# [reference: Inlet Channel.xmcd]
W_InletChannel = 0.36385 m
L_Channel = 2.4336 m
ND_SedPipeEntrance = 12 in
Q_Plant = 100.385 gal/min
# Sedimentation Tanks:
# [reference: Sedimentation.xmcd]
N_SedTanks = 2
H_SedBelowSlope = 0.8016 m
H_SedBelowStraight = 0 m
HW_Sed = 1.638 m
H_Sed = 1.738 m
L_Sed = 3.66383 m
ND_SedPipeEntrance = 12 in
# Sedimentation Tank Sludge Drain:
# [reference: SludgeDrain.xmcd]
N_SedSludgeOrifices = 36
ND_SedSludge = 3 in
Q_SludgeDrainInitial = 426.816 L/min
D_SedSludgeOrifice = 0.25 in
# Sedimentation Tank Inlet Slopes:
# [reference: Sed. Inlet Slopes.xmcd]
B_SedInlet = 3.76889 cm
H_SedInlet = 5.86723 cm
AN_SedTopInlet = 49.9682 deg
AN_SedBottom = 10 deg
L_SedTopInlet = 0.829275 m
A_SedInlet = 1442.61 cm^2
H_SedTopInlet = 63.4965 cm
H_SedBottom = 0.0940528 m
# Sedimentation Tank Effluent Launder:
# [reference: Launder.xmcd]
N_SedLaunderOrifices = 54
Q_SedLaunderOrifices = 3.51852 L/min
# Exit Channel:
# [reference: Exit Channel.xmcd]
W_ExitChannel = 0.36385 m
ND_SedLaunder = 4 in
H_ExitChannel = 0.7864 m
L_SedLaunder = 2.78613 m
L_ExitChannel = 2.4336 m
D_SedLaunderOrifice = 0.375 in
H_PltWeir = 0.548615 m
Z_SedLaunder = 1.48085 m
HW_ExitChannel = 0.5864 m
# Lamella:
# [reference: Lamella.xmcd]
L_SedPlate = 0.718339 m
B_SedPlate = 3.00138 cm
S_SedPlate = 2.70138 cm
N_SedPlates = 67
AN_SedPlate = 60 deg
V_SedC = 10.022 m/day
V_SedUp = 70 m/day
H_SedPlate = 0.6221 m
H_SedAbove = 0.2143 m
# Flow Controller:
# [reference: FCM.xmcd]
N_Fcm = 1
ID_FcmTube = 3.175 mm
ID_FcmTube = 0.125 in
L_FcmTube = 99.0625 cm
Q_FcmTubeMax = 285 mL/min
HL_FcmValve = 15.0907 cm
# Flocculator:
# [reference: Flocculation.xmcd]
W_FlocChannel = 0.5334 m
S_FlocBaffle = [0.0821572; 0.0982813; 0.130295; 0.334734] m
B_FlocBaffle = [0.0861572; 0.102281; 0.134295; 0.338734] m
N_FlocBafflesMin = 53
[
    Plant_Origin[0] - L_Sed + W_InletChannel + T_ChannelWall;
    Plant_Origin[1] + W_Sed/4;
    Plant_Origin[2] + HW_Sed - H_SedAbove + outerradius(ND_SedLaunder)
]
HL_Floc = 8.97611 cm
X_FlocBaffles = [
    0.6834, 3.31409, 0.349734;
    0.769557, 3.1798, 0.688468;
    0.855714, 3.0455, 1.0272;
    0.941872, 2.91121, 1.36594;
    1.02803, 2.77691, 1.70467;
    1.11419, 2.64262, 2.0434;
    1.20034, 2.50832, 2.38214;
    1.2865, 2.37403, 2.72087;
    1.37266, 2.23973, 3.05961;
    1.45882, 2.10544, 0;
    1.54497, 1.97114, 0;
    1.63113, 1.63241, 0;
    1.71729, 1.29368, 0;
    1.81957, 0.954941, 0;
    1.92185, 0.616207, 0;
    2.02413, 0, 0;
    2.12641, 0, 0;
    2.22869, 0, 0;
    2.33097, 0, 0;
    2.43326, 0, 0;
    2.53554, 0, 0;
    2.63782, 0, 0;
    2.7401, 0, 0;
    2.84238, 0, 0;
    2.94466, 0, 0;
    3.07896, 0, 0;
    3.21325, 0, 0
] m
HW_FlocStart = 1.72776 m
W_FlocPort = 0.334734 m
L_FlocBaffles = [
    1.55584, 1.5077, 1.30327;
    1.65584, 1.6077, 1.40327;
    1.55584, 1.5077, 1.30327;
    1.65584, 1.6077, 1.40327;
    1.55584, 1.5077, 1.30327;
    1.65584, 1.6077, 1.40327;
    1.55584, 1.5077, 1.30327;
    1.65584, 1.6077, 1.40327;
    1.55584, 1.5077, 1.30327;
    1.65584, 1.6077, 0;
    1.55584, 1.5077, 0;
    1.65584, 1.40327, 0;
    1.55584, 1.30327, 0;
    1.63972, 1.40327, 0;
    1.53972, 1.30327, 0;
    1.63972, 0, 0;
    1.53972, 0, 0;
    1.63972, 0, 0;
    1.53972, 0, 0;
    1.63972, 0, 0;
    1.53972, 0, 0;
    1.63972, 0, 0;
    1.53972, 0, 0;
    1.63972, 0, 0;
    1.53972, 0, 0;
    1.6077, 0, 0;
    1.5077, 0, 0
] m
H_FlocPort = 0.5334 m
N_FlocBaffles = 51
Z_FlocBaffles = [
    0, 0, 0;
    0.0821572, 0.130295, 0.334734;
    0, 0, 0;
    0.0821572, 0.130295, 0.334734;
    0, 0, 0;
    0.0821572, 0.130295, 0.334734;
    0, 0, 0;
    0.0821572, 0.130295, 0.334734;
    0, 0, 0;
    0.0821572, 0.130295, 0;
    0, 0, 0;
    0.0821572, 0.334734, 0;
    0, 0, 0;
    0.0982813, 0.334734, 0;
    0, 0, 0;
    0.0982813, 0, 0;
    0, 0, 0;
    0.0982813, 0, 0;
    0, 0, 0;
    0.0982813, 0, 0;
    0, 0, 0;
    0.0982813, 0, 0;
    0, 0, 0;
    0.0982813, 0, 0;
    0, 0, 0;
    0.130295, 0, 0;
    0, 0, 0
] m
Gt_FlocMinFlow = 6806.21
N_FlocChannels = 3
# Entrance Tank:
# [reference: EntranceTank.xmcd]
ND_Lfom = 6 in
HL_Rm = 0.911511 cm
N_Lfom = 1
D_LfomOrifices = 19.05 mm
Q_LfomErrorMax = 1.3255 %
N_LfomOrifices = [5; 4; 2; 2; 2; 2; 1; 2; 1; 1]
L_Et = 0.5334 m
W_Et = 0.5334 m
HW_EtMin = 0.2 m
HW_EtMax = 0.4 m
H_Et = 0.5 m
ZW_Et = 1.97776 m
# Any additional needed elevations should be calculated in the files above.
# AutoCAD References
# [reference: basics.xmcd]
# [reference: pipe.xmcd]
# [reference: tank.xmcd]
# [reference: lamina.xmcd]
# [reference: cross.xmcd]
# [reference: Tee.xmcd]
# [reference: elbow.xmcd]
# [reference: Sludge.xmcd]
# [reference: Channel.xmcd]
# [reference: Manifold.xmcd]
# [reference: SedTankslopes.xmcd]
# [reference: Sed Tank Inlet Slope.xmcd]
# [reference: chemicalstock.xmcd]
# [reference: Sedimentation Tank.xmcd]
# [component: inputs SedTank]
# [reference: Flocculation Tank.xmcd]
# [component: inputs FlocTank]
# [reference: Entrance Tank.xmcd]
# [component: inputs EntranceTank]
