# This program calculates the water levels throughout the plant
References
# [reference: FluidsFunctions.xmcd]
# This file does not yet calculate
# chlorine feed elevations
# [reference: DesignAssumptions.xmcd]
# Sedimentation Exit Headloss Calculations
HL_sedexits(Q_plant, D_laun, L_exits, K_exits, ν, ε) :=
    sum ← 0
    for i ∈ 0 .. last(L_exits)
        C_plocal[i] ← C_p(Q_plant/length(L_exits), D_laun, L_exits[i], K_exits[i], ν, ε)
        sum ← sum + 1/sqrt(C_plocal[i])
    8*Q_plant^2/(g*π^2*D_laun^4*sum^2)
# Fluids Function for Headloss
# WIP Calculation of Sed Tank Exit Pipes
# Calculate the length of sedimentation tank exit pipes ( a, b and c) L.sedexits
L_sedexits(channel_thick, tank_thick, Channel_dim, walkway_width, PLT) :=
    width_channel ← Channel_dim[0]
    PLT_width ← PLT
    A_WE ← 3*tank_thick + width_channel + walkway_width + PLT_width/3
    B_WE ← A_WE + PLT_width/3
    C_WE ← B_WE + PLT_width/3
# Plant Elevation Function
PlantElevations(Q_plant, Grit, Laund, SedTank, Q_alum, H_weir, D_weir, HL_floc, L_lamella, HL_Launder) :=
    HW_sed ← SedTank[:, 2][0]*m
    ZW_sed ← HW_sed
    HW_PLT ← HW_channel - HL_Launder
    n_launorf ← Laund[:, 5][0]
    H_stocktank ← h_drum
    Z_platform ← SedTank[:, 3][0]*m
    HL_GCorf ← h_lorificemax
    D_orf ← Grit[:, 4][0]*m
    D_launorf ← Laund[:, 1][0]*m
    L_laun ← Laund[:, 0][0]*m
    HL_GCorf ← h_lmax
    D_sedinlet ← Laund[:, 4][0]*m
    manifold_depth ← Laund[:, 3][0]*m
    Z_platebottoms ← ZW_sed - 2*manifold_depth*2 - L_lamella
    D_laun ← D_sedinlet
    D_rm ← Grit[:, 3][0]*m
    n_GCorf ← Grit[:, 1][0]*sum(Grit[:, 2][0])
    HL_weir ← Headloss_weir(Q_plant, D_weir)
    n_lamella ← SedTank[:, 1][0]
    L_sedexits ← [3.56 m; 4.39 m; 6.0 m]
    HL_launorf ← h_orifice(D_launorf, K_orifice, Q_plant/(n_launorf*n_sedtanks))
    HL_launder ← h_lmanifold(Q_plant/n_sedtanks, D_laun, L_laun, 0, ν, ε_pvc, n_lamella)
    HT_sed ← HW_sed + freeboard_sed
    Z_platetops ← (Z_platebottoms + L_lamella*sin(α))
    Z_launderCL ← (ZW_sed - Z_platetops)/2 + Z_platetops
    K_exits ← n_sedexitturns*K_el90 + K_exit
    HL_sedtolevel ← HL_sedexits(Q_plant, D_laun, L_sedexits, K_exits, ν, ε_pvc) + HL_launorf + HL_launder
    ZT_sed ← ZW_sed + freeboard_sed
    ZW_level ← ZW_sed - HL_sedtolevel
    Z_weir ← ZW_level - HL_weir
    ZT_level ← ZT_sed
    HL_sedinlet ← h_l(Q_plant/(n_sedtanks*n_sedinlet), D_sedinlet, L_sedinlet, n_siturns*K_lturn + K_ent, ν, ε_pvc)
    ZW_floc_max ← ZW_sed + HL_floc
    ZT_floc_max ← ZW_floc_max + freeboard_sed
    ΣK_rm ← K_el90*n_rmturns + K_ent
    HL_rm ← h_l(Q_plant, D_rm, L_rmpipe, ΣK_rm, ν, ε_pvc)
    ZW_rm ← ZW_floc_max + HL_rm
    HL_freefall ← 3*D_rm/2 + D_orf/2
    Z_GCorf ← ZW_rm + HL_freefall
    H_GCorf ← Z_GCorf - Z_platform
    ZW_GC ← Z_GCorf + HL_GCorf
    HW_GC ← ZW_GC - Z_platform
    ZT_GC ← ZW_GC + freeboard_sed
    Z_rmhorizontalpipecenterline ← ZW_rm
    Z_FCMlowestport ← Z_GCorf
    Z_FCMhighestport ← Z_GCorf + HL_FCM
    Z_FCMvalve ← HL_FCMvalvefreefall + Z_FCMhighestport
    Z_botAldrum ← Z_FCMhighestport + HL_FCMvalvefreefall + HL_FCMinlet - H_stocktankport
    Z_topAldrum ← Z_botAldrum + H_stocktank
    Z_Aldrumport ← Z_botAldrum + H_stocktankport
    Z_chemplatform ← Z_botAldrum - stockplatcol_dim[2]
    Z ← [
        Z_topAldrum[0];
        Z_Aldrumport[0];
        Z_botAldrum[0];
        Z_chemplatform[0];
        Z_FCMvalve[0];
        Z_FCMhighestport[0];
        Z_FCMlowestport[0];
        ZT_GC[0];
        ZW_GC[0];
        Z_GCorf[0];
        Z_rmhorizontalpipecenterline;
        ZW_rm;
        ZT_floc_max;
        ZW_floc_max;
        ZT_sed;
        ZW_sed;
        Z_launderCL;
        Z_platetops;
        Z_platebottoms;
        Z_platform;
        Z_weir;
        ZW_level;
        ZT_level
    ]
    return Z
# Call all varaibles needed for calculations
# L.sedexits is a work in progress calculation, for now we just input values
# Calculate Headloss through Launder orficies
# Calculate Headloss through Launder
# Calculate Height of sedtank
Outputs
# This is the old  calculations, keep just for reference, will be deleted when we are sure of our new function
# Inputs:
# Basic Parameters:
# D.sedinlet is the diameter of
# the sedimentation inlet pipes
# Sedimentation Tank:
# ** In all variable names, Z will represent a height from the reference point, HL will represent headloss
# D is always a diameter
# HT is height of tank walls
# Flocculation Tank: | HW is depth of water in a tank
# HL.floc is the headloss through the
# floc tank as determined by baffle
# program (for now use 20 cm so
# we have plenty of room)
# Assumption because baffle program may not be finished.
# ZW is a water elevation relative to inside bottom of sed tanks
# ZT is a tank wall elevation relative to inside bottom of sed tanks
# Z is height of an object from the inside bottom of the sed tanks
# Rapid Mix Pipe:
# n.GCorf is the total number
# of orifices in all the grit chamber risers
# D.rm is the diameter of the
# rapid mix pipe carrying the water
# from the grit chamber to the
# floc tank
# HL.GCorf is the design flow measurement head loss
# n.rmturns is the number of ninety
# degree turns in the rapid mix pipe
# Need to make array
# Plant Leveling Tank:
# D.laun is the diameter of the
# sedimentation exit launder pipes
D_laun := D_sedinlet  # disabled
# D.launorf is the diameter of the
# orifices in the launder pipes
# Assume that the pipes are the same
# n.launorf is the number of
# orifices in each launder
# H.weir is the height of the weir above the platform
# program doesn't work for this
# D.weir is the diameter of
# the exit weir of the tank
# L.launturns is the length of the
# sedimentation launder pipes
# L.exit is the length of the sedimentation exit launder pipes a, b, and c  going to PLT
# n.exitturn is the number of ninety degree turns in each sedimentation tank exit pipe a, b, and c
# *These parameters would be better if we  could make an array with them . . . but this is tricky when the number of sedimentation tanks can change*
# head loss from stocktank to FCM valve
# Calculations:
# The headloss through the weir, will determine the height of water in the level tank:
HL_weir := Headloss_weir(Q_plant, D_weir)
Z_platform := HW_sed - HW_channel
# First calculate the headloss through the launder pipes:
HL_launorf := h_orifice(D_launorf, K_orifice, Q_plant/(n_launorf*n_sedtanks))  # This is the head loss through the orifices
# This is the head loss in the launder
HL_launder := h_lmanifold(Q_plant/n_sedtanks, D_laun, L_laun, 0, ν, ε_pvc, n_lamella)
# Sedimentation Tank:
HT_sed := HW_sed + freeboard_sed
Z_platetops := Z_platebottoms + L_lamella*sin(α)
Z_launderCL := (ZW_sed - Z_platetops)/2 + Z_platetops  # center the effluent launder in the water above the plate settlers
# The head loss through the pipes that take the water to the level tank needs to take into account that the flow won't divide quite equally between the pipes because of different total loss coefficients. We use conservation of mass and the fact that the head loss through each of the paths is the same to determine the actual head loss.
K_exits := n_sedexitturns*K_el90 + K_exit = [5.5; 4.6; 4.6]
# To get an estimate of the major head loss we assume the flow is divided equally.
C_p(Q_plant/length(L_sedexits), D_laun, L_sedexits[0], K_exits, ν, ε_pvc) =  # error: This variable is undefined.
HL_sedexits(Q_plant, D_laun, L_sedexits, K_exits, ν, ε_pvc) =  # error
# double check to see if head loss estimate is reasonable by assuming flow divides equally.
# Do we include a check for this?
#
# What % difference is okay?
h_l(Q_plant/n_sedtanks, D_laun, L_sedexits, K_exits, ν, ε_pvc) =  # error  # okay!
# Now add all of the head losses from the sed tank to the level tank
HL_sedtolevel := HL_sedexits(Q_plant, D_laun, L_sedexits, K_exits, ν, ε_pvc) + HL_launorf + HL_launder
ZT_sed := ZW_sed + freeboard_sed
ZW_level := ZW_sed - HL_sedtolevel
Z_weir := ZW_level - HL_weir
ZT_level := ZT_sed  # Headloss is so insignificant that the level tank walls can be the same height as the sed tanks
# Sedimentation Inlet:
# The head loss through the sedimentation tank is assumed to be negligible.  Water will enter each sed tank through 4 pipes with long radius elbows.  These pipes will add a very small amount of headloss.  Headloss through the channel is assumed to be negligible.
# We will not use this in subsequent calculations. If we want this level of detail we would also need to calcuate open channel flow head loss in the channel...
HL_sedinlet := h_l(Q_plant/(n_sedtanks*n_sedinlet), D_sedinlet, L_sedinlet, n_siturns*K_lturn + K_ent, ν, ε_pvc)
# Flocculation Tank:
# The headloss through the flocculation tank will be determined by the baffle program. For now a value of 20 cm is used to ensure that there will be enough headloss to achieve good flocculation.  Perhaps this potion could be updated to represent the sloping level of the floc tank rather than the maximum level.
ZW_floc_max := ZW_sed + HL_floc
ZT_floc_max := ZW_floc_max + freeboard_sed
# Rapid Mix Pipe:
# The rapid mix has been updated and no longer includes mixing elements.  It is modeled as a normal pipe with turns.
ΣK_rm := K_el90*n_rmturns + K_ent = 5.9  # Is this still true?
HL_rm := h_l(Q_plant, D_rm, L_rmpipe, ΣK_rm, ν, ε_pvc)
ZW_rm := ZW_floc_max + HL_rm  # water surface inside rapidmix
# Grit Chamber:
# The water level in the grit chamber must allow there to be free fall from the orifices in the riser pipes to the water in the rapid mix.
HL_freefall := 3*D_rm/2 + D_orf/2
# We are assuming the water level due to head loss thru rapid mix is at the centerline of the horizontal pipe leaving the grit chamber. The orifice must be located above teh slip connection of an elbow or T and we estimate that to be a height D above the top of the pipe (hence the 1.5D.rm).
Z_GCorf := ZW_rm + HL_freefall  # This is the elevation of the orifice
H_GCorf := Z_GCorf - Z_platform  # This is the relative height of the orifice above the bottom of the grit chamber
ZW_GC := Z_GCorf + HL_GCorf
HW_GC := ZW_GC - Z_platform
ZT_GC := ZW_GC + freeboard_sed
Z_rmhorizontalpipecenterline := ZW_rm
# Equations to calculate the chemical feed elevations
Z_FCMlowestport := Z_GCorf
Z_FCMhighestport := Z_GCorf + HL_FCM  # also is water level in the FCM
Z_FCMvalve := HL_FCMvalvefreefall + Z_FCMhighestport
Z_botAldrum := Z_FCMhighestport + HL_FCMvalvefreefall + HL_FCMinlet - H_stocktankport
Z_topAldrum := Z_botAldrum + H_stocktank
Z_Aldrumport := Z_botAldrum + H_stocktankport
Z_chemplatform := Z_botAldrum - H_chemplatformblocks
# We need to decide if the chlorine stock tanks are at the same elevation as the alum tanks. If we ever want to prechlorinate they need to be at the same level. If we don't want the option of prechlorination, then they could be placed at a lower elevation.
