# CDC LFSRSF Design
Q_Plant := □  # error: This placeholder is empty.
method := "EtFlocSedFi"
Mod := 0
# REFERENCES
# [reference: ExpertInputs.xmcd]
# [reference: ExpertInputs.xmcd]
# [reference: MathFunctions.xmcd]
# [reference: MathFunctions.xmcd]
# [reference: PipeDatabase.xmcd]
# [reference: PipeDatabase.xmcd]
# [reference: MaterialsDatabase.xmcd]
# [reference: MaterialsDatabase.xmcd]
# [reference: FluidsFunctions.xmcd]
# [reference: FluidsFunctions.xmcd]
# [reference: LinearCdc.xmcd]
# CDC OUTPUTS
# LFSRSF OUTPUTS
