# Cdc Modular Design
# User Inputs
Q_Plant := 12
C_ChlorineDoseMax := 2*mg/L
# To be left undefined and inputed online by the user
C_ChlorineStockEst := 50*mg/L
Ti_ChlorineStock := 30 hr
# From Expert Inputs
Rho_H2O := 1000*kg/m^3  # Density of water
Nu_Water := 1*10^-6*m^2/s  # The kinematic viscosity of water.
Rho_FB := 1001*kg/m^3  # Density of Flocs
Re_PipeTransition := 2100
E_Pvc := 0.12 mm
E_Concrete := 2 mm
E_ConcreteLedge := 0.014 mm
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Pi_Jet := 0.4
# This is an empirically determined factor to make the equation
# correct.
Pi_VenaContractaOrifice := 0.63
P_Atm := 1 atm
Nu_Air := 12*mm^2/s
Rho_Air := 1.204*kg/m^3
Rho_Clay := 2.65*gm/mL
Plant_Origin := [0; 0; 0]*m
T_PlantWall := 15 cm
T_ConcreteMin := 5 cm
EN_DrillSeries := 0  # 0 is English, 1 is metric
EN_TubeSeries := 0
W_HumanMin := 0.54 m
H_HumanAccess := 1.5 m  # The height of the walkway above the drain channel bottom so that someone can walk through the drain channel.
acad_version := 2008
H_Freefall := 0.1 m
H_PlantFreeboard := 0.1*m
EN_PlantDrains := 1  # Set to zero if drains on left, 1 if drains on right
D_Rebar := 1/2*in
ND_SpacerPipe := 3/4*in
S_Fitting := 5 cm  # minimum space between fittings in a tank or fittings and the wall of the tank.
W_ChannelMin := 15 cm  # Minimum channel width for constructability
W_DeepChannelMin := 30 cm  # Minimum channel width for a deep channel. Assumes you may need to stick your head in the channel.
H_DeepChannelMax := 60 cm  # The maximum depth of a channel, based on having your arm reach to the bottom of the channel.
S_ChannelPipeWall := 2 cm  # Extra space allowed on both sides of pipe to avoid interference with the channel walls
Π_Rectangular := 1/2  # Π.Rectangular is defined as the optimum "height over width ratio" (1/2) for a rectangular open channel
HL_ChannelMax := 5 cm
EN_MatApply := 0  # EN.MatApply equals 0 if materials are not to be applied, otherwise materials are applied
USD := ¤  # Defining US Dollars as a currency unit
Lem := USD/19.06  # Lempira/US Dollar exchange rate as of 3/5/2012
# Equals 1 to draw boxes showing max water levels, 0 normally
EN_Water := 0
# If EN_Water is set to 1, this controls the filter operation mode for which water/sand elevations are drawn. 0 for terminal, 1 for clean bed, and 2 for backwash.
EN_FilterWater := 2
D_TubeEnglish := [3; 4; 5; 6; 8; 10]*in/32
D_CdcBarb := [0.047 in; 0.075 in; 2.5 mm; 3 mm; 4 mm; 0.201 in]
D_TubeMetric := [2; 3.175; 4; 5; 6; 6.5]*mm
D_CdcBarb1 := [0.047 in; 0.07 in; 0.075 in; 2.5 mm; 3 mm; 0.201 in]
E_Tube := 0 mm  # Tubing roughness height
# This is the estimated elevation difference between the water level in the constant head tank and the top of the entrance tank wall. The constant head tank water level is the same as the elevation of the outlet of the dosing tube when the lever arm is horizontal (zero flow). Therefore this height depends only on the hardware used to make the slider/drop tube assembly and to mount the lever arm to the entrance tank wall. Note that this will vary depending on hardware used, and is only defined here to calculate the elevation of the stock tanks, which can be approximate.
H_DoserAssembly := 6.77 cm
Π_LinearCdcError := 10 %
# Maximum error allowed between a linear flow vs tube head loss relationship and the actual performance (which is affected by non-linear minor losses), assuming calibration at the maximum flow rate
K_CdcTube := 8
# Estimated conservative minor loss coefficient for the small-diameter flexible tubing using fittings that have larger ID than the tubing and using a single tight radius bend in the tubing.
# Maximum head loss through the small-diameter tubing, which corresponds to the variation in water levels in the entrance tank and the difference between the maximum and minimum elevation of the dosing tube outlet attached to the lever arm.
HL_CoagCdc := .2 m
HL_ChlorCdc := 10 cm  # The maximum chlorine head loss is set to 10cm to keep the length of tubing low.
D_FltVlvOrificesAvail := [0.093 in; 0.187 in; 0.25 in; 0.312 in]
H_CdcFloatvalve := 5 cm  # Estimated distance between fluid level in constant head tank and orifice for float valve
# Design References
# [reference: MathFunctions.xmcd]
# [reference: PipeDatabase.xmcd]
# [reference: FluidsFunctions.xmcd]
# [reference: LinearCdc.xmcd]
# [reference: MtoATranslators.xmcd]
# [reference: MtoATranslatorsWrapped.xmcd]
# [reference: PlumbingF.xmcd]
# [reference: CdcAC.xmcd]
# Cdc Code
LA_Origin := [0; 0; 0]*m
AC_Cdc1 := stack(Cdc1_Script, CdcFittings1_Script, CdcCalColumn1_Script)  # error: This variable is undefined.
