# AguaClara Design Tool
Q_Plant := 10*L/s
HL_FlocMax := 40 cm
H_SedSlopesToFlocWeirMin := 25 cm
T_FlocSlab := 15 cm
T_SedWall := 15 cm
T_SedDividingWall := 15 cm
T_SedChannelWall := 15 cm
T_FlocWall := 15 cm
T_FlocDividingWall := 15 cm
T_FiWall := 25 cm
T_FiBoxWall := 15 cm
T_PlantWall := 15 cm
T_PlantFloor := 20 cm
T_ChemSlab := 15 cm
T_DrainChannelWall := 15 cm
C_CoagDoseMax := 40*mg/L
C_ChlorDoseAve := 1*mg/L
method := "EtFlocSedFi"
Mod := 0
## References
# Mathcad to AutoCAD translators:
# [reference: MtoATranslators.xmcd]
# The wrapped MtoA translator contains the functions that the user will want to access. These functions will draw pieces with full functionality - specifying the location, dimension, and orientation of the object. Also, it contains layer control and subtraction capabilities for grouped objects.
# [reference: MtoATranslatorsWrapped.xmcd]
# Plant design calculations:
# [reference: ExpertInputs.xmcd]
# [reference: MathFunctions.xmcd]
# [reference: PipeDatabase.xmcd]
# [reference: MaterialsDatabase.xmcd]
# [reference: FluidsFunctions.xmcd]
# [reference: SedimentationTank.xmcd]
# [reference: LFOM.xmcd]
# [reference: FlocculatorEntranceTank.xmcd]
# [reference: StackedRapidSandFilter.xmcd]
# [reference: ChemicalDoseController_st587.xmcd]
# AutoCAD drawing functions:
# [reference: ChannelF.xmcd]
# [reference: PlumbingF.xmcd]
# [reference: TankF.xmcd]
# [reference: StairsF.xmcd]
# [reference: DrainChannelF.xmcd]
# AutoCAD script files:
# [reference: FlocculatorAC.xmcd]
# [reference: SedimentationTankAC.xmcd]
# [reference: EntranceTankCompactAC.xmcd]
# [reference: StackedRapidSandFilterAC.xmcd]
# [reference: ChemStockTanksAC.xmcd]
# [reference: OperatorAccessAC.xmcd]
# [reference: CdcAC_st587FINAL.xmcd]
# Materials list:
# [reference: MaterialsList.xmcd]
# Layouts:
# This file will execute at the very end to create multiple views of the entire plant in paperspace
# [reference: LayoutsAC.xmcd]
# Section Cuts:
# This file will create section cuts in paper space... eventually
# [reference: SectionCutsAC.xmcd]
## All variables displayed must have the standard SI units. They may not have units attached by the user.
# General variables displayed
# Plant summary calculations
HL_PlantTotal := ZW_EtMax - Z_FiExitBottom
Q_Plant = 0.01 m^3/s
HL_PlantTotal = 2.22284 m
H_PlantFreeboard = 0.1 m
# Entrance tank variables displayed
# Tank
L_EtMax = 1.24002 m
H_Et = 2.48315 m
L_Et = 1.24002 m
W_Et = 0.53 m
H_EtApparent = 1.12863 m
AN_EtSlope1 = 0.872665
AN_EtSlope2 = 0.318266
# Parameters
V_EtCaptureBod = 0.008 m/s
V_EtCapture = 0.00733832 m/s
# Sedimentation plates
L_EtPlate = 0.4 m
L_EtTopPlate = 0.711081 m
N_EtPlates = 11
S_EtPlate = 0.025 m
AN_EtPlate = 0.872665
ND_EtMod = 0.0127 m
PS_EtModStr = "SDR 13.5"
ND_EtModSpacer = 0.01905 m
PS_EtModSpacerStr = "SDR 17"
ND_EtPlateSupport = 0.0762 m
PS_EtPlateSupportStr = "SDR 26"
T_EtPlate = 0.002 m
# Rapid mix
ND_RMPipe = 0.1524 m
PS_RMPipeStr = "SDR 41"
ED_RapidMix = 3 m^2/s^3
D_RMOrifice = 0.123303 m
HL_RMOrifice = 0.0900922 m
HL_RMPipe = 0.0145186 m
L_FlocContact = 0.173187 m
H_FlocContact = 1.84276 m
Ti_FlocContact = 16.9145 s
Pi_VCOrifice = 0.63
Pi_JetRound = 0.5
# Drains
ND_EtDrain = 0.0762 m
L_EtDrainStopper = 2.47915 m
PS_EtDrainStr = "SDR 26"
# Flow measurement
HL_Lfom = 0.2 m
D_LfomOrifices = 0.01905 m
B_LfomRows = 0.02 m
N_LfomOrifices = [13; 3; 3; 4; 2; 3; 2; 2; 2; 2]
H_LfomOrifices = [0.009525; 0.029525; 0.049525; 0.069525; 0.089525; 0.109525; 0.129525; 0.149525; 0.169525; 0.189525] m
N_LfomRows = 10
# Chemical dose controller variables displayed
H_CoagTankAboveHeadTank = 0.3 m
ND_EtFloat = 0.2032 m
HL_Cdc = 0.2 m
# Coagulant
ID_CoagTube = 0.003175 m
C_CoagStock = 166.667 kg/m^3
C_CoagDoseMax = 0.04 kg/m^3
Q_CoagMax = 2.4e-6 m^3/s
N_CoagTubes = 2
N_CoagTubesActive = 1
L_CoagTube = 1.40483 m
Vol_CoagStock = 450 L
M_CoagSack = 25 kg
N_CoagSacks = 3
Nu_CoagStock = 1.3829e-6 m^2/s
ND_CoagColumn = 0.009525 m
ID_CoagColumn = 0.0125222 m
Ti_CoagColumnMin = 25.6572 s
H_CoagColumnScale = 0.5 m
D_CoagFloatValveOrifice = 0.0023622 m
HL_CoagFloatValveOrifice = 0.0385251 m
# Chlorine
ID_ChlorTube = 0.003175 m
C_ChlorStock = 4.35732 kg/m^3
C_ChlorDoseMax = 0.002 kg/m^3
Q_ChlorMax = 4.58998e-6 m^3/s
N_ChlorTubes = 3
N_ChlorTubesActive = 2
L_ChlorTube = 2.04018 m
Vol_ChlorStock = 208.198 L
M_ChlorStock = 0.907185 kg
Nu_ChlorStock = 1e-6 m^2/s
ND_ChlorColumn = 0.0127 m
ID_ChlorColumn = 0.0157988 m
Ti_ChlorColumnMin = 21.3549 s
H_ChlorColumnScale = 0.5 m
D_ChlorFloatValveOrifice = 0.0023622 m
HL_ChlorFloatValveOrifice = 0.140911 m
# Flocculator variables displayed
# Tank
H_Floc = 2.07854 m
L_Floc = 4.33242 m
W_FlocChannel = 0.53 m
W_FlocChannelMaxPlate = 1.06 m
W_FlocChannelMinPlate = 0.53 m
W_FlocChannelMin = 0.53 m
W_FlocChannelMinEfficient = 0.0916883 m
N_FlocChannels = 2
HW_FlocEnd = 1.44445 m
T_FlocSlab = 0.15 m
Vol_Floc = 6598.93 L
H_FlocPort = 0.637723 m
W_FlocPort = 0.0984005 m
# Drains
ND_FlocDrain = 0.0762 m
PS_FlocDrainStr = "SDR 26"
Q_FlocDrain = 0.00733214 m^3/s
# Parameters
HL_Floc = 0.53409 m
HL_FlocMax = 0.4 m
CP_Floc = 97.2754 m^(2/3)
V_Floc = 0.159357 m/s
ED_FlocAve = 0.0105061 m^2/s^3
ED_FlocAveMinSettling = 0.005 m^2/s^3
ED_FlocMax = 0.0210122 m^2/s^3
Ti_Floc = 659.893 s
Ti_FlocActive = 520.672 s
G_FlocAve = 102.499 1/s
GTheta_Floc = 53368.5
CP_FlocBod = 75 m^(2/3)
Alpha_EpsilonFloc = 2
Alpha_PsiFloc = 0.890899
Pi_JetPlane = 0.225
Ti_FlocDrain = 900 s
Pi_HSMin = 3
Pi_HSMax = 6
Pi_HSTransition = 5
K_FlocBaffle = 2.5
Pi_VCBaffle = 0.387426
Vol_FlocBod = 3899.95 L
W_FlocChannelCP = 0.402587 m
S_FlocBaffleMin = 0.120132 m
HL_FlocBod = 0.4 m
ED_FlocAveBod = 0.0100582 m^2/s^3
ED_FlocAveCP = 0.0100582 m^2/s^3
Ti_FlocMinCP = 389.995 s
Vol_FlocMinCP = 3899.95 L
ED_FlocAveMax = 0.0100582 m^2/s^3
Nu_Water = 1e-6 m^2/s
Vol_FlocMinChannels = 3635.02 L
# Baffles
S_FlocBaffle = 0.1184 m
T_FlocBaffle = 0.002 m
B_FlocBaffle = 0.1204 m
H_FlocBaffleLow = 1.32605 m
H_FlocBaffleHigh = 1.96014 m
S_FlocBaffleSetBackPlastic = 0.02 m
N_FlocChannelBaffles = 35
N_FlocFirstChannelBaffles = 23
N_FlocLastChannelBaffles = 32
N_FlocBaffles = 55
N_FlocChannelSpaces = 36
ND_FlocMod = 0.0127 m
PS_FlocModStr = "SDR 13.5"
ND_FlocSpacer = 0.01905 m
PS_FlocSpacerStr = "SDR 17"
# Obstacles
ND_FlocObs = 0.0762 m
H_FlocObs = 0.481483 m
N_FlocSpaceExpansions = 3
N_FlocExpansions = 165
CP_FlocExpansion = 0.589548 m^(2/3)
PS_FlocObsStr = "SDR 41"
W_FlocObstacleWake = 0.0725291 m
N_FlocSpaceObstacles = 2
# Sedimentation tank variables displayed
# General parameters
N_SedTanks = 3
Q_Sed = 0.00333333 m^3/s
V_SedUpBod = 0.001 m/s
# design constraints
V_SedCBod = 0.00012 m/s
V_SedUp = 0.000978388 m/s
# Actual values from this design
V_SedC = 0.000109822 m/s
Ti_Sed = 1393.63 s
# General dimensions
W_Sed = 1.06 m
L_Sed = 4.33242 m
H_Sed = 1.7389 m
HW_Sed = 1.63261 m
L_SedUpflow = 3.21412 m
W_SedSideSlopes = 0.489233 m
H_SedSideSlopes = 0.583045 m
H_SedFlocWeir = 0.833045 m
H_SedLamellaBottom = 0.981305 m
HW_Sed = 1.63261 m
AN_SedSlope = 0.872665
AN_SedHopperSlopeMin = 0.727062
# Inlet channel
HW_SedInletChannel = 0.237869 m
W_SedInletChannelPreWeir = 0.28415 m
W_SedInletChannelPostWeir = 0.15 m
W_SedInletChannel = 0.48415 m
L_SedChannel = 3.63 m
H_SedInletChannel = 0.337869 m
H_SedWeirInlet = 0.257869 m
HL_SedWeirInlet = 0.0129931 m
H_SedInletChannel = 0.337869 m
ND_SedChannelDrain = 0.0762 m
PS_SedChannelDrainStr = "SDR 26"
H_SedIChanStep = 0.0792937 m
H_SedIChanLastCoupling = 0.158587 m
HL_SedInlet =  # error: This variable is undefined.
# Exit channel
W_SedExitChannelPreWeir = 0.15 m
W_SedExitChannelPostWeir = 0.23415 m
W_SedExitChannel = 0.43415 m
H_SedExitChannel = 0.337869 m
H_SedWeirExit = 0.178587 m
H_SedExitChannel = 0.337869 m
HW_SedExitChannel = 0.191581 m
# Exit launder
ND_SedLaunder = 0.1016 m
PS_SedLaunderStr = "SDR 26"
N_SedLaunderOrifices = 30
D_SedLaunderOrifice = 0.015875 m
L_SedLaunder = 3.11364 m
HL_SedLaunderOrifice = 0.0404807 m
B_SedLaunderOrifice = 0.107592 m
# Inlet manifold
ND_SedManifold = 0.1524 m
PS_SedManStr = "SDR 41"
ND_SedDiffuser = 0.0254 m
PS_SedDiffuserStr = "SDR 26"
ND_SedJetReverser = 0.0762 m
PS_SedJetReverserStr = "SDR 26"
L_SedManifoldDiffuser = 0.15 m
N_SedManifoldPorts = 52
ED_SedInlet = 0.133503 m^2/s^3
Q_SedManifoldPort = 6.41026e-5 m^3/s
D_SedManifoldPort = 0.03175 m
B_SedDiffuser = 0.06 m
L_SedManHorizPipe2 = 3.14618 m
W_SedDiffuserInner = 0.003175 m
H_JetReverserToDiffusers = 0.03 m
HL_SedDiffuser = 0.0062888 m
# Plate settlers
L_SedPlate = 0.5 m
W_SedPlate = 1.06 m
T_SedPlate = 0.002 m
B_SedPlate = 0.027 m  # center to center distance between lamella
S_SedPlate = 0.025 m  # spacing between lamella
N_SedPlates = 96  # Number of plates per sedimentation tank
N_SedPlatesTotal = 288  # Number of plates for the entire plant
N_SedModules = 12  # Number of modules per bay
N_SedModPlates = 8  # Number of plates per module
AN_SedPlate = 1.0472
ND_SedMod = 0.0127 m
PS_SedModStr = "SDR 13.5"
ND_SedModSpacer = 0.01905 m
PS_SedModSpacerStr = "SDR 17"
ND_SedPlateFrame = 0.0381 m
PS_SedPlateFrameStr = "SDR 26"
ND_SedHopperDrain = 0.0254 m
PS_SedHopperDrainStr = "SDR 26"
ND_SedToFiPipe = 0.1524 m
PS_SedToFiPipeStr = "SDR 41"
# Rapid sand filter variables displayed
# General parameters
Q_Fi = 0.01 m^3/s
N_Fi = 1
V_FiLayer = 0.00183333 m/s
V_FiBw = 0.011 m/s
HL_FiTerminal = 0.455621 m
HL_FiBwInitiation = 1.43282 m
HL_FiBwTotalSS = 1.6211 m
HL_FiCleanPath = 0.112044 m
# Filter box
H_Fi = 4.48623 m
L_Fi = 0.83826 m
W_Fi = 1.25277 m
T_FiWall = 0.25 m
N_FiLayer = 6
H_FiLayer = 0.2 m
H_FiBottomLayer = 0.2 m
H_FiSand = 1.24528 m
# Auxiliary boxes
L_FiEntrance = 0.656159 m
W_FiEntrance = 0.868461 m
H_FiEntrance = 1.14627 m
L_FiExit = 0.5183 m
W_FiOverflow = 0.228587 m
L_FiOverflow = 0.556159 m
W_FiInletChannel = 0.308756 m
L_FiInletChannel = 1.24705 m
H_FiInletChannel = 0.534993 m
# Pipe diameters
ND_FiTrunk = 0.1524 m
PS_FiTrunkStr = "SDR 26"
ND_FiBwTrunk = 0.1524 m
PS_FiInletOutletStr = "SDR 41"
PS_FiBwInletStr = "SDR 41"
ND_FiSandOutlet = 0.0508 m
PS_FiSandOutletStr = "SDR 26"
ND_FiSiphonAirValve = 0.01905 m
ND_FiSiphon = 0.1524 m
PS_FiSiphonStr = "SDR 41"
ND_FiTrunkFlushValve = 0.0381 m
ND_FiBwTrunkFlushValve = 0.0381 m
ND_FiExitWaste = 0.0762 m
PS_FiExitWasteStr = "SDR 26"
ND_FiEntOverflow = 0.1016 m
PS_FiEntOverflowStr = "SDR 26"
ND_FiInletChannelDrain = 0.0508 m
ND_FiManBranch = 0.0254 m
ND_FiBwManBranch = 0.0381 m
PS_FiBranchStr = "Sch 40"
ND_FiBranchHolder = 0.0508 m
PS_FiBranchHolderStr = "Sch 40"
ND_FiBypass = 0.1524 m
PS_FiBypassStr = "SDR 41"
# Siphon manifold
B_FiSiphonManOrifices = 0.065411 m
N_FiSiphonManOrifices = 10
D_FiSiphonManOrifices = 0.0508 m
# Manifolds
N_FiManBranch = 16
B_FiManifoldBranch = 0.1 m
L_FiBwManBranch = 0.507955 m
L_FiManBranch = 0.507955 m
L_FiManBranchExt = 0.02 m
N_FiBwManOrifices = 80
N_FiBwManOrificesPerBranch = 5
D_FiBwManOrifice = 0.0127 m
B_FiBwManOrifice = 0.104489 m
HL_FiBwManOrifice = 0.125082 m
HL_FiBwManOrificeForward = 0.0217156 m
N_FiInletManOrifices = 112
N_FiInletManOrificesPerBranch = 7
D_FiInletManOrifice = 0.015875 m
B_FiInletManOrifice = 0.0696592 m
HL_FiInletManOrificeForward = 0.0181524 m
N_FiTopManOrifices = 80
N_FiTopManOrificesPerBranch = 5
D_FiTopManOrifice = 0.0127 m
B_FiTopManOrifice = 0.104489 m
HL_FiTopManOrificeForward = 0.0217156 m
L_FiOutletBranchSlotted = 0.46478 m
N_FiSlotRows = 2
W_FiManSlots = 0.0002032 m
B_FiManSlot = 0.003175 m
N_FiOutletManSlotsPerRow = 146
N_FiOutletManSlotsPerBranch = 292
L_FiOutletManSlotCurvedInner = 0.0246496 m
# Inlet weirs
Pi_QFiBw = 1.15
H_FiStopGate = 0.2 m
W_FiStopGate = 0.400718 m
W_FiBwFlowControl = -0.176681 m
H_FiFlowControlSlotTotal = (0.119974 + 0.114409i) m
H_FiSlotStopper = 0.01i m
N_FiSlotStopper = 3
Q_FiSlotStopperIncrement = (0.00135253 - 0.000803026i) m^3/s
Vol_FiSand = 1090.63 L
## Display AC variables
AC_EntranceTank =  # no stored result
AC_FlocTank =  # no stored result
AC_OperatorAccess = [
    "-layer m OpWalkwayCon"; "c t 132,132,132"; "OpWalkwayCon"; "  "; "_box 0,0,1.15658 -9.65389,6.49,1.35658"; "-group c OpWalkwayCon y "; "all "; "-layer s 0"; "  "; "-layer f OpWalkwayCon"
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]
AC_SedTank =  # no stored result
AC_ChemTanks = [
    "-layer m OpChemPlatformCon"; "c t 132,132,132"; "OpChemPlatformCon"; "  "; "_box -5.63242,6.49,2.94585 -9.65389,4.00277,2.79585"; "_-view o f"; "_pline"; "-8.45389,2.94585"; "-8.45389,2.71881"; "-8.25389,2.71881"
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]
AC_Filter =  # no stored result
AC_SectionCuts = [
    "netload"; "sectioner"; "-view"; "o"; "t"; "laythw"; "-layer"; "n"; "long1,long2,trans1,trans2,trans3"; ""
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]
AC_Cdc =  # no stored result
# Also added to the beta method file-- remove to draw correctly!
AI_EtFlocSedFi = [
    "laythw"; "_-view o t"; "-plot y "; "PublishToWeb PNG.pc3"; "User 1 (824.00 x 583.00 Pixels)"; "l n e F"; ""; " ."; "y  [FILEPATH]EtFlocSedFi_t"; "n y"
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]
AI_EtFlocSedFiEt = [
    "-group c * y "; "all "; "-layer s 0"; "  "; "-layer f *"; "  "; "-layer t Et*"; "  "; "-layer s Et*"; "  "
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]
AI_EtFlocSedFiFloc = [
    "-group c * y "; "all "; "-layer s 0"; "  "; "-layer f *"; "  "; "-layer t Floc*"; "  "; "-layer s Floc*"; "  "
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]
AI_EtFlocSedFiSed = [
    "-group c * y "; "all "; "-layer s 0"; "  "; "-layer f *"; "  "; "-layer t Sed*"; "  "; "-layer s Sed*"; "  "
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]
AI_EtFlocSedFiFilter = [
    "-group c * y "; "all "; "-layer s 0"; "  "; "-layer f *"; "  "; "-layer t Fi*"; "  "; "-layer s Fi*"; "  "
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]
AI_EtFlocSedFiOp = [
    "-group c * y "; "all "; "-layer s 0"; "  "; "-layer f *"; "  "; "-layer t Op*"; "  "; "-layer s Op*"; "  "
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]
AI_EtFlocSedFiIsoX = ["shademode x"; "-group c * y "; "all "; "-layer s 0"; "  "; "-layer f *"; "  "; "-layer t *"; "  "; "-layer s *"; "  "; " "; "_-view se"; "-plot y "; "PublishToWeb PNG.pc3"; "User 1 (824.00 x 583.00 Pixels)"; "l n e F"; ""; " ."; "y  [FILEPATH]EtFlocSedFiFull_se"; "n y"]
AI_Final = "-view swiso laythw"
