# AguaClara Design Tool
Q_Plant := 20*L/s
method := "EtFlocSedFi"
## References
# MathCAD dimension calculations:
# [reference: ExpertInputs.xmcd]
# [reference: MathFunctions.xmcd]
# [reference: PipeDatabase.xmcd]
# [reference: FluidsFunctions.xmcd]
# [reference: SedimentationTank.xmcd]
Z_FlocBafflesMin := Z_SedWeirExit
W_FlocChannelOpening := W_SedInletChannelPreWeir
# [reference: FlocculatorMod.xmcd]
# [reference: LFOM.xmcd]
L_EtMax := L_Sed  # maximum length to prevent enlarging the plant footprint
HW_EtExit := HW_Sed + HL_Floc
Z_EtExit := Z_SedWeirExit
# [reference: EntranceTankMod.xmcd]
Z_FiWaterSource := Z_SedWeirExit
HL_FiEntranceWater := HL_FiEntrancePipe
Z_FiSourceBottom := Z_SedChannelBottom
# [reference: StackedRapidSandFilter.xmcd]
# [reference: LinearCdc.xmcd]
# [reference: ChemStorageTanks.xmcd]
# AutoCAD drawing programs:
ND_DistPipe = 6 in
# Translators:
# These are the codes that take MathCAD outputs and create AutoCAD scripts that are used to draw the plant (formerly Basics)
# [reference: MtoATranslators.xmcd]
# The wrapped MtoA translator contains the functions that the user will want to access. These functions will draw pieces with full functionality - specifying the location, dimension, and orientation of the object. Also, it contains layer control and subtraction capabilities for grouped objects.
# [reference: MtoATranslatorsWrapped.xmcd]
# Drawing functions:
# [reference: ChannelF.xmcd]
# [reference: PlumbingF.xmcd]
# [reference: TankF.xmcd]
# [reference: StairsF.xmcd]
# [reference: DrainChannelF.xmcd]
# AutoCAD Script Files:
Floc_Origin := [Plant_Origin[0]; Plant_Origin[1] + N_SedTanks*(W_Sed + T_PlantWall); Plant_Origin[2] + Z_FlocTank]
Z_FlocChannelBottom := Z_SedChannelBottom
# [reference: FlocculatorACMod.xmcd]
# [reference: SedimentationTankAC.xmcd]
Et_Origin := [
    Plant_Origin[0] - L_Sed + L_Et;
    Floc_Origin[1] + (N_FlocChannels*(W_FlocChannel + T_PlantWall)) + W_EtWalkway + T_PlantWall;
    Z_Et
] = [-2.01927; 6.3204; 1.09306] m
# [reference: EntranceTankACMod.xmcd]
LFOM_Origin := [RMElbow_Origin[0]; RMElbow_Origin[1] + ElbowRadius(ND_RMPipe); ZW_Et - HL_Flowmeasure]
L_RMVertPipeTop := H_PlantFreeboard
L_LfomPipe := HL_Lfom
L_RMVertPipeBottom := (Z_EtTop - (RMElbow_Origin[2] + ElbowRadius(ND_RMPipe)) - HL_Lfom - H_PlantFreeboard)
# [reference: LfomAC.xmcd]
# [reference: ChemStockTanksAC.xmcd]
Fi_origin := [
    Plant_Origin[0] - W_FiInletChannel - 5*T_PlantWall - T_FiWall - L_FiEntrance - L_FiExit - W_MpWalkway - L_Sed - W_PlantDC;
    Plant_Origin[1] + N_SedTanks*(W_Sed + T_PlantWall) - T_PlantWall - W_Fi/2 - ConRadius(ND_FiBwTrunk) - S_Fitting;
    Z_FiBottom
]
# [reference: StackedRapidSandFilterAC.xmcd]
# [reference: CdcAC.xmcd]
# [reference: OperatorAccessAC.xmcd]
# [reference: MaterialsAC.xmcd]
# Materials List:
# [reference: MaterialsList.xmcd]
# Layouts:
# This file will execute at the very end to create multiple views of the entire plant in paperspace
# [reference: LayoutsAC.xmcd]
## All variables displayed must have the standard SI units. They may not have units attached by the user.
# General
Q_Plant = 0.02 m^3/s
Pi_VenaContractaOrifice = 0.62
T_PlantWall = 0.15 m
W_SedPlate = 1.0668 m
T_ConcreteMin = 0.05 m
L_SedPlateSheet = 3 m
C_CoagStock = 197.531 kg/m^3
T_SedPlate = 0.002 m
Ti_CoagStock = 108000 s
T_SedWeir = 0.04 m
C_ChlorStock = 33.3333 kg/m^3
W_SedBay = 1.0668 m
Ti_ChlorineStock = 108000 s
HL_ChannelMax = 0.05 m  # Eliminate FCM variable from design specs
H_PlantFreeboard = 0.1 m
EN_DrillSeries = 0
W_HumanMin = 0.54 m
W_ChannelMin = 0.15 m
# Entrance Tank
# Tank
HW_Et = 1.35657 m
HW_EtMax = 1.5 m
H_Et = 1.45657 m
Z_EtTop = 2.54963 m
L_Et = 5.5311 m
Z_Et = 1.09306 m
ZW_Et = 2.44963 m
H_EtOverflowChannel =  # error: This variable is undefined.
W_Et = 0.938175 m
H_EtTop = 0.3 m  # height of the top part of the entrance tank above the hoppers
# Hoppers
H_EtLastSlope =  # error
H_EtHopperBack = 0.736575 m
N_EtFullHopper = 1
H_EtHopper = 1.15657 m
Z_EtHopper =  # error  # elevation of top of slab.
T_EtHopperLedge = 0.15 m
L_EtHopper = 2.51475 m
AN_EtSlope = 0.785398
# Rapid Mix
# Drain Channel
ED_Tee = 0.090228 m^2/s^3
ND_RMPipe = 0.254 m
W_EtDC = 0.388137 m  # drain channel under entrance tank dimensions
# Drains
L_EtDC = 5.13106 m
ND_EtDrain = 0.0762 m
H_EtDC = 0.300038 m  # Give heights of the channel at the beginning and end and change the design specs to explain that it's sloped.
L_EtDrainStopper = 1.45257 m
# Flow measurement
ND_Lfom =  # error
HL_Flowmeasure = 0.2 m
Z_LfomOrifices = 2.26551 m  # elevation of the center of
HL_Lfom = 0.2 m
D_LfomOrifices = 0.03175 m
B_LfomRows = 0.0333333 m
N_LfomOrifices = [12; 3; 4; 2; 3; 2]
H_LfomOrifices = [0.015875; 0.0492083; 0.0825417; 0.115875; 0.149208; 0.182542] m
Q_LfomScale =  # error
# Trash Rack
B_EtRebar = 0.0336647 m
# Flow Control Valve | Other Parameters
# Overflow Weir
ND_EtFlowControl = 0.1524 m
V_EtUp = 0.00510865 m/s
W_EtOverflowSlot = 0.0927049 m
Ti_Et = 339.239 s
ND_EtOverflowDrain = 0.1524 m
H_EtOverflowCutaway = 0.0154508 m
L_EtOverflowWeir = 2.6846 m
W_DC =  # error
# Maybe give the vertical distances below the bottom of the sed tank of the beginning and end of the channel? Calculate them, display, and add to the design specs.
H_DC =  # error
L_DC =  # error
H_HumanAccess = 1.5 m
# Plant Drain Channel
# Coag Dose Controller
# Coagulant | Chlorine
Z_CoagTank = 2.81733 m
C_CoagStockMax = 200 kg/m^3
C_ChlorineStockMax = 50 kg/m^3
Z_CoagTankOutlet = 2.91733 m
C_CoagDoseMax = 0.08 kg/m^3
C_ChlorineDoseMax = 0.002 kg/m^3
L_CdcFloatArm = 0.41275 m
N_CoagCdcTubes = 9
N_ChlorCdcTubes = 2
L_CdcScaleArm = 0.50165 m
L_CoagCdcTube = 1.03165 m
L_ChlorCdcTube = 1.19433 m
B_StockOutlet = 0.1 m
HL_CoagCdc = 0.2 m
HL_ChlorCdc = 0.1 m
Ti_CoagStock = 108000 s
Vol_CoagTank = 1100 L
Vol_ChlorineTank = 208.198 L
H_CoagTankAboveHeadTank = 0.3 m
D_CdcCoag = 0.00238125 m
K_CdcTube = 8
D_CdcChlor = 0.00238125 m
ND_EtFloat = 0.2032 m
Q_CoagStock = 8.1e-6 m^3/s
Q_ChlorStock = 1.2e-6 m^3/s
ND_CoagPiping = 0.0127 m
# Flocculator
# Tank
EN_FlocType :=
    "horizontal" if EN_FlocHoriz == 1
    "vertical" otherwise
EN_FlocType = "vertical"
H_Floc = 2.12654 m
HW_FlocEnd = 1.96067 m
HW_FlocStart = 2.02654 m
Z_FlocTank = 0 m
L_FlocTank =  # error
H_FlocPort = [0.977525; 0.977525] m
W_FlocChannel = 0.61 m
N_FlocChannels = 2
# Drains
ND_FlocValve = 0.0762 m
N_FlocValves = 1
H_FlocSlope = 0.04445 m
Ti_FlocDrain = 1800 s
# Parameters
ED_Floc = 0.0105 m^2/s^3
CP_Floc = 75 m^(2/3)
Ti_Floc = 918.198 s
G_Floc = 26.5514 1/s  # Look at Flocculator Positioning arrays
V_Floc = 0.104857 m/s
# Fill last channel with bafffles from last channel
ED_FlocMax = 0.010474 m^2/s^3  # Fix port width to be based on energy dissipation in that channel
# Adjust spacing after the number of baffles per channel is known.
ED_FlocAve = 0.000703503 m^2/s^3  # Check the residence time of the flocculator should be at least 20minutes
ED_FlocChannelFirst =  # error
HL_Floc = 0.0658691 m
K_FlocBaffle = 2.5
CP_Floc = 75 m^(2/3)
# Baffles
S_FlocBaffle = [0.312682; 0.312682] m
B_FlocBaffle = [0.314682; 0.314682] m
N_FlocChannelBaffles = [23; 22]
W_FlocPort = [0.292682; 0.400038] m
L_FlocBaffleLower = 1.49164 m
L_FlocBaffleUpper = 1.60751 m
T_FlocBaffle = 0.002 m
S_FlocBaffleFirst = 0.312682 m
EN_FlocBaffle = 1
Z_FlocBaffles = [
    0, 0.469023;
    0.469023, 0;
    0, 0.469023;
    0.469023, 0;
    0, 0.469023;
    0.469023, 0;
    0, 0.469023;
    0.469023, 0;
    0, 0.469023;
    0.469023, 0;
    0, 0.469023;
    0.469023, 0;
    0, 0.469023;
    0.469023, 0;
    0, 0.469023;
    0.469023, 0;
    0, 0.469023;
    0.469023, 0;
    0, 0.469023;
    0.469023, 0;
    0, 0.469023;
    0.469023, 0;
    0, 0
] m
# Last Channel
# Modules | First Channel
N_FlocChannelModulesLongLast = 5
ND_FlocModulesMain = 0.0127 m
N_FlocChannelModulesLongFirst = 5
N_FlocChannelBafflesShortLast = 2
ND_FlocModulesLarge = 0.0381 m
N_FlocChannelBafflesShortFirst = 3
L_FlocModuleLongOuterLast = 0.628681 m
L_FlocModuleLongOuterFirst = 0.628681 m
ND_SpacerPipe = 0.01905 m
L_FlocModuleLongFirst = 0.943363 m
L_FlocModuleLongLast = 0.943363 m
# Sed Tanks
# Tanks
N_SedTanks = 3
Q_SedBay = 0.00666667 m^3/s
W_Sed = 1.0668 m  # Total tank wall height
HW_Sed = 1.96067 m
L_Sed = 7.55037 m
L_Sed = 7.55037 m  # Total tank length
N_SedBays = 1
H_Sed = 2.06067 m
W_SedSideSlopes = 0.52505 m
L_SedActive = 6.35778 m
AN_SedSlope = 0.872665
# Floc Hopper
AN_SedHopperSlope = 0.785398
# Parameters
V_SedUpBod = 0.001 m/s  # design constraints
V_SedCBod = 0.00012 m/s
V_SedUp = 0.000988514 m/s  # Actual values from this design
Ti_Sed = 1852.28 s
# sludge drain
N_SedSludgeOrifices = 63  # per cell
Ti_SludgeDrain = 1800 s  # Tank Drain time
W_SedSludge = 0.103458 m  # Width of the sludge channel
H_SedSludge = 0.103458 m  # Depth of the sludge channel
# Distance center to center between drain orifices
B_SedSludgeOrifices = 0.100124 m
W_SedDrainCover = 0.143458 m
D_SedSludgeOrifice = 0.00926808 m  # Diameter of drain orifices
N_SedSludgeOrifices = 63
ND_SedSludgePipe = 0.1016 m
Z_SedSludge = 0.103458 m  # Height from 0 of the top of the sludge drain
Z_SedSideSlopes = 0.795889 m
# inlet channel | exit channel
W_SedExitChannel = 0.3485 m
HW_SedInletChannel = 0.295508 m
H_SedExitChannel = 0.395508 m
W_SedInletChannel = 0.590037 m
EN_InletChannelGeom = 1
HW_SedExitChannel = 0.255508 m
# water height in exit channel from base of channel
L_SedChannel = 3.5004 m
H_SedWeirExit = 0.23415 m
H_SedInletChannel = 0.395508 m
Z_SedChannelBottom = 1.66516 m
W_SedInletChannelPreWeir = 0.400038 m
HL_SedWeirInlet = 0.0213579 m
H_SedWeirInlet = 0.27415 m
W_SedWeirInlet = 3.5004 m
# launder
N_SedLaunderOrifices = 62  # Number of orifices per launder
ND_SedLaunder = 0.1524 m
N_SedLaunderOrificesRow =  # error  # Number of orifices per row
D_SedLaunderOrifice = 0.015875 m
Z_SedLaunder = 1.80723 m
L_SedLaunder = 6.40514 m
Q_SedLaunderOrifices = 0.000107527 m^3/s
HL_SedLaunderOrifice = 0.039144 m
B_SedLaunderOrifices = 0.1 m  # Center to center launder spacing
# inlet manifold
ND_SedManifold = 0.254 m
L_SedManifoldDiffuser = 0.157882 m
Z_SedManifoldPipe = 0.45344 m
ND_SedDiffuser = 0.0254 m
D_SedManifoldPort = 0.03175 m
B_SedManifoldPort = 0.05 m
N_SedManifoldPorts = 124
L_SedManifoldPipe = 6.34183 m
ED_SedInlet = 0.0105 m^2/s^3
Q_SedManifoldPort = 5.37634e-5 m^3/s
# plate settlers
S_SedPlateMin = 0.025 m
L_SedPlate = 0.5 m
B_SedPlate = 0.027 m  # center to center distance between lamella
S_SedPlate = 0.025 m  # spacing between lamella
N_SedPlates = 204  # Number of Sed Plates per Sedimentation Tank Bay.
N_SedModules = 17  # Number of modules per bay
N_SedModulePlates = 12  # Number of plates per module
AN_SedPlate = 1.0472
# SRSF
# tank
Porosity_Sand := ε_FiSand
T_FiWall = 0.25 m
N_FiLayer = 6
Q_Fi = 0.02 m^3/s
Z_FiBottom = -2.71658 m
HL_FiTerminal = 0.455621 m
H_FiLayer = 0.2 m
H_Fi = 4.6122 m
D_FiSand60 = 0.000825 m
HL_FiBwInitiation = 1.48782 m
Z_FiTop = 1.89562 m
V_FiLayer = 0.00183333 m/s
L_Fi = 1.48239 m
N_Fi = 1
HL_FiBwSS = 1.28782 m
Porosity_Sand = 0.4
W_Fi = 1.49957 m
H_FiBottomLayer = 0.26 m
V_FiBw = 0.011 m/s
H_FiSand = 1.30083 m
# sand drain
# trunk lines
Ti_FiSand = 1048.86 s  # This is the time required to empty the filter of the sand.
ND_FiTrunk = 0.1524 m
ND_FiBwTrunk = 0.254 m
ND_FiSandOutlet = 0.0508 m
# siphon
ND_FiSiphonAirValve = 0.0254 m
Z_FiSiphonCoupling = 0.949763 m
ND_FiSiphon = 0.254 m
Z_FiSiphonInlet = -0.825505 m
B_FiSiphonManOrifices = 0.118236 m
N_FiSiphonManOrifices = 10
D_FiSiphonManOrifices = 0.0508 m
# Waste and drain pipes
ND_FiExitWaste = 0.1016 m
ND_FiBwWeirDrain =  # error
ND_FiBwDrain =  # error
# branches
N_FiSlotRows = 2
B_FiManifoldBranch = 0.1 m
ND_FiManBranch = 0.0254 m
ND_FiBwManBranch = 0.0381 m
B_FiManSlot = 0.0047625 m
B_FiBwManSlot = 0.0047625 m
# Inlet Channel
HL_FiWeir =  # error
L_FiWeir =  # error
Z_FiEntranceWeir = 1.75069 m
# Entrance Box
Z_FiEntranceBottom = 0.753986 m  # bottom of the entrance box
# Exit Box
Z_FiExitBottom = 0.753986 m  # bottom of the filtered water box
Z_FiExitWeir =  # error
N_Launders =  # error
L_LaunderPipeTotal =  # error
N_LaunderCouplings =  # error
N_ValveCouplings = 3
N_SedPlatesTotal = 612
N_SedPlatesPerSheet = 6
N_SedPlateSheets = 102
N_Valves = 3
A_EtFloor = 7.21992 m^2
W_FlocWithWalls = 1.52 m
L_FlocWithWalls = 7.85037 m
Vol_FlocFloor = 1966.52 L
A_FlocFloor = 13.1101 m^2
Vol_SedSlopes =  # error
A_SedWalls =  # error
A_SedFloor = 29.8345 m^2
# Materials List
# Plant Summary Calculations:
HL_PlantTotal := Z_EtTop - H_PlantFreeboard - Z_FiExitWeir
HL_PlantTotal =  # error
## Display AC variables
AC_EntranceTank =  # no stored result
AC_FlocTank =  # no stored result
AC_OperatorAccess = [
    "-layer m OpWalkwayCon"; "c t 132,132,132"; "OpWalkwayCon"; "  "; "_box 0.15,-0.15,1.46516 -14.13081,7.40858,1.66516"; "-group c OpWalkwayCon y "; "all "; "-layer s 0"; "  "; "-layer f OpWalkwayCon"
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]
AC_SedTank =  # no stored result
AC_ChemTanks =  # no stored result
AC_Filter =  # no stored result
AC_ZZLayout := AC_Layout
AC_Cdc = [
    "-layer m Cdc";
    "c t 125,0,160";
    "Cdc";
    "  ";
    "-insert https://confluence.cornell.edu/download/attachments/173604905/CdcLeverArm.dwg";
    "-7.27972,6.48867,2.57453 x 1 1  270";
    "-insert https://confluence.cornell.edu/download/attachments/173604905/CdcLeverArmBracket.dwg";
    "-7.69247,6.45667,2.54963 x 1 1  270";
    "-insert https://confluence.cornell.edu/download/attachments/173604905/CdcCht.dwg";
    "-8.62582,6.48867,2.66733 x 1 1  90"
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]
AC_MatApply = [
    "-insert https://confluence.cornell.edu/download/attachments/173604905/CdcLeverArm.dwg"; "0,0,0 x 1 1  0"; "-layer"; "material"; "Flat - Polished Gray"; "*con"; "  "; "-layer"; "material"; "PVC - White"
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]
AC_ZZLayout =  # error
AI_EtFlocSedFi = [
    "laythw"; "_-view o t"; "-plot y "; "PublishToWeb PNG.pc3"; "User 1 (824.00 x 583.00 Pixels)"; "l n e F"; ""; " ."; "y  [FILEPATH]EtFlocSedFi_t"; "n y"
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]
Q_Plant = 0.02 m^3/s
# [component: inputs stack(AC_EntranceTank, AC_LFOM)]
