Q_Plant := 40*L/s
HL_FlocMax := 40 cm
H_SedSlopesToFlocWeirMin := 25 cm
T_FlocSlab := 12 cm
T_SedWall := 25 cm
T_SedDividingWall := 16 cm
T_SedChannelWall := 15 cm
T_FlocWall := 20 cm
T_FlocDividingWall := 17 cm
T_FiWall := 30 cm
T_FiBoxWall := 14 cm
T_PlantWall := 15 cm
T_PlantFloor := 21 cm
T_ChemSlab := 12 cm
T_DrainChannelWall := 17 cm
C_CoagDoseMax := 40*mg/L
C_ChlorDoseAve := 1*mg/L
