# Low Flow AguaClara Design Tool
Q_Plant := 1.6*L/s  # This file should only be used for plant flow rates between 1L/s and 3L/s!
method := "EtFlocSedFiLow"
## References
# MathCAD dimension calculations:
# [reference: ExpertInputs.xmcd]
# [reference: MathFunctions.xmcd]
# [reference: PipeDatabase.xmcd]
# [reference: MaterialsDatabase.xmcd]
# [reference: FluidsFunctions.xmcd]
# [reference: CdcFunctions.xmcd]
# [reference: SedimentationTankjem384.xmcd]
# [reference: Flocculator.xmcd]
# [reference: LFOM.xmcd]
# [reference: EntranceTankLowjem384.xmcd]
# [reference: LFStackedRapidSandFilter.xmcd]
# [reference: LinearCdc.xmcd]
# [reference: ChemStorageTanks.xmcd]
# AutoCAD drawing programs:
# Translators:
# These are the codes that take MathCAD outputs and create AutoCAD scripts that are used to draw the plant (formerly Basics)
# [reference: MtoATranslators.xmcd]
# The wrapped MtoA translator contains the functions that the user will want to access. These functions will draw pieces with full functionality - specifying the location, dimension, and orientation of the object. Also, it contains layer control and subtraction capabilities for grouped objects.
# [reference: MtoATranslatorsWrapped.xmcd]
# Drawing functions:
# [reference: ChannelF.xmcd]
# [reference: PlumbingF.xmcd]
# [reference: TankF.xmcd]
# [reference: StairsF.xmcd]
# [reference: DrainChannelF.xmcd]
# AutoCAD Script Files:
# [reference: FlocculatorACLow.xmcd]
# [reference: SedimentationTankACLow_jem384.xmcd]
# [reference: EntranceTankACLowjem384.xmcd]
# [reference: ChemStockTanksACLow.xmcd]
# [reference: LowFlowStackedRapidSandFilterAC.xmcd]
# [reference: CdcACLow.xmcd]
# [reference: OperatorAccessAC.xmcd]
# [reference: MaterialsAC.xmcd]
# Materials List:
# [reference: MaterialsList.xmcd]
# Layouts:
# This file will execute at the very end to create multiple views of the entire plant in paperspace
# [reference: LayoutsAC.xmcd]
## All variables displayed must have the standard SI units. They may not have units attached by the user.
# General
Q_Plant = 0.0016 m^3/s
Pi_VenaContractaOrifice = 0.63
T_PlantWall = 0.15 m
W_SedPlate = 1.0668 m
T_ConcreteMin = 0.05 m
L_SedPlateSheet = 3 m
C_CoagStock = 200 kg/m^3
T_SedPlate = 0.002 m
Ti_CoagStock = 108000 s
T_SedWeir = 0.04 m
C_ChlorineStock = 15 kg/m^3
W_SedBay = 1.0668 m
Ti_ChlorineStock = 108000 s
HL_ChannelMax = 0.05 m  # Eliminate FCM variable from design specs
H_PlantFreeboard = 0.1 m
EN_DrillSeries = 0
# Entrance Tank
# Tank
HW_Et = 0.514253 m
HW_EtMax = 1.5 m
H_Et = 0.614253 m
Z_EtTop = 2.34281 m
L_Et = 0.936859 m
Z_Et = 1.72856 m
ZW_Et = 2.24281 m
W_Et = 0.428269 m
H_EtTop = 0.2 m  # height of the top part of the entrance tank above the hoppers
# Hoppers
H_EtHopperBack = 0.414253 m
N_EtFullHopper =  # error: This variable is undefined.
H_EtHopper = 0.414253 m
Z_EtHopper = 2.14281 m  # elevation of top of slab.
T_EtHopperLedge = 0.15 m
L_EtHopper =  # error
AN_EtSlope =  # error
# Rapid Mix
# Drain Channel
ED_Tee =  # error
ND_RMPipe = 0.0508 m
W_EtDC = 0.275413 m  # drain channel under entrance tank dimensions
# Drains
L_EtDC = 0.768596 m
ND_EtDrain = 0.0381 m
H_EtDC = 0.0682625 m  # Give heights of the channel at the beginning and end and change the design specs to explain that it's sloped.
L_EtDrainStopper = 0.596253 m
# Flow measurement
ND_LfomPipe = 0.0508 m
HL_Flowmeasure = 0.1 m
Z_LfomOrifices = 2.14758 m  # elevation of the center of
HL_Lfom = 0.1 m
D_LfomOrifices = 0.009525 m
B_LfomRows = 0.01 m
N_LfomOrifices = [11; 4; 3; 2; 3; 2; 2; 2; 2; 1]
H_LfomOrifices = [0.0047625; 0.0147625; 0.0247625; 0.0347625; 0.0447625; 0.0547625; 0.0647625; 0.0747625; 0.0847625; 0.0947625] m
# Trash Rack
B_EtRebar = 0.0186548 m
# Flow Control Valve | Other Parameters
# Overflow Weir
ND_EtFlowControl = 0.0381 m
V_EtUp =  # error
W_EtOverflowSlot = 0.0331165 m
Ti_Et =  # error
ND_EtOverflowDrain = 0.0508 m
H_EtOverflowCutaway = 0.00551942 m
L_EtOverflowWeir =  # error
W_PlantDC = 1 m
# Maybe give the vertical distances below the bottom of the sed tank of the beginning and end of the channel? Calculate them, display, and add to the design specs.
H_PlantDC =  # error
L_PlantDC = 3.37507 m
H_HumanAccess = 1.5 m
# Plant Drain Channel
# Coagulant
Z_CoagTank = 2.61051 m
C_CoagStockMax = 200 kg/m^3
C_ChlorineStockMax = 15 kg/m^3
Z_CoagTankOutlet = 2.71051 m
C_CoagDoseMax = 0.08 kg/m^3
C_ChlorineDoseMax = 0.002 kg/m^3
L_CdcFloatArm = 0.41275 m
N_CdcCoagTubes = 2
N_CdcChlorineTubes = 1
L_CdcScaleArm = 0.50165 m
L_CdcCoagTube = 0.301793 m
L_CdcChlorineTube = 0.708079 m
B_StockOutlet = 0.1 m
HL_CdcCoag = 0.1 m
HL_CdcChlorine = 0.1 m
Ti_CoagStock = 108000 s
Vol_CoagTank = 113.56 L
Vol_ChlorineTank = 113.56 L
H_CoagTankAboveHeadTank = 0.3 m
D_CdcCoag = 0.0015875 m
K_CdcTube = 2
D_CdcChlorine = 0.0015875 m
ND_EtFloat = 0.2032 m
Q_CoagStock = 6.4e-7 m^3/s
Q_ChlorineStock = 2.13333e-7 m^3/s
ND_CoagPiping = 0.0127 m
# Coag Dose Controller
# Tank
EN_FlocType :=
    "horizontal" if EN_FlocHoriz == 1
    "vertical" otherwise
H_Floc = 1.93255 m
HW_FlocEnd = 1.56714 m
HW_FlocStart = 1.83255 m
Z_FlocTank = 0 m
L_Floc = 0.45 m
H_FlocPort = [0.260604; 0.260604; 0.260604; 0.260604; 0.260604; 0.260604; 0.260604; 0.260604; 0.260604; 0.260604; 0.260604] m
W_FlocChannel = 0.100139 m
N_FlocChannels = 11
# Drains
ND_FlocValve = 0.0508 m
N_FlocValves = 6
H_FlocSlope = 0.0301625 m
Ti_FlocDrain = 1800 s
# Parameters
ED_Floc = 0.0105 m^2/s^3
CP_Floc = 75 m^(2/3)
Ti_Floc = 467.826 s
G_Floc = 73.0557 1/s  # Look at Flocculator Positioning arrays
V_Floc = 0.357213 m/s
# Fill last channel with bafffles from last channel
ED_FlocMax = 0.00533713 m^2/s^3  # Fix port width to be based on energy dissipation in that channel
# Adjust spacing after the number of baffles per channel is known.
ED_FlocAve = 0.00533713 m^2/s^3  # Check the residence time of the flocculator should be at least 20minutes
HL_Floc = 0.254608 m
K_FlocBaffle = 2.5
CP_Floc = 75 m^(2/3)
# Baffles
N_FlocChannelBaffles = [3; 3; 3; 3; 3; 3; 3; 3; 3; 3; 3]
W_FlocPort = [0.0925; 0.0925; 0.0925; 0.0925; 0.0925; 0.0925; 0.0925; 0.0925; 0.0925; 0.0925; 0.28415] m
S_FlocBaffle = [0.1125; 0.1125; 0.1125; 0.1125; 0.1125; 0.1125; 0.1125; 0.1125; 0.1125; 0.1125; 0.1125] m
B_FlocBaffle = [0.1145; 0.1145; 0.1145; 0.1145; 0.1145; 0.1145; 0.1145; 0.1145; 0.1145; 0.1145; 0.1145] m
L_FlocBaffleLower = 1.46544 m
Z_FlocBaffles = [
    0, 0, 0, 0, 0, 0, 0, 0, 0, 0, 0;
    0.16875, 0.16875, 0.16875, 0.16875, 0.16875, 0.16875, 0.16875, 0.16875, 0.16875, 0.16875, 0.16875;
    0, 0, 0, 0, 0, 0, 0, 0, 0, 0, 0
] m
S_FlocBaffleFirst = 0.1125 m
L_FlocBaffleUpper = 1.74688 m
EN_FlocBaffle = 1
T_FlocBaffle = 0.002 m
# Modules
ND_FlocModulesMain = 0.0127 m
ND_FlocModulesLarge = 0.0381 m
L_FlocModuleLong = [0.571817; 0.571817; 0.571817; 0.571817; 0.571817; 0.571817; 0.571817; 0.571817; 0.571817; 0.571817; 0.571817] m
L_FlocModuleShort = [0.228317; 0.228317; 0.228317; 0.228317; 0.228317; 0.228317; 0.228317; 0.228317; 0.228317; 0.228317; 0.228317] m
ND_SpacerPipe = 0.0508 m
L_FlocModuleLongOuter = [0.457317; 0.457317; 0.457317; 0.457317; 0.457317; 0.457317; 0.457317; 0.457317; 0.457317; 0.457317; 0.457317] m
# Flocculator
# Sed Tanks
N_SedTanks = 1
L_Sed = 1.76967 m
N_SedBays = 1  # Number of bays of inlet manifolds in each sed tank
Q_SedBay = 0.0016 m^3/s
V_SedUpBod = 0.001 m/s  # design constraints
V_SedCBod = 0.00012 m/s
V_SedUp = 0.000986933 m/s  # Actual values from this design
W_SedSideSlopes = 0.52505 m
AN_SedSlope = 0.872665
Ti_Sed = 1170.54 s
# Sedimentation Tank Sludge Drain:
N_SedSludgeOrifices = 14  # per cell
Ti_SludgeDrain = 1800 s  # Tank Drain time
W_SedSludge = 0.049168 m  # Width of the sludge channel
H_SedSludge = 0.049168 m  # Depth of the sludge channel
# Distance center to center between drain orifices
B_SedSludgeOrifices = 0.104834 m
W_SedDrainCover = 0.089168 m
D_SedSludgeOrifice = 0.00955198 m  # Diameter of drain orifices
N_SedSludgeOrifices = 14
ND_SedSludgePipe = 0.0508 m
# Sedimentation Tank Dimensions:
Z_SedSludge = 0.049168 m  # Height from 0 of the top of the sludge drain
Z_SedSideSlopes = 0.741598 m
W_Sed = 1.0668 m  # Total tank wall height
L_Sed = 1.76967 m  # Total tank length
H_Sed = 1.67794 m
# Sedimentation Tank Inlet Channel:
EN_InletChannelGeom = 0
HW_SedInletChannel = 0.200263 m
W_SedInletChannel = 0.28415 m
L_SedChannel = 1.0668 m
H_SedInletChannel = 0.300263 m
HL_SedWeirInlet = 0.0209266 m
W_SedInletChannelPreWeir = 0.28415 m
H_SedWeirInlet = 0.179337 m
W_SedWeirInlet = 0.28415 m
# Sedimentation Tank Effluent Launder:
N_SedLaunderOrifices = 14  # Number of orifices per launder
Z_SedLaunder = 1.52714 m
Q_SedLaunderOrifices = 0.000114286 m^3/s
B_SedLaunderOrifices = 0.1 m  # Center to center launder spacing
# More Launder Dimensions
ND_SedLaunder = 0.0762 m
D_SedLaunderOrifice = 0.016 m
L_SedLaunder = 1.54822 m
HL_SedLaunderOrifice = 0.0415042 m
# Sedimentation Tank Inlet Manifold:
ND_SedManifold = 0.1524 m
L_SedManifoldDiffuser = 0.214442 m
Z_SedManifoldPipe = 0.407564 m
ND_SedDiffuser = 0.0254 m
D_SedManifoldPort = 0.028 m
B_SedManifoldPort = 0.05 m
N_SedManifoldPorts = 27
L_SedManifoldPipe = 1.34199 m
ED_SedInlet = 0.0105 m^2/s^3
Q_SedManifoldPort = 5.51724e-5 m^3/s
# Exit Channel:
W_SedExitChannel = 0.34 m
H_SedExitChannel = 0.300263 m
HW_SedExitChannel = 0.160263 m  # water height in exit channel from base of channel
H_SedWeirExit = 0.1516 m
# Lamella:
L_SedPlate = 0.5 m
B_SedPlate = 0.027 m  # center to center distance between lamella
S_SedPlate = 0.025 m  # spacing between lamella
N_SedPlates = 50  # Number of Sed Plates per Sedimentation Tank Bay.
N_SedModules = 5  # Number of modules per bay
N_SedModulePlates = 10  # Number of plates per module
AN_SedPlate = 1.0472
L_SedActive = 1.55654 m
Z_SedLaunder = 1.52714 m
HW_Sed = 1.56714 m
H_Sed = 1.67794 m
# SRSF
H_Fi =  # error
L_Fi =  # error
W_Fi =  # error
B_FiManifoldBranch = 0.1 m
ND_FiTrunk =  # error
ND_FiManBranch = 0.0127 m
ND_FiBwTrunk = 0.0508 m
ND_FiBwManBranch = 0.0381 m
ND_FiExitWaste =  # error
ND_FiBwWeirDrain =  # error
ND_FiBwDrain =  # error  # For the box that holds keeps the end of the siphon submerged
ND_FiSandOutlet = 0.0508 m
Ti_FiSand =  # error  # This is the time required to empty the filter of the sand.
ND_FiSiphonAirValve =  # error
ND_FiSiphon =  # error
Q_FiSiphonMax =  # error
B_FiSiphonManOrifices =  # error
N_FiSiphonManOrifices =  # error
D_FiSiphonManOrifices = 0.0440436 m
Ti_FiBwInitiation =  # error
H_FiSand = 1.21067 m
N_FiLayer = 6
H_FiLayer = 0.2 m
V_FiLayer = 0.00183333 m/s
HL_FiTerminal = 0.455621 m
V_FiBw = 0.011 m/s
HL_FiBwInitiation = 1.39856 m
HL_FiBwSS = 1.19856 m
D_FiSand =  # error
N_Fi = 2
Q_Fi = 0.0008 m^3/s
W_Slots =  # error
B_FiBwManSlot = 0.0047625 m
L_FiBwManSlot =  # error
B_FiManSlot = 0.0047625 m
L_FiManSlot =  # error
N_FiSlotRows = 2
Z_FiBottom = -0.4763 m
Z_FiTop =  # error
# Weirs
HL_FiWeir =  # error
L_FiWeir =  # error
Z_FiEntranceWeir = 1.55561 m
Z_FiBwWeir =  # error
Z_FiSiphonInlet =  # error  # This is the centerline elevation of the siphon orifices
Z_FiExitWeir =  # error
Z_FiExitBottom =  # error  # bottom of the filtered water box
Z_FiEntranceBottom =  # error  # bottom of the entrance box
Z_FiSiphonCoupling =  # error
Z_FiBwTop =  # error
W_FiBwDrain =  # error
H_FiBwDrain =  # error
N_Launders =  # error
L_LaunderPipeTotal =  # error
N_LaunderCouplings =  # error
N_ValveCouplings = 1
N_SedPlatesTotal = 50
N_SedPlatesPerSheet = 6
N_SedPlateSheets = 9
N_Valves = 1
A_EtFloor = 0.900766 m^2
W_FlocWithWalls = 2.75153 m
L_FlocWithWalls = 2.06967 m
Vol_FlocFloor = 900.783 L
A_FlocFloor = 6.00522 m^2
Vol_SedSlopes =  # error
A_SedWalls =  # error
A_SedFloor = 2.82882 m^2
# Materials List
# Plant Summary Calculations:
HL_PlantTotal := Z_EtTop - H_PlantFreeboard - Z_FiExitWeir
HL_PlantTotal =  # error
## Display AC variables
AC_EntranceTank = [
    "-layer m EtCon"; "c t 132,132,132"; "EtCon"; "  "; "_wedge -0.29317,2.34507,1.72856 -0.15715,1.9168,2.14281"; "_box -0.29317,2.34507,1.72856 -0.44317,1.9168,2.14281"; "_wedge -0.44317,2.34507,1.72856 -0.77971,1.9168,2.14281"; "_zoom w -0.01,2.33507,1.71856 -0.26112,5.637,3.88137"; "_wedge 0,2.34507,1.72856 -0.27112,3.28193,2.14281"; "rotate3d l  z 0,2.34507,1.72856 90"
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]
AC_FlocTank = [
    "-layer m FlocTankCon"; "c t 132,132,132"; "FlocTankCon"; "  "; "_-view o t _zoom w 0.16,1.0568,0 -0.61,3.14647,1.93255"; "_box 0,1.2168,0 -0.45,2.98647,1.93255 _box 0.15,1.0668,-0.15 -0.6,3.13647,1.93255"; "_subtract 0.15,1.0668,-0.15  0,1.2168,0 "; "_box 0.15,1.0668,-0.15 0.2,3.13647,1.93255"; "mirror3d all  yz -0.225,0 n  "; "_union all "
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]
AC_OperatorAccess =  # error
AC_SedTank =  # no stored result
AC_ChemTanks =  # no stored result
AC_Filter =  # no stored result
AC_ZZLayout := AC_Layout
AC_ZZMatApply
AC_Cdc = [
    "-layer m CdcLayer"; "c t 0,0,0"; "CdcLayer"; "  "; "-layer m CdcAll"; "c t 214,214,214"; "CdcAll"; "  "; "_zoom w 0.11,2.00224,2.31551 0.20588,2.12237,2.43361"; "_box 0.15,2.04427,2.35551 0.16588,2.04224,2.39361"
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]
AC_ZZLayout =  # error
AI_EtFlocSedFiLow = [
    "laythw"; "_-view o t"; "-plot y "; "PublishToWeb PNG.pc3"; "User 1 (824.00 x 583.00 Pixels)"; "l n e F"; ""; " ."; "y  [FILEPATH]EtFlocSedFiLow_t"; "n y"
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]
AI_EtFlocSedFiLowSed = [
    "-group c * y "; "all "; "-layer s 0"; "  "; "-layer f *"; "  "; "-layer t *Sed*"; "  "; "-layer s *Sed*"; "  "
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]
AI_EtFlocSedFiLowFloc = [
    "-group c * y "; "all "; "-layer s 0"; "  "; "-layer f *"; "  "; "-layer t *Floc*"; "  "; "-layer s *Floc*"; "  "
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]
Q_Plant = 0.0016 m^3/s
# [component: inputs stack(AC_EntranceTank, AC_Cdc, AC_ChemTanks, AC_FlocTank, AC_SedTank, AC_Filter)]
