# LFOM Orifices Template
Q_Plant := □  # error: This placeholder is empty.
HL_Lfom := □  # error: This placeholder is empty.
# Design References
L_Paper := 10.5 in
W_Paper := 7.5 in
XStartPoint := LFOM_Origin[0]
YStartPoint := LFOM_Origin[1]
OrificeCenterDist := D_LfomOrifices + S_LfomOrificesMin
L_Border := floor(L_Paper/OrificeCenterDist)*OrificeCenterDist - D_LfomOrifices
W_Border := floor(W_Paper/(H_LfomOrifices[1] - H_LfomOrifices[0]))*(H_LfomOrifices[1] - H_LfomOrifices[0])
Labels := ["A"; "B"; "C"; "D"; "E"; "F"; "G"; "H"; "I"; "J"; "K"; "L"; "M"; "O"; "P"]
# Variables
# Create Layouts
LabelLayout(Text, TextSize, Start, End, Rotation) := concat("-mtext ", point(Start), sp, "height ", stringit(TextSize), sp, "r ", stringit(Rotation), sp, point(End), sp, Text)
CreateLayout(LayoutName) := concat("-layout ", "n ", stringit(LayoutName), sp)
SetLayout(LayoutName) := concat("-layout ", "s ", stringit(LayoutName), sp)
VPortErase(VPort1, VPort2) := concat(".erase ", point(VPort1), sp, point(VPort2), sp)
VPortNew(Corner1, Corner2) := concat("-vport ", point(Corner1), sp, point(Corner2), sp, "z ", "e")
ChangeView(CornerA, CornerB) := concat("ms ", "z ", "w ", point(CornerA), sp, point(CornerB), sp, "ps")
N_HLayouts := round((OrificeCenterDist*N_LfomOrifices[0] + D_LfomOrifices)/L_Border)  # Number of horizontal layouts
N_VLayouts := round((H_LfomOrifices[last(H_LfomOrifices)] + D_LfomOrifices/2)/W_Border)  # Number of vertical layouts
N_TLayouts := floor((OrificeCenterDist*N_LfomOrifices[last(N_LfomOrifices)] + D_LfomOrifices)/L_Border)  # Number of horizontal layouts in top row
SetUpHLayouts(N_Layout) :=
    Num ← 1 m
    Layout ← CreateLayout(Num)
    for a ∈ 1 .. N_Layout
        if a == 1
            Layout ← stack(Layout, SetLayout(Num), VPortErase([0; 0]*m, [10; 7.7]*m), VPortNew([.013; .013]*m, [.013 m + L_Border + D_LfomOrifices/2; W_Border + .013 m]), ChangeView([
                XStartPoint - D_LfomOrifices/2 + ((floor(L_Paper/OrificeCenterDist)*OrificeCenterDist)*(a - 1));
                YStartPoint
            ], [XStartPoint + L_Border*a; YStartPoint + W_Border]))
        if a > 1
            Layout ← stack(Layout, CreateLayout(Num), SetLayout(Num), VPortErase([0; 0]*m, [10; 7.7]*m), VPortNew([.013; .013]*m, [.013 m + L_Border + D_LfomOrifices/2; W_Border + .013 m]), ChangeView([
                XStartPoint - D_LfomOrifices/2 + (floor(L_Paper/OrificeCenterDist)*OrificeCenterDist)*(a - 1);
                YStartPoint
            ], [XStartPoint + L_Border*a; YStartPoint + W_Border]))
        Num ← Num + 1 m
    return Layout
SetUpTLayouts(N_Layout) :=
    Num ← (N_HLayouts + 1)*m + 1 m
    Layout ← CreateLayout(Num)
    for c ∈ N_Layout
        if c == 1
            Layout ← stack(Layout, SetLayout(Num), VPortErase([0; 0]*m, [10; 7.7]*m), VPortNew([.013; .013]*m, [.013 m + L_Border + D_LfomOrifices/2; W_Border + .013 m]), ChangeView([
                XStartPoint - D_LfomOrifices/2 + ((floor(L_Paper/OrificeCenterDist)*OrificeCenterDist)*c);
                YStartPoint + W_Border
            ], [XStartPoint + L_Border*(c + 1); YStartPoint + 2*W_Border]))
        if c > 1
            Layout ← stack(Layout, CreateLayout(Num), SetLayout(Num), VPortErase([0; 0]*m, [10; 7.7]*m), VPortNew([.013; .013]*m, [.013 m + L_Border + D_LfomOrifices/2; W_Border + .013 m]), ChangeView([
                XStartPoint - D_LfomOrifices/2 + ((floor(L_Paper/OrificeCenterDist)*OrificeCenterDist)*c);
                YStartPoint + W_Border
            ], [XStartPoint + L_Border*(c + 1); YStartPoint + 2*W_Border]))
        Num ← Num + 1 m
    return Layout
SetUpVLayouts(N_Layout) :=
    Num ← N_HLayouts*m + 1 m
    Layout ← CreateLayout(Num)
    for b ∈ 1 .. N_Layout
        if b == 1
            Layout ← stack(Layout, SetLayout(Num), VPortErase([0; 0]*m, [10; 7.7]*m), VPortNew([.013; .013]*m, [.013 m + L_Border + D_LfomOrifices/2; W_Border + .013 m]), ChangeView([
                XStartPoint - D_LfomOrifices/2 + ((floor(L_Paper/OrificeCenterDist)*OrificeCenterDist)*(b - 1));
                YStartPoint + W_Border*b
            ], [XStartPoint + L_Border*b; YStartPoint + W_Border*(b + 1)]))
        if b > 1
            Layout ← stack(Layout, CreateLayout(Num), SetLayout(Num), VPortErase([0; 0]*m, [10; 7.7]*m), VPortNew([.013; .013]*m, [.013 m + L_Border + D_LfomOrifices/2; W_Border + .013 m]), ChangeView([
                XStartPoint - D_LfomOrifices/2 + ((floor(L_Paper/OrificeCenterDist)*OrificeCenterDist)*(b - 1));
                YStartPoint + W_Border*b
            ], [XStartPoint + L_Border*b; YStartPoint + W_Border*(b + 1)]))
        Num ← Num + N_TLayouts*m + 1 m
    Layout ← stack(Layout, SetUpTLayouts(N_TLayouts)) if N_TLayouts > 0
    return Layout
# Drawing Functions
DimStyle(H_Component) := concat("-dimstyle ", "st ", "dimtxt ", stringit(H_Component), sp, "dimasz ", stringit(H_Component), sp, "dimgap ", stringit(H_Component), sp, "dimcen ", stringit(0.0000 m), sp)
# Changes dimension style for last orifice of bottom row
LfomDiameterDim := concat(DimStyle(.005 m), "_dimdiameter ", point([
    (OrificeCenterDist*N_LfomOrifices[0]) - D_LfomOrifices/2 - S_LfomOrificesMin + (D_LfomOrifices/2*sqrt(2)/2);
    H_LfomOrifices[0] + (D_LfomOrifices/2*sqrt(2)/2)
]), sp, point([
    (OrificeCenterDist*N_LfomOrifices[0] - D_LfomOrifices/2 + S_LfomOrificesMin) + (D_LfomOrifices/2*sqrt(2)/2);
    H_LfomOrifices[0] + (D_LfomOrifices/2*sqrt(2)/2)
]))  # Draws dimension
Boundary := concat("_line ", point([XStartPoint - D_LfomOrifices/2; YStartPoint + H_LfomOrifices[0] - D_LfomOrifices/2]), sp, point([
    XStartPoint - D_LfomOrifices/2;
    YStartPoint + H_LfomOrifices[last(H_LfomOrifices)] + W_Border - D_LfomOrifices/2
]), sp, "_line ", point([XStartPoint - D_LfomOrifices/2; YStartPoint + H_LfomOrifices[0] - D_LfomOrifices/2]), sp, point([
    (XStartPoint + N_HLayouts*L_Border + ((N_HLayouts - 1)*D_LfomOrifices/2));
    YStartPoint + H_LfomOrifices[0] - D_LfomOrifices/2
]), sp)
Zoom := concat("z ", "e")
CreateLabel(Str1, Str2) := concat("Page ", Str1, Str2)
CopyText(Object, BasePt, DisPt) := concat("copy ", point(Object), sp, point(BasePt), sp, sp, "mode ", "single ", sp, point(DisPt))
DelineateL(PaperLength, XStartPoint, YStartPoint) := concat("_line ", point([XStartPoint + L_Border; YStartPoint + (H_LfomOrifices[0] - D_LfomOrifices/2)]), sp, point([
    XStartPoint + L_Border;
    YStartPoint + H_LfomOrifices[last(H_LfomOrifices)] + W_Border - D_LfomOrifices/2
]), sp)  # Insert border "lengthwise"
LabelLayout(CreateLabel(Labels[:, 0][c], Labels[:, 0][c + N_HLayouts]), .005 m, Label_BottS, Label_BottE, 0 m), "", MirrorLast([(XStartPoint + L_Border)/2; YStartPoint + W_Border], [XStartPoint + L_Border; YStartPoint + W_Border], "n")
LabelT(XStartPoint) :=
    TempX ← XStartPoint
    Line ← Boundary
    c ← 0
    while XStartPoint < TempX + (N_TLayouts*L_Border)
        Label_MiddleS ← [XStartPoint + L_Border - 1 cm; YStartPoint + (3/2*W_Border) - 1 cm]
        Label_MiddleE ← [XStartPoint + L_Border - 1 cm; YStartPoint + (3/2*W_Border) + 2 cm]
        Label_TopS ← [XStartPoint + L_Border - 1 cm; YStartPoint + 2*W_Border - 2 cm]
        Label_TopE ← [XStartPoint + L_Border - .5 cm; YStartPoint + 2*W_Border - .5 cm]
        Label_BottS ← [XStartPoint + L_Border - 5 cm; YStartPoint + W_Border - 1 cm]
        Label_BottE ← [XStartPoint + L_Border - 2 cm; YStartPoint + W_Border - .5 cm]
        Line ← stack(Line, Zoom, LabelLayout(CreateLabel(Labels[:, 0][c + N_HLayouts], Labels[:, 0][c + N_HLayouts + 1]), .005 m, Label_MiddleS, Label_MiddleE, 90 m), "", MirrorLast([XStartPoint + L_Border; YStartPoint], [XStartPoint + L_Border; YStartPoint + 2*W_Border], "n"), LabelLayout(Labels[:, 0][c + N_HLayouts], .005 m, Label_TopS, Label_TopE, 0 m), "", LabelLayout(CreateLabel(Labels[:, 0][c], Labels[:, 0][c + N_HLayouts]), .005 m, Label_BottS, Label_BottE, 0 m), "", MirrorLast([(XStartPoint + L_Border)/2; YStartPoint + W_Border], [XStartPoint + L_Border; YStartPoint + W_Border], "n"), Zoom)
        XStartPoint ← XStartPoint + L_Border + D_LfomOrifices/2
        c ← c + 1
    Label_TopS ← [XStartPoint + L_Border - 1 cm; YStartPoint + 2*W_Border - 2 cm]
    Label_TopE ← [XStartPoint + L_Border - .5 cm; YStartPoint + 2*W_Border - .5 cm]
    Label_BottS ← [XStartPoint + L_Border - 5 cm; YStartPoint + W_Border - 1 cm]
    Label_BottE ← [XStartPoint + L_Border - 2 cm; YStartPoint + W_Border - .5 cm]
    Line ← stack(Line, Zoom, LabelLayout(Labels[:, 0][c + N_HLayouts], .005 m, Label_TopS, Label_TopE, 0 m), "", LabelLayout(CreateLabel(Labels[:, 0][c], Labels[:, 0][c + N_HLayouts]), .005 m, Label_BottS, Label_BottE, 0 m), "", MirrorLast([(XStartPoint + L_Border)/2; YStartPoint + W_Border], [XStartPoint + L_Border; YStartPoint + W_Border], "n"), Zoom) if XStartPoint < TempX + ((N_TLayouts + 1)*L_Border)
    return Line
DelineateLMultiple(PaperLength, PaperWidth, XStartPoint, YStartPoint) :=
    TempX ← XStartPoint
    Line ← Boundary
    b ← 0
    while XStartPoint < TempX + ((N_HLayouts - 1)*L_Border)
        Label_MiddleS ← [
            XStartPoint + L_Border - 1 cm;
            (YStartPoint + H_LfomOrifices[last(H_LfomOrifices)] + D_LfomOrifices/2)/2 - 1 cm
        ]
        Label_MiddleE ← [
            XStartPoint + L_Border - 1 cm;
            (YStartPoint + H_LfomOrifices[last(H_LfomOrifices)] + D_LfomOrifices/2)/2 + 2 cm
        ]
        Label_TopS ← [XStartPoint + L_Border - 1 cm; YStartPoint + W_Border - 2 cm]
        Label_TopE ← [XStartPoint + L_Border - .5 cm; YStartPoint + W_Border - .5 cm]
        Line ← stack(Line, DelineateL(PaperLength, XStartPoint, YStartPoint), Zoom, LabelLayout(CreateLabel(Labels[:, 0][b], Labels[:, 0][b + 1]), .005 m, Label_MiddleS, Label_MiddleE, 90 m), "", MirrorLast([XStartPoint + L_Border; YStartPoint], [
            XStartPoint + L_Border;
            YStartPoint + H_LfomOrifices[last(H_LfomOrifices)] + W_Border - D_LfomOrifices/2
        ], "n"), LabelLayout(Labels[:, 0][b], .005 m, Label_TopS, Label_TopE, 0 m), "", Zoom)
        XStartPoint ← (XStartPoint + L_Border + D_LfomOrifices/2)
        b ← b + 1
    Label_TopS ← [XStartPoint + L_Border - 1 cm; YStartPoint + W_Border - 2 cm]
    Label_TopE ← [XStartPoint + L_Border - .5 cm; YStartPoint + W_Border - .5 cm]
    Line ← stack(Line, DelineateL(PaperLength, XStartPoint, YStartPoint), Zoom, LabelLayout(Labels[:, 0][b], .005 m, Label_TopS, Label_TopE, 0 m), "", Zoom) if XStartPoint < TempX + (N_HLayouts*L_Border)
    return Line
DelineateW(PaperWidth, XStartPoint, YStartPoint) := concat("_line ", point([XStartPoint - D_LfomOrifices/2; YStartPoint + W_Border]), sp, point([XStartPoint + N_HLayouts*L_Border + (N_HLayouts - 1)*D_LfomOrifices/2; YStartPoint + W_Border]), sp)
# Insert border vertically
DelineateWMultiple(PaperLength, PaperWidth, XStartPoint, YStartPoint) :=
    TempY ← YStartPoint
    Line ← Boundary
    a ← 0
    while YStartPoint ≤ TempY + N_VLayouts*W_Border
        Line ← stack(Line, DelineateW(PaperWidth, XStartPoint, YStartPoint))
        YStartPoint ← YStartPoint + W_Border
        a ← a + 1
    return Line
LfomOrificesTemplate :=
    Local ← view("t")
    for h ∈ 0 .. last(H_LfomOrifices)
        origin ← [XStartPoint + D_LfomOrifices/2*(mod(h, 2) == 0); YStartPoint + H_LfomOrifices[h]]
        Crosshair ← concat("z ", "e ", "_line ", point(origin[:, 0] - [D_LfomOrifices/4; 0 m]), sp, point(origin[:, 0] + [D_LfomOrifices/4; 0 m]), sp, sp, "_line ", point(origin[:, 0] - [0 m; D_LfomOrifices/4]), sp, point(origin[:, 0] + [0 m; D_LfomOrifices/4]), sp)
        PointArray ← [
            [origin[0] - D_LfomOrifices/3; origin[1]];
            [origin[0]; origin[1] - D_LfomOrifices/3];
            [origin[0] + (D_LfomOrifices/2*sqrt(2)/2); origin[1]];
            [origin[0]; origin[1] + (D_LfomOrifices/2*sqrt(2)/2)]
        ]
        Local ← stack(Local, circle(origin, D_LfomOrifices/20), circle(origin, D_LfomOrifices/2), Crosshair) if N_LfomOrifices[h] ≠ 0
        Local ← stack(Local, ArrayMultiple(PointArray, 1, N_LfomOrifices[h], 0, OrificeCenterDist)) if N_LfomOrifices[h] > 1
    Local ← stack(Local, LfomDiameterDim, DelineateLMultiple(L_Paper, W_Paper, XStartPoint, YStartPoint), DelineateWMultiple(L_Paper, W_Paper, XStartPoint, YStartPoint), LabelT(XStartPoint), SetUpHLayouts(N_HLayouts), SetUpVLayouts(N_VLayouts))
    return Local
# Template Code
AC_LfomOrificesTemplate := LfomOrificesTemplate
AC_LfomOrificesTemplate =  # error: This variable is undefined.
