# LFOM Modular Design
# User Inputs
Q_Plant := 12*L/s
# To be left undefined and inputed online by the user
L_RMPipeVert := 2 m
# From Expert Inputs
Country := 0
Language := 0
Rho_H2O := 1000*kg/m^3  # Density of water
Nu_Water := 1*10^-6*m^2/s  # The kinematic viscosity of water.
Rho_FB := 1001*kg/m^3  # Density of Flocs
Re_PipeTransition := 2100
E_Pvc := 0.12 mm
E_Concrete := 2 mm
E_ConcreteLedge := 0.014 mm
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Pi_Jet := 0.4
# This is an empirically determined factor to make the equation
# correct.
Pi_VenaContractaOrifice := 0.63
P_Atm := 1 atm
Nu_Air := 12*mm^2/s
Rho_Air := 1.204*kg/m^3
Rho_Clay := 2.65*gm/mL
Plant_Origin := [0; 0; 0]*m
T_PlantWall := 15 cm
T_ConcreteMin := 5 cm
EN_DrillSeries := 0  # 0 is English, 1 is metric
EN_TubeSeries := 0
W_HumanMin := 0.54 m
H_HumanAccess := 1.5 m  # The height of the walkway above the drain channel bottom so that someone can walk through the drain channel.
acad_version := 2008
H_Freefall := 0.1 m
H_PlantFreeboard := 0.1*m
EN_PlantDrains := 1  # Set to zero if drains on left, 1 if drains on right
D_Rebar := 1/2*in
ND_SpacerPipe := 3/4*in
S_Fitting := 5 cm  # minimum space between fittings in a tank or fittings and the wall of the tank.
W_ChannelMin := 15 cm  # Minimum channel width for constructability
W_DeepChannelMin := 30 cm  # Minimum channel width for a deep channel. Assumes you may need to stick your head in the channel.
H_DeepChannelMax := 60 cm  # The maximum depth of a channel, based on having your arm reach to the bottom of the channel.
S_ChannelPipeWall := 2 cm  # Extra space allowed on both sides of pipe to avoid interference with the channel walls
Π_Rectangular := 1/2  # Π.Rectangular is defined as the optimum "height over width ratio" (1/2) for a rectangular open channel
HL_ChannelMax := 5 cm
EN_MatApply := 0  # EN.MatApply equals 0 if materials are not to be applied, otherwise materials are applied
USD := ¤  # Defining US Dollars as a currency unit
Lem := USD/19.06  # Lempira/US Dollar exchange rate as of 3/5/2012
EN_Water := 0  # Equals 1 to draw boxes showing max water levels, 0 normally
# If EN_Water is set to 1, this controls the filter operation mode for which water/sand elevations are drawn. 0 for terminal, 1 for clean bed, and 2 for backwash.
EN_FilterWater := 2
EN_DrillSeries := 0
Π_Lfomorifice := 10  # Number of rows in lfom.  note: execution time of the lfom file exponentially increases with this number.
Π_LfomSafety := 1.5  # sefety coefficient for lfom pipe diameter
HL_Nlfom := 40 cm  # head loss through nonlinear orifice meter (simple orifice)
HL_Lfom := 20 cm  # head loss through linear orifice meter (sutro weir analog)
HL_CoagCdc := HL_Lfom
H_LfomSF := 5 cm
N_Lfom := 1
S_LfomOrificesMin := 5 mm  # Difference between the height of the water in floc tank and the bottom set of holes on the linear flow orifice meter
H_LfomFreefall := 5 cm
# Both of these assumptions were tested over a range of flow rates and found to give reasonable Lfom configurations.
Pi_Sutro := 0.1
Pi_Lfomorifice := 20
D_DrillEng :=
    i ← 0
    D_DrillEng[0] ← 1/32*in
    while D_DrillEng[i] ≤ 3/16*in - 1/128*in
        i ← i + 1
        D_DrillEng[i] ← D_DrillEng[i - 1] + 1/128*in
    while D_DrillEng[i] < 1 in - 1/16*in
        i ← i + 1
        D_DrillEng[i] ← D_DrillEng[i - 1] + 1/16*in
    while D_DrillEng[i] < 2 in
        i ← i + 1
        D_DrillEng[i] ← D_DrillEng[i - 1] + 1/4*in
    return D_DrillEng
D_DrillMet :=
    i ← 0
    D_DrillMet[0] ← 0.5 mm
    while D_DrillMet[i] ≤ 5 mm - 0.1 mm
        i ← i + 1
        D_DrillMet[i] ← D_DrillMet[i - 1] + 0.1 mm
    while D_DrillMet[i] < 20 mm
        i ← i + 1
        D_DrillMet[i] ← D_DrillMet[i - 1] + 1 mm
    while D_DrillMet[i] < 50 mm
        i ← i + 1
        D_DrillMet[i] ← D_DrillMet[i - 1] + 2 mm
    return D_DrillMet
D_Drill :=
    D_Drill ← D_DrillEng if EN_DrillSeries == 0
    D_Drill ← D_DrillMet otherwise
AN_EtSlope := 45 deg  # Angle of the sloped walls of the entrance tank hoppers
V_EtUp := 8*mm/s
HL_EtFloc := 5 cm
HW_EtMin := 20 cm  # Minimum water level in the entrance tank
HW_EtMax := 1.5 m  # Maximum total water depth of the entrance tank to ensure easy access to drain plugs
ND_EtFloat := 8 in
S_EtFloat := 10 cm  # Extra space around the float (increase in effective diameter) to ensure that float has free travel
ND_EtDrainMin := 3 in  # Minimum pipe size to handle grit and to ensure that the pipe can be easily unclogged
Ti_EtDrain := 1 min
# Time required to have contents of one hopper drain. Note that during this time it is assumed that the water level in the entrance tank remains constant.
ND_EtDrain := 3 in  # This is constant for now
EN_LinearFlow := 1  # 1 if using Lfom, zero if using nonlinear system
HL_Flowmeasure :=
    HL_Lfom if EN_LinearFlow
    HL_Nlfom otherwise
T_EtHopperLedge := 15 cm
H_EtWeirFreefall := 2 cm
T_EtWeir := 6 cm
HL_RMMicroOrifice := 0 m
E_MaxRM := 1*W/kg
L_FlocCouplingExt := 5 cm
T_RMOrificePlate := 2 cm
ND_RMAirRelease := 1 in
Pi_Dmix := 2.4  # ratio of diffusion length scale to kolmogorov length scale (smallest eddies in turbulent flow)
Tau_Diffusion := 10 s  # time scale of diffusion
D_m := 0.673*10^-5*cm^2/s  # Diffusion coefficient
W_MpWalkwayMin := 1*m  # combine walkway assumptions!
W_DCWalkway := 1 m  # Width of the walkway above the main plant drain channel.
W_EtWalkwayMin := 1 m  # Width of the floor space between the flocculator and the rapid mix pipe floor cutout next to the entrance tank.
S_Operator := 0.5 m  # Extra space surrounding the chem tanks for the operators to move.
# Individual K Values | Expansions | Contractions
K_El90 := 0.9  # 90 deg elbow
# 45 deg elbow
diamratio_exp0.75 := 0
diamratio_cont0.75 := 0
K_El45 := 0.45
# The loss coefficient for the channel transition in a 90 degree turn
diamratio_exp0.25 := 0
diamratio_cont0.25 := 0
K_90 := 0.4
diamratio_cont0.5 := 0
diamratio_exp0.5 := 0
K_GateValve := 0.39
K_ChkValveConv := 4
K_ChkValveBall := 4.5
K_SlopeExit := 2
K_GlobeValve := 10
K_AngleValve := 4.3
K_Exp := 1  # headloss coefficient of jet
K_Exp0.75 := 0.18
K_Exp0.5 := 0.55
K_Exp0.25 := 0.25
K_Cont0.75 := 0.18
K_Cont0.5 := 0.33
K_Cont0.25 := 0.43
K_RmLfom := 1  # Accounts for the exit into the flocculator from the straight Lfom.
K_RmOrifice := 1.3  # Minor Loss coefficient for the water flowing over the water fall weir, prior to orifice mixing.
K_ReturnBend := 1.5
K_TeeFlowRun := 0.6
K_TeeFlowBr := 1.8
K_FlocBaffle180 := 4
K_LTurn90 := 0.45  # K.lturn is the K value for a long radius ninety degree turn
K_PipeEnt := 0.5  # K.ent is the K value for a pipe entrance
K_PipeExit := 1
K_SedSlopeExit := 1  # Exit coefficient from manifold to sed tank.
K_Sum(N_Elbow45, N_Elbow90, N_TeeRun, N_TeeBr, GateValve, GlobeValve, AngleValve, CheckValveConv, CheckValveBall) :=
    K_2 ← N_Elbow45*K_El45 + N_Elbow90*K_El90
    K_3 ← K_TeeFlowRun*N_TeeRun + K_TeeFlowBr*N_TeeBr
    K_4 ← GateValve*K_GateValve + GlobeValve*K_GlobeValve + AngleValve*K_AngleValve + CheckValveConv*K_ChkValveConv + CheckValveBall*K_ChkValveBall
    K_Sum ← K_2 + K_3 + K_4
    return K_Sum
# Design References
# [reference: ExpertInputs.xmcd]
# [reference: MathFunctions.xmcd]
# [reference: PipeDatabase.xmcd]
# [reference: FluidsFunctions.xmcd]
# [reference: SedimentationTank.xmcd]
# [reference: Flocculator.xmcd]
# [reference: LFOM.xmcd]
# [reference: EntranceTank.xmcd]
# [reference: MtoATranslators.xmcd]
# [reference: MtoATranslatorsWrapped.xmcd]
# [reference: PlumbingF.xmcd]
# LFOM Code
LFOM_Origin := [0; 0; 0]*m
# LFOM Pipe
RMPipeLayer := layer_new("EtRmPipePlu", blue)
RMVertPipe := PipeF([LFOM_Origin[0]; LFOM_Origin[1]; LFOM_Origin[2]], L_RMPipeVert, [0; 90; 0]*deg, ND_RMPipe, PS_Default)
FreezeRMPipe := FreezeLayer("EtRmPipePlu")
SelectRMPipes := SelectLayer("EtRmPipePlu")
# LFOM Orifices
LfomOrifices :=
    Local ← FreezeRMPipe
    for h ∈ 0 .. last(H_LfomOrifices)
        if N_LfomOrifices[h] ≠ 0
            Local ← stack(Local, CylinderF([
                LFOM_Origin[0];
                LFOM_Origin[1];
                ZW_Et - HL_Flowmeasure - ElbowRadius(ND_RMPipe) + H_LfomOrifices[h]
            ], D_LfomOrifices/2, outerradius(ND_RMPipe) + zc, [
                90 deg + (asin(0.5*S_LfomOrificesMin/(2*outerradius(ND_RMPipe))) + asin(D_LfomOrifices/(2*outerradius(ND_RMPipe))))*(mod(h, 2) == 0);
                0 deg
            ]))
        if N_LfomOrifices[h] > 1
            Local ← stack(Local, ArrayLastPolar([
                LFOM_Origin[0];
                LFOM_Origin[1];
                ZW_Et - HL_Flowmeasure - ElbowRadius(ND_RMPipe) + H_LfomOrifices[h]
            ], N_LfomOrifices[h], (N_LfomOrifices[h] - 1)*(2*asin(D_LfomOrifices/(2*outerradius(ND_RMPipe))) + 2*asin(S_LfomOrificesMin/(2*outerradius(ND_RMPipe))))))
    return Local
SubtractRMPipeOrifices := SubtractF(["EtRmPipePlu"], "DeleteMe")
LFOMScript := stack(RMPipeLayer, RMVertPipe, FreezeRMPipe, GroupAll("DeleteMe"), SubtractRMPipeOrifices, SelectRMPipes, LfomOrifices, GroupAll("DeleteMe"), SubtractRMPipeOrifices)
# [component: inputs LFOMScript]
