# SRSF Modular Code
# User Inputs
Q_Plant := 50*L/s
# To be left undefined and inputed online by the user
# From Expert Inputs
Country := 0
Language := 0
# Tabulated Constants
Nu_Water := 1*10^-6*m^2/s  # The kinematic viscosity of water.
E_Pvc := 0.12 mm
# General Assumptions and  Constants
HL_ChannelMax := 5 cm
W_HumanMin := 0.54 m
T_ConcreteMin := 5 cm
S_Fitting := 5 cm
# Sedimentation Tank
T_SedWeir := 4 cm
# SRSF Inputs
# Construction and Design Inputs
T_FiWall := 25 cm
ND_FiKeyPipe := 1.5 in
# Schedule 40 or Schedule 80 for slotted branches????? Schedule 40 has larger ID and that increases the max flow rate it can handle and thus increases the allowable width of the filter. Schedule 40 for strength and servicability. This changes the dimensions of the filter box and the constraints for the entrance and exit boxes.
PS_FiBranch := 2
# Design guidelines say 11 mm/s. The success of lab-scale backwashing at 10 mm/s suggests that this is a reasonable and conservative value
V_FiBw := 11*mm/s
N_FiLayer := 6
V_FiLayer := V_FiBw/N_FiLayer = 1.83333 mm/s
H_FiLayerMin := 20 cm  # Depth of each filter layer
B_FiManifoldBranch := 10 cm
ND_FiManBranch := 1 in
# We are going to take this pipe size for the slotted pipes as a given. Larger pipes may block too much flow and they are harder to install.
ND_FiBwManBranch := 1.5 in
W_FiManSlots := 0.008 in = 0.2032 mm  # A slot thickness of 0.008 in or 0.2 mm is selected so that sand will not enter the slotted pipes.
B_SlotsAvailable := [1/8*in; 3/16*in; 1/4*in] = [3.175; 4.7625; 6.35] mm  # These are the possible spacings for the slots that our supplier can fabricate
ND_FiBranchHolder := 2 in
ND_FiBwBranchHolder := 2 in
S_FiTrunkMin := 3 cm  # Minimum vertical spacing between trunk line pipes going through the filter wall for concrete construction
S_FiManAssembly := 1 cm
# Space between the ends of the branch receiver pipes and the walls so that the manifold assemblies are easy to lower into the filter boxes (if the branch receivers extended the entire length of the box they would just barely fit and it would be hard to get into place.
L_FiManFerncoCoupling := 4 cm
L_FiManBranchExt := 2 cm  # How far the branch extends into the trunk line
Ti_FiBwInitiationBod := 3 min  # AKA time to drain the filter box of the water above the fluidized bed
HL_FiBwSF := 20 cm  # This is the extra head we are going to provide to ensure that we can initiate backwash.
HL_FiSiphonMax := 20 cm  # Maximum acceptable head loss through the siphon at SS; used to calculate a diameter
ND_FiSandOutlet := 2 in
H_FiDistBarrier := 10 cm
L_FiSiphonChannelStubMin := 20 cm
# Being able to shorten the stub from which the siphon discharges into the main plant drain channel allows for some flexibility in the hydraulic design.
HL_FiEntrancePipeMax := 10 cm
ND_FiTrunkMax := 6 in
W_FiInletChannelMin := 30 cm
# Elevation Safety Margins
H_FiBwNoSuckAir := 20 cm  # Minimum depth in the entrance box during backwash such that there is standing water over the inlet.
H_FiSiphonNoSuckAir := 10 cm  # Minimum depth over the orifices in the siphon manifold so that there is standing water and air is not entrained.
H_FiFluidizedBedToSiphon := 20 cm
H_FiForwardNoSuckAir := 10 cm
H_FiWeirFreefall := 3 cm
H_FiAirRemovalBlockSubmerged := 5 cm
H_FiBypassSafety := 10 cm
H_DrainOutletSafety := 10 cm
H_FiOverflowWeirFreefall := 10 cm
# Sand Properties
D_FiSandES := 0.5 mm
Pi_UCFiSand := 1.65
D_FiSand60 := D_FiSandES*Pi_UCFiSand = 0.825 mm
ε_FiSand := 0.4  # Porosity in a sand bed
Rho_FiSand := 2650*kg/m^3
Pi_FiFluidized := 1.3  # Bed expands 30% when fluidized
k_Kozeny := 5  # Carman-Kozeny coefficient
# Operator Access
W_MpWalkwayMin := 1*m
# Minor Loss Coefficients
K_PipeEnt := 0.5
K_PipeExit := 1
K_El90 := 0.9
# Design References
# [reference: MathFunctions.xmcd]
# [reference: PipeDatabase.xmcd]
# [reference: FluidsFunctions.xmcd]
# [reference: StackedRapidSandFilter.xmcd]
# [reference: MtoATranslators.xmcd]
# [reference: MtoATranslatorsWrapped.xmcd]
# [reference: PlumbingF.xmcd]
# SRSF Code
Q_FilterMax :=
    for i ∈ 0 .. last(AvailND)
        H_FiLayer ← H_FiLayerF(AvailND[i])
        HL_FiCleanLayer ← h_lKozeny(H_FiLayer, D_FiSand60, V_FiLayer, ε_FiSand, Nu_Water)
        V_FiTrunkMaxPR ← sqrt(2*g*HL_FiCleanLayer*Pi_FiManifoldHeadLoss)
        Q_FilterMax[i] ← π*innerdiameter(AvailND[i], PS_Default)^2/4*V_FiTrunkMaxPR*N_FiLayer/2
    return Q_FilterMax
T_PlantWall := 15 cm
T_ChannelWall := T_PlantWall
S_FiBaffleToBlock := ((Q_Fi/T_ChannelWall)^2/g)^(1/3)
S_FiEntranceBaffle := ((Q_Fi/T_ChannelWall)^2/g)^(1/3)
L_FiEntrance := L_FiOverflowWeir + S_FiEntranceBaffle + S_FiBaffleToBlock + 2*T_SedWeir + T_ConcreteMin
W_MpWalkway := max(W_MpWalkwayMin, ShortTeeLength(ND_DistPipe) + ConRadius(ND_DistPipe) + S_Fitting + ConRadius(ND_DistPipe) + ElbowRadius(ND_DistPipe) + 2*SocketDepth(ND_DistPipe) + ElbowRadius(ND_DistPipe) - L_FiExit/2 - T_PlantWall) = 1.04794 m
W_FiMin := W_FiEntrance + W_FiOverflowMin + 2*T_PlantWall - T_FiWall = 1.67158 m
W_FiActiveMin := W_FiMin - outerdiameter(ND_FiBwTrunk) = 1.39853 m
N_FiManBranchMaxMult := Floor(2*(Q_FiLayer/(W_FiActiveMin*V_FiLayer*B_FiManifoldBranch) - (outerradius(ND_FiBwManBranch) + L_FiManFerncoCoupling + OuterDiameterFittingPVC(ND_FiSandOutlet))/B_FiManifoldBranch) + 1, 2) = 30
N_FiManBranch :=
    N_FiManBranchSquare if N_Fi == 1
    N_FiManBranchMaxMult otherwise
    = 30
W_FiActive := Q_FiLayer/V_FiLayer*1/((N_FiManBranch - 1)/2*B_FiManifoldBranch + L_FiManFerncoCoupling + OuterDiameterFittingPVC(ND_FiSandOutlet) + outerradius(ND_FiBwManBranch)) = 1.43626 m
W_Fi := W_FiActive + outerdiameter(ND_FiBwTrunk) = 1.70931 m
W_FiInletChannel := 1.127 m
W_FiOverflow :=
    (W_Fi + T_FiWall - W_FiEntrance - 2*T_PlantWall) if N_Fi > 1
    W_FiOverflowMin otherwise
L_FiInletChannel := N_Fi*W_FiEntrance + (N_Fi - 1)*(W_FiOverflow + 2*T_PlantWall) = 3.18085 m
Z_FiInletChannelBottom := 0.339 m
Z_FiOverflowBottom := 1.387 m
L_FiOverflow := L_FiEntrance
# Origin Points:
Fi_Origin := [0 m; 0 m; 0 m]
FiEntranceBox_Origin := [
    Fi_Origin + 2*T_PlantWall + T_FiWall + L_FiEntrance + L_FiExit + W_MpWalkway;
    Fi_Origin[1] + W_Fi/2 - W_FiEntrance + S_Fitting + ConRadius(ND_FiBwTrunk);
    Fi_Origin[2] + 3.764 m
]
FiExitBox_Origin := FiEntranceBox_Origin + [-L_FiEntrance - T_PlantWall; 0; 0]
FiInletChannel_Origin := [
    Fi_Origin + W_FiInletChannel + 3*T_PlantWall + T_FiWall + L_FiEntrance + L_FiExit + W_MpWalkway;
    FiEntranceBox_Origin[1] - L_FiInletChannel + W_FiEntrance;
    Z_FiInletChannelBottom
]
FiOverflowBox_Origin := [FiEntranceBox_Origin[0]; FiEntranceBox_Origin[1] - T_PlantWall - W_FiOverflow; Z_FiOverflowBottom]
FiDistBox_Origin := [FiOverflowBox_Origin[0] - L_FiOverflow - T_PlantWall; FiOverflowBox_Origin[1]; FiExitBox_Origin[2]]
PlantDC_Origin := [
    Fi_Origin + W_FiInletChannel + 4*T_PlantWall + T_FiWall + L_FiEntrance + L_FiExit + W_MpWalkway;
    Fi_Origin - N_SedTanks*(W_Sed + T_PlantWall) + W_Fi/2 + ConRadius(ND_FiBwTrunk) + S_Fittin;
    Z_PlantUpperDCBottom + H_PlantDC
]  # error: This variable is undefined.
PlantLowerDC_Origin := [
    Fi_Origin + W_FiInletChannel + 4*T_PlantWall + T_FiWall + L_FiEntrance + L_FiExit + W_MpWalkway;
    Fi_Origin - N_SedTanks*(W_Sed + T_PlantWall) + W_Fi/2 + ConRadius(ND_FiBwTrunk) + S_Fittin;
    Z_PlantLowerDCBottom + H_PlantDC
]  # error: This variable is undefined.
PlantUpperDC_Origin := [
    Fi_Origin + W_FiInletChannel + 4*T_PlantWall + T_FiWall + L_FiEntrance + L_FiExit + W_MpWalkway;
    Fi_origin[1] + W_Fi;
    Z_PlantUpperDCBottom + H_PlantDC
]  # error: This variable is undefined.
