# AguaClara Design Tool
Country = 130
C_ChlorineDoseMax := 2*mg/L
C_ChlorineStock := 50*gm/L
Ti_ChlorineStock := 30 hr
Language = 1
Country := 0
## References
# Design References
# MathCAD dimension calculations:
# [reference: BasicClientInputs.xmcd]
# [reference: ExpertInputs.xmcd]
# [reference: DesignAssumptions.xmcd]
# [reference: MathFunctions.xmcd]
# [reference: PipeDatabase.xmcd]
# [reference: MinorLossCoefficients.xmcd]
# [reference: FluidsFunctions.xmcd]
# [reference: Sedimentation Tank.xmcd]
# [reference: Flocculator.xmcd]
# [reference: LFOM.xmcd]
# [reference: EntranceTankDim.xmcd]
# [reference: LinearCdc_app37.xmcd]
# [reference: ChemStorageCylinders.xmcd]
# [reference: Stacked Rapid Sand Filter.xmcd]
# [reference: Materials List.xmcd]
# AutoCAD drawing programs:
# Translators:
# These are the codes that take MathCAD outputs and create AutoCAD scripts that are used to draw the plant (formerly Basics)
# [reference: MtoATranslators.xmcd]
# The wrapped MtoA translator contains the functions that the user will want to access. These functions will draw pieces with full functionality - specifying the location, dimension, and orientation of the object. Also, it contains layer control and subtraction capabilities for grouped objects.
# [reference: MtoATranslators Wrapped.xmcd]
# Plant Elements:
# These are all of the files that draw the fundamental parts of the plants (tees, elbows, tanks, pipes, etc)
# [reference: Channel.xmcd]
# [reference: cross.xmcd]
# [reference: Sludge.xmcd]
# [reference: Manifold.xmcd]
# [reference: pipe.xmcd]
# [reference: elbow.xmcd]
# [reference: tank.xmcd]
# [reference: adapter.xmcd]
# [reference: Tee.xmcd]
# [reference: pvccap.xmcd]
# [reference: LaunderCap.xmcd]
# [reference: ChimneyStops.xmcd]
# [reference: laminaplain.xmcd]
# [reference: Stairs.xmcd]
# [reference: DrainChannel.xmcd]
# [reference: Manifold.xmcd]
# Specific Pieces:
# These are the codes that draw the bigger pieces of the plant (the sed tank, floc tank, etc)
# [reference: floctank.xmcd]
# [reference: SedTank- with pieces.xmcd]
# [reference: Entrance Tank.xmcd]
# [reference: Plant Drain Channel.xmcd]
# [reference: ChemStockCylinders.xmcd]
# [reference: SRSF.xmcd]
# [reference: Operator Access.xmcd]
# Layouts:
# This file will execute at the very end to create multiple views of the entire plant in paperspace
# [reference: Layouts.xmcd]
## All variables displayed must have the standard SI units. They may not have units attached by the user.
# General:
Q_Plant = 0.018 m^3/s
Pi_VenaContractaOrifice = 0.63
T_PlantWall = 0.15 m
W_SedPlate = 1 m
T_ConcreteMin = 0.05 m
L_SedPlateSheet = 3 m
C_CoagStock = 120 kg/m^3
T_SedPlate = 0.002 m
Ti_CoagStock = 108000 s
T_SedWeir = 0.04 m
C_ChlorineStock = 50 kg/m^3
W_SedBay = 1 m
Ti_ChlorineStock = 108000 s
EN_FcmTube = 0
H_PlantFreeboard = 0.1 m
EN_DrillSeries = 0
# Entrance Tank
V_EtUp = 0.008 m/s
H_Et = 1.84704 m
H_EtTop = 0.2 m  # height of the top part of the entrance tank above the hoppers
W_Et = 0.759412 m
L_Et = 4.13071 m
ND_EtDrain = 0.0762 m
ZW_Et = 2.13854 m
Z_EtTop = 2.23854 m
ND_EtOverflow = 0.3048 m
Z_Et = 0.391499 m  # elevation of top of slab.
ND_RMPipe = 0.3048 m
Z_EtHopper = 1.93854 m
H_EtHopper = 1.54704 m
N_EtHoppers = 2
AN_EtSlope = 1.0472
L_EtHopper = 2.01496 m
W_EtDC = 0.276212 m  # drain channel under entrance tank dimensions
L_EtDC = 4.13071 m
H_EtDC = 0.0464611 m
# Flow measurement
D_LfomOrifices = 0.01905 m
S_LfomRows = 0.02 m
H_LfomOrifice = [0.009525; 0.029525; 0.049525; 0.069525; 0.089525; 0.109525; 0.129525; 0.149525; 0.169525; 0.189525] m
Q_LfomScale = [0; 0.0018; 0.0036; 0.0054; 0.0072; 0.009; 0.0108; 0.0126; 0.0144; 0.0162; 0.018] m^3/s
N_LfomOrifices = [22; 7; 6; 6; 4; 5; 4; 4; 3; 3]
ND_Lfom = 0.3048 m
HL_Lfom = 0.2 m
# Rapid Mix
ED_Tee = 0.0188496 m^2/s^3
Z_LfomOrifices = 1.94807 m  # elevation of the center of
Z_EtExit = 1.35534 m  # elevation of center of pipe exiting the entrance tank and heading toward the flocculator
# Plant Drain Channel:
W_DC = 0.5 m
H_DC = 0.0592874 m
L_DC = 14.155 m
# Coag Dose Controller:
Z_CoagTank = 2.53854 m
Z_CoagTankOutlet = 2.63854 m
L_CdcFloatArm = 0.41275 m
Q_CdcMax = 9e-6 m^3/s
L_CdcScaleArm = 0.50165 m
H_StockTankPort = 0.1 m  # Distance between base of stock tanks and outlet
# Flocculator:
H_Floc = 1.92173 m
Z_FlocTank = 0 m  # Look at Flocculator Positioning arrays
N_FlocValves = 3
W_FlocChannel = 0.6 m
Ti_Floc = 1022.7 s  # Fill last channel with bafffles from last channel
H_FlocSlope = 0.0301625 m  # Fix port width to be based on energy dissipation in that channel
ED_Floc = 0.01 m^2/s^3
# Adjust spacing after the number of baffles per channel is known.
V_Floc = 0.157127 m/s  # Check the residence time of the flocculator should be at least 20minutes
HW_FlocEnd = 1.57477 m
ND_FlocValve = 0.0508 m
CP_Floc = 100 m^(2/3)
Ti_FlocDrain = 1800 s
CP_FlocTotal = 118.87 m^(2/3)
N_FlocChannels = 5
G_Floc = 48.6626 1/s
L_FlocTank = 19.4828 m
HL_Floc = 0.246955 m
ED_FlocChannelFirst = 0.0082547 m^2/s^3
HW_FlocStart = 1.82173 m
S_FlocBaffle = [0.190928; 0.190928; 0.190928; 0.190928; 0.195658] m
B_FlocBaffle = [0.192928; 0.192928; 0.192928; 0.192928; 0.197658] m
N_FlocChannelBaffles = [19; 19; 19; 19; 18]
W_FlocPort = [0.190928; 0.190928; 0.190928; 0.190928; 0.203188] m
S_FlocBaffleFirst = 0.190928 m
HL_FlocChannels = [0.0503514; 0.0503514; 0.0503514; 0.0503514; 0.0455492] m
L_FlocBaffleLower = 1.28838 m
L_FlocBaffleUpper = 1.58533 m
H_FlocPort = [0.6; 0.6; 0.6; 0.6; 0.577765] m
Ti_Floc = 1022.7 s  # residence time of the flocculator
N_FlocBaffles = 94
# Sed Tanks:
N_SedTanks = 3
H_SedBetween = 0 m  # Distance from the top of the inlet manifold to the bottom of the ledge supporting the lamella frame
L_Sed = 3.89656 m
N_SedBays = 2  # Number of bays of inlet manifolds in each sed tank
# Length of the port through which water exits the inlet manifold
# Width of ferrous cement plates in whice one manifold port is cut
Q_SedBay = 0.003 m^3/s
ND_FlocValve = 2 in
V_SedCBod = 0.00012 m/s
V_SedUpBod = 0.0008 m/s
W_SedSlope = 0.375233 m
AN_SedSlope = 1.0472
H_SedBayDivider = 0.749689 m
Ti_Sed = 3506.41 s
# Sedimentation Tank Sludge Drain:
N_SedSludgeOrifices = 38  # per cell
Ti_SludgeDrain = 1800 s  # Tank Drain time
W_SedSludge = 0.0995345 m  # Width of the sludge channel
B_SedSludgeOrifices = 0.1 m  # Distance center to center between drain orifices
H_SedSludge = 0.0497673 m  # Depth of the sludge channel
T_SedSludge = 0.05 m
# Thickness of the plate topping the sludge channel
# through which drain holes are formed
W_SedDrainCover = 0.199535 m
D_SedSludgeOrifice = 0.0111125 m  # Diameter of drain orifices
W_SedInletBottom = 0.400233 m
N_SedSludgeOrifices = 38
ND_SedSludgeValve = 0.0508 m
# Sedimentation Tank Dimensions:
Z_SedSludge = 0.0997673 m  # Height from 0 of the top of the sludge drain
Z_SedSlopes = 0.749689 m  # Height from 0 of the top of the inlet manifold
W_Sed = 2 m  # Total tank wall height
L_Sed = 3.89656 m  # Total tank length
H_Sed = 1.67477 m
# Sedimentation Tank Inlet Channel:
HW_InletChannel = 0.303453 m
EN_InletChannelGeom = 1
W_InletChannel = 0.443453 m
L_Channel = 6.6 m
N_SedInletPipes =  # error: This variable is undefined.  # per sed bay
H_InletChannel = 0.403453 m
HL_SedWeirInlet = 0.0129063 m
W_SedInletchannelPreweir = 0.303453 m
H_SedWeirInlet = 0.290546 m
W_SedWeirInlet = 6.6 m
# Sedimentation Tank Effluent Launder:
N_SedLaunderOrifices = 46  # Number of orifices per launder
N_SedLaunderOrificesRow = 23  # Number of orifices per row
Z_SedLaunder = 1.46471 m
Q_SedLaunderOrifices = 6.78428e-5 m^3/s
B_SedLaunderOrifices = 0.111722 m  # Center to center launder spacing
# More Launder Dimensions
ND_SedLaunder = 0.1016 m
D_SedLaunderOrifice = 0.0127 m
L_SedLaunder = 2.74066 m
HL_SedLaunderOrifice = 0.0368452 m
# Sedimentation Tank Inlet Manifold:
ND_SedManifold = 0.1524 m
L_Diffuser = 0.220777 m
Z_SedManifoldLift = 0.331165 m
D_Diffuser = 0.0508 m
D_SedManifoldPort = 0.0381 m
B_SedManifoldPort = 0.1 m
N_SedManifoldPorts = 33
L_SedManifoldPipe = 3.74484 m
S_SedManifoldBetween = 0.009525 m
ND_SedManifoldDiffuser = 0.0508 m
L_SedManifoldDiffuser = 0.220777 m
ED_SedInlet = 0.01 m^2/s^3
Q_SedManifoldPort = 9.09091e-5 m^3/s
# Exit Channel:
W_ExitChannel = 0.354511 m
H_ExitChannel = 0.403453 m
L_ExitChannel = 6.6 m
HW_ExitChannel = 0.263453 m  # water height in exit channel from base of channel
H_SedWeirExit = 0.250546 m
# Lamella:
L_SedPlate = 0.6 m
B_SedPlate = 0.028676 m  # center to center distance between lamella
S_SedPlate = 0.026676 m  # spacing between lamella
N_SedPlates = 80  # Number of Sed Plates per Sedimentation Tank Bay.
N_SedModules = 8  # Number of modules per bay
N_SedModulePlates = 10  # Number of plates per module
AN_SedPlate = 1.0472
V_SedC = 0.000113361 m/s
L_SedActive = 2.64898 m
V_SedUp = 0.000769909 m/s
Z_SedLaunder = 1.46471 m
H_SedPlate = 0.519615 m
H_SedAbove = 0.167206 m  # Height of water needed above the lamella
HW_Sed = 1.57477 m
H_Sed = 1.67477 m
Z_Mp = 1.27132 m
H_SedBayDivider = 0.749689 m
# SRSF:
H_Fi = 3.78703 m
L_Fi = 2 m
W_Fi = 1.07059 m
B_FiManifoldBranch = 0.1 m
ND_FiTrunk = 0.1524 m
ND_FiManBranch = 0.0254 m
ND_FiBwTrunk = 0.2032 m
ND_FiBwManBranch = 0.0381 m
ND_FiExitWaste = 0.1016 m
ND_FiBwWeirDrain = 0.2032 m
ND_FiBwDrain = 0.0762 m  # For the box that holds keeps the end of the siphon submerged
ND_FiSandOutlet = 0.0508 m
Ti_FiSand = 952.974 s
ND_FiSiphonAirValve = 0.0762 m
ND_FiSiphon = 0.2032 m
Q_FiSiphonMax = 0.100278 m^3/s
B_FiSiphonManOrifices = 0.1 m
N_FiSiphonManOrifices = 19
D_FiSiphonManOrifices = 0.0461569 m
Ti_FiBwInitiation = 67.3205 s
H_FiSand = 1.2 m
N_FiLayer = 6
H_FiLayer = 0.2 m
V_FiLayer = 0.00183333 m/s
HL_FiTerminal = 0.451428 m
V_FiBw = 0.011 m/s
HL_FiBwInitiation = 1.588 m
HL_FiBwSS = 1.188 m
D_FiSand = 0.0005 m
N_Fi = 1
Q_Fi = 0.018 m^3/s
W_Slots = 0.0002032 m
B_FiBwManSlot = 0.0047625 m
L_FiBwManSlot = 0.0188448 m
B_FiManSlot = 0.003175 m
L_FiManSlot = 0.025102 m
N_FiSlotRows = 2
Z_FiBottom = -2.31559 m
Z_FiTop = 1.47145 m
# Weirs
HL_FiWeir = 0.0504169 m
L_FiWeir = 0.854837 m
Z_FiEntranceWeir = 1.37145 m
Z_FiBwWeir = -0.427011 m
Z_FiSiphonInlet = -0.527011 m  # This is the centerline elevation of the siphon orifices
Z_FiExitWeir = 0.854663 m
Z_FiExitBottom = 0.754663 m  # bottom of the filtered water box
Z_FiEntranceBottom = 0.754663 m  # bottom of the entrance box
Z_FiSiphonCoupling = 0.745126 m
Z_FiBwTop = -0.168571 m
W_FiBwDrain = 0.440806 m
H_FiBwDrain = 0.393859 m
# Materials List:
N_Launders = 6
L_LaunderPipeTotal = 16.4439 m
N_LaunderCouplings = 6
N_ValveCouplings = 6
N_SedPlatesTotal = 480
N_SedPlatesPerSheet = 5
N_SedPlateSheets = 96
N_Valves = 6
A_EtFloor = 4.69395 m^2
W_FlocWithWalls = 3.75 m
L_FlocWithWalls = 4.19656 m
Vol_FlocFloor = 2454.99 L
A_FlocFloor = 16.3666 m^2
Vol_SedSlopes = 7891.35 L
A_SedWalls = 36.874 m^2
# Plant Summary Calculations:
HL_PlantTotal := Z_EtTop - H_PlantFreeboard - Z_FiExitWeir
HL_PlantTotal = 1.28388 m
AC_SedTankA :=
    AC_SedTank if last(AC_SedTank) < 598
    submatrix(AC_SedTank, 0, 598, 0, 0) otherwise
AC_FilterA :=
    AC_Filter if last(AC_Filter) < 598
    submatrix(AC_Filter, 0, 598, 0, 0) otherwise
AC_SedTankB :=
    submatrix(AC_SedTank, 599, last(AC_SedTank), 0, 0) if last(AC_SedTank) < 1197
    submatrix(AC_SedTank, 599, 1197, 0, 0) otherwise
AC_FilterB :=
    submatrix(AC_Filter, 599, last(AC_Filter), 0, 0) if last(AC_Filter) < 1197
    submatrix(AC_Filter, 599, 1197, 0, 0) otherwise
AC_SedTankC :=
    submatrix(AC_SedTank, 1198, last(AC_SedTank), 0, 0) if last(AC_SedTank) < 1796
    submatrix(AC_SedTank, 1198, 1796, 0, 0) otherwise
AC_FilterC :=
    submatrix(AC_Filter, 1198, last(AC_Filter), 0, 0) if last(AC_Filter) < 1796
    submatrix(AC_Filter, 1198, 1796, 0, 0) otherwise
AC_ChemTanksA :=
    AC_ChemTanks if last(AC_ChemTanks) < 598
    submatrix(AC_ChemTanks, 0, 598, 0, 0) otherwise
AC_FilterD :=
    submatrix(AC_Filter, 1797, last(AC_Filter), 0, 0) if last(AC_Filter) < 2395
    submatrix(AC_Filter, 1797, 2395, 0, 0) otherwise
AC_FlocTankA :=
    AC_FlocTank if last(AC_FlocTank) < 598
    submatrix(AC_FlocTank, 0, 598, 0, 0) otherwise
AC_ChemTanksB :=
    submatrix(AC_ChemTanks, 1198, last(AC_ChemTanks), 0, 0) if last(AC_ChemTanks) < 1197
    submatrix(AC_ChemTanks, 1198, 1796, 0, 0) otherwise
AC_FlocTankB :=
    submatrix(AC_FlocTank, 599, last(AC_Filter), 0, 0) if last(AC_Filter) < 1197
    submatrix(AC_FlocTank, 599, 1197, 0, 0) otherwise
AC_ChemTanksC :=
    submatrix(AC_ChemTanks, 1198, last(AC_ChemTanks), 0, 0) if last(AC_ChemTanks) < 1796
    submatrix(AC_ChemTanks, 1198, 1796, 0, 0) otherwise
AC_FlocTankC :=
    submatrix(AC_FlocTank, 1198, last(AC_FlocTank), 0, 0) if last(AC_FlocTank) < 1796
    submatrix(AC_FlocTank, 1198, 1796, 0, 0) otherwise
AC_DrainChannelA :=
    AC_DrainChannel if last(AC_DrainChannel) < 598
    submatrix(AC_DrainChannel, 0, 598, 0, 0) otherwise
AC_EntranceTankA :=
    AC_EntranceTank if last(AC_EntranceTank) < 598
    submatrix(AC_EntranceTank, 0, 598, 0, 0) otherwise
AC_DrainChannelB :=
    submatrix(AC_DrainChannel, 1198, last(AC_DrainChannel), 0, 0) if last(AC_DrainChannel) < 1197
    submatrix(AC_DrainChannel, 1198, 1796, 0, 0) otherwise
AC_EntranceTankB :=
    submatrix(AC_EntranceTank, 599, last(AC_EntranceTank), 0, 0) if last(AC_EntranceTank) < 1197
    submatrix(AC_EntranceTank, 599, 1197, 0, 0) otherwise
AC_DrainChannelC :=
    submatrix(AC_DrainChannel, 1198, last(AC_DrainChannel), 0, 0) if last(AC_DrainChannel) < 1796
    submatrix(AC_DrainChannel, 1198, 1796, 0, 0) otherwise
AC_EntranceTankC :=
    submatrix(AC_EntranceTank, 1198, last(AC_EntranceTank), 0, 0) if last(AC_EntranceTank) < 1796
    submatrix(AC_EntranceTank, 1198, 1796, 0, 0) otherwise
AC_ZLayoutA :=
    AC_Layout if last(AC_Layout) < 598
    submatrix(AC_Layout, 0, 598, 0, 0) otherwise
AC_OperatorAccessA :=
    AC_OperatorAccess if last(AC_OperatorAccess) < 598
    submatrix(AC_OperatorAccess, 0, 598, 0, 0) otherwise
AC_OperatorAccessB :=
    submatrix(AC_OperatorAccess, 599, last(AC_OperatorAccess), 0, 0) if last(AC_OperatorAccess) < 1197
    submatrix(AC_OperatorAccess, 599, 1197, 0, 0) otherwise
AC_ZLayoutB :=
    submatrix(AC_Layout, 1198, last(AC_Layout), 0, 0) if last(AC_Layout) < 1197
    submatrix(AC_Layout, 1198, 1796, 0, 0) otherwise
AC_OperatorAccessC :=
    submatrix(AC_OperatorAccess, 1198, last(AC_OperatorAccess), 0, 0) if last(AC_OperatorAccess) < 1796
    submatrix(AC_OperatorAccess, 1198, 1796, 0, 0) otherwise
AC_ZLayoutC :=
    submatrix(AC_Layout, 1198, last(AC_Layout), 0, 0) if last(AC_Layout) < 1796
    submatrix(AC_Layout, 1198, 1796, 0, 0) otherwise
## Make AC variables that are shorter than 598 lines
## Display AC variables
AC_EntranceTankA = [
    "-layer m Cdc"; "c t 129,0,129"; "Cdc"; "  "; "-insert CdcLeverArmwithReducer2.dwg"; "-4.00291,12.92569,2.26344 x 1 1  0"; "-insert CdcLeverArmBracket.dwg"; "-3.97091,12.51294,2.23854 x 1 1  0"; "-insert CdcCht.dwg"; "-4.73311,12.42884,2.35624 x 1 1  0"
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]
AC_EntranceTankB =  # error
AC_EntranceTankC =  # error
AC_FlocTankA = [
    "-layer m FlocTank"; "c t 132,132,132"; "FlocTank"; "  "; "_-view o t _zoom w 0.16,6.29,0 -4.05656,10.21,1.92173 _box 0,6.45,0 -3.89656,10.05,1.92173 _box 0.15,6.3,-0.15 -4.04656,10.2,1.92173 _subtract 0.15,6.3,-0.15  0,6.45,0 "; "_box -4.04656,7.05,0 0.15,7.2,1.92173"; "-array l  R 4 1 0.75"; "-group c FlocTank y "; "all "; "-layer s 0"
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]
AC_FlocTankB =  # error
AC_FlocTankC =  # error
AC_OperatorAccessA = [
    "-layer m OpCoagPlatform"; "c t 132,132,132"; "OpCoagPlatform"; "  "; "_-view o f"; "_pline"; "-7.50111,2.55124"; "-7.20111,2.55124"; "-7.20111,2.3546"; "-6.90111,2.3546"
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]
AC_OperatorAccessB =  # error
AC_OperatorAccessC =  # error
AC_SedTankA = [
    "_-view o t";
    "-layer m SedTank";
    "c t 132,132,132";
    "SedTank";
    "  ";
    "_-view o t _zoom w 0.16,-0.16,0 -4.05656,2.16,1.67477 _box 0,0,0 -3.89656,2,1.67477 _box 0.15,-0.15,-0.15 -4.04656,2.15,1.67477 _subtract 0.15,-0.15,-0.15  0,0,0 ";
    "_box -3.30311,0,1.40042 -3.25311,2,1.35042";
    "_box 0,0,0.43252 -0.05,2,0.38252";
    "_box -3.89656,0,1.27132 -3.45311,2,1.12132";
    "_box -3.45311,0,1.12132 -3.30311,2,1.67477"
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]
AC_SedTankB = [
    "c t 255,0,0"; "SedFlexCoupling"; "  "; "_zoom w -0.49451,0.57033,1.46471 -0.61611,0.42968,1.46471"; "_cylinder -0.50451,0.5,1.46471 0.06033 c -0.60611,0.5,1.46471"; "_cylinder -0.50451,0.5,1.46471 0.05715 c -0.60611,0.5,1.46471"; "_subtract -0.50451,0.43968,1.46471  -0.50451,0.44285,1.46471 "; "-group c SedFlexCoupling y "; "all "; "-layer s 0"
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]
AC_SedTankC =  # error
AC_FilterA = [
    "-layer m FiInletChannel"; "c t 214,214,214"; "FiInletChannel"; "  "; "_zoom w -0.01,-1.37569,1.11841 0.01,-1.06569,1.11841"; "_box -0.01,-1.21569,1.11841 1.07569,-1.10438,1.52186"; "_box 0,-1.36569,0.96841 1.06569,-0.95438,1.52186"; "_subtract 0,-1.36569,0.96841  -0.01,-1.21569,1.11841 "; "rotate3d l  z 0,-1.21569,1.11841 90"; "_box -0.26131,-1.36569,0.96841 0.15,-1.21569,1.52186"
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]
AC_FilterB = [
    "_cylinder -3.41924,-0.26827,-2.08701 0.09207 c -3.36224,-0.26827,-2.08701";
    "_cylinder -3.42924,-0.26827,-2.08701 0.08414 c -3.35224,-0.26827,-2.08701";
    "_subtract -3.41924,-0.36034,-2.08701  -3.35224,-0.35241,-2.08701 ";
    "_cylinder -3.52099,-0.26827,-2.08701 0.09207 c -3.46399,-0.26827,-2.08701";
    "_cylinder -3.53099,-0.26827,-2.08701 0.08414 c -3.45399,-0.26827,-2.08701";
    "_subtract -3.52099,-0.36034,-2.08701  -3.53099,-0.35241,-2.08701 ";
    "_cylinder -3.46399,-0.26827,-2.08701 0.08414 c -3.41924,-0.26827,-2.08701";
    "_cylinder -3.47399,-0.26827,-2.08701 0.07725 c -3.40924,-0.26827,-2.08701";
    "_subtract -3.46399,-0.35241,-2.08701  -3.47399,-0.34552,-2.08701 ";
    "_union -3.36224,-0.36034,-2.08701 -3.52099,-0.36034,-2.08701 -3.41924,-0.35241,-2.08701 "
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]
AC_FilterC = [
    "  "; "_subtract"; "g FiEntExBoxes"; " g DeleteMe "; "-layer f FiEntExBoxes"; "  "; "_cylinder -1.97891,-0.26827,0.65291 0.09207 c -1.92191,-0.26827,0.65291"; "_cylinder -1.98891,-0.26827,0.65291 0.08414 c -1.91191,-0.26827,0.65291"; "_subtract -1.97891,-0.36034,0.65291  -1.91191,-0.35241,0.65291 "; "_cylinder -2.08066,-0.26827,0.65291 0.09207 c -2.02366,-0.26827,0.65291"
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]
AC_FilterD = [
    "-4.52099,-1.44919,-1.33948 x 0.052 0.052  90"; "rotate3d l  x -4.52099,-1.44919,-1.33948 45"; "-group c FiSandDrain y "; "all "; "-layer s 0"; "  "; "-layer f FiSandDrain"; "  "; "-layer m FiSandDrainSecondary"; "c t 0,255,255"
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]
AC_ChemTanksA = [
    "-layer m CoagTanks"; "c t 132,132,132"; "CoagTanks"; "  "; "_-view o t"; "_zoom w -5.67231,12.64504,1.46944 -4.72791,13.58944,2.56124"; "_cylinder -5.20011,13.11724,2.55124 0.4622 c -6.27191,13.11724,2.55124"; "rotate3d l  y -5.20011,13.11724,2.55124 90"; "-group c CoagTanks y "; "all "
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]
AC_ChemTanksB =  # error
AC_ChemTanksC =  # error
AC_DrainChannelA = [
    "-layer m DrainChannel"; "c t 214,214,214"; "DrainChannel"; "  "; "3dpoly"; "0.3,-1.125,-0.2024"; "0.3,-1.125,-0.28369"; "0.3,-0.725,-0.51498"; "0.3,-0.325,-0.28369"; "0.3,-0.325,-0.2024"
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]
AC_DrainChannelB =  # error
AC_DrainChannelC =  # error
AC_ZLayoutA = [
    "laythw"; "layout s "; "layout r "; "TopView"; ".ms"; "_-view o t"; "z o all "; "layout s layout2"; "layout r "; "FrontView"
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]
AC_ZLayoutB =  # error
AC_ZLayoutC =  # error
