# AguaClara Design Tool
Country = 1
Language = 0
C_ChlorineDoseMax := 2*mg/L
C_ChlorineStock := 50*gm/L
Ti_ChlorineStock := 30 hr
Country := 0  # Needs to be redefined as zero until we create a database for all countries.
## References
# MathCAD dimension calculations:
# [reference: BasicClientInputs.xmcd]
# [reference: ExpertInputs.xmcd]
# [reference: MathFunctions.xmcd]
# [reference: PipeDatabase.xmcd]
# [reference: FluidsFunctions.xmcd]
# [reference: SedimentationTank.xmcd]
# [reference: Flocculator.xmcd]
# [reference: LFOM.xmcd]
# [reference: LinearCdc.xmcd]
# [reference: ChemStorageTanks.xmcd]
# [reference: EntranceTank.xmcd]
# [reference: DrainChannel.xmcd]
# [reference: StackedRapidSandFilter.xmcd]
# [reference: MaterialsList.xmcd]
# AutoCAD drawing programs:
# Translators:
# These are the codes that take MathCAD outputs and create AutoCAD scripts that are used to draw the plant (formerly Basics)
# [reference: MtoATranslators.xmcd]
# The wrapped MtoA translator contains the functions that the user will want to access. These functions will draw pieces with full functionality - specifying the location, dimension, and orientation of the object. Also, it contains layer control and subtraction capabilities for grouped objects.
# [reference: MtoATranslatorsWrapped.xmcd]
# Drawing functions:
# [reference: ChannelF.xmcd]
# [reference: PlumbingF.xmcd]
# [reference: TankF.xmcd]
# [reference: StairsF.xmcd]
# [reference: DrainChannelF.xmcd]
# AutoCAD Script Files:
# [reference: FlocculatorAC.xmcd]
# [reference: SedimentationTankAC.xmcd]
# [reference: EntranceTankAC.xmcd]
# [reference: ChemStockTanksAC.xmcd]
# [reference: StackedRapidSandFilterAC.xmcd]
# [reference: OperatorAccessAC.xmcd]
# [reference: DrainChannelAC.xmcd]
# [reference: CdcAC.xmcd]
# [reference: MaterialsAC.xmcd]
# Layouts:
# This rearranges the plant to optimize the layout
# [reference: PlantLayoutsAC.xmcd]
# This file will execute at the very end to create multiple views of the entire plant in paperspace
# [reference: LayoutsAC.xmcd]
## All variables displayed must have the standard SI units. They may not have units attached by the user.
# General
Q_Plant = 0.033 m^3/s
Pi_VenaContractaOrifice = 0.63
T_PlantWall = 0.15 m
W_SedPlate = 1.08 m
T_ConcreteMin = 0.05 m
L_SedPlateSheet = 3.66 m
C_CoagStock = 247.5 kg/m^3
T_SedPlate = 0.002 m
Ti_CoagStock = 108000 s
T_SedWeir = 0.05 m
C_ChlorineStock = 50 kg/m^3
W_SedBay = 1.08 m
Ti_ChlorineStock = 108000 s
HL_ChannelMax = 0.05 m  # Eliminate FCM variable from design specs
H_PlantFreeboard = 0.1 m
EN_DrillSeries = 0
# Entrance Tank
V_EtUp = 0.008 m/s
W_EtCapture = 0.686545 m
H_EtOverflowChannel = 0.281347 m
H_Et = 1.57529 m
H_EtTop = 0.837643 m  # height of the top part of the entrance tank above the hoppers
W_Et = 0.950032 m
L_Et = 6.00834 m
ND_EtDrain = 0.0762 m
HL_Lfom = 0.2 m
ZW_Et = 2.55756 m
Z_EtTop = 2.65756 m
Z_Et = 1.08227 m  # elevation of top of slab.
ND_RMPipe = 0.3048 m
Z_EtHopper = 1.71992 m
H_EtHopper =  # error: This variable is undefined.
N_EtHoppers = 4
ND_EtFlowControl = 0.1524 m
L_EtHopper =  # error
AN_EtSlope = 0.785398
W_EtDC = 0.554294 m  # drain channel under entrance tank dimensions
L_EtDC = 7.32588 m
H_EtDC =  # error  # Give heights of the channel at the beginning and end and change the design specs to explain that it's sloped.
# Flow measurement
D_LfomOrifices = 0.01905 m
S_LfomRows = 0.02 m
H_LfomOrifice = [0.009525; 0.029525; 0.049525; 0.069525; 0.089525; 0.109525; 0.129525; 0.149525; 0.169525; 0.189525] m
Q_LfomScale = [0; 0.0033; 0.0066; 0.0099; 0.0132; 0.0165; 0.0198; 0.0231; 0.0264; 0.0297; 0.033] m^3/s
N_LfomOrifices = [25; 25; 24; 1; 10; 7; 7; 7; 7; 5]
ND_Lfom = 0.3048 m
HL_Lfom = 0.2 m
# Rapid Mix
ED_Tee = 0.116152 m^2/s^3
Z_LfomOrifices = 2.36708 m  # elevation of the center of
Z_EtExit = 1.77436 m  # elevation of center of pipe exiting the entrance tank and heading toward the flocculator
W_DC = 1 m
# Maybe give the vertical distances below the bottom of the sed tank of the beginning and end of the channel? Calculate them, display, and add to the design specs.
H_DC =  # error
L_DC = 13.9242 m
# Plant Drain Channel
Z_CoagTank = 2.95756 m
Z_CoagTankOutlet = 3.05756 m
L_CdcFloatArm = 0.41275 m
Q_CdcMax = 6.6e-6 m^3/s
L_CdcScaleArm = 0.50165 m
C_CoagDoseMax = 0.06 kg/m^3
B_StockOutlet = 0.1 m
L_CoagCdcTube = 1.26381 m
D_CdcTube = 0.003175 m
N_CoagCdcTubes = 4
HL_Cdc = 0.2 m
L_CdcFloatArm = 0.41275 m
L_CdcScaleArm = 0.50165 m
# Coag Dose Controller
# Flocculator
H_Floc = 2.30133 m
Z_FlocTank = 0 m  # Look at Flocculator Positioning arrays
N_FlocValves = 3
W_FlocChannel = 0.6 m
Ti_Floc = 1011.84 s  # Fill last channel with bafffles from last channel
H_FlocSlope = 0.04445 m  # Fix port width to be based on energy dissipation in that channel
ED_Floc = 0.01 m^2/s^3
# Adjust spacing after the number of baffles per channel is known.
V_Floc = 0.173678 m/s  # Check the residence time of the flocculator should be at least 20minutes
HW_FlocEnd = 1.92757 m
ND_FlocValve = 0.0762 m
CP_Floc = 100 m^(2/3)
Ti_FlocDrain = 1800 s
CP_FlocTotal = 128.531 m^(2/3)
N_FlocChannels = 5
G_Floc = 51.5093 1/s
L_FlocTank = 28.871 m
HL_Floc = 0.273754 m
ED_FlocChannelFirst = 0.00672105 m^2/s^3
HW_FlocStart = 2.20133 m
S_FlocBaffle = [0.316677; 0.316677; 0.316677; 0.316677; 0.316677] m
B_FlocBaffle = [0.318677; 0.318677; 0.318677; 0.318677; 0.318677] m
N_FlocChannelBaffles = [17; 17; 17; 17; 16]
W_FlocPort = [0.316677; 0.316677; 0.316677; 0.316677; 0.316677] m
S_FlocBaffleFirst = 0.316677 m
HL_FlocChannels = [0.055366; 0.055366; 0.055366; 0.055366; 0.0522901] m
L_FlocBaffleLower = 1.45256 m
L_FlocBaffleUpper = 1.77631 m
H_FlocPort = [0.6; 0.6; 0.6; 0.6; 0.6] m
Ti_Floc = 1011.84 s  # residence time of the flocculator
N_FlocBaffles = 84
ND_FlocValve = 3 in
EN_FlocBaffle = 1
# Sed Tanks
N_SedTanks = 3
L_Sed = 5.77419 m
N_SedBays = 2  # Number of bays of inlet manifolds in each sed tank
Q_SedBay = 0.0055 m^3/s
V_SedUpBod = 0.001 m/s  # design constraints
V_SedCBod = 0.00012 m/s
V_SedUp = 0.001 m/s  # Actual values from this design
V_SedC = 0.000119792 m/s
W_SedSideSlopes = 0.511425 m
AN_SedSlope = 0.872665
Ti_Sed = 1634.86 s
# Sedimentation Tank Sludge Drain:
N_SedSludgeOrifices = 45  # per cell
Ti_SludgeDrain = 1800 s  # Tank Drain time
W_SedSludge = 0.0918717 m  # Width of the sludge channel
H_SedSludge = 0.0918717 m  # Depth of the sludge channel
# Distance center to center between drain orifices
B_SedSludgeOrifices = 0.101012 m
W_SedDrainCover = 0.131872 m
D_SedSludgeOrifice = 0.0097111 m  # Diameter of drain orifices
N_SedSludgeOrifices = 45
ND_SedSludgePipe = 0.1016 m
# Sedimentation Tank Dimensions:
Z_SedSludge = 0.0918717 m  # Height from 0 of the top of the sludge drain
Z_SedSideSlopes = 0.818985 m
W_Sed = 2.16 m  # Total tank wall height
L_Sed = 5.77419 m  # Total tank length
H_Sed = 2.05415 m
# Sedimentation Tank Inlet Channel:
EN_InletChannelGeom = 1
HW_SedInletChannel = 0.39415 m
W_SedInletChannel = 0.554052 m
L_SedChannel = 6.78 m
H_SedInletChannel = 0.49415 m
HL_SedWeirInlet = 0.0189892 m
W_SedInletChannelPreWeir = 0.393538 m
H_SedWeirInlet = 0.41415 m
W_SedWeirInlet = 6.78 m
# Sedimentation Tank Effluent Launder:
N_SedLaunderOrifices = 86  # Number of orifices per launder
N_SedLaunderOrificesRow = 43  # Number of orifices per row
Z_SedLaunder = 1.81069 m
Q_SedLaunderOrifices = 6.39535e-5 m^3/s
B_SedLaunderOrifices = 0.1 m  # Center to center launder spacing
# More Launder Dimensions
ND_SedLaunder = 0.1524 m
D_SedLaunderOrifice = 0.0127 m
L_SedLaunder = 4.52016 m
HL_SedLaunderOrifice = 0.0327418 m
# Sedimentation Tank Inlet Manifold:
ND_SedManifold = 0.2032 m
L_SedManifoldDiffuser = 0.530925 m
Z_SedManifoldPipe = 0.839484 m
ND_SedDiffuser = 0.0762 m
D_SedManifoldPort = 0.04445 m
B_SedManifoldPort = 0.108382 m
N_SedManifoldPorts = 41
L_SedManifoldPipe = 4.61079 m
ED_SedInlet = 0.01 m^2/s^3
Q_SedManifoldPort = 0.000134146 m^3/s
# Exit Channel:
W_SedExitChannel = 0.319015 m
H_SedExitChannel = 0.49415 m
HW_SedExitChannel = 0.35415 m  # water height in exit channel from base of channel
H_SedWeirExit = 0.33483 m
# Lamella:
L_SedPlate = 0.61 m
B_SedPlate = 0.027 m  # center to center distance between lamella
S_SedPlate = 0.025 m  # spacing between lamella
N_SedPlates = 144  # Number of Sed Plates per Sedimentation Tank Bay.
N_SedModules = 18  # Number of modules per bay
N_SedModulePlates = 8  # Number of plates per module
AN_SedPlate = 1.0472
L_SedActive = 4.48717 m
Z_SedLaunder = 1.81069 m
HW_Sed = 1.92757 m
H_Sed = 2.05415 m
# SRSF
H_Fi = 3.72391 m
L_Fi = 1 m
W_Fi = 0.936525 m
B_FiManifoldBranch = 0.1 m
ND_FiTrunk = 0.0762 m
ND_FiManBranch = 0.0254 m
ND_FiBwTrunk = 0.1524 m
ND_FiBwManBranch = 0.0381 m
ND_FiExitWaste = 0.0762 m
ND_FiBwWeirDrain = 0.1524 m
ND_FiBwDrain = 0.0762 m  # For the box that holds keeps the end of the siphon submerged
ND_FiSandOutlet = 0.0508 m
Ti_FiSand = 416.82 s  # This is the time required to empty the filter of the sand.
ND_FiSiphonAirValve = 0.0508 m
ND_FiSiphon = 0.1524 m
Q_FiSiphonMax = 0.0565396 m^3/s
B_FiSiphonManOrifices = 0.101981 m
N_FiSiphonManOrifices = 8
D_FiSiphonManOrifices = 0.0546269 m
Ti_FiBwInitiation = 51.8652 s
H_FiSand = 1.2 m
N_FiLayer = 6
H_FiLayer = 0.2 m
V_FiLayer = 0.00183333 m/s
HL_FiTerminal = 0.451428 m
V_FiBw = 0.011 m/s
HL_FiBwInitiation = 1.588 m
HL_FiBwSS = 1.188 m
D_FiSand = 0.0005 m
N_Fi = 4
Q_Fi = 0.00825 m^3/s
W_Slots = 0.0002032 m
B_FiBwManSlot = 0.0047625 m
L_FiBwManSlot = 0.0205852 m
B_FiManSlot = 0.003175 m
L_FiManSlot = 0.0273888 m
N_FiSlotRows = 2
Z_FiBottom = -1.85378 m
Z_FiTop = 1.87013 m
# Weirs
HL_FiWeir = 0.0320701 m
L_FiWeir = 0.772287 m
Z_FiEntranceWeir = 1.77013 m
Z_FiBwWeir = 0.034797 m
Z_FiSiphonInlet = -0.065203 m  # This is the centerline elevation of the siphon orifices
Z_FiExitWeir = 1.21969 m
Z_FiExitBottom = 0.813384 m  # bottom of the filtered water box
Z_FiEntranceBottom = 0.813384 m  # bottom of the entrance box
Z_FiSiphonCoupling = 1.13555 m
Z_FiBwTop = 0.250506 m
W_FiBwDrain = 0.344895 m
H_FiBwDrain = 0.329942 m
N_Launders =  # error
L_LaunderPipeTotal =  # error
N_LaunderCouplings =  # error
N_ValveCouplings = 6
N_SedPlatesTotal = 864
N_SedPlatesPerSheet = 6
N_SedPlateSheets = 144
N_Valves = 6
A_EtFloor = 7.88563 m^2
W_FlocWithWalls = 3.75 m
L_FlocWithWalls = 6.07419 m
Vol_FlocFloor = 3553.4 L
A_FlocFloor = 23.6894 m^2
Vol_SedSlopes =  # error
A_SedWalls =  # error
A_SedFloor = 43.0053 m^2
# Materials List
# Plant Summary Calculations:
HL_PlantTotal := Z_EtTop - H_PlantFreeboard - Z_FiExitWeir
HL_PlantTotal = 1.33787 m
## Make AC variables that are shorter than 598 lines
AC_CdcA :=
    AC_Cdc if last(AC_Cdc) < 598
    submatrix(AC_Cdc, 0, 598, 0, 0) otherwise
AC_CdcB :=
    submatrix(AC_Cdc, 599, last(AC_Cdc), 0, 0) if last(AC_Cdc) < 1197
    submatrix(AC_Cdc, 599, 1197, 0, 0) otherwise
AC_CdcC :=
    submatrix(AC_Cdc, 1198, last(AC_Cdc), 0, 0) if last(AC_Cdc) < 1796
    submatrix(AC_Cdc, 1198, 1796, 0, 0) otherwise
AC_SedTankA :=
    AC_SedTank if last(AC_SedTank) < 598
    submatrix(AC_SedTank, 0, 598, 0, 0) otherwise
AC_FilterA :=
    AC_Filter if last(AC_Filter) < 598
    submatrix(AC_Filter, 0, 598, 0, 0) otherwise
AC_SedTankB :=
    submatrix(AC_SedTank, 599, last(AC_SedTank), 0, 0) if last(AC_SedTank) < 1197
    submatrix(AC_SedTank, 599, 1197, 0, 0) otherwise
AC_FilterB :=
    submatrix(AC_Filter, 599, last(AC_Filter), 0, 0) if last(AC_Filter) < 1197
    submatrix(AC_Filter, 599, 1197, 0, 0) otherwise
AC_SedTankC :=
    submatrix(AC_SedTank, 1198, last(AC_SedTank), 0, 0) if last(AC_SedTank) < 1796
    submatrix(AC_SedTank, 1198, 1796, 0, 0) otherwise
AC_FilterC :=
    submatrix(AC_Filter, 1198, last(AC_Filter), 0, 0) if last(AC_Filter) < 1796
    submatrix(AC_Filter, 1198, 1796, 0, 0) otherwise
AC_ChemTanksA :=
    AC_ChemTanks if last(AC_ChemTanks) < 598
    submatrix(AC_ChemTanks, 0, 598, 0, 0) otherwise
AC_FilterD :=
    submatrix(AC_Filter, 1797, last(AC_Filter), 0, 0) if last(AC_Filter) < 2395
    submatrix(AC_Filter, 1797, 2395, 0, 0) otherwise
AC_FlocTankA :=
    AC_FlocTank if last(AC_FlocTank) < 598
    submatrix(AC_FlocTank, 0, 598, 0, 0) otherwise
AC_ChemTanksB :=
    submatrix(AC_ChemTanks, 1198, last(AC_ChemTanks), 0, 0) if last(AC_ChemTanks) < 1197
    submatrix(AC_ChemTanks, 1198, 1796, 0, 0) otherwise
AC_FlocTankB :=
    submatrix(AC_FlocTank, 599, last(AC_FlocTank), 0, 0) if last(AC_FlocTank) < 1197
    submatrix(AC_FlocTank, 599, 1197, 0, 0) otherwise
AC_ChemTanksC :=
    submatrix(AC_ChemTanks, 1198, last(AC_ChemTanks), 0, 0) if last(AC_ChemTanks) < 1796
    submatrix(AC_ChemTanks, 1198, 1796, 0, 0) otherwise
AC_FlocTankC :=
    submatrix(AC_FlocTank, 1198, last(AC_FlocTank), 0, 0) if last(AC_FlocTank) < 1796
    submatrix(AC_FlocTank, 1198, 1796, 0, 0) otherwise
AC_FlocTankD :=
    submatrix(AC_FlocTank, 1797, last(AC_Filter), 0, 0) if last(AC_FlocTank) < 2395
    submatrix(AC_FlocTank, 1797, 2395, 0, 0) otherwise
AC_DrainChannelA :=
    AC_DrainChannel if last(AC_DrainChannel) < 598
    submatrix(AC_DrainChannel, 0, 598, 0, 0) otherwise
AC_EntranceTankA :=
    AC_EntranceTank if last(AC_EntranceTank) < 598
    submatrix(AC_EntranceTank, 0, 598, 0, 0) otherwise
AC_DrainChannelB :=
    submatrix(AC_DrainChannel, 1198, last(AC_DrainChannel), 0, 0) if last(AC_DrainChannel) < 1197
    submatrix(AC_DrainChannel, 1198, 1796, 0, 0) otherwise
AC_EntranceTankB :=
    submatrix(AC_EntranceTank, 599, last(AC_EntranceTank), 0, 0) if last(AC_EntranceTank) < 1197
    submatrix(AC_EntranceTank, 599, 1197, 0, 0) otherwise
AC_DrainChannelC :=
    submatrix(AC_DrainChannel, 1198, last(AC_DrainChannel), 0, 0) if last(AC_DrainChannel) < 1796
    submatrix(AC_DrainChannel, 1198, 1796, 0, 0) otherwise
AC_EntranceTankC :=
    submatrix(AC_EntranceTank, 1198, last(AC_EntranceTank), 0, 0) if last(AC_EntranceTank) < 1796
    submatrix(AC_EntranceTank, 1198, 1796, 0, 0) otherwise
AC_OperatorAccessA :=
    AC_OperatorAccess if last(AC_OperatorAccess) < 598
    submatrix(AC_OperatorAccess, 0, 598, 0, 0) otherwise
AC_OperatorAccessB :=
    submatrix(AC_OperatorAccess, 599, last(AC_OperatorAccess), 0, 0) if last(AC_OperatorAccess) < 1197
    submatrix(AC_OperatorAccess, 599, 1197, 0, 0) otherwise
AC_OperatorAccessC :=
    submatrix(AC_OperatorAccess, 1198, last(AC_OperatorAccess), 0, 0) if last(AC_OperatorAccess) < 1796
    submatrix(AC_OperatorAccess, 1198, 1796, 0, 0) otherwise
AC_ZZLayoutA :=
    AC_Layout if last(AC_Layout) < 598
    submatrix(AC_Layout, 0, 598, 0, 0) otherwise
AC_ZZLayoutB :=
    submatrix(AC_Layout, 1198, last(AC_Layout), 0, 0) if last(AC_Layout) < 1197
    submatrix(AC_Layout, 1198, 1796, 0, 0) otherwise
AC_ZZLayoutC :=
    submatrix(AC_Layout, 1198, last(AC_Layout), 0, 0) if last(AC_Layout) < 1796
    submatrix(AC_Layout, 1198, 1796, 0, 0) otherwise
## Display AC variables
AC_EntranceTankA = [
    "-layer m EtTankCon";
    "c t 214,214,214";
    "EtTankCon";
    "  ";
    "_-view o t _zoom w 0.16,12.17,1.08227 -6.16834,13.78418,2.65756 _box 0,12.33,1.08227 -6.00834,13.62418,2.65756 _box 0.15,12.18,0.93227 -6.15834,13.77418,2.65756 _subtract 0.15,12.18,0.93227  0,12.33,1.08227 ";
    "_box 0,13.28003,1.08227 -6.00834,13.62418,2.35621";
    "_box 0,13.28003,2.35621 -6.00834,13.34003,2.55756";
    "_union all ";
    "-group c EtTankCon y ";
    "all "
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]
AC_EntranceTankB = [
    "_cylinder -5.53798,11.29896,0.21192 0.14872 a -6.0831,11.29896,0.21192";
    "_zoom w -6.0831,11.12704,0.21192 -6.0631,11.47089,0.21192";
    "_subtract -6.0731,11.46089,0.21192  -6.0831,11.44768,0.21192 ";
    "rotate3d l  z -5.54798,11.29896,0.21192 90";
    "_cylinder -5.54798,11.75616,2.02836 0.16192 a -5.85648,11.75616,2.02836";
    "_cylinder -5.53798,11.75616,2.02836 0.14872 a -5.86648,11.75616,2.02836";
    "_zoom w -5.86648,11.58424,2.02836 -5.84648,11.92809,2.02836";
    "_subtract -5.85648,11.91809,2.02836  -5.86648,11.90488,2.02836 ";
    "rotate3d l  y -5.54798,11.75616,2.02836 90";
    "-group c EtRmPipePlu y "
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]
AC_EntranceTankC =  # error
AC_FlocTankA = [
    "-layer m FlocTankCon"; "c t 132,132,132"; "FlocTankCon"; "  "; "_-view o t _zoom w 0.16,6.77,0 -5.93419,10.69,2.30133 _box 0,6.93,0 -5.77419,10.53,2.30133 _box 0.15,6.78,-0.15 -5.92419,10.68,2.30133 _subtract 0.15,6.78,-0.15  0,6.93,0 "; "_box -5.92419,7.53,0 0.15,7.68,2.30133"; "-array l  R 4 1 0.75"; "-group c FlocTankCon y "; "all "; "-layer s 0"
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]
AC_FlocTankB = ["  "; "-layer f FlocRMCouplingPlu"; "  "]
AC_FlocTankD =  # error
AC_FlocTankC =  # error
AC_OperatorAccessA = [
    "-layer m OpWalkwayCon"; "c t 132,132,132"; "OpWalkwayCon"; "  "; "_-view o f"; "_pline"; "-8.90234,2.97026"; "-8.60234,2.97026"; "-8.60234,2.76879"; "-8.30234,2.76879"
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]
AC_OperatorAccessC =  # error
AC_OperatorAccessB =  # error
AC_SedTankA = [
    "-layer m SedTankCon"; "c t 132,132,132"; "SedTankCon"; "  "; "_-view o r"; "_pline"; "2.21,0"; "1.66594,0"; "1.66594,0.09187"; "1.68594,0.09187"
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]
AC_SedTankB = [
    "_cylinder 0.08794,1.62,0.03472 0.05715 a 0.093,1.62,0.03472";
    "_cylinder 0.07794,1.62,0.03472 0.0525 a 0.103,1.62,0.03472";
    "_subtract 0.08794,1.56285,0.03472  0.07794,1.5675,0.03472 ";
    "_union 0.15,1.55571,0.03472 0.03094,1.55571,0.03472 0.093,1.56285,0.03472 ";
    "_-view o t";
    "_zoom w 0.3775,1.39331,-0.03957 0.83089,1.84669,0.10902 _torus 0.60419,1.62,0.03472 0.1524 0.05715 _box 0.38464,1.40045,-0.03243 0.60419,1.83955,0.10187 _subtract 0.81374,1.62,0.03472  0.38464,1.40045,-0.03243 ";
    "_torus 0.60419,1.62,0.03472 0.1524 0.0525 _subtract 0.81374,1.62,0.03472  0.39929,1.62,0.03472  _box 0.59419,1.40045,-0.03243 0.82374,1.62,0.10187 _subtract 0.60419,1.82955,0.03472  0.59419,1.40045,-0.03243 ";
    "_cylinder 0.60419,1.7724,0.03472 0.06429 a 0.54719,1.7724,0.03472 _cylinder 0.61419,1.7724,0.03472 0.05715 a 0.53719,1.7724,0.03472 _subtract 0.60419,1.70811,0.03472  0.61419,1.71525,0.03472 ";
    "_mirror 0.60419,1.7724,0.03472  0.60419,1.62 0.61419,1.63 n _union 0.82089,1.563,0.03472 0.71196,1.72776,0.03472 0.60419,1.83669,0.03472 ";
    "rotate3d l  z 0.75659,1.62,0.03472 270"
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]
AC_SedTankC = [
    "_torus -5.86072,0.14208,0.37767 0.2286 0.07725 _subtract -5.54798,0.14208,0.37767  -6.16657,0.14208,0.37767  _box -5.87072,-0.18066,0.28354 -5.53798,0.14208,0.47181 _subtract -5.86072,0.45481,0.37767  -5.87072,-0.18066,0.28354 ";
    "_cylinder -5.86072,0.37068,0.37767 0.09207 a -5.91772,0.37068,0.37767 _cylinder -5.85072,0.37068,0.37767 0.08414 a -5.92772,0.37068,0.37767 _subtract -5.86072,0.2786,0.37767  -5.85072,0.28654,0.37767 ";
    "_mirror -5.86072,0.37068,0.37767  -5.86072,0.14208 -5.85072,0.15208 n _union -5.54004,0.08508,0.37767 -5.69907,0.30372,0.37767 -5.86072,0.46275,0.37767 ";
    "rotate3d l  z -5.63212,0.14208,0.37767 180";
    "rotate3d l  x -5.63212,0.14208,0.37767 90";
    "-group c SedIChannelElbowPlu y ";
    "all ";
    "-layer s 0";
    "  ";
    "-layer f SedIChannelElbowPlu"
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]
AC_ChemTanksA = [
    "-layer m CoagTanks"; "c t 132,132,132"; "CoagTanks"; "  "; "_-view o t"; "_zoom w -7.34034,12.32,1.73606 -6.54834,13.112,2.98026"; "_cylinder -6.94434,12.716,2.97026 0.386 a -8.16854,12.716,2.97026"; "rotate3d l  y -6.94434,12.716,2.97026 90"; "-group c CoagTanks y "; "all "
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]
AC_ChemTanksB =  # error
AC_ChemTanksC =  # error
AC_DrainChannelA = [
    "-layer m DC"; "c t 214,214,214"; "DC"; "  "; "3dpoly"; "0.2,12.18,0.93227"; "0.2,12.18,0.50513"; "0.2,13.03429,0.50513"; "0.2,13.03429,0.93227"; "0.2,12.18,0.93227 "
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]
AC_DrainChannelB =  # error
AC_DrainChannelC =  # error
# AC_ZZLayoutA | AC_ZZLayoutC
AC_ZZLayoutB
AC_ZPlantLayout = ["-layer t Floc*"; "t Sed*"; "t DC"; "  "; "mirror3d all  yz -2.8871,0 y  "; "-layer s 0"; "  "; "-layer f Floc*"; "f Sed*"; "f DC"; "  "; "-layer t Fi*"; "t Fi*"; "  "; "_move all  -4.0602,-1.18653,-1.85378 -11.13439,9.49348,-1.85378"; "-layer s 0"; "  "; "-layer f Fi*"; "f Fi*"; "  "]
AC_FilterA = [
    "-layer m FiInletchannelCon"; "c t 214,214,214"; "FiInletchannelCon"; "  "; "_-view o t _zoom w 0.16,-4.9061,0.81338 -0.49654,-0.09,1.9022 _box 0,-4.7461,0.81338 -0.33654,-0.25,1.9022 _box 0.15,-4.8961,0.66338 -0.48654,-0.1,1.9022 _subtract 0.15,-4.8961,0.66338  0,-4.7461,0.81338 "; "-group c FiInletchannelCon y "; "all "; "-layer s 0"; "  "; "-layer f FiInletchannelCon"
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]
AC_FilterD = [
    "_subtract";
    "g FiInletchannelCon";
    " g DeleteMe ";
    "-layer f FiInletchannelCon";
    "  ";
    "_cylinder 0.62307,-3.95346,0.98165 0.10954 a 0.14555,-3.95346,0.98165";
    "_cylinder 0.63307,-3.95346,0.98165 0.1006 a 0.13555,-3.95346,0.98165";
    "_zoom w 0.13555,-4.073,0.98165 0.15555,-3.83392,0.98165";
    "_subtract 0.14555,-3.84392,0.98165  0.13555,-3.85287,0.98165 ";
    "-group c FiInletChannelPipePlu y ";
    "all ";
    "-layer s 0";
    "  ";
    "-layer f FiInletChannelPipePlu";
    "  "
]
AC_FilterB = [
    "_cylinder -4.01618,-0.34208,-1.2252 0.04445 a -3.95018,-0.34208,-1.2252";
    "_subtract -4.00618,-0.39288,-1.2252  -3.95018,-0.38653,-1.2252 ";
    "_cylinder -4.0602,-0.34208,-1.2252 0.0508 a -4.0142,-0.34208,-1.2252";
    "_cylinder -4.0702,-0.34208,-1.2252 0.04445 a -4.0042,-0.34208,-1.2252";
    "_subtract -4.0602,-0.39288,-1.2252  -4.0702,-0.38653,-1.2252 ";
    "_cylinder -4.0142,-0.34208,-1.2252 0.04445 a -4.00618,-0.34208,-1.2252";
    "_cylinder -4.0242,-0.34208,-1.2252 0.04077 a -3.99618,-0.34208,-1.2252";
    "_subtract -4.0142,-0.38653,-1.2252  -4.0242,-0.38284,-1.2252 ";
    "_union -3.96018,-0.39288,-1.2252 -4.0602,-0.39288,-1.2252 -4.00618,-0.38653,-1.2252 ";
    "_zoom w -4.1162,-0.40288,-0.9744 -3.89617,-0.28128,-1.076"
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]
AC_FilterC = [
    "  "; "_subtract"; "g FiEntexitboxesCon"; " g DeleteMe "; "-layer f FiEntexitboxesCon"; "  "; "_cylinder -1.09897,-0.34208,0.75937 0.09207 a -1.04197,-0.34208,0.75937"; "_cylinder -1.10897,-0.34208,0.75937 0.08414 a -1.03197,-0.34208,0.75937"; "_subtract -1.09897,-0.43415,0.75937  -1.03197,-0.42621,0.75937 "; "_cylinder -1.20072,-0.34208,0.75937 0.09207 a -1.14372,-0.34208,0.75937"
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]
HW_Sed = 1.92757 m
# this variable is displayed to ensure that LabView can read AC.ZZEnd (error in LabView "read mathcad file" code that it misses the last variable)
AC_CdcA = [
    "-layer m Cdc"; "c t 125,0,160"; "Cdc"; "  "; "-insert CdcLeverArmwithReducer.dwg"; "-5.88054,12.60065,2.68246 x 1 1  0"; "-insert CdcLeverArmBracket.dwg"; "-5.84854,12.1879,2.65756 x 1 1  0"; "-insert CdcCht.dwg"; "-6.61074,12.1038,2.77526 x 1 1  0"
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]
AC_CdcC =  # error
AC_CdcB =  # error
Q_Plant = 0.033 m^3/s
