# [reference: MasterProgram.xmcd]
# [reference: ChemStorageTanks.xmcd]
# Dimensions are the inside dimensions of the tank.
Tankscript(p1, p2, p3, tank_origin, win1, win2) :=
    zoom_win ← zoom_wina(win1, win2)
    box1 ← boxA(tank_origin, p1)
    box2 ← boxA(p2, p3)
    subtract ← subtractD(p2, tank_origin)
    return concat(viewtop, zoom_win, box1, box2, subtract)  # the origin is the bottom right corner of the inside of the tank if looked at from top view
Tank(tank_origin, tank_dim, thick) := Tankscript([tank_origin[0] - tank_dim[0]; tank_origin[1] + tank_dim[1]; tank_origin[2] + tank_dim[2]], [tank_origin[0] + thick; tank_origin[1] - thick; tank_origin[2] - thick], [
    tank_origin[0] - tank_dim[0] - thick;
    tank_origin[1] + tank_dim[1] + thick;
    tank_origin[2] + tank_dim[2]
], tank_origin, [tank_origin[0] + thick + zc; tank_origin[1] - thick - zc; tank_origin[2]], [
    tank_origin[0] - tank_dim[0] - thick - zc;
    tank_origin[1] + tank_dim[1] + thick + zc;
    tank_origin[2] + tank_dim[2]
])
Et_origin = [2.11098; 7.55; 0] m
# First Alum Tank:
H_DoserFrame := 35 cm
H_AlumTankAboveHeadTank := 30 cm
AlumtTank1_origin := [
    Et_origin(0);
    Et_origin(1) - W_MpWalkway - L_AlumTank;
    Et_origin(3) + H_Et + H_DoserFrame + H_AlumTankAboveHeadTank
]  # error: This value must be a function, but has the form: [Length].
AlumTank_dim := [W_AlumTank; L_AlumTank; H_AlumTank] = [1.30418; 1.30418; 0.476222] m
Tank1 := Tank(AlumTank1_origin, AlumTank_dim, T_PlantWall)
# [component: inputs Tank1]
# Second Alum Tank:
AlumtTank2_origin := [
    Et_origin(0);
    Et_origin(1) - 2*(W_AlumTank - W_MpWalkway);
    Et_origin(2) + H_Et + H_DoserFrame + H_AlumTankAboveHeadTank
]  # error: This value must be a function, but has the form: [Length].
AlumTank2 := Tank(AlumTank2_origin, AlumTank_dim, T_PlantWall)
