# References
# Length Assignments
R_Outlet := .75 in
ND_Piping := 1/2*in
L_SecondPipe := .1 m
OutletHeight := .1 m
L_BallValve := 3/250*in
L_BulkheadFittingEnd := (.35*3/250)*in
L_ThirdPipe := .1 m
L_MaleInsertEnd := 3/4*3/250*in
L_FirstPipe := .30 m
L_FourthPipe := 3/2*R_CoagTank - TeeLength(ND_Piping)/2 - ElbowRadius(ND_Piping)
L_FinalPipe := .1 m
# Origin Points
CoagTank_origin := [
    Et_Origin[0] + W_Et + 4*R_CoagTank;
    Et_Origin[1] + W_MpWalkway + R_CoagTank + T_ChemTankWall;
    Z_EtTop + H_AlumTankAboveHeadTank + HL_ChemDoserMin - B_StockOutlet
]
Outlet_origin := [
    CoagTank_origin[0];
    CoagTank_origin[1] - R_CoagTank - 2*T_ChemTankWall;
    CoagTank_origin[2] + OutletHeight
]
BulkheadFitting_origin := [
    CoagTank_origin[0];
    CoagTank_origin[1] - R_CoagTank - T_ChemTankWall;
    CoagTank_origin[2] + OutletHeight
]
MaleInsert_origin := [Outlet_origin[0]; Outlet_origin[1] - L_BulkheadFittingEnd; Outlet_origin[2]]
FirstPipe_origin := [MaleInsert_origin[0]; MaleInsert_origin[1] - L_MaleInsertEnd; MaleInsert_origin[2]]
FirstElbow_origin := [FirstPipe_origin[0]; FirstPipe_origin[1] - L_FirstPipe; FirstPipe_origin[2]]
SecondPipe_origin := [
    FirstElbow_origin[0];
    FirstElbow_origin[1] - ElbowRadius(ND_Piping);
    FirstElbow_origin[2] - ElbowRadius(ND_Piping)
]
BallValve_origin := [SecondPipe_origin[0]; SecondPipe_origin[1]; SecondPipe_origin[2] - L_SecondPipe]
ThirdPipe_origin := [BallValve_origin[0]; BallValve_origin[1]; BallValve_origin[2] - L_BallValve]
SecondElbow_origin := [ThirdPipe_origin[0]; ThirdPipe_origin[1]; ThirdPipe_origin[2] - L_ThirdPipe]
FourthPipe_origin := [
    SecondElbow_origin[0] - ElbowRadius(ND_Piping);
    SecondElbow_origin[1];
    SecondElbow_origin[2] - ElbowRadius(ND_Piping)
]
Tee_origin := [
    FourthPipe_origin[0] - L_FourthPipe - 1/2*TeeLength(ND_Piping);
    FourthPipe_origin[1];
    FourthPipe_origin[2] - ShortTeeLength(ND_Piping)
]
FinalPipe_origin := [Tee_origin[0]; Tee_origin[1]; Tee_origin[2]]
# Coagulant Tank and Connecting Pieces Script
LayerNewTanks := layer_new("CoagTanks", grey)
ViewTop := viewtop1
OuterTankWall := cylinderC(CoagTank_origin, R_CoagTank + T_ChemTankWall, H_CoagTank + T_ChemTankWall)
InnerTankWall := cylinderC([CoagTank_origin[0]; CoagTank_origin[1]; CoagTank_origin[2] + T_ChemTankWall], R_CoagTank, H_CoagTank)
Subtract := subtractD([CoagTank_origin[0] - (R_CoagTank + T_ChemTankWall); CoagTank_origin[1]; CoagTank_origin[2]], [CoagTank_origin[0] - R_CoagTank; CoagTank_origin[1]; CoagTank_origin[2]])
FreezeAll := FreezeLayer("CoagTanks")
SubtractionCylinder := CylinderF(Outlet_origin, R_Outlet, 5*T_ChemTankWall, [90; 0]*deg)
GroupCylinder := GroupAll("DeleteMe")
SubtractOutlet := SubtractF(["CoagTanks"], "DeleteMe")
LayerNewPieces := layer_new("ConnectingPieces", green)
BulkheadFitting := insertdwg("BulkheadFitting", BulkheadFitting_origin, 3/250, 3/250, 0 deg)  # Check scales of drawings to make them more meaningful.
MaleInsert := insertdwg("MaleInsert", MaleInsert_origin, 3/250, 3/250, 0 deg)  # Not defined as male adapter because a different piece already has this name.
FirstPipe := PipeF(FirstPipe_origin, L_FirstPipe, [90; 0]*deg, ND_Piping, EN_PipeSpec12)
FirstElbow := ElbowF(FirstElbow_origin, [0; 90; 180]*deg, ND_Piping, EN_PipeSpec12)
SecondPipe := PipeF(SecondPipe_origin, L_SecondPipe, [0; 270]*deg, ND_Piping, EN_PipeSpec12)
BallValve := insertdwg("BallValve", BallValve_origin, 1/250, 1/250, 0 deg)
ThirdPipe := PipeF(ThirdPipe_origin, L_ThirdPipe, [0; 270]*deg, ND_Piping, EN_PipeSpec12)
SecondElbow := ElbowF(SecondElbow_origin, [0; 0; 270]*deg, ND_Piping, EN_PipeSpec12)
FourthPipe := PipeF(FourthPipe_origin, L_FourthPipe, [0; 0]*deg, ND_Piping, EN_PipeSpec12)
LayerThaw := layer_thaw("CoagTanks")
Mirror := mirror_all([CoagTank_origin[0] - 3/2*R_CoagTank; CoagTank_origin[1] - (R_CoagTank + T_ChemTankWall) - zc], [CoagTank_origin[0] - 3/2*R_CoagTank; CoagTank_origin[1] - (R_CoagTank + T_ChemTankWall) + zc])
LayerFreezePieces := FreezeLayer("ConnectingPieces")
LayerNewTee := layer_new("Tee", grey)
ConnectingTee := TeeF(Tee_origin, [0; 0; 270]*deg, ND_Piping, EN_PipeSpec12)
FinalPipe := PipeF(FinalPipe_origin, L_FinalPipe, [0; 270]*deg, ND_Piping, EN_PipeSpec12)
Union := union_allA
LayerSet0 := layer_set("0")
LayerFreezeTanks := layer_freeze("CoagTanks")
Unfreeze := layer_thaw("CoagTanks")
AC_ChemTest := stack(LayerNewTanks, ViewTop, OuterTankWall, InnerTankWall, ViewTop, Subtract, FreezeAll, SubtractionCylinder, GroupCylinder, SubtractOutlet, LayerNewPieces, BulkheadFitting, MaleInsert, FirstPipe, FirstElbow, SecondPipe, BallValve, ThirdPipe, SecondElbow, FourthPipe, LayerThaw, Mirror, LayerFreeze, LayerNewTee, ConnectingTee, FinalPipe, Union, LayerSet0, LayerFreezeTanks)
Unfreeze2 := layer_thaw("ConnectingPieces")
Unfreeze3 := layer_thaw("Tee")
# mirror when there is an odd number off floc channels,
# mirroring is in the second one
Mirror ← Mirror3dAll("YZ", [Plant_Origin[0] - 1/2*L_Sed; 0 m; 0 m], "Y")
LayerFreezeTee := layer_freeze("Tee")
AC_ChemTanks :=
    stack(LayerNewTanks, ViewTop, OuterTankWall, InnerTankWall, ViewTop, Subtract, FreezeAll, SubtractionCylinder, GroupCylinder, SubtractOutlet, LayerNewPieces, BulkheadFitting, MaleInsert, FirstPipe, FirstElbow, SecondPipe, BallValve, ThirdPipe, SecondElbow, FourthPipe, LayerThaw, Mirror, LayerFreezePieces, LayerNewTee, ConnectingTee, FinalPipe, Union, LayerSet0, LayerFreezeTee, LayerFreezeTanks, LayerFreezePieces) if mod(N_FlocChannels, 2) == 0
    stack(LayerNewTanks, ViewTop, OuterTankWall, InnerTankWall, ViewTop, Subtract, FreezeAll, SubtractionCylinder, GroupCylinder, SubtractOutlet, LayerNewPieces, BulkheadFitting, MaleInsert, FirstPipe, FirstElbow, SecondPipe, BallValve, ThirdPipe, SecondElbow, FourthPipe, LayerThaw, Mirror, LayerFreezePieces, LayerNewTee, ConnectingTee, FinalPipe, Union, LayerSet0, LayerFreezeTanks, Unfreeze, Unfreeze2, Unfreeze3, Mirror, LayerFreezeTee, LayerFreezeTanks, LayerFreezePieces) otherwise
# [component: inputs AC_ChemTanks]
