# Chemical Dose Controller
# Chemical Dose Controller
L_CdcLever := 0.45 m  # assumed from Drew's drawing for now
W_LeverArm := 0.0032 m
D_LATeetoLAOrigin := 0.0079 m
L_CdcFloat := 2*(CapHeight(ND_EtFloat) - CapThickness(ND_EtFloat)) + 1 in  # Length of the float pipe must fill both caps plus some.
D_CdcCht := 6 in
Z_FloatTop := ZW_Et - HL_Flowmeasure + 1/2*L_CdcFloat  # The elevation of the float with the center of the float being at the bottom row of orifices of the LFOM.
D_LeverOrigintoArm := 0.0336 m  # Distance from the lever arm origin (which is on the tee holding the lever arm up) to the lever arm
H_LeverHole := 0.0312 m - 0.0095/2*m
# Distance from the top of the entrance tank to the to the middle of the lever arm hole for the cable - (minus the) radius of the hole
D_Cable := 0.1 in
L_Cable := Z_EtTop + H_LeverHole - Z_FloatTop
D_LABracketOrigintoEndBracket := 0.0079 m
# This is the distance from the lever arm bracket origin (at the center of the hole of the bracket holding up the lever arm) to the end of the bracket
D_LeverHole := 0.0063 m  # Distance from the float end of the lever arm to the middle of the hole where the float cable will be attached.
D_LABOrigintoLAOriginX := 0.032 m
D_LABOrigintoLAOriginZ := 0.0249 m
# these axes assume the lever arm is oriented along the y-axis
# but we are now rotating it!!!
T_CdcDt := 0.003 m  # Thickness of the drop tube
L_LAOriginToDtX := 0.0290 m  # Distance from the lever arm origin to the center of the drop tube in the x direction
L_LAOriginToDtY := 0.7812 m  # Distance from the lever arm origin to the outside center of the top part of the drop tube in the y direction
L_LAOriginToDtZ := 0.0429 m  # Distance from the lever arm origin to the drop tube in the z direction
L_LAOriginToDtCenterX := 0.0290 m  # Distance from the lever arm origin to the center of the drop tube in the x direction
T_CdcReducer := 0.0095 m  # Measured from CDC research team's apparatus
L_LAOriginToReducerX := 0.0290 m  # Distance from the lever arm origin to the center of the reducer in the x direction
L_LAOriginToReducerY := 0.7315 m  # Distance from the lever arm origin to the outside center of the top part of the reducer in the y direction
L_LAOriginToReducerZ := 0.1094 m  # Distance from the lever arm origin to the center of the large part of the reducer in the z direction
L_LAOriginToReducerCenterX := 0.0290 m  # Distance from the lever arm origin to the center of the reducer in the x direction
L_LAOriginToReducerCenterY := 0.7919 m  # Distance from the lever arm origin to the center of the reducer in the y direction
L_LAOriginToDtX2 := 0.0396 m
L_LAOriginToDtY2 := 0.7919 m
LA_Origin := [
    Et_Origin[0] - L_Et - T_PlantWall + D_LABracketOrigintoEndBracket + L_CdcFloatArm;
    Et_Origin[1] + ConRadius(ND_EtFloat) + S_EtFloat/2;
    Z_EtTop + D_LABOrigintoLAOriginZ
]
LA2_Origin := [LA_Origin[0]; LA_Origin[1] - ConRadius(ND_EtFloat) - S_EtFloat/2; LA_Origin[2]]
LA3_Origin := [LA_Origin[0]; LA_Origin[1] + ConRadius(ND_EtFloat) + S_EtFloat/2; LA_Origin[2]]
L_LAOriginToReducerX2 := 0.0893 m
L_LAOriginToReducerY2 := 0.7919 m
LADtFitting_Origin := [-L_LAOriginToDtY - T_CdcDt; L_LAOriginToDtX; L_LAOriginToDtZ] + LA_Origin
LAReducerFitting_Origin := [-L_LAOriginToReducerY - T_CdcReducer; L_LAOriginToReducerX; L_LAOriginToReducerZ] + LA_Origin
LADt_Center := [-L_LAOriginToReducerCenterY; L_LAOriginToDtCenterX; L_LAOriginToDtZ] + LA_Origin
LAReducer_Center := LA_Origin + [-L_LAOriginToReducerCenterY; L_LAOriginToReducerCenterX; L_LAOriginToReducerZ]
# Defines the center of the reducer. (The center in the z direction is the center of the larger part of the reducer).
CHT_Origin := [
    Et_Origin[0] - L_Et - L_ChemTankShift - T_PlantWall + D_CdcCht/2;
    LA_Origin[1];
    Z_CdcFloatvalveOrifice
]
LA2DtFitting_Origin := [-L_LAOriginToDtY - T_CdcDt; L_LAOriginToDtX; L_LAOriginToDtZ] + LA2_Origin
LA2ReducerFitting_Origin := [-L_LAOriginToReducerY - T_CdcReducer; L_LAOriginToReducerX; L_LAOriginToReducerZ] + LA2_Origin
LA2Dt_Center := [-L_LAOriginToReducerCenterY; L_LAOriginToDtCenterX; L_LAOriginToDtZ] + LA2_Origin
D_CdcCht
LA2Reducer_Center := LA2_Origin + [-L_LAOriginToReducerCenterY; L_LAOriginToReducerCenterX; L_LAOriginToReducerZ]
# will need to modify the y component of the origin since the constant head tanks will need to be offset more than the lever arms.
CHT2_Origin := [CHT_Origin[0]; CHT_Origin[1] - 2*D_CdcCht; CHT_Origin[2]]
LA3DtFitting_Origin := [-L_LAOriginToDtY - T_CdcDt; L_LAOriginToDtX; L_LAOriginToDtZ] + LA3_Origin
LA3ReducerFitting_Origin := [-L_LAOriginToReducerY - T_CdcReducer; L_LAOriginToReducerX; L_LAOriginToReducerZ] + LA3_Origin
LA3Dt_Center := [-L_LAOriginToReducerCenterY; L_LAOriginToDtCenterX; L_LAOriginToDtZ] + LA3_Origin
LA3Reducer_Center := LA3_Origin + [-L_LAOriginToReducerCenterY; L_LAOriginToReducerCenterX; L_LAOriginToReducerZ]
CHT3_Origin := [CHT_Origin[0]; CHT_Origin[1] + 2*D_CdcCht; CHT_Origin[2]]
# CDC Script
CdcLayer := layer_new("Cdc", ltpurple)
InsertLeverArm :=
    insertdwg("CdcLeverArm.dwg", LA_Origin, 1, 1, 270 deg) if N_CoagCdcTubes ≤ 3
    insertdwg("CdcLeverArmwithReducer.dwg", LA_Origin, 1, 1, 270 deg) otherwise
InsertLeverArmBracket := insertdwg("CdcLeverArmBracket.dwg", [
    Et_Origin[0] - L_Et - T_PlantWall + D_LABracketOrigintoEndBracket;
    LA_Origin[1] - D_LABOrigintoLAOriginX;
    Z_EtTop
], 1, 1, 270 deg)
InsertCht := insertdwg("CdcCht.dwg", CHT_Origin, 1, 1, 90 deg)
InsertLeverArm2 :=
    insertdwg("CdcLeverArm.dwg", LA2_Origin, 1, 1, 270 deg) if N_FilterCoagCdcTubes ≤ 3
    insertdwg("CdcLeverArmwithReducer.dwg", LA2_Origin, 1, 1, 270 deg) otherwise
InsertLeverArmBracket2 := insertdwg("CdcLeverArmBracket.dwg", [
    Et_Origin[0] - L_Et - T_PlantWall + D_LABracketOrigintoEndBracket;
    LA2_Origin[1] - D_LABOrigintoLAOriginX;
    Z_EtTop
], 1, 1, 270 deg)
InsertCht2 := insertdwg("CdcCht.dwg", CHT2_Origin, 1, 1, 90 deg)
InsertLeverArm3 :=
    insertdwg("CdcLeverArm.dwg", LA3_Origin, 1, 1, 270 deg) if N_ChlorCdcTubes ≤ 3
    insertdwg("CdcLeverArmwithReducer.dwg", LA3_Origin, 1, 1, 270 deg) otherwise
InsertLeverArmBracket3 := insertdwg("CdcLeverArmBracket.dwg", [
    Et_Origin[0] - L_Et - T_PlantWall + D_LABracketOrigintoEndBracket;
    LA3_Origin[1] - D_LABOrigintoLAOriginX;
    Z_EtTop
], 1, 1, 270 deg)
InsertCht3 := insertdwg("CdcCht.dwg", CHT3_Origin, 1, 1, 90 deg)
ConnectionCylinder := CylinderF([LA_Origin[0] - L_CdcLever/4; LA2_Origin[1] - 3*W_LeverArm; LA_Origin[2] + 4*W_LeverArm], D_Cable, LA3_Origin[1] - LA2_Origin[1] + 6*W_LeverArm, [270; 0]*deg)
FloatCable := CylinderF([
    Et_Origin[0] - L_Et - T_PlantWall + D_LATeetoLAOrigin + L_CdcFloatArm - D_LeverHole;
    LA_Origin[1] + W_LeverArm/2;
    Z_FloatTop
], D_Cable, L_Cable, [0; 90]*deg)
FreezeCdc := FreezeLayer("Cdc")
FloatCapsLayer := layer_new("CdcFloatCapPlu", green)
CdcFloatCapTop := CapF([
    Et_Origin[0] - L_Et - T_PlantWall + D_LATeetoLAOrigin + L_CdcFloatArm - D_LeverHole;
    LA_Origin[1] + W_LeverArm/2;
    Z_FloatTop - CapThickness(ND_EtFloat)
], [0; -90]*deg, ND_EtFloat)
CdcFloatCapBottom := CapF([
    Et_Origin[0] - L_Et - T_PlantWall + D_LATeetoLAOrigin + L_CdcFloatArm - D_LeverHole;
    LA_Origin[1] + W_LeverArm/2;
    Z_FloatTop - CapThickness(ND_EtFloat) - L_CdcFloat
], [0; 90]*deg, ND_EtFloat)
FloatPipeLayer := layer_new("CdcFloatPipePlu", blue)
CdcFloatPipe := PipeF([
    Et_Origin[0] - L_Et - T_PlantWall + D_LATeetoLAOrigin + L_CdcFloatArm - D_LeverHole;
    LA_Origin[1];
    Z_FloatTop - CapThickness(ND_EtFloat)
], L_CdcFloat, [0; -90]*deg, ND_EtFloat, PS_Default)
Cdc_Script := stack(CdcLayer, InsertLeverArm, InsertLeverArmBracket, InsertCht, InsertLeverArm2, InsertLeverArmBracket2, InsertCht2, InsertLeverArm3, InsertLeverArmBracket3, InsertCht3, ConnectionCylinder, FloatCable, FreezeCdc, FloatCapsLayer, CdcFloatCapTop, CdcFloatCapBottom, FreezeLayer("CdcFloatCapPlu"), FloatPipeLayer, CdcFloatPipe, FreezeLayer("CdcFloatPipePlu"))
OD_CdcFitting := 5/32*in  # Outer diameter of fitting- measured from CDC research team's fitting
ID_CdcFitting := 0.126 in  # Inner diameter of fitting- measured from CDC research team's fitting
L_CdcFitting := 0.75 in  # Length of fitting - measured from CDC research team's fitting
CdcFittingsLayer := layer_new("CdcFittings", dkgrey)
CdcFittingOuter :=
    CylinderF(LADtFitting_Origin, OD_CdcFitting/2, L_CdcFitting, [180; 0]*deg) if N_CoagCdcTubes ≤ 3
    CylinderF(LAReducerFitting_Origin, OD_CdcFitting/2, L_CdcFitting, [180; 0]*deg) otherwise
CdcFittingOuter_Array :=
    ArrayLastPolar(LADt_Center, N_CoagCdcTubes, 180 deg) if N_CoagCdcTubes ≤ 3
    ArrayLastPolar(LAReducer_Center, N_CoagCdcTubes, 180 deg) otherwise
CdcFittingOuter2 :=
    CylinderF(LA2DtFitting_Origin, OD_CdcFitting/2, L_CdcFitting, [180; 0]*deg) if N_FilterCoagCdcTubes ≤ 3
    CylinderF(LA2ReducerFitting_Origin, OD_CdcFitting/2, L_CdcFitting, [180; 0]*deg) otherwise
CdcFittingOuter2_Array :=
    ArrayLastPolar(LA2Dt_Center, N_FilterCoagCdcTubes, 180 deg) if N_FilterCoagCdcTubes ≤ 3
    ArrayLastPolar(LA2Reducer_Center, N_FilterCoagCdcTubes, 180 deg) otherwise
CdcFittingOuter3 :=
    CylinderF(LA3DtFitting_Origin, OD_CdcFitting/2, L_CdcFitting, [180; 0]*deg) if N_ChlorCdcTubes ≤ 3
    CylinderF(LA3ReducerFitting_Origin, OD_CdcFitting/2, L_CdcFitting, [180; 0]*deg) otherwise
CdcFittingOuter3_Array :=
    ArrayLastPolar(LA3Dt_Center, N_ChlorCdcTubes, 180 deg) if N_ChlorCdcTubes ≤ 3
    ArrayLastPolar(LA3Reducer_Center, N_ChlorCdcTubes, 180 deg) otherwise
FreezeCdcFittings := FreezeLayer("CdcFittings")
CdcFittingInner :=
    CylinderF(LADtFitting_Origin, ID_CdcFitting/2, L_CdcFitting, [180; 0]*deg) if N_CoagCdcTubes ≤ 3
    CylinderF(LAReducerFitting_Origin, ID_CdcFitting/2, L_CdcFitting, [180; 0]*deg) otherwise
CdcFittingInner_Array :=
    ArrayLastPolar(LADt_Center, N_CoagCdcTubes, 180 deg) if N_CoagCdcTubes ≤ 3
    ArrayLastPolar(LAReducer_Center, N_CoagCdcTubes, 180 deg) otherwise
CdcFittingInner2 :=
    CylinderF(LA2DtFitting_Origin, ID_CdcFitting/2, L_CdcFitting, [180; 0]*deg) if N_FilterCoagCdcTubes ≤ 3
    CylinderF(LA2ReducerFitting_Origin, ID_CdcFitting/2, L_CdcFitting, [180; 0]*deg) otherwise
CdcFittingInner2_Array :=
    ArrayLastPolar(LA2Dt_Center, N_CoagCdcTubes, 180 deg) if N_FilterCoagCdcTubes ≤ 3
    ArrayLastPolar(LA2Reducer_Center, N_CoagCdcTubes, 180 deg) otherwise
CdcFittingInner3 :=
    CylinderF(LA3DtFitting_Origin, ID_CdcFitting/2, L_CdcFitting, [180; 0]*deg) if N_CoagCdcTubes ≤ 3
    CylinderF(LA3ReducerFitting_Origin, ID_CdcFitting/2, L_CdcFitting, [180; 0]*deg) otherwise
CdcFittingInner3_Array :=
    ArrayLastPolar(LA3Dt_Center, N_ChlorCdcTubes, 180 deg) if N_ChlorCdcTubes ≤ 3
    ArrayLastPolar(LA3Reducer_Center, N_ChlorCdcTubes, 180 deg) otherwise
GroupFitting := GroupAll("DeleteMe")
SubtractFittingInner := SubtractF(["CdcFittings"], "DeleteMe")
FreezeCdcFittings := FreezeLayer("CdcFittings")
FlexConnectLayer := layer_new("FlexConnect", red)
SweepPoint1 := LA_Origin + [-.0894; -.792; .1092]*m
SweepPoint2 := SweepPoint1 + [1; 0; 0]*in
SweepPoint5 := CHT_Origin + [.1432; 0; -.0629]*m
SweepPoint4 := SweepPoint5 + [1; 0; 0]*in
SweepPoint3 := [(SweepPoint1[0] + SweepPoint5[0])/2; (SweepPoint1[1] + SweepPoint5[1])/2; SweepPoint1[2] - 50 cm]
SweepPathPoints := [SweepPoint1; SweepPoint2; SweepPoint3; SweepPoint4; SweepPoint5]
FlexTube_Trial := FlexTube(SweepPathPoints, .125 in, .2 in, "FlexConnect", red)
# Insert in stack when flexcylinder fixed
FlexConnectLayer, FlexTube_Trial, FreezeLayer("FlexConnect")
CdcFittings_Script := stack(CdcFittingsLayer, CdcFittingOuter, CdcFittingOuter_Array, FreezeCdcFittings, CdcFittingInner, CdcFittingInner_Array, GroupFitting, SubtractFittingInner)
# CDC Calibration Column
SF_CalCol := 1.25
Ti_Res := 1.25*min
Q_CalColMax := SF_CalCol*Q_CdcMax
Vol_CalCol := Ti_Res*Q_CalColMax
# Effective column volume for 1.25 times the max flow rate through the chemical dose controller over 1.25 minutes
D_inCCMin := sqrt(4*Vol_CalCol/(π*(H_CoagTank - (Z_CoagulantOutlet - Z_CoagulantTankBottom) - H_PlantFreeboard))) = 1.14703 in
# Minimum inner diameter for a column no taller than the length between the Coagulant Stock Tank Freeboard and the Coagulant oulet for the effective column volume
ND_CdcCalCol := NominalDiameter(D_inCCMin, PS_Default)  # Next largest nominal diameter for minimum inner diameter
D_inCalCol := innerdiameter(ND_CdcCalCol, PS_Default) = 1.175 in
H_CalCol := Vol_CalCol/(π*(D_inCalCol/2)^2) = 0.857666 m
# Calculate new height based on new inner diameter
Ti_ChlorRes := 3*Ti_Res
Q_ChlorCalColMax := SF_CalCol*Q_ChlorCdcMax
Vol_ChlorCalCol := Ti_ChlorRes*Q_ChlorCalColMax
D_inCCMinChlor := sqrt(4*Vol_ChlorCalCol/(π*(H_ChlorineTank - (Z_CoagulantOutlet - Z_CoagulantTankBottom) - H_PlantFreeboard))) = 1.04476 in
ND_ChlorCdcCalCol := NominalDiameter(D_inCCMinChlor, PS_Default)
D_inChlorCalCol := innerdiameter(ND_ChlorCdcCalCol, PS_Default) = 1.175 in
H_ChlorCalCol := Vol_ChlorCalCol/(π*(D_inChlorCalCol/2)^2) = 0.5146 m
Ti_FCRes := 3*Ti_Res
Q_FCCalColMax := SF_CalCol*Q_FCCdcMax
Vol_FCCalCol := Ti_FCRes*Q_FCCalColMax
D_inCCMinFC := sqrt(4*Vol_FCCalCol/(π*(H_FilterCoagTank - (Z_CoagulantOutlet - Z_CoagulantTankBottom) - H_PlantFreeboard))) = 1.01158 in
ND_FCCdcCalCol := NominalDiameter(D_inCCMinFC, PS_Default)
D_inFCCalCol := innerdiameter(ND_FCCdcCalCol, PS_Default) = 1.175 in
H_FCCalCol := Vol_FCCalCol/(π*(D_inFCCalCol/2)^2) = 0.482437 m
CalCol_Origin := [
    ChemPlatform_Origin[0] + L_EtChemPlatform + ConRadius(ND_CdcCalCol);
    CoagTank_Origin[1] - R_CoagTank - 0.5*S_ChemTankBorder;
    Z_CoagulantOutlet
]
TopCap_Origin := [CalCol_Origin[0]; CalCol_Origin[1]; CalCol_Origin[2] + H_CalCol]
CalCol2_Origin := [
    CalCol_Origin[0] - ConRadius(ND_CdcCalCol) + ConRadius(ND_FCCdcCalCol);
    CalCol_Origin[1] - 0.5*S_ChemTankBorder;
    Z_CoagulantOutlet
]
TopCap2_Origin := [CalCol2_Origin[0]; CalCol2_Origin[1]; CalCol2_Origin[2] + H_FCCalCol]
CalCol3_Origin := [
    CalCol_Origin[0] - ConRadius(ND_CdcCalCol) + ConRadius(ND_ChlorCdcCalCol);
    CalCol_Origin[1] + 0.5*S_ChemTankBorder;
    Z_CoagulantOutlet
]
TopCap3_Origin := [CalCol3_Origin[0]; CalCol3_Origin[1]; CalCol3_Origin[2] + H_ChlorCalCol]
MakeCalColLayer := layer_new("CdcCalColumnPlu", ltpurple)
MainCalCol := PipeF(CalCol_Origin, H_CalCol, [0; 90]*deg, ND_CdcCalCol, PS_Default)
MainCalCol2 := PipeF(CalCol2_Origin, H_FCCalCol, [0; 90]*deg, ND_FCCdcCalCol, PS_Default)
MainCalCol3 := PipeF(CalCol3_Origin, H_ChlorCalCol, [0; 90]*deg, ND_ChlorCdcCalCol, PS_Default)
FreezeCalCol := FreezeLayer("CdcCalColumnPlu")
MakeCapsLayer := layer_new("CdcColumnCapsPlu", blue2)
TopCap := CapF(TopCap_Origin, [0; -90]*deg, ND_CdcCalCol)
BottomCap := CapF(TopCap_Origin - [0 m; 0 m; H_CalCol], [0; 90]*deg, ND_CdcCalCol)
TopCap2 := CapF(TopCap2_Origin, [0; -90]*deg, ND_FCCdcCalCol)
BottomCap2 := CapF(TopCap2_Origin - [0 m; 0 m; H_FCCalCol], [0; 90]*deg, ND_FCCdcCalCol)
TopCap3 := CapF(TopCap3_Origin, [0; -90]*deg, ND_ChlorCdcCalCol)
BottomCap3 := CapF(TopCap3_Origin - [0 m; 0 m; H_ChlorCalCol], [0; 90]*deg, ND_ChlorCdcCalCol)
FreezeCapsLayer := FreezeLayer("CdcColumnCapsPlu")
# To draw the hole in the top cap, we are subtracting a cylinder from the top cap layer
Cylinder_Origin := [CalCol_Origin[0]; CalCol_Origin[1]; CalCol_Origin[2] + H_CalCol/2]
Cylinder2_Origin := [CalCol2_Origin[0]; CalCol2_Origin[1]; CalCol2_Origin[2] + H_FCCalCol/2]
Cylinder3_Origin := [CalCol3_Origin[0]; CalCol3_Origin[1]; CalCol3_Origin[2] + H_ChlorCalCol/2]
R_Cylinder := .5 cm
DrawCylinder := CylinderF(Cylinder_Origin, R_Cylinder, H_CalCol, [0; 90]*deg)
DrawCylinder2 := CylinderF(Cylinder2_Origin, R_Cylinder, H_FCCalCol, [0; 90]*deg)
DrawCylinder3 := CylinderF(Cylinder3_Origin, R_Cylinder, H_ChlorCalCol, [0; 90]*deg)
LayCylinder := GroupAll("DeleteMe")
MakeHole := SubtractF(["CdcColumnCapsPlu"], "DeleteMe")
LayStand := layer_new("CdcCalColumnStand", yellow)
BoardDim_Vert := [
    4*ConRadius(ND_CdcCalCol) + 4*ConRadius(ND_FCCdcCalCol) + 4*ConRadius(ND_ChlorCdcCalCol);
    1.5*in;
    1.25*H_CalCol
]
VertBoard_Origin := [
    CalCol_Origin[0] - BoardDim_Vert[0]/2;
    CalCol_Origin[1] + ConRadius(ND_CdcCalCol);
    ChemPlatform_Origin[2] + ChemPlatform_Dimensions[2]
]
FarCorner_VertBoard := BoardDim_Vert + VertBoard_Origin
BoardDim_Horiz := [BoardDim_Vert[0]; BoardDim_Vert[2]/(2*tan(60*deg)); 1.5*in]
HorizBoard_Origin := VertBoard_Origin + [0; BoardDim_Vert[1]; 0]
FarCorner_HorizBoard := BoardDim_Horiz + HorizBoard_Origin
BoardDim_Slant := [BoardDim_Vert[0]; 1.5 in; BoardDim_Vert[2]/(2*sin(60 deg))]
SlantBoard_Origin := FarCorner_HorizBoard
FarCorner_SlantBoard := SlantBoard_Origin + [-BoardDim_Slant[0]; -BoardDim_Slant[1]; BoardDim_Slant[2]]
MakeSlantBoard := BoxF(SlantBoard_Origin, FarCorner_SlantBoard, [0; 0; 30]*deg)
MakeVertBoard := BoxF(VertBoard_Origin, FarCorner_VertBoard, [0; 0; 0])
MakeHorizBoard := BoxF(HorizBoard_Origin, FarCorner_HorizBoard, [0; 0; 0])
RotateSupport := Rotate_All(CalCol_Origin, 90 deg)
FreezeBoards := FreezeLayer("CdcCalColumnStand")
CdcCalColumn_Script := stack(MakeCalColLayer, MainCalCol, MainCalCol2, MainCalCol3, FreezeCalCol, MakeCapsLayer, TopCap, BottomCap, TopCap2, BottomCap2, TopCap3, BottomCap3, FreezeCapsLayer, DrawCylinder, DrawCylinder2, DrawCylinder3, LayCylinder, MakeHole, LayStand, MakeSlantBoard, MakeVertBoard, MakeHorizBoard, RotateSupport, FreezeBoards)
AC_Cdc := stack(Cdc_Script, CdcFittings_Script, CdcCalColumn_Script)
