# Chemical Stock Tank AutoCAD
# Length Assignments
ND_CoagPiping := 1/2*in
R_TankOutlet := .75 in
L_FirstPipe := 0.05 m
L_SecondPipe := 0.05 m
L_ThirdPipe := 0.1 m
L_FourthPipe := 3/2*R_CoagTank - TeeLength(ND_CoagPiping)/2 - ElbowRadius(ND_CoagPiping)
L_FinalPipe := 0.1 m
L_BulkheadFittingEnd := 0.35*3/250*in
L_BallValve := 3/250*in
L_MaleInsertEnd := 3/4*3/250*in
W_EtChemPlatform := max(4*(R_CoagTank + T_ChemTankWall) + 3*S_ChemTankBorder, 4*(R_FilterCoagTank + T_ChemTankWall) + 2*S_ChemTankBorder + W_HumanMin, 4*(R_ChlorineTank + T_ChemTankWall) + 2*S_ChemTankBorder + W_HumanMin)
L_EtChemPlatform := max(2*R_CoagTank + 4*R_FilterCoagTank + 6*T_ChemTankWall + 4*S_ChemTankBorder, 2*R_CoagTank + 4*R_ChlorineTank + 6*T_ChemTankWall + 4*S_ChemTankBorder)
# Origin Points
# Shift the tanks over enough so that the tube drapes between the constant head tank and the cdc
D_LABOrigintoLAOriginZ := 0.0249 m
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# Lowest case elevation of the slider:
Z_FloorTop := Plant_Origin[2] + H_Sed - H_WalkwayToTankWall
H_SliderLow := Z_EtTop + D_LABOrigintoLAOriginZ - L_CdcScaleArm*HL_Flowmeasure/L_CdcFloatArm - Z_FloorTop
H_ChtBarbToOrifice := 0.05 m  # (under)estimated from drawing
H_TubeFromCht := Z_CdcFloatvalveOrifice - H_ChtBarbToOrifice - Z_FloorTop
L_TubeSegShort := H_SliderLow*L_CoagCdcTube/(H_SliderLow + H_TubeFromCht)
# this horiz arrow should actually go up to pivot point
L_TubeSegLong := L_CoagCdcTube - L_TubeSegShort
L_ChemTankShift :=
    max(W_HumanMin, L_CdcScaleArm + S_Operator) if L_TubeSegShort ≤ H_SliderLow
    (L_TubeSegShort*cos(asin(H_SliderLow/L_TubeSegShort)) + L_TubeSegLong*cos(asin(H_TubeFromCht/L_TubeSegLong)) + L_CdcScaleArm*cos(asin(HL_Flowmeasure/L_CdcScaleArm))) otherwise
W_EtCoagPlatform := 2*R_CoagTank + S_Operator + S_ChemTanks
# this is now defined in operator access along with the length of the platform; coag tank origin must now be redefined.
CoagTank_Origin := [
    Et_Origin[0] - L_Et - T_PlantWall - S_ChemTankBorder - R_CoagTank - T_ChemTankWall - L_ChemTankShift;
    Et_Origin[1] + W_Et + T_PlantWall - S_ChemTankBorder - R_CoagTank - T_ChemTankWall;
    Z_CoagulantTankBottom
]
# The width of the chemical platform is defined such that the largest tanks (the influent coagulant tanks) can fit on the platform side by side and the other two sets of tanks can fit with space for the operator to move behind them.
ChlorineTank_Origin := [
    CoagTank_Origin[0] - R_CoagTank - 2*T_ChemTankWall - R_ChlorineTank - S_ChemTankBorder;
    Et_Origin[1] + W_Et + T_PlantWall - S_ChemTankBorder - R_ChlorineTank - T_ChemTankWall;
    CoagTank_Origin[2]
]
FilterCoagTank_Origin := [
    CoagTank_Origin[0] - R_CoagTank - 2*T_ChemTankWall - R_FilterCoagTank - S_ChemTankBorder;
    Et_Origin[1] + W_Et + T_PlantWall + S_ChemTankBorder + R_FilterCoagTank + T_ChemTankWall - W_EtChemPlatform;
    CoagTank_Origin[2]
]
# Plumbing origin points
FilterCoagOutlet_Origin := [FilterCoagTank_Origin[0]; FilterCoagTank_Origin[1] + R_FilterCoagTank; Z_CoagulantOutlet]
ChlorOutlet_Origin := [ChlorineTank_Origin[0]; ChlorineTank_Origin[1] - R_ChlorineTank; Z_CoagulantOutlet]
CoagOutlet_Origin := [
    CoagTank_Origin[0] - sqrt(2)/2*R_CoagTank;
    CoagTank_Origin[1] - sqrt(2)/2*R_CoagTank;
    Z_CoagulantOutlet
]
CoagMaleInsert_Origin := [
    CoagOutlet_Origin[0] - sqrt(2)/2*L_BulkheadFittingEnd;
    CoagOutlet_Origin[1] - sqrt(2)/2*L_BulkheadFittingEnd;
    CoagOutlet_Origin[2]
]
FirstCoagPipe_Origin := [
    CoagMaleInsert_Origin[0] - sqrt(2)/2*L_MaleInsertEnd;
    CoagMaleInsert_Origin[1] - sqrt(2)/2*L_MaleInsertEnd;
    CoagMaleInsert_Origin[2]
]
CoagBallValve_Origin := [
    FirstCoagPipe_Origin[0] - sqrt(2)/2*L_FirstPipe;
    FirstCoagPipe_Origin[1] - sqrt(2)/2*L_FirstPipe;
    FirstCoagPipe_Origin[2]
]
SecondCoagPipe_Origin := [
    CoagBallValve_Origin[0] - sqrt(2)/2*L_BallValve;
    CoagBallValve_Origin[1] - sqrt(2)/2*L_BallValve;
    CoagBallValve_Origin[2]
]
FirstCoagElbow_Origin := [
    SecondCoagPipe_Origin[0] - sqrt(2)/2*L_SecondPipe;
    SecondCoagPipe_Origin[1] - sqrt(2)/2*L_SecondPipe;
    SecondCoagPipe_Origin[2]
]
# Draw the first coagulant tank
LayerNewCoagTanks := layer_new("CoagTanks", grey)
CoagOuterTankWall := CylinderF(CoagTank_Origin - [0 m; 0 m; T_ChemTankWall], R_CoagTank + T_ChemTankWall, H_CoagTank + T_ChemTankWall, [0; 90]*deg)
FreezeCoagTanks := FreezeLayer("CoagTanks")
CoagInnerTankWall := CylinderF(CoagTank_Origin, R_CoagTank, H_CoagTank + zc, [0; 90]*deg)
CoagSubtractionCylinder := CylinderF(CoagOutlet_Origin + [sqrt(2)/2*T_ChemTankWall; sqrt(2)/2*T_ChemTankWall; 0 m], R_TankOutlet, 3*T_ChemTankWall, [45; 0]*deg)
CoagDrainSubtractionCylinder := CylinderF(CoagTank_Origin, R_TankOutlet, 2*T_ChemTankWall, [0; 270]*deg)
GroupCoagTank := GroupAll("DeleteMe")
SubtractCoagInner := SubtractF(["CoagTanks"], "DeleteMe")
DrawCoagTanks := stack(LayerNewCoagTanks, view("t"), CoagOuterTankWall, FreezeCoagTanks, CoagInnerTankWall, CoagSubtractionCylinder, CoagDrainSubtractionCylinder, GroupCoagTank, SubtractCoagInner)
# Draw the coagulant tank plumbing
LayerCoagPieces := layer_new("CoagConnectionsPlu", green)
SecondCoagElbow := ElbowF(SecondCoagElbow_Origin, [0; 0; 270]*deg, ND_CoagPiping, PS_Modules)
CoagBulkheadFitting := insertdwg("BulkheadFitting", CoagOutlet_Origin, 3/250, 3/250, 315 deg)
CoagMaleInsert := insertdwg("MaleInsert", CoagMaleInsert_Origin, 3/250, 3/250, 315 deg)
ThirdCoagPipe := PipeF(ThirdCoagPipe_Origin, L_ThirdPipe, [0; 270]*deg, ND_CoagPiping, PS_Modules)
FourthCoagPipe := PipeF(FourthCoagPipe_Origin, L_FourthPipe, [0; 0]*deg, ND_CoagPiping, PS_Modules)
CoagBallValve := insertdwg("PvcBallValve", CoagBallValve_Origin, 1/250, 1/250, 0 deg)
RotateBallValve := Rotate3DLast(CoagBallValve_Origin, "X", 270 deg)
RotateBallValve2 := Rotate3DLast(CoagBallValve_Origin, "X", 270 deg)
bv := stack(CoagBallValve, RotateBallValve)
CoagDrainBulkheadFitting := insertdwg("BulkheadFitting", CoagTank_Origin, 3/250, 3/250, 0 deg)
RotateBulkheadFitting := Rotate3DLast(CoagTank_Origin, "X", 90 deg)
# [component: inputs bv]
CoagDrainMaleInsert := insertdwg("MaleInsert", CoagTank_Origin + [0 m; 0 m; -L_BulkheadFittingEnd], 3/250, 3/250, 0 deg)
RotateBulkheadFitting := Rotate3DLast(CoagTank_Origin + [0 m; 0 m; -L_BulkheadFittingEnd], "X", 90 deg)
LayerCoagPiecesFrz := FreezeLayer("CoagConnectionsPlu")
LayerCoagPiping := layer_new("CoagPipingPlu", blue)
FirstCoagTankPipe := PipeF(FirstCoagPipe_Origin, L_FirstPipe, [45; 0]*deg, ND_CoagPiping, PS_Modules)
SecondCoagPipe := PipeF(SecondCoagPipe_Origin, L_SecondPipe, [45; 0]*deg, ND_CoagPiping, PS_Modules)
FirstCoagTankElbow := ElbowF(FirstCoagElbow_Origin, [45; 90; 180]*deg, ND_CoagPiping, PS_Modules)
LayerCoagPipingFrz := FreezeLayer("CoagPipingPlu")
CoagPluOld := stack(CoagSubtractionCylinder, GroupCoagCylinder, SubtractCoagOutlet, LayerCoagPieces, CoagBulkheadFitting, CoagMaleInsert, FirstCoagTankElbow, CoagBallValve, SecondCoagElbow, LayerCoagPiecesFrz, LayerCoagPiping, CoagBulkheadFitting, CoagMaleInsert, FirstCoagTankPipe, FirstCoagTankElbow, SecondCoagElbow, SecondCoagPipe, CoagBallValve, ThirdCoagPipe, SecondCoagElbow, FourthCoagPipe, LayerCoagPipingFrz)
CoagPlu := stack(CoagSubtractionCylinder, CoagDrainSubtractionCylinder, GroupCoagCylinder, SubtractCoagOutlet, LayerCoagPieces, CoagBulkheadFitting, CoagMaleInsert, CoagBallValve, CoagDrainBulkheadFitting, RotateBulkheadFitting, CoagDrainMaleInsert, RotateBulkheadFitting, LayerCoagPiping, FirstCoagTankPipe, SecondCoagPipe, FirstCoagTankElbow, LayerCoagPipingFrz)
# Reflect the first coagulant tank and associated plumbing
ThawCoagPieces := ThawMultiple(["CoagTanks"; "CoagConnectionsPlu"; "CoagPipingPlu"])
MirrorCoagTank := MirrorAll([
    CoagTank_Origin[0] - (R_CoagTank + T_ChemTankWall) + zc;
    CoagTank_Origin[1] - R_CoagTank - T_ChemTankWall - 0.5*S_ChemTankBorder
], [
    CoagTank_Origin[0] - (R_CoagTank + T_ChemTankWall) - zc;
    CoagTank_Origin[1] - R_CoagTank - T_ChemTankWall - 0.5*S_ChemTankBorder
], "n")
MirrorCoagTanknew := Mirror3dAll("XZ", [CoagTank_Origin[0] - R_CoagTank - T_ChemTankWall - 0.5*S_ChemTankBorder; 0 m; 0 m], "N")
LayerFreezeCoagPieces := FreezeMultiple(["CoagTanks"; "CoagConnectionsPlu"; "CoagPipingPlu"])
CoagTankReflect := stack(ThawCoagPieces, MirrorCoagTank, LayerFreezeCoagPieces)
# Draw the first chlorine tank
LayerNewChlorineTanks := layer_new("ChlorTanks", grey)
ChlorOuterTankWall := CylinderF(ChlorineTank_Origin - [0 m; 0 m; T_ChemTankWall], R_ChlorineTank + T_ChemTankWall, H_ChlorineTank + T_ChemTankWall, [0; 90]*deg)
ChlorInnerTankWall := CylinderF([ChlorineTank_Origin[0]; ChlorineTank_Origin[1]; ChlorineTank_Origin[2] + T_ChemTankWall], R_ChlorineTank, H_ChlorineTank + zc, [0; 90]*deg)
SubtractChlorInner := SubtractGeneral([[
    ChlorineTank_Origin[0] - (R_ChlorineTank + T_ChemTankWall);
    ChlorineTank_Origin[1];
    ChlorineTank_Origin[2]
]], [[ChlorineTank_Origin[0] - R_ChlorineTank; ChlorineTank_Origin[1]; ChlorineTank_Origin[2]]])
LayerFreezeChlorineTanks := FreezeLayer("ChlorTanks")
ChlorSubtractionCylinder := CylinderF(ChlorOutlet_Origin + [0 m; T_ChemTankWall; 0 m], R_TankOutlet, 3*T_ChemTankWall, [90; 0]*deg)
ChlorDrainSubtractionCylinder := CylinderF(ChlorineTank_Origin, R_TankOutlet, T_ChemTankWall, [0; 270]*deg)
GroupChlorTank := GroupAll("DeleteMe")
SubtractChlorInner := SubtractF(["ChlorTanks"], "DeleteMe")
DrawChlorTanks := stack(LayerNewChlorineTanks, view("t"), ChlorOuterTankWall, ChlorInnerTankWall, SubtractChlorInner, LayerFreezeChlorineTanks, ChlorSubtractionCylinder, ChlorDrainSubtractionCylinder, GroupChlorTank, SubtractChlorInner)
ChlorOutlet_Origin := [ChlorTank_Origin[0]; ChlorTank_Origin[1] - R_ChlorTank - 2*T_ChemTankWall; Z_CoagulantOutlet]
ChlorBulkheadFitting_Origin := [ChlorTank_Origin[0]; ChlorTank_Origin[1] - R_ChlorTank - T_ChemTankWall; Z_CoagulantOutlet]
ChlorMaleInsert_Origin := [ChlorTank_Origin[0]; ChlorTank_Origin[1] - L_BulkheadFittingEnd; ChlorOutlet_Origin[2]]
ChlorSubtractionCylinder := CylinderF(ChlorOutlet_Origin, R_TankOutlet, 5*T_ChemTankWall, [270; 0]*deg)
GroupChlorCylinder := GroupAll("DeleteMe")
SubtractChlorOutlet := SubtractF(["ChlorTanks"], "DeleteMe")
LayerChlorPieces := layer_new("ChlorConnectionsPlu", green)
ChlorBulkheadFitting := insertdwg("BulkheadFitting", ChlorBulkheadFitting_Origin, 3/250, 3/250, 0 deg)
ChlorMaleInsert := insertdwg("MaleInsert", ChlorMaleInsert_Origin, 3/250, 3/250, 0 deg)
FirstCoagTankElbow := ElbowF(FirstCoagElbow_Origin, [0; 90; 180]*deg, ND_CoagPiping, PS_Modules)
CoagBallValve := insertdwg("PvcBallValve", CoagBallValve_Origin, 1/250, 1/250, 0 deg)
SecondCoagElbow := ElbowF(SecondCoagElbow_Origin, [0; 0; 270]*deg, ND_CoagPiping, PS_Modules)
LayerCoagPiecesFrz := FreezeLayer("CoagConnectionsPlu")
LayerCoagPiping := layer_new("CoagPipingPlu", blue)
FirstCoagTankPipe := PipeF(FirstCoagPipe_Origin, L_FirstPipe, [90; 0]*deg, ND_CoagPiping, PS_Modules)
SecondCoagPipe := PipeF(SecondCoagPipe_Origin, L_SecondPipe, [0; 270]*deg, ND_CoagPiping, PS_Modules)
ThirdCoagPipe := PipeF(ThirdCoagPipe_Origin, L_ThirdPipe, [0; 270]*deg, ND_CoagPiping, PS_Modules)
FourthCoagPipe := PipeF(FourthCoagPipe_Origin, L_FourthPipe, [0; 0]*deg, ND_CoagPiping, PS_Modules)
LayerCoagPipingFrz := FreezeLayer("CoagPipingPlu")
ChlorPlu := stack(CoagSubtractionCylinder, GroupCoagCylinder, SubtractCoagOutlet, LayerCoagPieces, CoagBulkheadFitting, CoagMaleInsert, FirstCoagTankElbow, CoagBallValve, SecondCoagElbow, LayerCoagPiecesFrz, LayerCoagPiping, CoagBulkheadFitting, CoagMaleInsert, FirstCoagTankPipe, FirstCoagTankElbow, SecondCoagElbow, SecondCoagPipe, CoagBallValve, ThirdCoagPipe, SecondCoagElbow, FourthCoagPipe, LayerCoagPipingFrz)
# Draw the chlorine tank plumbing
# Reflect the first chlorine tank and associated plumbing
ThawChlorPieces := ThawMultiple(["ChlorTanks"; "ChlorConnectionsPlu"; "ChlorPipingPlu"])
MirrorChlorTank := MirrorAll([
    ChlorineTank_Origin[0] - R_ChlorineTank - T_ChemTankWall - 0.5*S_ChemTankBorder;
    ChlorineTank_Origin[1] - (R_ChlorineTank + T_ChemTankWall) - zc
], [
    ChlorineTank_Origin[0] - R_ChlorineTank - T_ChemTankWall - 0.5*S_ChemTankBorder;
    ChlorineTank_Origin[1] - (R_ChlorineTank + T_ChemTankWall) + zc
], "n")
MirrorChlorTanknew := Mirror3dAll("XZ", [ChlorineTank_Origin[0] - (R_ChlorineTank + T_ChemTankWall + 0.5*S_ChemTanks); 0 m; 0 m], "N")
LayerFreezeChlorPieces := FreezeMultiple(["ChlorTanks"; "ChlorConnectionsPlu"; "ChlorPipingPlu"])
ChlorTankReflect := stack(ThawChlorPieces, MirrorChlorTank, LayerFreezeChlorPieces)
# Draw the first filter coagulant tank
LayerNewFilterCoagTanks := layer_new("FilterCoagTanks", grey)
FilterCoagOuterTankWall := CylinderF(FilterCoagTank_Origin - [0 m; 0 m; T_ChemTankWall], R_FilterCoagTank + T_ChemTankWall, H_FilterCoagTank + T_ChemTankWall, [0; 90]*deg)
FilterCoagInnerTankWall := CylinderF([FilterCoagTank_Origin[0]; FilterCoagTank_Origin[1]; FilterCoagTank_Origin[2] + T_ChemTankWall], R_FilterCoagTank, H_FilterCoagTank + zc, [0; 90]*deg)
SubtractFilterCoagInner := SubtractGeneral([[
    FilterCoagTank_Origin[0] - (R_FilterCoagTank + T_ChemTankWall);
    FilterCoagTank_Origin[1];
    FilterCoagTank_Origin[2]
]], [[FilterCoagTank_Origin[0] - R_FilterCoagTank; FilterCoagTank_Origin[1]; FilterCoagTank_Origin[2]]])
LayerFreezeFilterCoagTanks := FreezeLayer("FilterFilterCoagTanks")
FilterCoagSubtractionCylinder := CylinderF(FilterCoagOutlet_Origin + [0 m; -T_ChemTankWall; 0 m], R_TankOutlet, 3*T_ChemTankWall, [270; 0]*deg)
FilterCoagDrainSubtractionCylinder := CylinderF(FilterCoagTank_Origin, R_TankOutlet, T_ChemTankWall, [0; 270]*deg)
GroupFilterCoagTank := GroupAll("DeleteMe")
SubtractFilterCoagInner := SubtractF(["FilterCoagTanks"], "DeleteMe")
DrawFilterCoagTanks := stack(LayerNewFilterCoagTanks, view("t"), FilterCoagOuterTankWall, FilterCoagInnerTankWall, SubtractFilterCoagInner, LayerFreezeFilterCoagTanks, FilterCoagSubtractionCylinder, FilterCoagDrainSubtractionCylinder, GroupFilterCoagTank, SubtractFilterCoagInner)
# Draw the filter coagulant tank plumbing
CoagOutlet_Origin := [CoagTank_Origin[0]; CoagTank_Origin[1] - R_CoagTank - 2*T_ChemTankWall; Z_CoagulantOutlet]
CoagBulkheadFitting_Origin := [CoagTank_Origin[0]; CoagTank_Origin[1] - R_CoagTank - T_ChemTankWall; Z_CoagulantOutlet]
CoagMaleInsert_Origin := [CoagOutlet_Origin[0]; CoagOutlet_Origin[1] - L_BulkheadFittingEnd; CoagOutlet_Origin[2]]
CoagSubtractionCylinder := CylinderF(CoagOutlet_Origin, R_TankOutlet, 5*T_ChemTankWall, [270; 0]*deg)
GroupCoagCylinder := GroupAll("DeleteMe")
SubtractCoagOutlet := SubtractF(["CoagTanks"], "DeleteMe")
LayerCoagPieces := layer_new("CoagConnectionsPlu", green)
CoagBulkheadFitting := insertdwg("BulkheadFitting", CoagBulkheadFitting_Origin, 3/250, 3/250, 0 deg)
CoagMaleInsert := insertdwg("MaleInsert", CoagMaleInsert_Origin, 3/250, 3/250, 0 deg)
FirstCoagTankElbow := ElbowF(FirstCoagElbow_Origin, [0; 90; 180]*deg, ND_CoagPiping, PS_Modules)
CoagBallValve := insertdwg("PvcBallValve", CoagBallValve_Origin, 1/250, 1/250, 0 deg)
SecondCoagElbow := ElbowF(SecondCoagElbow_Origin, [0; 0; 270]*deg, ND_CoagPiping, PS_Modules)
LayerCoagPiecesFrz := FreezeLayer("CoagConnectionsPlu")
LayerCoagPiping := layer_new("CoagPipingPlu", blue)
FirstCoagTankPipe := PipeF(FirstCoagPipe_Origin, L_FirstPipe, [90; 0]*deg, ND_CoagPiping, PS_Modules)
SecondCoagPipe := PipeF(SecondCoagPipe_Origin, L_SecondPipe, [0; 270]*deg, ND_CoagPiping, PS_Modules)
ThirdCoagPipe := PipeF(ThirdCoagPipe_Origin, L_ThirdPipe, [0; 270]*deg, ND_CoagPiping, PS_Modules)
FourthCoagPipe := PipeF(FourthCoagPipe_Origin, L_FourthPipe, [0; 0]*deg, ND_CoagPiping, PS_Modules)
LayerCoagPipingFrz := FreezeLayer("CoagPipingPlu")
CoagPlu := stack(CoagSubtractionCylinder, GroupCoagCylinder, SubtractCoagOutlet, LayerCoagPieces, CoagBulkheadFitting, CoagMaleInsert, FirstCoagTankElbow, CoagBallValve, SecondCoagElbow, LayerCoagPiecesFrz, LayerCoagPiping, CoagBulkheadFitting, CoagMaleInsert, FirstCoagTankPipe, FirstCoagTankElbow, SecondCoagElbow, SecondCoagPipe, CoagBallValve, ThirdCoagPipe, SecondCoagElbow, FourthCoagPipe, LayerCoagPipingFrz)
# Reflect the first filter coagulant tank and associated plumbing
ThawFilterCoagPieces := ThawMultiple(["FilterCoagTanks"; "FilterCoagConnectionsPlu"; "FilterCoagChlorPipingPlu"])
MirrorFilterCoagTank := MirrorAll([
    FilterCoagTank_Origin[0] - R_FilterCoagTank - T_ChemTankWall - 0.5*S_ChemTankBorder;
    FilterCoagTank_Origin[1] - (R_FilterCoagTank + T_ChemTankWall) - zc
], [
    FilterCoagTank_Origin[0] - R_FilterCoagTank - T_ChemTankWall - 0.5*S_ChemTankBorder;
    FilterCoagTank_Origin[1] - (R_FilterCoagTank + T_ChemTankWall) + zc
], "n")
MirrorFilterCoagTanknew := Mirror3dAll("XZ", [FilterCoagTank_Origin[0] - (R_FilterCoagTank + T_ChemTankWall + 0.5*S_ChemTanks); 0 m; 0 m], "N")
LayerFreezeFilterCoagPieces := FreezeMultiple(["FilterCoagTanks"; "FilterCoagConnectionsPlu"; "FilterCoagPipingPlu"])
FilterCoagTankReflect := stack(ThawFilterCoagPieces, MirrorFilterCoagTank, LayerFreezeFilterCoagPieces)
# Draw the plumbing that connects the mirrored pieces
LayerNewCoagTee := layer_new("CoagTeePlu", green)
CoagConnectingTee := TeeF(CoagTee_Origin, [0; 0; 270]*deg, ND_CoagPiping, PS_Modules)
FinalCoagPipe := PipeF(FinalCoagPipe_Origin, L_FinalPipe, [0; 270]*deg, ND_CoagPiping, PS_Modules)
CoagTee := stack(LayerNewCoagTee, CoagConnectingTee, FinalCoagPipe)
LayerFreezeCoagTee := FreezeLayer("CoagTeePlu")  # the freeze is not stacked because we will only freeze it if it we do NOT need to mirror the entrance tank
# If needed, mirror coagulant tanks and plumbing to other side of the entrance tank
UnfreezeCoagMirrorPieces := ThawMultiple(["CoagTanks"; "CoagConnectionsPlu"])
MirrorAllCoagTanks := Mirror3dAll("YZ", [Plant_Origin[0] - 1/2*L_Sed; 0 m; 0 m], "Y")
# mirror when there is an odd number off floc channels,
# mirroring is in the second one
CoagMirrorAll := stack(UnfreezeCoagMirrorPieces, MirrorAllCoagTanks)
CoagTanks := stack(DrawCoagTanks, CoagPlu, CoagTankReflect)
ChlorTanks := stack(DrawChlorTanks, ChlorPlu, ChlorTankReflect)
FilterCoagTanks := stack(DrawFilterCoagTanks, FilterCoagPlu, FilterCoagTankReflect)
AC_ChemTanks := stack(DrawCoagTanks, CoagTankReflect, DrawChlorTanks, ChlorTankReflect, DrawFilterCoagTanks, FilterCoagTankReflect)
