# [reference: MasterProgram.xmcd]
# [reference: new entrance tank.xmcd]
# [reference: EntTank.xmcd]
K_ValveGate := .11
K_Ent := 0.5
K_Exit := 1
K_Valve := K_Ent + K_ValveGate + K_Exit
A_FlocValve := π*(D_FlocValve/2)^2
A_SedDrainValve := π*(D_SedDrainValve/2)^2
Q_DChannel := (A_FlocValve*(2*g*HW_FlocStart/K_Valve)^(1/2)) + ((N_FlocValves - 1)*A_FlocValve*(2*g*HW_FlocChannel/K_Valve)^(1/2)) + (A_SedDrainValve*N_SedBays*(2*g*HW_Sed/K_Valve)^(1/2)) + (3*(Pi_VenaContractaOrifice*A_circle(ND_EtDrain)*sqrt(2*g*HW_EtMax))) = 0.0930711 m^3/s
h_frectreal(Q, w, L, ν, ε, open) :=
    h_temp ← 1 m
    h_tempprev ← h_frect(Q, w, h_temp, L, ν, ε, open)
    error ← 1
    while error > 0.01
        h_temp ← h_tempprev
        h_tempprev ← (f_rect(Q, w, h_temp, ν, ε, open)*L*Q^2*(2 + w/h_temp)/(8*g*(w/h_temp)^3))^(1/6)
        error ← 0 if h_tempprev == 0 m
        error ← |h_temp - h_tempprev|/mean(h_temp, h_tempprev) otherwise
    return h_tempprev
(3*Pi_VenaContractaOrifice*A_circle(ND_EtDrain)*sqrt(2*g*HW_EtMax))
w_DC := .5 m
L_DC := (N_SedBays*N_SedTanks*W_SedBay) + (W_FlocChannel*N_FlocChannels) + ((N_SedBays + 1)*T_PlantWall) + N_FlocChannels*T_PlantWall + 2*W_InletChannel + (L_RMPipeHorizLower + SocketDepth(ND_EtDrain) + ElbowRadius(ND_EtDrain)) = 9.66613 m
h_DC := h_frectreal(Q_DChannel, w_DC, L_DC, 1*mm^2/s, 1 mm, 1) = 11.3514 cm
DChannel_origin := [
    Plant_Origin[0] - L_Sed - T_PlantWall;
    Plant_Origin[1] - 2*W_InletChannel;
    Plant_Origin[2] - h_DC - 2*T_PlantWall
] = [-3.98048; -0.83574; -0.413514] m
p1 := [DChannel_origin[0] - 2*T_PlantWall - W_InletChannel; DChannel_origin[1]; DChannel_origin[2] + h_DC]
p2 := [
    DChannel_origin[0] - 2*T_PlantWall - W_InletChannel;
    DChannel_origin[1];
    DChannel_origin[2] - T_PlantWall
]
p3 := [
    DChannel_origin[0] - T_PlantWall - W_InletChannel/2;
    DChannel_origin[1];
    DChannel_origin[2] - T_PlantWall - W_InletChannel/2
]
p4 := [DChannel_origin[0]; DChannel_origin[1]; DChannel_origin[2] - T_PlantWall]
p5 := [DChannel_origin[0]; DChannel_origin[1]; DChannel_origin[2] + h_DC]
p6 := [DChannel_origin[0] - T_PlantWall; DChannel_origin[1]; DChannel_origin[2] + h_DC]
p7 := [DChannel_origin[0] - T_PlantWall; DChannel_origin[1]; DChannel_origin[2] - T_PlantWall]
p8 := [
    DChannel_origin[0] - T_PlantWall - W_InletChannel/2;
    DChannel_origin[1];
    DChannel_origin[2] - W_InletChannel/2
]
p9 := [
    DChannel_origin[0] - T_PlantWall - W_InletChannel;
    DChannel_origin[1];
    DChannel_origin[2] - T_PlantWall
]
p10 := [DChannel_origin[0] - T_PlantWall - W_InletChannel; DChannel_origin[1]; DChannel_origin[2] + h_DC]
p11 := p1
q1 := [
    DChannel_origin[0] - 2*T_PlantWall - W_InletChannel;
    DChannel_origin[1] + L_DC;
    DChannel_origin[2] + h_DC
]
q2 := [
    DChannel_origin[0] - 2*T_PlantWall - W_InletChannel;
    DChannel_origin[1] + L_DC;
    DChannel_origin[2] - T_PlantWall + h_DC
]
q3 := [
    DChannel_origin[0] - T_PlantWall - W_InletChannel/2;
    DChannel_origin[1] + L_DC;
    DChannel_origin[2] - T_PlantWall - W_InletChannel/2 + h_DC
]
q4 := [DChannel_origin[0]; DChannel_origin[1] + L_DC; DChannel_origin[2] - T_PlantWall + h_DC]
q5 := [DChannel_origin[0]; DChannel_origin[1] + L_DC; DChannel_origin[2] + h_DC]
q6 := [DChannel_origin[0] - T_PlantWall; DChannel_origin[1] + L_DC; DChannel_origin[2] + h_DC]
q7 := [
    DChannel_origin[0] - T_PlantWall;
    DChannel_origin[1] + L_DC;
    DChannel_origin[2] - T_PlantWall + h_DC
]
q8 := [
    DChannel_origin[0] - T_PlantWall - W_InletChannel/2;
    DChannel_origin[1] + L_DC;
    DChannel_origin[2] - W_InletChannel/2 + h_DC
]
q11 := q1
q9 := [
    DChannel_origin[0] - T_PlantWall - W_InletChannel;
    DChannel_origin[1] + L_DC;
    DChannel_origin[2] - T_PlantWall + h_DC
]
q10 := [
    DChannel_origin[0] - T_PlantWall - W_InletChannel;
    DChannel_origin[1] + L_DC;
    DChannel_origin[2] + h_DC
]
parray := [p1; p2; p3; p4; p5; p6; p7; p8; p9; p10; p11]
qarray := [q1; q2; q3; q4; q5; q6; q7; q8; q9; q10; q11]
Drainchannelscript :=
    viewtopi ← viewtop1
    layer1 ← layer_new("DrainChannel", ltgrey)
    crosssection1 ← Pline3D(parray)
    crosssection2 ← Pline3D(qarray)
    viewtopii ← viewtop1
    loft1 ← Loft(p3, q3)
    one ← stack(viewtopi, layer1, crosssection1, crosssection2, viewtopii, loft1)
    return one
AC_DrainChannel := stack(Drainchannelscript)
# [component: inputs AC_DrainChannel]
