# [reference: MasterProgram.xmcd]
# Drain Channel
K_ValveGate := .11
K_Ent := 0.5
K_Exit := 1
K_Valve := K_Ent + K_ValveGate + K_Exit
V_Valve := sqrt(h_e*2*g/K_Valve)  # error: This value must be a scalar.
Ti_Drain := 15 min
A_FlocValve := π*(D_FlocValve/2)^2
A_SedDrainValve := π*(D_SedDrainValve/2)^2
Q_DChannel := (A_FlocValve*(2*g*HW_FlocStart/K_Valve)^(1/2)) + ((N_FlocValves - 1)*A_FlocValve*(2*g*HW_FlocChannel/K_Valve)^(1/2)) + (A_SedDrainValve*N_SedBays*(2*g*HW_Sed/K_Valve)^(1/2))
Q_DChannel = 432.555 L/s
Q_Plant = 0.15 m^3/s
N_SedBays = 4
N_SedTanks = 4
N_SedBays*W_SedBay = 4.24 m
Vol_DChannel := Q_DChannel/2*Ti_Drain = 194.65 m^3
N_FlocChannels*W_FlocChannel = 8.34605 m
f_rect(Q_DChannel, 2 m, 1 m, Nu_Water, 2 mm, open) =  # error: This value must be a scalar.
f_rect(Q, w, b, ν, ε, open) :=
    f ← 0.25/log(ε/(3.7*4*R_h(w, b, open)) + 5.74/Re_rect(Q, w, b, ν, open)^0.9)^2 if Re_rect(Q, w, b, ν, open) > Re_pipetransition
    f ← 64/Re_rect(Q, w, b, ν, open) otherwise
    return f
h_frect(Q, w, b, L, ν, ε, open) := f_rect(Q, w, b, ν, ε, open)*L/(4*R_h(w, b, open))*Q^2/(2*g*(w*b)^2)
h_frectreal(Q, w, b, L, ν, ε, open) :=
    h_temp ← 0 m
    h_tempprev ← h_frect(Q, w, b, L, ν, ε, open)
    error ← 1
    while error > 0.01
        (h_temp ← h_tempprev)
        h_tempprev ← (f_rect(Q, w, b, ν, ε, open)*L*Q^2*(2 + w/b)/(8*g*(w/b)^3))^(1/6)
        error ← 0 if h_tempprev == 0 m
        error ← |h_temp - h_tempprev|/mean(h_temp, h_tempprev) otherwise
    return h_tempprev
# This term needs to be updated using h.temp somehow.
h_frectreal(Q, w, b, L, ν, ε, open) = h_DC  # error: This function requires at least 3 arguments but is applied to 1.
DChannel_origin := [
    Plant_Origin[0] - L_Sed - W_InletChannel - 2*T_Brick;
    Plant_Origin[1] - T_PlantWall;
    Plant_Origin[2] - h_DC
]  # error: This variable is undefined.
DChannel_dim := [0.5*h_DC; (N_SedBays*W_SedBays) + L_Floc; h_DC]  # error: This variable is undefined.
Drainchannelscript :=
    layer ← layer_new("Drain Channel", ltgrey)
    channel1 ← ChannelDrawing(DChannel_origin, [W_Sed + L_Floc + 2*T_PlantWall; W_DC; h_DC], T_ChannelWall)
    rotate1 ← rotate(echannel_origin, 90)
    bigunion ← union_allA
    layerset ← layer_set("0")
    layerfreeze ← layer_freeze("Drain Channel")
    one ← stack(layer, channel1, rotate1, bigunion, layerset, layerfreeze)
    return one  # error: This variable is undefined.
