# [reference: MasterProgram.xmcd]
# Dimensions
slope_dim := [W_SedSlopePlate; L_SedInlet; T_SedInletSlope]
sedport_dim := [W_SedSlopePlate; L_SedPort; T_SedInletSlope]
# Origins
slope_origin := [0; 0; 0]
sedport_origin := [W_SedSlopePlate; 0; 0]
sedslopeplate :=
    viewtop ← viewtop1
    box1 ← box(origin, slope_dim)
    box2 ← box(sedport_origin, sedport_dim)
    subtract1 ← subtractD(origin, sedport_origin)
    viewfront ← viewfront1
    array ← arrayB(origin, 1, N_SedPorts, W_SedSlopePlate)
    union ← union_allA
    viewside ← viewrightside1
    rotate ← rotate_3d(origin, origin, "z", 60)
    one ← stack(viewtop, box1, box2, subtract1, viewfront, array, union, viewside, rotate)
    return one
SedSlope := sedslopeplate
# [component: inputs FlocTank]
# [component: inputs SedSlope]
