T_EtLedge := 10*ND_Rebar
S_Walkway := 1.5 m
Et_Origin := [
    {
        (FlocCoupling_Origin[0] + L_EtHopper*(N_EtHoppers - 1) + 1/2*L_EtHopper + T_EtLedge + ConRadius(ND_EtOverflow) + ConRadius(ND_RMPipe) + S_Fitting) if mod(N_FlocChannels, 2) == 0
        (FlocCoupling_Origin[0] + L_EtHopper*(N_EtHoppers - 1) + 1/2*L_EtHopper + T_EtLedge + ConRadius(ND_EtOverflow) + S_Fitting) otherwise
    };
    Plant_Origin[1] + N_SedTanks*(W_Sed + T_PlantWall) + (N_FlocChannels*(W_FlocChannel + T_PlantWall)) + S_Walkway + CouplingLength(ND_RMPipe) + ElbowRadius(ND_RMPipe) + ShortTeeLength(ND_RMPipe);
    Z_Et
] = [3.7112; 10.4002; 0.782137] m
L_RMPipeHorizLower := Et_Origin[1] - floc_origin[1] - N_FlocChannels*(T_PlantWall + W_FlocChannel) - ElbowRadius(ND_RMPipe) - ShortTeeLength(ND_RMPipe) + 2*SocketDepth(ND_RMPipe) - ConRadius(ND_RMPipe) - S_Elbow - T_PlantWall
L_RMPipeVertLower := Z_EtExit - ShortTeeLength(ND_RMPipe) - FlocCoupling_Origin[2] - ElbowRadius(ND_RMPipe)
L_CdcLever := 0.45 m  # assumed from Drew's drawing for now
L_EtExitInner := W_Et/2 - ElbowRadius(ND_RMPipe) + T_PlantWall
# might need to add a constraint to lever arm length to ensure
# that the float isn't obstructed by the hopper in the min flow
# situation
L_EtWeir := ZW_Et - Et_Origin[2] + SocketDepth(ND_RMPipe)
L_EtDrainPipe :=
    (ConRadius(ND_RMPipe)*tan(AN_EtSlope) - CouplingLength(ND_RMPipe) + SocketDepth(ND_RMPipe) - T_PlantWall) if ConRadius(ND_RMPipe)*tan(AN_EtSlope) < CouplingLength(ND_RMPipe) + T_PlantWall
    2*SocketDepth(ND_RMPipe)
L_RMTeePipe := ZW_RMPipe + H_PlantFreeboard - Z_EtExit - ShortTeeLength(ND_RMPipe)
H_LfomPipe := Z_EtTop - Z_EtExit - ElbowRadius(ND_RMPipe)
# Origin Points
EtDrainElbow_Origin := [
    Et_Origin[0] - L_Et + L_EtHopper/2;
    Et_Origin[1] + ConRadius(ND_EtDrain) + S_Fitting;
    Z_EtHorizDrainPipe + ElbowRadius(ND_EtDrain)
]
# don't forget micromix plate!!!
ND_EtFloat =  # error: This variable is undefined.
S_EtFloat =  # error
# x is the width
# y is the length
# z is the height
L_Et =  # error
Z_EtTop =  # error
Et_Dim := [L_Et; W_Et; H_Et] = [4.14216; 0.54; 1.6] m
EtHopper_Origin := [Et_Origin[0]; Et_Origin[1] + W_Et; Et_Origin[2]] = [3.7112; 10.9402; 0.782137] m
EtHopper3_Origin := [Et_Origin[0] - L_EtHopper; Et_Origin[1] + W_Et; Et_Origin[2]] = [2.70066; 10.9402; 0.782137] m
# Right side of 1st hopper
Hopper1_Farcorner := [Et_Origin[0] - 1/2*L_EtHopper + ConRadius(ND_EtDrain) + S_Fitting; Et_Origin[1]; Z_EtHopper] = [3.30927; 10.4002; 1.4783] m
Hopper2_Farcorner := [
    Et_Origin[0] - W_Et + max(2*(ConRadius(ND_EtDrain) + S_Fitting), W_Et - H_EtHopperBack/tan(AN_EtSlope));
    Et_Origin[1] + W_Et + L_EtHopper;
    H_EtHopperBack + Z_Et
] = [3.37788; 11.9508; 1.35946] m  # backside  of 1st hopper
# Left side of 1st hopper
Hopper3_Farcorner := [Et_Origin[0] - 1/2*L_EtHopper - ConRadius(ND_EtDrain) - S_Fitting; Et_Origin[1]; Z_EtHopper] = [3.10259; 10.4002; 1.4783] m
EtHopper_CopyPoints :=
    for i ∈ 0 .. N_EtHoppers - 2
        Et_Hopper.Array[i] ← [Et_Origin[0] - T_EtLedge - (i + 1)*L_EtHopper; Et_Origin[1]; Et_Origin[2]]
    return Et_Hopper.Array
# this is the upper elbow (connected to the LFOM)
RMElbow1_Origin := [
    FlocCoupling_Origin[0];
    Et_Origin[1] + ConRadius(ND_RMPipe) + S_Fitting - ElbowRadius(ND_RMPipe);
    Z_EtExit
]
EtWeir_Origin := [
    Et_Origin[0] - S_Fitting - ConRadius(ND_EtOverflow);
    Et_Origin[1] + W_Et - ConRadius(ND_EtOverflow) - S_Fitting;
    Z_EtTop - H_PlantFreeboard
]
L_RMExitPipe :=
    2*SocketDepth(ND_RMPipe) if ElbowRadius(ND_RMPipe) - ConRadius(ND_RMPipe) - S_Fitting ≥ T_PlantWall
    (T_PlantWall - ElbowRadius(ND_RMPipe) + ConRadius(ND_RMPipe) + S_Fitting + SocketDepth(ND_RMPipe)) otherwise
RMTee_Origin := RMElbow1_Origin - [0 m; L_RMExitPipe; 0 m]
RMElbow2_Origin := [
    FlocCoupling_Origin[0];
    RMTee_Origin[1] - ShortTeeLength(ND_RMPipe) - ElbowRadius(ND_RMPipe);
    FlocCoupling_Origin[2]
]  # this is the lower elbow
L_RMPipeVert := RMElbow1_Origin[2] - ShortTeeLength(ND_RMPipe) - FlocCoupling_Origin[2] - ElbowRadius(ND_RMPipe)
L_RMFlocPipe := RMElbow2_Origin[1] - FlocCoupling_Origin[1] - CouplingLength(ND_RMPipe) + SocketDepth(ND_RMPipe)
Z_EtHorizDrainPipe := Z_Et - T_PlantWall - S_Fitting - ConRadius(ND_EtOverflow)
# Scripts
EtTankScript :=
    EntTankLayer ← layer_new("EntranceTank", ltgrey)
    EntTank ← Tank(Et_Origin, Et_Dim, T_PlantWall)
    FreezeEntTank ← FreezeLayer("EntranceTank")
    HopperLayer ← layer_new("EtHopper", blue)
    Hopper1 ← WedgeF(EtHopper_Origin, Hopper1_Farcorner, [0; 0; 0]*deg)
    Hopper2 ← WedgeF(EtHopper_Origin, Hopper2_Farcorner, [90; 0; 0]*deg)
    Hopper3 ← WedgeF(EtHopper3_Origin, Hopper3_Farcorner, [0; 0; 0]*deg)
    UnionHopper ← union_allA
    GroupHopper ← GroupAll("EtHopper")
    CopyEtHopper ← CopyGroup("EtHopper", Et_Origin, EtHopper_CopyPoints)
    Ledge ← BoxF(EtHopper3_Origin, EtHopper3_Origin - [T_EtLedge; W_Et; -H_EtHopper], [0; 0; 0]*deg)
    FreezeHopper ← FreezeLayer("EtHopper")
    TrashRackSlot1 ← BoxF(EtHopper3_Origin + [-(2*ND_Rebar); 2*ND_Rebar; H_EtHopper - 2*ND_Rebar], EtHopper3_Origin + [-4*ND_Rebar; -W_Et - 2*ND_Rebar; H_EtHopper + H_EtTop + H_PlantFreeboard + zc], [0; 0; 0]*deg)
    TrashRackSlot2 ← BoxF(EtHopper3_Origin + [-6*ND_Rebar; 2*ND_Rebar; H_EtHopper - 2*ND_Rebar], EtHopper3_Origin + [-8*ND_Rebar; -W_Et - 2*ND_Rebar; H_EtHopper + H_EtTop + H_PlantFreeboard + zc], [0; 0; 0]*deg)
    GroupSlots ← GroupAll("DeleteMe")
    SubtractSlots ← SubtractF(["EntranceTank"; "EtHopper"], "DeleteMe")
    return stack(EntTankLayer, EntTank, FreezeEntTank, HopperLayer, Hopper1, Hopper2, Hopper3, UnionHopper, GroupHopper, CopyEtHopper, Ledge, FreezeHopper, TrashRackSlot1, TrashRackSlot2, GroupSlots, SubtractSlots)
EtTrashRackScript :=
    TRLayer ← layer_new("TrashRack", yellow)
    HorizCylinder ← CylinderF(EtHopper3_Origin + [-(2*ND_Rebar) - 1/2*ND_Rebar; 2*ND_Rebar; H_EtHopper - 3/2*ND_Rebar], ND_Rebar/2, W_Et + 4*ND_Rebar, [90; 0]*deg)
    ViewRight ← viewrightside1
    ArrayHorizCyl ← ArrayLast(N_TRSpacesH + 1, 1, B_EtRebar)
    ViewTop ← viewtop1
    VertCylinder ← CylinderF(EtHopper3_Origin + [-(2*ND_Rebar) - 3/2*ND_Rebar; 3/2*ND_Rebar; H_EtHopper - 2*ND_Rebar], ND_Rebar/2, (N_TRSpacesH + 1)*B_EtRebar - ND_Rebar, [0; 90]*deg)
    ArrayVertCyl ← ArrayLast(1, N_TRSpacesV + 1, -B_EtRebar)
    ArrayAll ← array_all(1, 2, -4*ND_Rebar)
    Freeze ← FreezeLayer("TrashRack")
    return stack(TRLayer, HorizCylinder, ViewRight, ArrayHorizCyl, ViewTop, VertCylinder, ViewRight, ArrayVertCyl, ViewTop, ArrayAll, Freeze)
RMScript :=
    ElbowLayer ← layer_new("RMElbow", green)
    UpperElbow ← ElbowSUBF(RMElbow1_Origin, [0; 90; 0]*deg, ND_RMPipe, EN_PipeSpec, ["EntranceTank"; "EtHopper"])
    LowerElbow ← ElbowF(RMElbow2_Origin, [0; 90; 0]*deg, ND_RMPipe, EN_PipeSpec)
    FreezeElbows ← FreezeLayer("RMElbow")
    PipeLayer ← layer_new("RMPipe", blue)
    ExitPipe ← PipeSUBF(RMElbow1_Origin, L_RMExitPipe, [90; 0]*deg, ND_RMPipe, EN_PipeSpec, ["EntranceTank"; "EtHopper"])
    RMPipeVert ← PipeF(RMTee_Origin - [0 m; ShortTeeLength(ND_RMPipe); ShortTeeLength(ND_RMPipe)], L_RMPipeVert, [0; 270]*deg, ND_RMPipe, EN_PipeSpec)
    RMFlocPipe ← PipeF(RMElbow2_Origin, L_RMFlocPipe, [90; 0]*deg, ND_RMPipe, EN_PipeSpec)
    RMTeePipe ← PipeF(RMTee_Origin + [0 m; -ShortTeeLength(ND_RMPipe); ShortTeeLength(ND_RMPipe)], L_RMTeePipe, [0; 90]*deg, ND_RMPipe, EN_PipeSpec)
    FreezePipe ← FreezeLayer("RMPipe")
    RMTeeLayer ← layer_new("RMTee", green)
    MakeTee ← TeeF(RMTee_Origin, [0; 90; 0]*deg, ND_RMPipe, EN_PipeSpec)
    FreezeTee ← FreezeLayer("RMTee")
    return stack(ElbowLayer, UpperElbow, LowerElbow, FreezeElbows, PipeLayer, ExitPipe, RMPipeVert, RMFlocPipe, RMTeePipe, FreezePipe, RMTeeLayer, MakeTee, FreezeTee)
EtLfomScript :=
    LfomLayer ← layer_new("EtLfom", blue)
    LfomPipe ← PipeF(RMElbow1_Origin + [0 m; ElbowRadius(ND_RMPipe); ElbowRadius(ND_RMPipe)], H_LfomPipe, [0; 90]*deg, ND_RMPipe, EN_PipeSpec)
    FreezePipe ← FreezeLayer("EtLfom")
    Local ← stack(LfomLayer, LfomPipe, FreezePipe)
    for h ∈ 0 .. last(H_LfomOrifice)
        for r ∈ 0 .. N_LfomOrifices[h] - 1
            Local ← stack(Local, CylinderF([
                RMElbow1_Origin[0];
                RMElbow1_Origin[1] + ElbowRadius(ND_RMPipe);
                ZW_Et - HL_Flowmeasure + H_LfomOrifice[h] + H_PlantFreeboard/2
            ], D_LfomOrifices/2, outerradius(ND_RMPipe) + zc, [
                4*D_LfomOrifices/ND_RMPipe*(N_LfomOrifices[h] - 1 - r) + π/2 + 2*D_LfomOrifices/ND_RMPipe*(mod(h, 2) == 1);
                0
            ]))
    GroupOrifices ← GroupAll("DeleteMe")
    SubtractOrifices ← SubtractF(["EtLfom"], "DeleteMe")
    return stack(Local, GroupOrifices, SubtractOrifices)
EtDrainsRight :=
    CouplingLayer ← layer_new("EtDrainCouplings", green)
    MakeCoupling ← CouplingSUBF([-L_EtHopper/2; ConRadius(ND_EtDrain) + S_Fitting; -SocketDepth(ND_EtDrain)] + Et_Origin, [0; 270]*deg, ND_EtDrain, EN_PipeSpec, ["EntranceTank"])
    Local ← stack(CouplingLayer, MakeCoupling)
    if N_EtHoppers ≥ 3
        for i ∈ 1 .. N_EtHoppers - 2
            Local ← stack(Local, CouplingSUBF([
                -L_EtHopper/2 - L_EtHopper*i - T_EtLedge;
                ConRadius(ND_EtDrain) + S_Elbow;
                -SocketDepth(ND_EtDrain)
            ] + Et_Origin, [0; 270]*deg, ND_EtDrain, EN_PipeSpec, ["EntranceTank"]))
    WeirCoupling ← CouplingSUBF([
        -L_EtHopper/2 - L_EtHopper*(N_EtHoppers - 1) - T_EtLedge;
        ConRadius(ND_EtDrain) + S_Elbow;
        -SocketDepth(ND_RMPipe)
    ] + Et_Origin, [0; 270]*deg, ND_RMPipe, EN_PipeSpec, ["EntranceTank"])
    FreezeCoupling ← FreezeLayer("EtDrainCouplings")
    PipeLayer ← layer_new("EtDrainPipes", blue)
    FirstVertPipe ← PipeSUBF([
        -L_EtHopper/2;
        ConRadius(ND_EtDrain) + S_Fitting;
        SocketDepth(ND_EtDrain) - CouplingLength(ND_EtDrain)
    ] + Et_Origin, T_PlantWall, [0; 270]*deg, ND_EtDrain, EN_PipeSpec, ["EntranceTank"])
    Local2 ← stack(WeirCoupling, FreezeCoupling, PipeLayer, FirstVertPipe)
    for i ∈ 1 .. N_EtHoppers - 2
        if N_EtHoppers ≥ 3
            Local2 ← stack(Local2, PipeF([
                -L_EtHopper/2 - L_EtHopper*i - T_EtLedge;
                ConRadius(ND_EtDrain) + S_Fitting;
                SocketDepth(ND_EtDrain) - CouplingLength(ND_EtDrain)
            ] + Et_Origin, T_PlantWall, [0; 270]*deg, ND_EtDrain, EN_PipeSpec))
    FreezePipes ← FreezeLayer("EtDrainPipes")
    StopperLayer ← layer_new("EtDrainStoppers", blue)
    FirstStopper ← PipeSUBF([-L_EtHopper/2; ConRadius(ND_EtDrain) + S_Fitting; -SocketDepth(ND_EtDrain)] + Et_Origin, H_Et - H_PlantFreeboard/2 + SocketDepth(ND_EtDrain), [0; 90]*deg, ND_EtDrain, EN_PipeSpec, ["EntranceTank"])
    Local3 ← stack(FreezePipes, StopperLayer, FirstStopper)
    if N_EtHoppers ≥ 3
        for i ∈ 1 .. N_EtHoppers - 2
            Local3 ← stack(Local3, PipeSUBF([
                -L_EtHopper/2 - L_EtHopper*i - T_EtLedge;
                ConRadius(ND_EtDrain) + S_Elbow;
                -SocketDepth(ND_EtDrain)
            ] + Et_Origin, H_Et - H_PlantFreeboard/2 + SocketDepth(ND_EtDrain), [0; 90]*deg, ND_EtDrain, EN_PipeSpec, ["EntranceTank"]))
    FreezeStopper ← FreezeLayer("EtDrainStoppers")
    WeirLayer ← layer_new("EtWeir", blue)
    DrawWeir ← PipeSUBF([
        -L_EtHopper/2 - L_EtHopper*(N_EtHoppers - 1) - T_EtLedge;
        ConRadius(ND_EtDrain) + S_Elbow;
        -SocketDepth(ND_RMPipe)
    ] + Et_Origin, HW_Et + SocketDepth(ND_RMPipe), [0; 90]*deg, ND_RMPipe, EN_PipeSpec, ["EntranceTank"])
    FreezeWeir ← FreezeLayer("EtWeir")
    return stack(Local, Local2, Local3, FreezeStopper, WeirLayer, DrawWeir, FreezeWeir)
EtDrainsLeft :=
    ThawTank ← layer_thaw("EntranceTank")
    ThawHopper ← layer_thaw("EtHopper")
    ThawCouplings ← layer_thaw("EtDrainCouplings")
    ThawLfom ← layer_thaw("EtLfom")
    ThawPipes ← layer_thaw("EtDrainPipes")
    ThawRMPipe ← layer_thaw("RMPipe")
    ThawRMElbow ← layer_thaw("RMElbow")
    ThawRMTee ← layer_thaw("RMTee")
    ThawStoppers ← layer_thaw("EtDrainStoppers")
    ThawWeirPipe ← layer_thaw("EtWeir")
    ThawTrashRack ← layer_thaw("TrashRack")
    ThawCdc ← layer_thaw("Cdc")
    StackThaws ← stack(ThawTank, ThawHopper, ThawCouplings, ThawLfom, ThawPipes, ThawRMPipe, ThawRMElbow, ThawRMTee, ThawStoppers, ThawWeirPipe, ThawTrashRack, ThawCdc)
    Mirror ← Mirror3dAll("YZ", [FlocCoupling_Origin[0]; 0 m; 0 m], "Y")
    FreezeTank ← layer_freeze("EntranceTank")
    FreezeHopper ← layer_freeze("EtHopper")
    FreezeCouplings ← layer_freeze("EtDrainCouplings")
    FreezeLfom ← layer_freeze("EtLfom")
    FreezePipes ← layer_freeze("EtDrainPipes")
    FreezeRMPipe ← layer_freeze("RMPipe")
    FreezeRMTee ← layer_freeze("RMTee")
    FreezeRMElbow ← layer_freeze("RMElbow")
    FreezeStoppers ← layer_freeze("EtDrainStoppers")
    FreezeWeirPipe ← layer_freeze("EtWeir")
    FreezeTrashRack ← layer_freeze("TrashRack")
    FreezeCdc ← layer_freeze("Cdc")
    StackFreezes ← stack(FreezeTank, FreezeHopper, FreezeCouplings, FreezeLfom, FreezePipes, FreezeRMPipe, FreezeRMTee, FreezeRMElbow, FreezeStoppers, FreezeWeirPipe, FreezeTrashRack, FreezeCdc)
    return stack(StackThaws, Mirror, StackFreezes)
H_CdcFloat := 0.2032 m
# from the top of the float to the top of the attachment
H_CdcFloatAttachment := 0.0419 m + 0.0165 m
D_FloatActual := .1683 m
ND_EtFloat =  # error
FloatScale := ND_EtFloat/D_FloatActual  # To scale the float so it is the desired size.
D_CdcCht := 6 in
Dist_LeverOrigintoArm := 0.0336 m
Z_FloatTop := Z_EtHopper + 1/2*H_CdcFloat + H_CdcFloatAttachment
Z_LeverHole := 0.0312 m - 0.0095/2*m  # Distance from the top of the entrance tank to the to the middle of the lever arm hole for the cable - radius of the hole
L_Cable := Z_LeverHole - Z_FloatTop
D_LATeetoLAOrigin := 0.0079 m
# This is the distance from the lever arm origin (at the center of the hole of the tee holding up the lever arm) to the end of the tee.
Dist_LeverHole := 0.0063 m  # Distance from the end of the lever arm to the middle of the hole where the float cable will be attached.
D_Cable := 0.1 in
CdcScript :=
    CdcLayer ← layer_new("Cdc", plum)
    insertFloat ← insertdwg("Float.dwg", [
        Et_Origin[0] - L_Et + 1/2*ND_EtFloat + 1/2*S_EtFloat;
        Et_Origin[1] - T_PlantWall + D_LATeetoLAOrigin + L_CdcFloatArm - Dist_LeverHole;
        ZW_Et - HL_Flowmeasure - 1/2*H_CdcFloat
    ], FloatScale, FloatScale, 0)
    insertLeverArm ← insertdwg("LeverArm.dwg", [
        Et_Origin[0] - L_Et + 1/2*ND_EtFloat + 1/2*S_EtFloat + Dist_LeverOrigintoArm;
        Et_Origin[1] - T_PlantWall + D_LATeetoLAOrigin;
        Z_EtTop
    ], 1, 1, 0)
    insertCht ← insertdwg("Cht.dwg", [
        Et_Origin[0] - L_Et + 1/2*S_EtFloat - 0.5 m - D_CdcCht;
        Et_Origin[1] - T_PlantWall - 1/2*D_CdcCht;
        Z_CdcFloatvalveOrifice
    ], 1, 1, 0)
    FreezeCdc ← FreezeLayer("Cdc")
    return stack(CdcLayer, insertFloat, insertLeverArm, insertCht, FreezeCdc)
AC_EntranceTank :=
    stack(CdcScript, EtTankScript, EtTrashRackScript, EtLfomScript, RMScript, EtDrainsRight) if mod(N_FlocChannels, 2) == 0
    stack(CdcScript, EtTankScript, EtTrashRackScript, EtLfomScript, RMScript, EtDrainsRight, EtDrainsLeft) otherwise
# [component: inputs AC_EntranceTank]
CdcCableScript :=
    CdcCableLayer ← layer_new("CdcCable", green)
    FloatCable ← CylinderF([
        Et_Origin[0] - L_Et + 1/2*ND_EtFloat + 1/2*S_EtFloat;
        Et_Origin[1] - T_PlantWall + 0.25 in + L_CdcFloatArm - Dist_LeverHole;
        Z_FloatTop
    ], D_Cable, L_Cable, [0; 90]*deg)
    FreezeCdcCable ← layer_freeze("CdcCable")
    return stack(CdcCableLayer, FloatCable, FreezeCdcCable)
