# Entrance Tank AutoCAD
# Entrance Tank Concrete
# Origins and dimensions
Et_Origin := [
    Plant_Origin[0] - L_Sed + L_Et;
    Floc_Origin[1] + {
        (N_FlocChannels*(W_FlocChannel + T_FlocChannelWall)) + W_EtWalkway + 2*T_PlantWall - T_FlocChannelWall if Q_Plant > Q_PlantMaxLF
        L_Floc + T_PlantWall + L_ChannelSlot + W_EtWalkway otherwise
    };
    Z_Et
] = [-1.71379; 6.5604; 1.6226] m
Et_Dim := [L_Et; W_Et; H_Et] = [2.9048; 1.23575; 0.8] m
EtHopper_Origin := [
    Et_Origin[0] - S_Fitting - ConRadius(ND_EtDrain) - L_EtHopper/2 - T_EtHopperLedge;
    Et_Origin[1] + W_Et;
    Et_Origin[2]
] = [-2.56539; 7.79615; 1.6226] m
Hopper_FarCorner := [Et_Origin[0] - L_EtHopper - T_EtHopperLedge; Et_Origin[1]; Z_EtHopper] = [-3.06539; 6.5604; 2.1226] m
HopperBack_FarCorner := [Et_Origin[0] - L_EtHopperBack; Et_Origin[1] + L_Et + W_Et; Et_Origin[2] + H_EtHopperBack] = [-2.34794; 10.7009; 2.1226] m
HopperFront_FarCorner := [Et_Origin[0] + L_EtHopperFront; Et_Origin[1] + L_Et; Et_Origin[2] + H_EtHopperFront] = [-1.31379; 9.4652; 2.0226] m
EtDC_Origin := Et_Origin + [-L_EtDC; L_EtHopperFront; -T_PlantWall]
# Hoppers and tank walls
EntTankLayer := layer_new("EtCon", grey)
EtHopper := WedgeF(EtHopper_Origin, Hopper_FarCorner, [0; 0; 0]*deg)
MirrorEtHopper := MirrorLast([EtHopper_Origin[0] + T_EtHopperLedge/2; EtHopper_Origin[1]], [EtHopper_Origin[0] + T_EtHopperLedge/2; EtHopper_Origin[1] + zc], "n")
EtHopperLedge := BoxF(EtHopper_Origin, EtHopper_Origin + [T_EtHopperLedge; -W_Et; H_EtHopper], [0; 0; 0]*deg)
ArrayEtHoppers := array_all(1, N_EtFullHopper + 1, -L_EtHopper - T_EtHopperLedge)
EtHopperBack := WedgeF(Et_Origin + [0; W_Et; 0], HopperBack_FarCorner, [90; 0; 0]*deg)
EtHopperFront := WedgeF(Et_Origin, HopperFront_FarCorner, [90; 0; 0]*deg)
EntTank := Tank(Et_Origin, Et_Dim, T_PlantWall)
# Drain channel
EtDC := DrainChannelF(EtDC_Origin + [0 m; W_EtDC; 0 m], [180; 0; 0]*deg, Q_EtDCMax, W_EtDC, H_EtDC, L_EtDC, 1 %, Nu_Water, E_Concrete, 1)
FreezeEntTank := FreezeLayer("EtCon")
# Trash rack slots
TrashRackSlot1 := BoxF(EtHopper_Origin + [T_EtHopperLedge/2 - T_ConcreteMin/2; 2*D_Rebar; H_EtHopper - 2*D_Rebar], EtHopper_Origin + [
    T_EtHopperLedge/2 - T_ConcreteMin/2 - 2*D_Rebar;
    -W_Et - 2*D_Rebar;
    H_EtHopper + H_EtTop + H_PlantFreeboard + zc
], [0; 0; 0]*deg)
TrashRackSlot2 := BoxF(EtHopper_Origin + [T_EtHopperLedge/2 + T_ConcreteMin/2; 2*D_Rebar; H_EtHopper - 2*D_Rebar], EtHopper_Origin + [
    T_EtHopperLedge/2 + T_ConcreteMin/2 + 2*D_Rebar;
    -W_Et - 2*D_Rebar;
    H_EtHopper + H_EtTop + H_PlantFreeboard + zc
], [0; 0; 0]*deg)
SubtractTrashRackSlots := SubtractF(["EtCon"], "DeleteMe")
EtTankScript := stack(EntTankLayer, EtHopper, MirrorEtHopper, EtHopperLedge, ArrayEtHoppers, EtHopperBack, EtHopperFront, EntTank, EtDC, Union_All, FreezeEntTank, TrashRackSlot1, TrashRackSlot2, GroupDelete, SubtractTrashRackSlots)
# Trash Rack
TRLayer := layer_new("EtTrashrack", yellow)
HorizCylinder := CylinderF(EtHopper_Origin + [T_EtHopperLedge/2 - T_ConcreteMin/2 - D_Rebar/2; 2*D_Rebar; H_EtHopper - 3/2*D_Rebar], D_Rebar/2, W_Et + 4*D_Rebar, [90; 0]*deg)
ViewRight := view("r")
ArrayHorizCylinder := ArrayLast(N_TRSpacesH + 1, 1, B_EtRebar)
ViewTop := view("t")
VertCylinder := CylinderF(EtHopper_Origin + [T_EtHopperLedge/2 - T_ConcreteMin/2 - 3*D_Rebar/2; 3/2*D_Rebar; H_EtHopper - 2*D_Rebar], D_Rebar/2, (N_TRSpacesH + 1)*B_EtRebar - D_Rebar, [0; 90]*deg)
ArrayVertCyl := ArrayLast(1, N_TRSpacesV + 1, -B_EtRebar)
ArrayAll := array_all(1, 2, T_ConcreteMin + 2*D_Rebar)
Freeze := FreezeLayer("EtTrashrack")
EtTrashRackScript := stack(TRLayer, HorizCylinder, ViewRight, ArrayHorizCylinder, ViewTop, VertCylinder, ViewRight, ArrayVertCyl, ViewTop, ArrayAll, Freeze)
# Rapid Mix Pipe, LFOM, and Orifice Plate
# this is the upper elbow (connected to the LFOM)
RMElbow_Origin := [
    Plant_Origin[0] - L_Sed + S_Fitting + ConRadius(ND_RMPipe);
    Et_Origin[1] + W_Et - S_Fitting - ConRadius(ND_RMPipe) - ElbowRadius(ND_RMPipe);
    FlocCoupling_Origin[2]
]
L_RMPipeHoriz := (Et_Origin[1] + W_Et - S_Fitting - ConRadius(ND_RMPipe) - ElbowRadius(ND_RMPipe)) - (Floc_Origin[1] + N_FlocChannels*W_FlocChannel + (N_FlocChannels - 1)*T_FlocChannelWall - L_FlocCouplingExt + CouplingLength(ND_RMPipe) - SocketDepth(ND_RMPipe)) = 1.96713 m
L_RMPipeVert := Z_EtTop - (RMElbow_Origin[2] + ElbowRadius(ND_RMPipe)) = 1.95827 m
L_RMAirRelease := Floc_Origin[2] + H_Floc - (FlocCoupling_Origin[2] + innerdiameter(ND_RMPipe, PS_Default)/2 - zc)
# RM Elbow
RMElbowLayer := layer_new("EtRmElbowPlu", green)
RMElbow := ElbowSUBF(RMElbow_Origin, [0; 90; 0]*deg, ND_RMPipe, PS_Default, ["EtCon"])
FreezeRMElbow := FreezeLayer("EtRmElbowPlu")
# RM Pipes
RMPipeLayer := layer_new("EtRmPipePlu", blue)
RMVertPipe := PipeSUBF([
    RMElbow_Origin[0];
    RMElbow_Origin[1] + ElbowRadius(ND_RMPipe);
    RMElbow_Origin[2] + ElbowRadius(ND_RMPipe)
], L_RMPipeVert, [0; 90; 0]*deg, ND_RMPipe, PS_Default, ["EtCon"])
RMHorizPipe := PipeF(RMElbow_Origin, L_RMPipeHoriz, [90; 0; 0]*deg, ND_RMPipe, PS_Default)
RMAirRelease := PipeF([
    RMElbow_Origin[0];
    Floc_Origin[1] + (N_FlocChannels*(W_FlocChannel + T_FlocChannelWall)) + T_PlantWall - T_FlocChannelWall + S_Fitting;
    FlocCoupling_Origin[2] + innerdiameter(ND_RMPipe, PS_Default)/2 - zc
], L_RMAirRelease, [0; 90; 0]*deg, ND_RMAirRelease, PS_Default)
RMAirReleaseHole := CylinderF([
    RMElbow_Origin[0];
    Floc_Origin[1] + (N_FlocChannels*(W_FlocChannel + T_FlocChannelWall)) + T_PlantWall - T_FlocChannelWall + S_Fitting;
    FlocCoupling_Origin[2]
], outerradius(ND_RMAirRelease), outerradius(ND_RMPipe) + zc, [0; 90; 0]*deg)
FreezeRMPipe := FreezeLayer("EtRmPipePlu")
SelectRMPipes := SelectLayer("EtRmPipePlu")
# LFOM Orifices
LFOM_Origin := [RMElbow_Origin[0]; RMElbow_Origin[1] + ElbowRadius(ND_RMPipe); ZW_Et - HL_Flowmeasure]
LfomOrifices :=
    Local ← FreezeRMPipe
    for h ∈ 0 .. last(H_LfomOrifices)
        if N_LfomOrifices[h] ≠ 0
            Local ← stack(Local, CylinderF([LFOM_Origin[0]; LFOM_Origin[1]; LFOM_Origin[2] + H_LfomOrifices[h]], D_LfomOrifices/2, outerradius(ND_RMPipe) + zc, [
                90 deg + (asin(0.5*S_LfomOrificesMin/(2*outerradius(ND_RMPipe))) + asin(D_LfomOrifices/(2*outerradius(ND_RMPipe))))*(mod(h, 2) == 0);
                0 deg
            ]))
        Local ← stack(Local, ArrayLastPolar([LFOM_Origin[0]; LFOM_Origin[1]; LFOM_Origin[2] + H_LfomOrifices[h]], N_LfomOrifices[h], (N_LfomOrifices[h] - 1)*(2*asin(D_LfomOrifices/(2*outerradius(ND_RMPipe))) + 2*asin(S_LfomOrificesMin/(2*outerradius(ND_RMPipe)))))) if N_LfomOrifices[h] > 1
    return Local
SubtractRMPipeOrifices := SubtractF(["EtRmPipePlu"], "DeleteMe")
RMScript := stack(RMElbowLayer, RMElbow, FreezeRMElbow, RMPipeLayer, RMVertPipe, RMHorizPipe, FreezeRMPipe, RMAirReleaseHole, GroupDelete, SubtractRMPipeOrifices, SelectRMPipes, RMAirRelease, LfomOrifices, GroupDelete, SubtractRMPipeOrifices)
# Hopper Drains
DrainCouplingLayer := layer_new("EtDrainCouplingsPlu", green)
DrainWeirCoupling := CouplingSUBF([
    -S_Fitting - ConRadius(ND_EtDrain);
    ConRadius(ND_EtDrain) + S_Fitting + L_EtHopperFront;
    -SocketDepth(ND_EtDrain)
] + Et_Origin, [0; 270]*deg, ND_EtDrain, PS_Default, ["EtCon"])
DrainCouplings :=
    Local ← stack(DrainCouplingLayer, DrainWeirCoupling)
    for i ∈ 0 .. (N_EtFullHopper + 1)
        Local ← stack(Local, CouplingSUBF([
            -(L_EtHopper + T_EtHopperLedge)*i - S_Fitting - ConRadius(ND_EtDrain);
            ConRadius(ND_EtDrain) + S_Fitting + L_EtHopperFront;
            -SocketDepth(ND_EtDrain)
        ] + Et_Origin, [0; 270]*deg, ND_EtDrain, PS_Default, ["EtCon"]))
FreezeDrainCouplings := FreezeLayer("EtDrainCouplingsPlu")
DrainPipeLayer := layer_new("EtDrainPipesPlu", blue)
DrainPipes :=
    Local ← stack(FreezeDrainCouplings, DrainPipeLayer)
    for i ∈ 0 .. N_EtFullHopper + 1
        Local ← stack(Local, PipeSUBF([
            -(L_EtHopper + T_EtHopperLedge)*i - S_Fitting - ConRadius(ND_EtDrain);
            ConRadius(ND_EtDrain) + S_Fitting + L_EtHopperFront;
            SocketDepth(ND_EtDrain) - CouplingLength(ND_EtDrain)
        ] + Et_Origin, T_PlantWall, [0; 270; 0]*deg, ND_EtDrain, PS_Default, ["EtCon"]))
FreezePipes := FreezeLayer("EtDrainPipesPlu")
StopperLayer := layer_new("EtDrainStoppersPlu", red)
L_EtDrainStopper := H_Et - H_PlantFreeboard/2 + SocketDepth(ND_EtDrain)
FirstStopper := PipeF([
    -S_Fitting - ConRadius(ND_EtDrain);
    ConRadius(ND_EtDrain) + S_Fitting + L_EtHopperFront;
    -SocketDepth(ND_EtDrain)
] + Et_Origin, L_EtDrainStopper, [0; 90; 0]*deg, ND_EtDrain, PS_Default)
StopperPipes :=
    Local ← stack(FreezePipes, StopperLayer)
    for i ∈ 0 .. N_EtFullHopper + 1
        Local ← stack(Local, PipeF([
            -(L_EtHopper + T_EtHopperLedge)*i - S_Fitting - ConRadius(ND_EtDrain);
            ConRadius(ND_EtDrain) + S_Fitting + L_EtHopperFront;
            -SocketDepth(ND_EtDrain)
        ] + Et_Origin, L_EtDrainStopper, [0; 90; 0]*deg, ND_EtDrain, PS_Default))
FreezeStopper := FreezeLayer("EtDrainStoppersPlu")
EtDrainsRight := stack(DrainCouplings, DrainPipes, StopperPipes, FreezeStopper)
ThawDrains := ThawMultiple(["EtCon"; "EtDrainCouplingsPlu"; "EtDrainPipesPlu"; "EtWeir"; "EtTrashrack"; "Cdc"; "CdcFittings"; "EtDrainStoppersPlu"])
MirrorDrains := Mirror3dAll("YZ", [Plant_Origin[0] - 1/2*L_Sed; 0 m; 0 m], "Y")
FreezeDrains := FreezeMultiple(["EtCon"; "EtDrainCouplingsPlu"; "EtDrainPipesPlu"; "EtWeir"; "EtTrashrack"; "Cdc"; "CdcFittings"; "EtDrainStoppersPlu"])
EtDrainsLeft := stack(ThawDrains, MirrorDrains, FreezeDrains)
# Overflow Drain
# The half of the PVC overflow channel closer to the right-hand end of the tank (from top view):
L_EtFrontToOverflowWeir := L_EtHopperFront + 2*ConRadius(ND_EtDrain) + 2*S_Fitting + ConRadius(ND_EtOverflowDrain)
EtChannelPipe1 := PipeF(Et_Origin + [
    -CapThickness(ND_EtOverflowDrain);
    L_EtFrontToOverflowWeir;
    H_EtHopper + HL_Flowmeasure - innerdiameter(ND_EtOverflowDrain, PS_Default)/2 + H_EtOverflowCutaway + H_EtLFOMtoOverflow
], L_EtChannelPipes, [0; 0; 0]*deg, ND_EtOverflowDrain, PS_Default)
# The half of the PVC overflow channel closer to the trash rack:
EtChannelPipe2 := PipeF(Et_Origin + [
    -CapThickness(ND_EtOverflowDrain) - L_EtChannelPipes - TeeLength(ND_EtOverflowDrain);
    L_EtFrontToOverflowWeir;
    H_EtHopper + HL_Flowmeasure - innerdiameter(ND_EtOverflowDrain, PS_Default)/2 + H_EtOverflowCutaway + H_EtLFOMtoOverflow
], L_EtChannelPipes, [0; 0; 0]*deg, ND_EtOverflowDrain, PS_Default)
EtOverflowTee := TeeF(Et_Origin + [
    -CapThickness(ND_EtOverflowDrain) - L_EtChannelPipes - TeeLength(ND_EtOverflowDrain)/2;
    L_EtFrontToOverflowWeir;
    H_EtHopper + HL_Flowmeasure - innerdiameter(ND_EtOverflowDrain, PS_Default)/2 + H_EtOverflowCutaway + H_EtLFOMtoOverflow - ShortTeeLength(ND_EtOverflowDrain)
], [0; 0; -90]*deg, ND_EtOverflowDrain, PS_Default)
EtOverflowCap1 := CapF(Et_Origin + [
    -CapThickness(ND_EtOverflowDrain);
    L_EtFrontToOverflowWeir;
    H_EtHopper + HL_Flowmeasure - innerdiameter(ND_EtOverflowDrain, PS_Default)/2 + H_EtOverflowCutaway + H_EtLFOMtoOverflow
], [0; 0; 0]*deg, ND_EtOverflowDrain)
EtOverflowCap2 := CapF(Et_Origin + [
    -CapThickness(ND_EtOverflowDrain) - 2*L_EtChannelPipes - TeeLength(ND_EtOverflowDrain);
    L_EtFrontToOverflowWeir;
    H_EtHopper + HL_Flowmeasure - innerdiameter(ND_EtOverflowDrain, PS_Default)/2 + H_EtOverflowCutaway + H_EtLFOMtoOverflow
], [0; 180; 0]*deg, ND_EtOverflowDrain)
L_EtOverflowPipeVert := H_EtHopper + HL_Flowmeasure - innerdiameter(ND_EtOverflowDrain, PS_Default)/2 + H_EtOverflowCutaway + H_EtLFOMtoOverflow - ShortTeeLength(ND_EtOverflowDrain) + T_PlantWall + zc
EtOverflowPipeVert := PipeSUBF(Et_Origin + [
    -CapThickness(ND_EtOverflowDrain) - L_EtChannelPipes - TeeLength(ND_EtOverflowDrain)/2;
    L_EtFrontToOverflowWeir;
    H_EtHopper + HL_Flowmeasure - innerdiameter(ND_EtOverflowDrain, PS_Default)/2 + H_EtOverflowCutaway + H_EtLFOMtoOverflow - ShortTeeLength(ND_EtOverflowDrain)
], L_EtOverflowPipeVert, [0; -90; 0]*deg, ND_EtOverflowDrain, PS_Default, ["EtCon"])
EtOverflowElbow := ElbowSUBF(Et_Origin + [
    -CapThickness(ND_EtOverflowDrain) - L_EtChannelPipes - TeeLength(ND_EtOverflowDrain)/2;
    L_EtFrontToOverflowWeir;
    -T_PlantWall - ConRadius(ND_EtOverflowDrain) + ElbowRadius(ND_EtOverflowDrain)
], [90; 270; 0]*deg, ND_EtOverflowDrain, PS_Default, ["EtCon"])
EtOverflowWeirSlot := BoxF(Et_Origin + [
    -CapThickness(ND_EtOverflowDrain);
    L_EtFrontToOverflowWeir - W_EtOverflowSlot/2;
    H_EtHopper + HL_Flowmeasure + H_EtLFOMtoOverflow - zc
], Et_Origin + [
    -CapThickness(ND_EtOverflowDrain) - L_EtOverflowWeir/2;
    L_EtFrontToOverflowWeir + W_EtOverflowSlot/2;
    H_EtHopper + HL_Flowmeasure + H_EtOverflowCutaway + H_EtLFOMtoOverflow + CapThickness(ND_EtOverflowDrain) + 2*zc
], [0; 0; 0]*deg)
EtOverflowFittingLayer := layer_new("EtOverflowFittingPlu", green)
FreezeEtOverflowFittings := FreezeLayer("EtOverflowFittingPlu")
EtOverflowPipeLayer := layer_new("EtOverflowPipePlu", blue)
FreezeEtOverflowPipe := FreezeLayer("EtOverflowPipePlu")
SubtractSlotFromFittings := SubtractF(["EtOverflowFittingPlu"], "DeleteMe")
SubtractSlotFromPipes := SubtractF(["EtOverflowPipePlu"], "DeleteMe")
EtOverflowPluScript := stack(EtOverflowFittingLayer, EtOverflowTee, EtOverflowCap1, EtOverflowCap2, FreezeEtOverflowFittings, EtOverflowPipeLayer, EtOverflowPipeVert, EtChannelPipe1, EtChannelPipe2, FreezeEtOverflowPipe, EtOverflowWeirSlot, GroupDelete, SubtractSlotFromFittings, EtOverflowWeirSlot, GroupAll("DeleteMe"), SubtractSlotFromPipes)
# Flow Control Drain
L_EtFlowControlComponents := 2*MaleAdapterLength(ND_EtFlowControl) + ValveLength(ND_EtFlowControl) - 2*ValveSocket(ND_EtFlowControl) + SocketDepth(ND_EtFlowControl) + ElbowRadius(ND_EtFlowControl)
# Sets location of the flow control valve. EN. FlowControlXZPlane = 1 if on the side of the entrance tank in the extra space before the plant wall (running in the XZ plane),  0 if it the length of the entrance tank isn't short enough compared to the sed tanks to allow for the flow control valve to fit. All of the following placeholder names have either XZ or YZ depending on the orientation.
EN_FlowControlXZPlane :=
    1 if (L_Et + L_EtFlowControlComponents) < L_Sed
    0 otherwise
Z_EtFlowControl := max(Z_Walkway + ConRadius(ND_EtFlowControl), Et_Origin[2] - T_PlantWall - ConRadius(ND_EtFlowControl) + 2*ElbowRadius(ND_EtFlowControl) + 2*SocketDepth(ND_EtFlowControl)) = 1.82711 m
EtFlowControlPipeLayer := layer_new("EtFlowControlPipePlu", blue)
EtFlowControlNipple1YZ := PipeF([
    Et_Origin[0] - 2*S_Fitting - 2*ConRadius(ND_EtDrain) - ConRadius(ND_EtFlowControl);
    Et_Origin[1] - T_PlantWall + SocketDepth(ND_EtFlowControl);
    Z_EtFlowControl
], 2*SocketDepth(ND_EtFlowControl), [90; 0; 0]*deg, ND_EtFlowControl, PS_Default)
EtFlowControlNipple2YZ := PipeF([
    Et_Origin[0] - 2*S_Fitting - 2*ConRadius(ND_EtDrain) - ConRadius(ND_EtFlowControl);
    Et_Origin[1] - T_PlantWall - 2*MaleAdapterLength(ND_EtFlowControl) - ValveLength(ND_EtFlowControl) + 2*ValveSocket(ND_EtFlowControl) - SocketDepth(ND_EtFlowControl);
    Z_EtFlowControl
], 2*SocketDepth(ND_EtFlowControl), [-90; 0; 0]*deg, ND_EtFlowControl, PS_Default)
EtFlowControlNipple1XZ_Origin := [
    Et_Origin[0] + T_PlantWall + SocketDepth(ND_EtFlowControl);
    Et_Origin[1] + L_EtSupport + ConRadius(ND_EtFlowControl);
    Z_EtFlowControl
]
EtFlowControlNipple1XZ := PipeF(EtFlowControlNipple1XZ_Origin, 2*SocketDepth(ND_EtFlowControl), [0; 0; 0]*deg, ND_EtFlowControl, PS_Default)
EtFlowControlNipple2XZ := PipeF([
    Et_Origin[0] + T_PlantWall + SocketDepth(ND_EtFlowControl) + 2*MaleAdapterLength(ND_EtFlowControl) + ValveLength(ND_EtFlowControl) - 2*ValveSocket(ND_EtFlowControl);
    EtFlowControlNipple1XZ_Origin[1];
    Z_EtFlowControl
], 2*SocketDepth(ND_EtFlowControl), [0; 0; 0]*deg, ND_EtFlowControl, PS_Default)
L_EtFlowControlVert := Z_EtFlowControl - (Et_Origin[2] - T_PlantWall - ConRadius(ND_EtFlowControl)) - 2*ElbowRadius(ND_EtFlowControl) = 0.114 m
EtFlowControlVertPipeYZ := PipeF([
    Et_Origin[0] - 2*S_Fitting - 2*ConRadius(ND_EtDrain) - ConRadius(ND_EtFlowControl);
    Et_Origin[1] - T_PlantWall - 2*MaleAdapterLength(ND_EtFlowControl) - ValveLength(ND_EtFlowControl) + 2*ValveSocket(ND_EtFlowControl) - SocketDepth(ND_EtFlowControl) - ElbowRadius(ND_EtFlowControl);
    Et_Origin[2] - T_PlantWall - ConRadius(ND_EtFlowControl) + ElbowRadius(ND_EtFlowControl)
], L_EtFlowControlVert, [0; 90; 0]*deg, ND_EtFlowControl, PS_Default)
EtFlowControlVertPipeXZ := PipeF([
    Et_Origin[0] + T_PlantWall + 2*SocketDepth(ND_EtFlowControl) + 2*MaleAdapterLength(ND_EtFlowControl) + ValveLength(ND_EtFlowControl) - 2*ValveSocket(ND_EtFlowControl) + ElbowRadius(ND_EtFlowControl);
    EtFlowControlNipple1XZ_Origin[1];
    Et_Origin[2] - T_PlantWall - ConRadius(ND_EtFlowControl) + ElbowRadius(ND_EtFlowControl)
], L_EtFlowControlVert, [0; 90; 0]*deg, ND_EtFlowControl, PS_Default)
L_EtFlowControlHoriz := max(T_PlantWall - CouplingLength(ND_EtFlowControl) + SocketDepth(ND_EtFlowControl), 0 m)
EtFlowControlHorizPipe1YZ := PipeSUBF([
    Et_Origin[0] - 2*S_Fitting - 2*ConRadius(ND_EtDrain) - ConRadius(ND_EtFlowControl);
    Et_Origin[1] - T_PlantWall + CouplingLength(ND_EtFlowControl) - SocketDepth(ND_EtFlowControl);
    Z_EtFlowControl
], L_EtFlowControlHoriz, [-90; 0; 0]*deg, ND_EtFlowControl, PS_Default, ["EtCon"])
EtFlowControlHorizPipe2YZ := PipeSUBF([
    Et_Origin[0] - 2*S_Fitting - 2*ConRadius(ND_EtDrain) - ConRadius(ND_EtFlowControl);
    Et_Origin[1] - T_PlantWall + CouplingLength(ND_EtFlowControl) - SocketDepth(ND_EtFlowControl) + L_EtSupport;
    Et_Origin[2] - T_PlantWall - ConRadius(ND_EtFlowControl)
], L_EtFlowControlHoriz, [-90; 0; 0]*deg, ND_EtFlowControl, PS_Default, ["EtCon"])
EtFlowControlHorizPipe1XZ := PipeSUBF([
    Et_Origin[1] + T_PlantWall - CouplingLength(ND_EtFlowControl) + SocketDepth(ND_EtFlowControl) + L_EtFlowControlHoriz;
    EtFlowControlNipple1XZ_Origin[1];
    Z_EtFlowControl
], L_EtFlowControlHoriz, [0; 0; 0]*deg, ND_EtFlowControl, PS_Default, ["EtCon"])
EtFlowControlHorizPipe2XZ := PipeSUBF([
    Et_Origin[1] + T_PlantWall - CouplingLength(ND_EtFlowControl) + SocketDepth(ND_EtFlowControl) + L_EtFlowControlHoriz;
    EtFlowControlNipple1XZ_Origin[1];
    Et_Origin[2] - T_PlantWall - ConRadius(ND_EtFlowControl)
], L_EtFlowControlHoriz, [0; 0; 0]*deg, ND_EtFlowControl, PS_Default, ["EtCon"])
L_EtFlowControlHoriz3YZ := 2*SocketDepth(ND_EtFlowControl) + 2*MaleAdapterLength(ND_EtFlowControl) + ValveLength(ND_EtFlowControl) - 2*ValveSocket(ND_EtFlowControl) + L_EtSupport
L_EtFlowControlHoriz3XZ := SocketDepth(ND_EtFlowControl) + 2*MaleAdapterLength(ND_EtFlowControl) + ValveLength(ND_EtFlowControl) - 2*ValveSocket(ND_EtFlowControl) + T_PlantWall - T_ChannelWall
EtFlowControlHorizPipe3YZ := PipeF([
    Et_Origin[0] - 2*S_Fitting - 2*ConRadius(ND_EtDrain) - ConRadius(ND_EtFlowControl);
    Et_Origin[1] - T_PlantWall + SocketDepth(ND_EtFlowControl) + L_EtSupport;
    Et_Origin[2] - T_PlantWall - ConRadius(ND_EtFlowControl)
], L_EtFlowControlHoriz3YZ, [90; 0; 0]*deg, ND_EtFlowControl, PS_Default)
EtFlowControlHorizPipe3XZ_Origin := [
    Et_Origin[0] + T_ChannelWall - T_PlantWall + L_EtFlowControlHoriz3XZ;
    EtFlowControlNipple1XZ_Origin[1];
    Et_Origin[2] - T_PlantWall - ConRadius(ND_EtFlowControl)
]
# QUESTIONABLE
EtFlowControlHorizPipe3XZ := PipeF(EtFlowControlHorizPipe3XZ_Origin, L_EtFlowControlHoriz3XZ, [0; 0; 0]*deg, ND_EtFlowControl, PS_Default)
EtFlowControlFittingLayer := layer_new("EtFlowControlFittingPlu", green)
EtFlowControlCoupling1YZ := CouplingSUBF([
    Et_Origin[0] - 2*S_Fitting - 2*ConRadius(ND_EtDrain) - ConRadius(ND_EtFlowControl);
    Et_Origin[1] - T_PlantWall + SocketDepth(ND_EtFlowControl) + L_EtSupport;
    Et_Origin[2] - T_PlantWall - ConRadius(ND_EtFlowControl)
], [-90; 0]*deg, ND_EtFlowControl, PS_Default, ["EtCon"])
EtFlowControlCoupling2YZ := CouplingSUBF([
    Et_Origin[0] - 2*S_Fitting - 2*ConRadius(ND_EtDrain) - ConRadius(ND_EtFlowControl);
    Et_Origin[1] - T_PlantWall + SocketDepth(ND_EtFlowControl);
    Z_EtFlowControl
], [-90; 0]*deg, ND_EtFlowControl, PS_Default, ["EtCon"])
EtFlowControlCoupling1XZ := CouplingSUBF([
    Et_Origin[0] + T_PlantWall - SocketDepth(ND_EtFlowControl);
    EtFlowControlNipple1XZ_Origin[1];
    Et_Origin[2] - T_PlantWall - ConRadius(ND_EtFlowControl)
], [0; 0]*deg, ND_EtFlowControl, PS_Default, ["EtCon"])
EtFlowControlCoupling2XZ := CouplingSUBF([EtFlowControlHorizPipe3XZ_Origin[0]; EtFlowControlNipple1XZ_Origin[1]; Z_EtFlowControl], [0; 0]*deg, ND_EtFlowControl, PS_Default, ["EtCon"])
EtFlowControlElbow1YZ := ElbowF([
    Et_Origin[0] - 2*S_Fitting - 2*ConRadius(ND_EtDrain) - ConRadius(ND_EtFlowControl);
    Et_Origin[1] - T_PlantWall - 2*MaleAdapterLength(ND_EtFlowControl) - ValveLength(ND_EtFlowControl) + 2*ValveSocket(ND_EtFlowControl) - SocketDepth(ND_EtFlowControl);
    Et_Origin[2] - T_PlantWall - ConRadius(ND_EtFlowControl)
], [0; -90; 180]*deg, ND_EtFlowControl, PS_Default)
EtFlowControlElbow2YZ := ElbowF([
    Et_Origin[0] - 2*S_Fitting - 2*ConRadius(ND_EtDrain) - ConRadius(ND_EtFlowControl);
    Et_Origin[1] - T_PlantWall - 2*MaleAdapterLength(ND_EtFlowControl) - ValveLength(ND_EtFlowControl) + 2*ValveSocket(ND_EtFlowControl) - SocketDepth(ND_EtFlowControl);
    Z_EtFlowControl
], [0; 90; 180]*deg, ND_EtFlowControl, PS_Default)
EtFlowControlElbow1XZ := ElbowF([
    EtFlowControlHorizPipe3XZ_Origin[0];
    EtFlowControlNipple1XZ_Origin[1];
    Et_Origin[2] - T_PlantWall - ConRadius(ND_EtFlowControl)
], [-90; 0; 0]*deg, ND_EtFlowControl, PS_Default)
EtFlowControlElbow2XZ := ElbowF([EtFlowControlHorizPipe3XZ_Origin[0]; EtFlowControlNipple1XZ_Origin[1]; Z_EtFlowControl], [-90; 0; 180]*deg, ND_EtFlowControl, PS_Default)
EtFlowControlAdapterLayer := layer_new("EtFlowControlAdapterPlu", blue3)
EtFlowControlAdapter1YZ := MaleAdapterF([
    Et_Origin[0] - 2*S_Fitting - 2*ConRadius(ND_EtDrain) - ConRadius(ND_EtFlowControl);
    Et_Origin[1] - T_PlantWall - SocketDepth(ND_EtFlowControl);
    Z_EtFlowControl
], [90; 0]*deg, ND_EtFlowControl, PS_Default)
EtFlowControlAdapter2YZ := MaleAdapterF([
    Et_Origin[0] - 2*S_Fitting - 2*ConRadius(ND_EtDrain) - ConRadius(ND_EtFlowControl);
    Et_Origin[1] - T_PlantWall - 2*MaleAdapterLength(ND_EtFlowControl) - ValveLength(ND_EtFlowControl) + 2*ValveSocket(ND_EtFlowControl) + SocketDepth(ND_EtFlowControl);
    Z_EtFlowControl
], [-90; 0]*deg, ND_EtFlowControl, PS_Default)
EtFlowControlAdapter1XZ := MaleAdapterF([EtFlowControlNipple1XZ_Origin[0]; EtFlowControlNipple1XZ_Origin[1]; Z_EtFlowControl], [180; 0]*deg, ND_EtFlowControl, PS_Default)
EtFlowControlAdapter2XZ := MaleAdapterF([
    Et_Origin[0] + T_PlantWall + 2*MaleAdapterLength(ND_EtFlowControl) + ValveLength(ND_EtFlowControl) - 2*ValveSocket(ND_EtFlowControl) - SocketDepth(ND_EtFlowControl);
    EtFlowControlNipple1XZ_Origin[1];
    Z_EtFlowControl
], [0; 0]*deg, ND_EtFlowControl, PS_Default)
EtFlowControlValveLayer := layer_new("EtFlowControlValvePlu", blue2)
EtFlowControlValveYZ := insertdwg("https://confluence.cornell.edu/download/attachments/173604905/Et-Scaled-Gate-Valve-Threaded.dwg", [
    Et_Origin[0] - 2*S_Fitting - 2*ConRadius(ND_EtDrain) - ConRadius(ND_EtFlowControl);
    Et_Origin[1] - T_PlantWall - MaleAdapterLength(ND_EtFlowControl) + ValveSocket(ND_EtFlowControl);
    Z_EtFlowControl
], 2*outerradius(ND_EtFlowControl)/(1.16 m), 2*outerradius(ND_EtFlowControl)/(1.16 m), 0 deg)
L_EtFlowControlHoriz ≤ SocketDepth(ND_EtFlowControl) =  # error: This variable is undefined.
RotateFlowControlValveYZ := Rotate3DLast([
    Et_Origin[0] - 2*S_Fitting - 2*ConRadius(ND_EtDrain) - ConRadius(ND_EtFlowControl);
    Et_Origin[1] - T_PlantWall - MaleAdapterLength(ND_EtFlowControl) + ValveSocket(ND_EtFlowControl);
    Z_EtFlowControl
], "z", 90 deg)
EtFlowControlValveXZ := insertdwg("https://confluence.cornell.edu/download/attachments/173604905/Et-Scaled-Gate-Valve-Threaded.dwg", [
    EtFlowControlNipple1XZ_Origin[0] - SocketDepth(ND_EtFlowControl) + MaleAdapterLength(ND_EtFlowControl) - ValveSocket(ND_EtFlowControl) + ValveLength(ND_EtFlowControl);
    EtFlowControlNipple1XZ_Origin[1];
    Z_EtFlowControl
], 2*outerradius(ND_EtFlowControl)/(1.16 m), 2*outerradius(ND_EtFlowControl)/(1.16 m), 0 deg)
FlowControlScript :=
    stack(EtFlowControlPipeLayer, EtFlowControlNipple1, EtFlowControlNipple2, EtFlowControlVertPipe, EtFlowControlHorizPipe3, FreezeLayer("EtFlowControlPipePlu"), EtFlowControlFittingLayer, EtFlowControlCoupling1, EtFlowControlCoupling2, EtFlowControlElbow1, EtFlowControlElbow2, FreezeLayer("EtFlowControlFittingPlu"), EtFlowControlAdapterLayer, EtFlowControlAdapter1, EtFlowControlAdapter2, FreezeLayer("EtFlowControlAdapterPlu"), EtFlowControlValveLayer, EtFlowControlValve, RotateFlowControlValve, FreezeLayer("EtFlowControlValvePlu")) if L_EtFlowControlHoriz ≤ SocketDepth(ND_EtFlowControl)
    stack(EtFlowControlPipeLayer, EtFlowControlNipple1, EtFlowControlNipple2, EtFlowControlVertPipe, EtFlowControlHorizPipe1, EtFlowControlHorizPipe2, EtFlowControlHorizPipe3, FreezeLayer("EtFlowControlPipePlu"), EtFlowControlFittingLayer, EtFlowControlCoupling1, EtFlowControlCoupling2, EtFlowControlElbow1, EtFlowControlElbow2, FreezeLayer("EtFlowControlFittingPlu"), EtFlowControlAdapterLayer, EtFlowControlAdapter1, EtFlowControlAdapter2, FreezeLayer("EtFlowControlAdapterPlu"), EtFlowControlValveLayer, EtFlowControlValve, RotateFlowControlValve, FreezeLayer("EtFlowControlValvePlu")) otherwise
FlowControlScriptYZ :=
    stack(EtFlowControlPipeLayer, EtFlowControlNipple1YZ, EtFlowControlNipple2YZ, EtFlowControlVertPipeYZ, EtFlowControlHorizPipe3YZ, FreezeLayer("EtFlowControlPipePlu"), EtFlowControlFittingLayer, EtFlowControlCoupling1YZ, EtFlowControlCoupling2YZ, EtFlowControlElbow1YZ, EtFlowControlElbow2YZ, FreezeLayer("EtFlowControlFittingPlu"), EtFlowControlAdapterLayer, EtFlowControlAdapter1YZ, EtFlowControlAdapter2YZ, FreezeLayer("EtFlowControlAdapterPlu"), EtFlowControlValveLayer, EtFlowControlValveYZ, RotateFlowControlValveYZ, FreezeLayer("EtFlowControlValvePlu")) if L_EtFlowControlHoriz ≤ SocketDepth(ND_EtFlowControl)
    stack(EtFlowControlPipeLayer, EtFlowControlNipple1YZ, EtFlowControlNipple2YZ, EtFlowControlVertPipeYZ, EtFlowControlHorizPipe1YZ, EtFlowControlHorizPipe2YZ, EtFlowControlHorizPipe3YZ, FreezeLayer("EtFlowControlPipePlu"), EtFlowControlFittingLayer, EtFlowControlCoupling1YZ, EtFlowControlCoupling2YZ, EtFlowControlElbow1YZ, EtFlowControlElbow2YZ, FreezeLayer("EtFlowControlFittingPlu"), EtFlowControlAdapterLayer, EtFlowControlAdapter1YZ, EtFlowControlAdapter2YZ, FreezeLayer("EtFlowControlAdapterPlu"), EtFlowControlValveLayer, EtFlowControlValveYZ, RotateFlowControlValveYZ, FreezeLayer("EtFlowControlValvePlu")) otherwise
FlowControlScriptXZ :=
    stack(EtFlowControlPipeLayer, EtFlowControlNipple1XZ, EtFlowControlNipple2XZ, EtFlowControlVertPipeXZ, EtFlowControlHorizPipe3XZ, FreezeLayer("EtFlowControlPipePlu"), EtFlowControlFittingLayer, EtFlowControlCoupling1XZ, EtFlowControlCoupling2XZ, EtFlowControlElbow1XZ, EtFlowControlElbow2XZ, FreezeLayer("EtFlowControlFittingPlu"), EtFlowControlAdapterLayer, EtFlowControlAdapter1XZ, EtFlowControlAdapter2XZ, FreezeLayer("EtFlowControlAdapterPlu"), EtFlowControlValveLayer, EtFlowControlValveXZ, FreezeLayer("EtFlowControlValvePlu")) if L_EtFlowControlHoriz ≤ SocketDepth(ND_EtFlowControl)
    stack(EtFlowControlPipeLayer, EtFlowControlNipple1XZ, EtFlowControlNipple2XZ, EtFlowControlVertPipeXZ, EtFlowControlHorizPipe1XZ, EtFlowControlHorizPipe2XZ, EtFlowControlHorizPipe3XZ, FreezeLayer("EtFlowControlPipePlu"), EtFlowControlFittingLayer, EtFlowControlCoupling1XZ, EtFlowControlCoupling2XZ, EtFlowControlElbow1XZ, EtFlowControlElbow2XZ, FreezeLayer("EtFlowControlFittingPlu"), EtFlowControlAdapterLayer, EtFlowControlAdapter1XZ, EtFlowControlAdapter2XZ, FreezeLayer("EtFlowControlAdapterPlu"), EtFlowControlValveLayer, EtFlowControlValveXZ, FreezeLayer("EtFlowControlValvePlu")) otherwise
FlowControlScript :=
    FlowControlScriptXZ if EN_FlowControlXZPlane == 1
    FlowControlScriptYZ otherwise
# [component: inputs FlowControlScriptXZ]
# Inlet Pipe
EtInletPipeLayer := layer_new("EtInletPipePlu", blue)
EtInletFittingLayer := layer_new("EtInletFittingPlu", green)
ND_EtInlet := ND_DistPipe = 6 in
EtInletElbow := ElbowF(Et_Origin + [
    0 m;
    L_EtFrontToOverflowWeir + ConRadius(ND_EtOverflowDrain) + S_Fitting + ConRadius(ND_EtInlet);
    H_Et + ConRadius(ND_EtInlet)
], [90; 0; 90]*deg, ND_EtInlet, PS_Default)
L_EtInletPipe := 1 m
EtInletPipe := PipeF(Et_Origin + [
    L_EtInletPipe;
    L_EtFrontToOverflowWeir + ConRadius(ND_EtOverflowDrain) + S_Fitting + ConRadius(ND_EtInlet);
    H_Et + ConRadius(ND_EtInlet)
], L_EtInletPipe, [0; 0; 0]*deg, ND_EtInlet, PS_Default)
FreezeEtInletPipe := FreezeLayer("EtInletPipePlu")
FreezeEtInletFittings := FreezeLayer("EtInletFittingPlu")
EtInletScript := stack(EtInletFittingLayer, EtInletElbow, FreezeEtInletFittings, EtInletPipeLayer, EtInletPipe, FreezeEtInletPipe)
# Add Water Levels
EtWaterLayer := layer_new("EtWater", blue2)
EtWater := BoxF(Et_Origin, [Et_Origin[0] - L_Et; Et_Origin[1] + W_Et; ZW_Et], [0; 0; 0]*deg)
EtRMPipeWater := CylinderF(RMElbow_Origin + [0; ElbowRadius(ND_RMPipe); ElbowRadius(ND_RMPipe)], innerdiameter(ND_RMPipe, PS_Default)/2, ZW_RMPipe - RMElbow_Origin[2] - ElbowRadius(ND_RMPipe), [0; 90]*deg)
EtWaterFrz := FreezeLayer("EtWater")
EtWaterScript := stack(EtWaterLayer, EtWater, EtRMPipeWater, EtWaterFrz)
AC_EntranceTank := stack(EtTankScript, EtTrashRackScript, EtOverflowPluScript, EtDrainsRight, RMScript, FlowControlScript, EtInletScript)
AC_EntranceTankWater := stack(EtTankScript, EtTrashRackScript, EtOverflowPluScript, EtDrainsRight, RMScript, FlowControlScript, EtInletScript, EtWaterScript)
AC_EntranceTank :=
    AC_EntranceTank if EN_Water == 0
    AC_EntranceTankWater otherwise
