# [reference: MasterProgram.xmcd]
# [reference: PipeDatabase_orh3.xmcd]
OriginPoint := [1; 3; 5]*in
FlexCouplingF(OriginPoint, AngleVector, ND) :=
    Zoom ← zoom_win([OriginPoint[0] + zc; OriginPoint[1] + zc + OuterRadiusFlex(ND); OriginPoint[2]], [
        OriginPoint[0] - CouplingLengthFlex(ND) - zc;
        OriginPoint[1] - zc - OuterRadiusFlex(ND);
        OriginPoint[2]
    ])
    OuterCylinder ← cylinderD([OriginPoint[0]; OriginPoint[1]; OriginPoint[2]], OuterRadiusFlex(ND), [OriginPoint[0] - CouplingLengthFlex(ND); OriginPoint[1]; OriginPoint[2]])
    InnerCylinder ← cylinderD([OriginPoint[0]; OriginPoint[1]; OriginPoint[2]], InnerRadiusFlex(ND), [OriginPoint[0] - CouplingLengthFlex(ND); OriginPoint[1]; OriginPoint[2]])
    Subtract ← subtractD([OriginPoint[0]; OriginPoint[1] - OuterRadiusFlex(ND); OriginPoint[2]], [OriginPoint[0]; OriginPoint[1] - InnerRadiusFlex(ND); OriginPoint[2]])
    Rotate ← [Rotate3DLast(OriginPoint, "z", AngleVector[0]); Rotate3DLast(OriginPoint, "y", AngleVector[1])]
    Final ← stack(Zoom, OuterCylinder, InnerCylinder, Subtract)
    for i ∈ 0 .. 1
        Final ← stack(Final, Rotate[i]) if AngleVector[i] ≠ 0
    return Final
AngleVector := [40; 60]
ND := 4 in
# [component: inputs FlexCouplingF([1; 3; 5]*in, [40; 60], 4 in)]
FlexCouplingSUBF(OriginPoint, AngleVector, ND, SubtractionLayers) :=
    Zoom ← zoom_win([OriginPoint[0] + zc; OriginPoint[1] + zc + OuterRadiusFlex(ND); OriginPoint[2]], [
        OriginPoint[0] - CouplingLengthFlex(ND) - zc;
        OriginPoint[1] - zc - OuterRadiusFlex(ND);
        OriginPoint[2]
    ])
    OuterCylinder ← cylinderD([OriginPoint[0]; OriginPoint[1]; OriginPoint[2]], OuterRadiusFlex(ND), [OriginPoint[0] - CouplingLengthFlex(ND); OriginPoint[1]; OriginPoint[2]])
    RotateCylinder ← [Rotate3DLast(OriginPoint, "z", AngleVector[0]); Rotate3DLast(OriginPoint, "y", AngleVector[1])]
    Final ← stack(Zoom, OuterCylinder)
    for i ∈ 0 .. 1
        Final ← stack(Final, RotateCylinder[i]) if AngleVector[i] ≠ 0
    Group ← GroupLast("DeleteMe")
    Local ← stack(Final, Group, SubtractF(SubtractionLayers, "DeleteMe"))
    DrawOuterCylinder ← cylinderD([OriginPoint[0]; OriginPoint[1]; OriginPoint[2]], OuterRadiusFlex(ND), [OriginPoint[0] - CouplingLengthFlex(ND); OriginPoint[1]; OriginPoint[2]])
    DrawInnerCylinder ← cylinderD([OriginPoint[0]; OriginPoint[1]; OriginPoint[2]], InnerRadiusFlex(ND), [OriginPoint[0] - CouplingLengthFlex(ND); OriginPoint[1]; OriginPoint[2]])
    SubtractInnerCylinder ← subtractD([OriginPoint[0]; OriginPoint[1] - OuterRadiusFlex(ND); OriginPoint[2]], [OriginPoint[0]; OriginPoint[1] - InnerRadiusFlex(ND); OriginPoint[2]])
    Draw ← stack(Local, DrawOuterCylinder, DrawInnerCylinder, SubtractInnerCylinder)
    for i ∈ 0 .. 1
        Draw ← stack(Draw, RotateCylinder[i]) if AngleVector[i]
    return Draw
cylinderA(p1, R1, L) := concat("_cylinder", sp, point(p1[:, 0]), sp, stringit(R1), sp, stringit(L), sp)
