# Floc Hopper Draw Script
# [reference: MasterProgram.xmcd]
origin_box := [0; 0; 0]
dim_box := [L_FlocHopper; T_FlocHopper; H_FlocHopper] = [0.9; 0.04; 0.808483] m
dim_wedge := [(L_FlocHopper - W_FlocHopper)/2; T_FlocHopper; origin_box[2]] = [0.425; 0.04; 0] m
h_wedge := H_FlocHopper
FlocHopperScript :=
    layer1 ← layer_new("flochopper", green)
    viewtop ← viewtop1
    flochopper_box ← box(origin_box, dim_box)
    flochopper_wedge1 ← wedge(origin_box, dim_wedge, h_wedge)
    mirror_wedge ← mirrorD(dim_wedge, [origin_box[0] + L_FlocHopper/2; origin_box[1]], [origin_box[0] + L_FlocHopper/2; T_FlocHopper])
    zoomin ← zoom_win([origin_box[0]; origin_box[1]], [2*dim_box[0]; 2*dim_box[1]])
    subtract_wedge1 ← subtractD([dim_box[0]/2; dim_box[1]; dim_box[2]], [dim_wedge[0]; dim_wedge[1]/2; origin_box[2]])
    subtract_wedge2 ← subtractD([dim_box[0]/2; dim_box[1]], [dim_wedge[0] + W_FlocHopper; dim_wedge[1]/2])
    rotate_flochopper ← rotate_3d(dim_box, [origin_box[0]; T_FlocHopper + origin_box[1]; origin_box[2]], "x", 90 - AN_FlocHopper)
    arraybay3 ← concat("-array", sp, "ALL", sp, sp, "r", sp, stringit_nounits(N_SedBays), sp, "1", sp, stringit(-W_SedBay - W_SedBayDivider/2))
    arraybay4 ← concat("-array", sp, "ALL", sp, sp, "r", sp, stringit_nounits(N_SedBays), sp, "1", sp, stringit(-((W_Sed - (N_SedBays - 1)*W_SedBayDivider)/N_SedBays + W_SedBayDivider)))
    layerfreeze ← layer_freeze("flochopper")
    one ← stack(layer1, viewtop, flochopper_box, flochopper_wedge1, mirror_wedge, zoomin, subtract_wedge1, subtract_wedge2, rotate_flochopper, layerfreeze) if N_SedBays == 1
    one ← stack(layer1, viewtop, flochopper_box, flochopper_wedge1, mirror_wedge, zoomin, subtract_wedge1, subtract_wedge2, rotate_flochopper, arraybay4, layerfreeze) if N_SedBays > 1 and N_SedTanks ≥ 1
    one ← stack(layer1, viewtop, flochopper_box, flochopper_wedge1, mirror_wedge, zoomin, subtract_wedge1, subtract_wedge2, rotate_flochopper, arraybay3, layerfreeze) otherwise
    return one
    = ["-layer m flochopper"; "c t 0,255,0"; "flochopper"; "  "; "_-view o t"; "_box 0,0,0 0.9,0.04,0.80848"; "_wedge 0,0,0 0.425,0.04,0 0.80848"; "_mirror 0.425,0.04,0  0.45,0 0.45,0.04 n"; "_zoom w 0,0 1.8,0.08"; "_subtract 0.45,0.04,0.80848  0.425,0.02,0 "; "_subtract 0.45,0.04  0.475,0.02 "; "_rotate3d 0.9,0.04,0.80848  x 0,0.04,0 21.78134"; "-array ALL  r 3 1 -1.05"; "-layer f flochopper"; "  "]
# [component: inputs FlocHopperScript]
