Q_Plant := 3*L/s
# [reference: ExpertInputs.xmcd]
# [reference: MathFunctions.xmcd]
# [reference: PipeDatabase.xmcd]
# [reference: FluidsFunctions.xmcd]
# [reference: SedimentationTank.xmcd]
# [reference: Flocculator_jem384.xmcd]
# [reference: LFOM.xmcd]
# [reference: EntranceTank.xmcd]
# [reference: StackedRapidSandFilter.xmcd]
# [reference: LinearCdc.xmcd]
# [reference: ChemStorageTanks.xmcd]
# AutoCAD drawing programs:
# Translators:
# These are the codes that take MathCAD outputs and create AutoCAD scripts that are used to draw the plant (formerly Basics)
# [reference: MtoATranslators.xmcd]
# The wrapped MtoA translator contains the functions that the user will want to access. These functions will draw pieces with full functionality - specifying the location, dimension, and orientation of the object. Also, it contains layer control and subtraction capabilities for grouped objects.
# [reference: MtoATranslatorsWrapped.xmcd]
# Drawing functions:
# [reference: ChannelF.xmcd]
# [reference: PlumbingF.xmcd]
# [reference: TankF.xmcd]
# [reference: StairsF.xmcd]
# [reference: DrainChannelF.xmcd]
# Flocculator AutoCAD
# Dimensions
L_ChannelSlot := 5 cm
TotalFloc_Dim := [L_Floc; W_Floc; H_Floc] = [0.54; 2.33086; 2.07839] m
Wall_Dim := [TotalFloc_Dim[0] + 2*T_PlantWall; T_FlocChannelWall; TotalFloc_Dim[2]] = [0.84; 0.05; 2.07839] m
WallLF_Dim := [TotalFloc_Dim[0] + 2*L_ChannelSlot; T_FlocChannelWall; TotalFloc_Dim[2]]
FlocPort_Dim :=
    for i ∈ 0 .. (N_FlocChannels - 2)
        FlocPort_Dim[0, i] ← [W_FlocPort[N_FlocChannels - 2 - i]; T_FlocChannelWall + 2*zc; (-H_FlocPort)[i]]
    return FlocPort_Dim
# Floc ports connect the channels.
ChannelOpening_Dim := [W_SedInletChannelPreWeir; T_PlantWall; Z_FlocTank + H_Floc - Z_SedChannelBottom] = [0.28415; 0.15; 0.631828] m
ChannelSlot_Dim := [L_ChannelSlot; T_FlocChannelWall; H_Floc]
# normally want a 30deg slope, unless FlocModuleBaffle is too close
# set slope to be 5 cm away from nearest Baffle
FlocDrainSlope_Dim :=
    [sqrt(3)*H_FlocSlope; -D_FlocValve; H_FlocSlope] if sqrt(3)*H_FlocSlope < W_FlocPort[0] + S_FlocPortGap - 5 cm
    [W_FlocPort[0] + S_FlocPortGap - 5 cm; -D_FlocValve; H_FlocSlope] otherwise
Port_Dim := [T_FlocBaffle + 2*zc; L_BafflePort + L_Slot; L_BafflePort]
BaffleSlot1_Dim := [T_FlocBaffle; W_FlocChannel + 2*L_Slot; H_Floc - Z_FlocBaffles[0, 0]]
BaffleSlot1Last_Dim := [T_FlocBaffle; W_FlocChannel + 2*L_Slot; H_Floc - Z_FlocBaffles[0, N_FlocChannels - 1]]
BaffleSlot2_Dim := [T_FlocBaffle; W_FlocChannel + 2*L_Slot; H_Floc - Z_FlocBaffles[1, 0]]
BaffleSlot2Last_Dim := [T_FlocBaffle; W_FlocChannel + 2*L_Slot; H_Floc - Z_FlocBaffles[1, N_FlocChannels - 1]]
# Pipe Spacer Size
OD_PipeSpacerEstF := [FloorNearest(.6*W_FlocChannel, Pipesizes[:, 1]); CeilNearest(.6*W_FlocChannel, Pipesizes[:, 1])] = [3.5; 4] in
OD_PipeSpacerEstC := CeilNearest(.6*W_FlocChannel, Pipesizes[:, 1]) = 4 in
Index :=
    for i ∈ 0 .. 1
        I[i] ← index(OD_PipeSpacerEstF[i], Pipesizes[:, 1])
        Avail ← CountryPipes[I[i], Country]
        if Avail == 0
            while Avail == 0
                I[i] ← I[i] + 1
                Avail ← CountryPipes[I[i], Country]
    return I
    = [10; 12]
ND_SpacerPipeArray := [Pipesizes[Index[0], 0]; Pipesizes[Index[1], 0]] = [3; 4] in
OD_PipeSpacer := [outerdiameter(ND_SpacerPipeArray[0]); outerdiameter(ND_SpacerPipeArray[1])] = [3.5; 4.5] in
A_Percentage := OD_PipeSpacer/W_FlocChannel = [0.534121; 0.686727]
ND_SpacerPipe :=
    ND_SpacerPipeArray[index(RoundNearest(.6, A_Percentage), A_Percentage)] if Q_Plant ≤ Q_PlantMaxLF
    0.75 in otherwise
    = 3 in
# Number and Spacing of Obstacles
S_OverLap := L_FlocBaffles[0, 0] - Z_FlocBaffles[1, 0] = 1.28765 m
S_ObstacleEff := 10*outerdiameter(ND_SpacerPipe)/2 = 0.4445 m
N_ObstaclesEst := (S_OverLap - S_ObstacleEff)/(S_ObstacleEff + outerdiameter(ND_SpacerPipe)) = 1.58071
N_Obstacles :=
    floor(N_ObstaclesEst) if N_ObstaclesEst ≥ 2
    N_Obstacles ← 2 otherwise
    = 2
S_Obstacle := (S_OverLap - outerdiameter(ND_SpacerPipe)*N_Obstacles)/(N_Obstacles + 1) = 0.36995 m
# Origin Points
Floc_Origin := [Plant_Origin[0]; Plant_Origin[1] + N_SedTanks*(W_Sed + T_PlantWall); Plant_Origin[2] + Z_FlocTank] = [0; 1.2168; 0] m
Wall_Origin := [Floc_Origin[0] - TotalFloc_Dim[0] - T_PlantWall; Floc_Origin[1] + W_FlocChannel; Floc_Origin[2]] = [-0.69; 1.38324; 0] m
CouplingLength(ND_RMPipe) = 0.119063 m
Slot_Origin := [Floc_Origin[0] - TotalFloc_Dim[0] - L_ChannelSlot; Floc_Origin[1] + W_FlocChannel; Floc_Origin[2]] = [-0.59; 1.38324; 0] m
FlocCoupling_Origin :=
    if Q_Plant > Q_PlantMaxLF
        [
            Floc_Origin[0] + ConRadius(ND_RMPipe) + S_Fitting - L_Floc;
            Floc_Origin[1] + N_FlocChannels*W_FlocChannel + T_FlocChannelWall*(N_FlocChannels - 1) + SocketDepth(ND_RMPipe) - L_FlocCouplingExt;
            Floc_Origin[2] + outerradius(ND_RMPipe) + S_Fitting
        ]
    otherwise
        [
            Floc_Origin[0] + ConRadius(ND_RMPipe) + S_Fitting - L_Floc;
            (Floc_Origin[1] + N_FlocChannels*W_FlocChannel + T_FlocChannelWall*(N_FlocChannels - 1) + T_PlantWall) - 2*SocketDepth(ND_RMPipe) + CouplingLength(ND_RMPipe) - L_FlocCouplingExt;
            Floc_Origin[2] + outerradius(ND_RMPipe) + S_Fitting
        ]
FlocPort_Origin :=
    for i ∈ 0 .. (N_FlocChannels - 2)
        if mod(i, 2) == 1
            FlocPort_Origin[0, i] ← [
                Floc_Origin[0] - TotalFloc_Dim[0];
                Floc_Origin[1] + (W_FlocChannel*(1 + i)) + T_FlocChannelWall*i - zc;
                Floc_Origin[2] + H_FlocPort[i]
            ]
        otherwise
            FlocPort_Origin[0, i] ← [
                Floc_Origin[0] - W_FlocPort[N_FlocChannels - 2 - i];
                Floc_Origin[1] + (W_FlocChannel*(1 + i)) + T_FlocChannelWall*i - zc;
                Floc_Origin[2] + H_FlocPort[i]
            ]
    return FlocPort_Origin
# The flocport origins were set to start at the top height of the ports themselves (added to the origin otherwise it disappears).  This changes the flocports to be at the bottom of the channel dividing walls instead of at the top (more structurally sound).
# The Channel Opening was changed in the z-direction so that the bottom opening aligned with the bottom of the tank (for the same reason as the flocports).
ChannelOpening_Origin := [Floc_Origin[0] - L_Sed; Floc_Origin[1] - T_PlantWall; Z_SedChannelBottom] = [-3.86842; 1.0668; 1.44656] m
X_FlocBaffles[0, 0] = 0.135 m
# "L" origins are for the last channel only
LargeCap_Origin := [
    -CapThickness(1.5 in) + Floc_Origin[0] - L_Floc + X_FlocBaffles[0, 0];
    (Floc_Origin[1] + W_FlocChannel*N_FlocChannels + T_FlocChannelWall*(N_FlocChannels - 1) - 2*S_Fitting);
    {
        (Floc_Origin[2] + L_FlocBaffleLower - 0.5*(L_FlocBaffleLower + L_FlocBaffleUpper - (H_Floc - 0.5*H_PlantFreeboard))) if EN_ModuleIdentical == 0
        (Floc_Origin[2] + 4*S_ModulePipesV + S_FlocBaffle[last(S_FlocBaffle)]*Pi_FlocBaffle - .05 m) otherwise
    }
] = [-0.409445; 3.44766; 0.832877] m
# Shifted LargeCap.Origin and LargeCapL.Origin (y and z values) to within 0.05m of each wall
SpacerCap_Origin := [
    -CapThickness(ND_SpacerPipe) + Floc_Origin[0];
    Floc_Origin[1] + (W_FlocChannel*N_FlocChannels + T_FlocChannelWall*(N_FlocChannels - 1)) - W_FlocChannel/2;
    Floc_Origin[2] + L_FlocBaffleLower - S_Obstacle - ((innerdiameter(ND_SpacerPipe, PS_Modules) - CapDiameter(ND_FlocModulesMain))/2)
] = [-0.00635; 3.46444; 1.0952] m
FittedCapLF_Origin := [
    -CapThickness(ND_SpacerPipe) + Floc_Origin[0] - CapThickness(0.5 in);
    Floc_Origin[1] + (W_FlocChannel*N_FlocChannels + T_FlocChannelWall*(N_FlocChannels - 1)) - W_FlocChannel/2;
    Floc_Origin[2] + L_FlocBaffleLower - S_Obstacle
] = [-0.00957263; 3.46444; 1.1202] m
SpacerCapLast_Origin := SpacerCap_Origin + [0; -(W_FlocChannel*(N_FlocChannels - 1) + T_FlocChannelWall*(N_FlocChannels - 1)); 0] = [-0.00635; 1.30002; 1.0952] m
LargeCapL_Origin := [
    -CapDiameter(1.5 in)/2 + outerradius(1.5 in) + Floc_Origin[0] - L_Floc + X_FlocBaffles[0, N_FlocChannels - 1] + B_FlocBaffle[0];
    Floc_Origin[1] + W_FlocChannel - 2*S_Fitting;
    Floc_Origin[2] + 4*S_ModulePipesV + S_FlocBaffle[last(S_FlocBaffle)]*Pi_FlocBaffle - .05 m
] = [-0.278445; 1.28324; 1.44015] m  # Matched L.Origin's to the rest of the Origins to account for now-equivalent FlocModuleBaffle spacings.
FittedCap_Origin := LargeCap_Origin + [T_FlocBaffle + CapThickness(0.5 in) + CapThickness(1.5 in); 0 m; 0 m] = [-0.399777; 3.44766; 0.832877] m
FittedCapL_Origin := LargeCapL_Origin + [
    T_FlocBaffle + CapDiameter(0.5 in)/2 - outerradius(0.5 in) + CapDiameter(1.5 in)/2 - outerradius(1.5 in);
    0 m;
    0 m
]
LongPipe_Origin := FittedCap_Origin + [L_FlocModuleLong[0]; 0 m; 0 m]
LongPipeL_Origin := FittedCapL_Origin + [L_FlocModuleLong[0]; 0 m; 0 m]
ModuleCoupling_Origin := LongPipe_Origin + [CouplingLength(0.5 in) - 2*SocketDepth(0.5 in); 0 m; 0 m]
ModuleCouplingL_Origin := LongPipeL_Origin + [CouplingLength(0.5 in) - 2*SocketDepth(0.5 in); 0 m; 0 m]
ConnectorPipe_Origin := ModuleCoupling_Origin + [L_FlocModuleConnector[0]; 0 m; 0 m]
ConnectorPipeL_Origin := ModuleCouplingL_Origin + [L_FlocModuleConnector[0]; 0 m; 0 m]
FlocAdapter1_Origin := [
    -L_Floc - CouplingLength(ND_FlocValve) - (max(T_FlocChannelWall - CouplingLength(ND_FlocValve), 0 m) + SocketDepth(ND_FlocValve));
    Y_FlocDrainValves[0];
    Floc_Origin[2]
]
FlocValve_Origin := FlocAdapter1_Origin + [-MaleAdapterLength(ND_FlocValve) + SocketDepth(ND_FlocValve) + ValveSocket(ND_FlocValve); 0 m; 0 m]
FlocAdapter2_Origin := FlocValve_Origin + [
    -ValveLength(ND_FlocValve) + ValveSocket(ND_FlocValve) - MaleAdapterLength(ND_FlocValve) + SocketDepth(ND_FlocValve);
    0 m;
    0 m
]
FlocDrainNipple_Origin := FlocAdapter2_Origin
BaffleSlot1_Origin := [Floc_Origin[0] - L_Floc; -L_Slot; Floc_Origin[2]] + [X_FlocBaffles[0, 0]; Y_FlocBaffles[0, 0]; Z_FlocBaffles[0, 0]]
BaffleSlot1Last_Origin := [Floc_Origin[0] - L_Floc; -L_Slot; Floc_Origin[2]] + [
    X_FlocBaffles[0, N_FlocChannels - 1];
    Y_FlocBaffles[0, N_FlocChannels - 1];
    Z_FlocBaffles[0, N_FlocChannels - 1]
]
BaffleSlot2_Origin := [Floc_Origin[0] - L_Floc; -L_Slot; Floc_Origin[2]] + [X_FlocBaffles[1, 0]; Y_FlocBaffles[0, 0]; Z_FlocBaffles[1, 0]]
BaffleSlot2Last_Origin := [Floc_Origin[0] - L_Floc; -L_Slot; Floc_Origin[2]] + [
    X_FlocBaffles[1, N_FlocChannels - 1];
    Y_FlocBaffles[0, N_FlocChannels - 1];
    Z_FlocBaffles[1, N_FlocChannels - 1]
]
BafflePort1V_Origin := [Floc_Origin[0] - L_Floc - zc; W_FlocChannel - L_BafflePort; Floc_Origin[2]] + [X_FlocBaffles[0, 0]; Y_FlocBaffles[0, 0]; Z_FlocBaffles[0, 0]]
BafflePort1VLast_Origin := [Floc_Origin[0] - zc - L_Floc; W_FlocChannel - L_BafflePort; Floc_Origin[2]] + [
    X_FlocBaffles[N_FlocChannelBaffles[N_FlocChannels - 1] - 1, N_FlocChannels - 1];
    Y_FlocBaffles[0, N_FlocChannels - 1];
    Z_FlocBaffles[1, N_FlocChannels - 1]
]
BafflePort2V_Origin := [Floc_Origin[0] - L_Floc - zc; -L_Slot; Floc_Origin[2]] + [X_FlocBaffles[2, 0]; Y_FlocBaffles[0, 0]; Z_FlocBaffles[2, 0]]
BafflePort2VLast_Origin := [Floc_Origin[0] - zc - L_Floc; -L_Slot; Floc_Origin[2]] + [
    X_FlocBaffles[N_FlocChannelBaffles[N_FlocChannels - 1] - 3, N_FlocChannels - 1];
    Y_FlocBaffles[0, N_FlocChannels - 1];
    Z_FlocBaffles[2, N_FlocChannels - 1]
]
# Flocculator Concrete
FlocTankLayer := layer_new("FlocTankCon", grey)
DrawFlocTank := Tank(Floc_Origin, TotalFloc_Dim, T_PlantWall)
FreezeFlocTank := FreezeLayer("FlocTankCon")
Slot_Origin = [-0.59; 1.38324; 0] m
Slot_Origin + ChannelSlot_Dim = [-0.54; 1.43324; 2.07839] m
DrawChannelSlot := BoxF(Slot_Origin, Slot_Origin + ChannelSlot_Dim, [0; 0; 0]*deg)
ArrayChannelSlot := ArrayLast(N_FlocChannels - 1, 1, W_FlocChannel + T_FlocChannelWall)
MirrorChannelSlot := Mirror3dAll("yz", [-L_Floc/2; FittedCapLF_Origin[2]], "n")
ChannelWallLayer := layer_new("FlocChannelCon", dkgrey)
DrawFlocWall := BoxF(Slot_Origin, Slot_Origin + WallLF_Dim, [0; 0; 0]*deg)
ArrayFlocWall := ArrayLast(N_FlocChannels - 1, 1, W_FlocChannel + T_FlocChannelWall)
FlocChannelPorts :=
    for i ∈ 0 .. (N_FlocChannels - 2)
        Local ← stack(Local, BoxF(FlocPort_Origin[0, i], FlocPort_Origin[0, i] + FlocPort_Dim[0, i], [0; 0; 0]*deg))
ChannelOpening := BoxF(ChannelOpening_Origin, ChannelOpening_Origin + ChannelOpening_Dim, [0; 0; 0]*deg)
Wedge1 := WedgeF([
    Plant_Origin[0] - L_Sed;
    Y_FlocDrainValves[0] + 0.5*D_FlocValve + FlocDrainSlope_Dim[1];
    Floc_Origin[2] - 0.5*D_FlocValve + FlocDrainSlope_Dim[2]
], [
    Plant_Origin[0] - L_Sed + FlocDrainSlope_Dim[0];
    Y_FlocDrainValves[0] + 0.5*D_FlocValve;
    Floc_Origin[2] - 0.5*D_FlocValve
], [0; 0; 0]*deg)
ArrayWedge := ArrayLast(last(Y_FlocDrainValves) + 1, 1, 2*W_FlocChannel + 2*T_FlocChannelWall)
GroupFlocSubtractionPieces := GroupAll("DeleteMe")
SubtractFlocTankPieces := SubtractF(["FlocTankCon"], "DeleteMe")
FlocTankScript := stack(FlocTankLayer, DrawFlocTank, FreezeFlocTank, DrawChannelSlot, ArrayChannelSlot, MirrorChannelSlot, FlocChannelPorts, ChannelOpening, Wedge1, ArrayWedge, GroupFlocSubtractionPieces, SubtractFlocTankPieces, ChannelWallLayer, DrawFlocWall, ArrayFlocWall, FreezeLayer("FlocChannelCon"))
# Vertical Baffles
FlocBaffleLayerV := layer_new("FlocModBaffles", ltpurple)
DrawLowerBaffleV := BoxF([Floc_Origin[0] - L_Floc; L_Slot; Floc_Origin[2]] + [X_FlocBaffles[0, 0]; Y_FlocBaffles[0, 0]; Z_FlocBaffles[0, 0]], [Floc_Origin[0] - L_Floc; L_Slot; Floc_Origin[2]] + [X_FlocBaffles[0, 0]; Y_FlocBaffles[0, 0]; Z_FlocBaffles[0, 0]] + [T_FlocBaffle; W_FlocChannel + 2*L_Slot; L_FlocBaffles[0, 0]], [0; 0; 0]*deg)
ArrayLowerBaffleV := ArrayLast(1, ceil(N_FlocChannelBaffles[0]/2), 2*B_FlocBaffle[0])
# Aligned FlocModuleBaffle spacing of last floc channel to the FlocModuleBaffle spacings of the other channels.
DrawUpperBaffleV := BoxF([Floc_Origin[0] - L_Floc; L_Slot; Floc_Origin[2]] + [X_FlocBaffles[1, 0]; Y_FlocBaffles[0, 0]; Z_FlocBaffles[1, 0]], [Floc_Origin[0] - L_Floc; L_Slot; Floc_Origin[2]] + [X_FlocBaffles[1, 0]; Y_FlocBaffles[0, 0]; Z_FlocBaffles[1, 0]] + [T_FlocBaffle; W_FlocChannel + 2*L_Slot; L_FlocBaffles[1, 0]], [0; 0; 0]*deg)
ArrayUpperBaffleV := ArrayLast(1, floor(N_FlocChannelBaffles[0]/2), 2*B_FlocBaffle[0])
ArrayBafflesChannelV := array_all(N_FlocChannels - 1, 1, -W_FlocChannel - T_FlocChannelWall)
DrawLastLowerBaffleV := BoxF([Floc_Origin[0] - L_Floc; -L_Slot; Floc_Origin[2]] + [
    X_FlocBaffles[N_FlocChannelBaffles[N_FlocChannels - 1] - 1, N_FlocChannels - 1];
    Y_FlocBaffles[0, N_FlocChannels - 1];
    Z_FlocBaffles[1, N_FlocChannels - 1]
], [Floc_Origin[0] - L_Floc; -L_Slot; Floc_Origin[2]] + [
    X_FlocBaffles[N_FlocChannelBaffles[N_FlocChannels - 1] - 1, N_FlocChannels - 1];
    Y_FlocBaffles[0, N_FlocChannels - 1];
    Z_FlocBaffles[1, N_FlocChannels - 1]
] + [-T_FlocBaffle; W_FlocChannel + 2*L_Slot; L_FlocBaffles[1, N_FlocChannels - 1]], [0; 0; 0]*deg)
N_FlocChannelBaffles[last(N_FlocChannelBaffles)] = 3
ArrayLastLowerBaffleV := ArrayLast(1, floor(N_FlocChannelBaffles[last(N_FlocChannelBaffles)]/2), -(2*B_FlocBaffle[0]))
DrawLastUpperBaffleV := BoxF([Floc_Origin[0] - L_Floc; -L_Slot; Floc_Origin[2]] + [
    X_FlocBaffles[N_FlocChannelBaffles[N_FlocChannels - 1] - 2, N_FlocChannels - 1];
    Y_FlocBaffles[0, N_FlocChannels - 1];
    Z_FlocBaffles[0, N_FlocChannels - 1]
], [Floc_Origin[0] - L_Floc; -L_Slot; Floc_Origin[2]] + [
    X_FlocBaffles[N_FlocChannelBaffles[N_FlocChannels - 1] - 2, N_FlocChannels - 1];
    Y_FlocBaffles[0, N_FlocChannels - 1];
    Z_FlocBaffles[0, N_FlocChannels - 1]
] + [-T_FlocBaffle; W_FlocChannel + 2*L_Slot; L_FlocBaffles[0, N_FlocChannels - 1]], [0; 0; 0]*deg)
ArrayLastUpperBaffleV := ArrayLast(1, floor(N_FlocChannelBaffles[last(N_FlocChannelBaffles)]/2), -(2*B_FlocBaffle[0]))
W_FlocChannel = 0.166442 m
FreezeBafflesV := FreezeLayer("FlocModBaffles")
DrawBafflePort1V := BoxF(BafflePort1V_Origin, BafflePort1V_Origin + Port_Dim, [0; 0; 0]*deg)
DrawBafflePort1VLast := BoxF(BafflePort1VLast_Origin, BafflePort1VLast_Origin + Port_Dim, [0; 0; 0]*deg)
DrawBafflePort2V := BoxF(BafflePort2V_Origin, BafflePort2V_Origin + Port_Dim, [0; 0; 0]*deg)
DrawBafflePort2VLast := BoxF(BafflePort2VLast_Origin, BafflePort2VLast_Origin + Port_Dim, [0; 0; 0]*deg)
ArrayPort1V := ArrayMultiple([BafflePort1V_Origin], N_FlocChannels - 1, ceil(N_FlocChannelBaffles[0]/4), -W_FlocChannel - T_FlocChannelWall, 4*B_FlocBaffle[0])
ArrayPort2V := ArrayMultiple([BafflePort2V_Origin], N_FlocChannels - 1, ceil((N_FlocChannelBaffles[0] - 2)/4), -W_FlocChannel - T_FlocChannelWall, 4*B_FlocBaffle[0])
ArrayPort1VLast := ArrayMultiple([BafflePort1VLast_Origin], 1, ceil(N_FlocChannelBaffles[N_FlocChannels - 1]/4), -W_FlocChannel - T_FlocChannelWall, -(4*B_FlocBaffle[N_FlocChannels - 1]))
ArrayPort2VLast := ArrayMultiple([BafflePort2VLast_Origin], 1, ceil((N_FlocChannelBaffles[N_FlocChannels - 1] - 3)/4), -W_FlocChannel - T_FlocChannelWall, -(4*B_FlocBaffle[N_FlocChannels - 1]))
FlocCouplingBaffleCut := CylinderF(FlocCoupling_Origin, ConRadius(ND_RMPipe), SocketDepth(ND_RMPipe), [90; 0]*deg)
GroupBafflesV := GroupAll("DeleteMe")
SubtractBafflePortsV := SubtractF(["FlocModBaffles"], "DeleteMe")
MirrorBafflesV := MirrorAll([Floc_Origin[0]; Floc_Origin[1]] - [W_Floc/2; 0 m], [Floc_Origin[0]; Floc_Origin[1]] - [W_Floc/2; zc], "y")
FlocTankBaffleScriptV := stack(FlocBaffleLayerV, DrawLowerBaffleV, ArrayLowerBaffleV, DrawUpperBaffleV, ArrayUpperBaffleV, ArrayBafflesChannelV, DrawLastLowerBaffleV, ArrayLastLowerBaffleV, DrawLastUpperBaffleV, ArrayLastUpperBaffleV, FreezeBafflesV, DrawBafflePort1V, DrawBafflePort2V, DrawBafflePort1VLast, DrawBafflePort2VLast, ArrayPort1V, ArrayPort2V, ArrayPort1VLast, ArrayPort2VLast, FlocCouplingBaffleCut, GroupBafflesV, SubtractBafflePortsV)
# Module Piping for Low Flow
# FlocModCapLayer
FlocModCapLayer := layer_new("FlocModCapPlu", red)
FlocModCap :=
    for i ∈ 0 .. N_Obstacles - 1
        large ← CapF(SpacerCap_Origin + [0; 0; -i*(S_Obstacle + outerdiameter(ND_SpacerPipe))], [0; 0]*deg, ND_SpacerPipe)
        fitted ← CapF(FittedCapLF_Origin + [0; 0; -i*(S_Obstacle + outerdiameter(ND_SpacerPipe))], [0; 0]*deg, ND_FlocModulesMain)
        Script ← stack(Script, large, fitted)
    return Script
MirrorFlocModCap := Mirror3dAll("yz", [-L_Floc/2; FittedCapLF_Origin[2]], "n")
FlocMod1CapFrz := FreezeLayer("FlocModCapPlu")
FlocModCapsScript := stack(FlocModCapLayer, FlocModCap, MirrorFlocModCap, FlocMod1CapFrz)
# FlocModPipeLayer
FlocModPipeLayer := layer_new("FlocModPipePlu", blue)
FlocModLongPipe :=
    for i ∈ 0 .. N_Obstacles - 1
        x ← PipeF(FittedCapLF_Origin + [0; 0; -i*(S_Obstacle + outerdiameter(ND_SpacerPipe))], L_Floc - 2*(CapThickness(ND_FlocModulesMain) + CapThickness(ND_SpacerPipe)), [0; 0]*deg, ND_FlocModulesMain, PS_Modules)
        Script ← stack(Script, x)
    return Script
FlocModPipeFrz := FreezeLayer("FlocModPipePlu")
FlocModPipeScript := stack(FlocModPipeLayer, FlocModLongPipe, FlocModPipeFrz)
# FlocModSpacerLayer
FlocModSpacerLayer := layer_new("FlocModSpacerPlu", blue)
FlocModSpacer :=
    for i ∈ 0 .. N_Obstacles - 1
        first ← PipeF(SpacerCap_Origin - [
            L_Floc - CapThickness(ND_SpacerPipe) - S_FlocBaffle[0];
            0;
            i*(S_Obstacle + outerdiameter(ND_SpacerPipe))
        ], S_FlocBaffle[0] - CapThickness(ND_SpacerPipe), [0; 0]*deg, ND_SpacerPipe, PS_Modules)
        last ← PipeF(SpacerCap_Origin - [0; 0; i*(S_Obstacle + outerdiameter(ND_SpacerPipe))], L_Floc - (L_Floc/S_FlocBaffle[0] - 1)*B_FlocBaffle[0] - CapThickness(ND_SpacerPipe), [0; 0]*deg, ND_SpacerPipe, PS_Modules)
        mid ← PipeF(SpacerCap_Origin - [
            L_Floc - (L_Floc/S_FlocBaffle[0] - 1)*B_FlocBaffle[0] - CapThickness(ND_SpacerPipe) + T_FlocBaffle;
            0;
            i*(S_Obstacle + outerdiameter(ND_SpacerPipe))
        ], S_FlocBaffle[0], [0; 0]*deg, ND_SpacerPipe, PS_Modules)
        midarray ← ArrayLast(1, L_Floc/S_FlocBaffle[0] - 2, (-B_FlocBaffle)[0])
        Script ← stack(Script, first, last, mid, midarray)
    return Script
FlocModSpacerFrz := FreezeLayer("FlocModSpacerPlu")
FlocModSpacerScript := stack(FlocModSpacerLayer, FlocModSpacer, FlocModSpacerFrz)
ThawCapPipe := ThawMultiple(["FlocModCapPlu"; "FlocModPipePlu"])
ArrayCapPipe := array_all(N_FlocChannels, 1, -(W_FlocChannel + T_FlocChannelWall))
FrzCapPipe := FreezeMultiple(["FlocModCapPlu"; "FlocModPipePlu"])
ThawSpacer := SelectLayer("FlocModSpacerPlu")
B_FlocBaffle[0] - CapThickness(ND_SpacerPipe) = 0.13065 m
ArraySpacer := ArrayLast(N_FlocChannels - 1, 1, -(W_FlocChannel + T_FlocChannelWall))
B_FlocBaffle[0] = 0.137 m
FrzSpacer := FreezeLayer("FlocModSpacerPlu")
FlocModSpacerLast :=
    for i ∈ 0 .. N_Obstacles - 1
        first ← PipeF(SpacerCapLast_Origin - [0; 0; i*(S_Obstacle + outerdiameter(ND_SpacerPipe))], B_FlocBaffle[0] - CapThickness(ND_SpacerPipe), [0; 0]*deg, ND_SpacerPipe, PS_Modules)
        mid ← PipeF(SpacerCapLast_Origin - [
            B_FlocBaffle[0] - CapThickness(ND_SpacerPipe) + T_FlocBaffle;
            0;
            i*(S_Obstacle + outerdiameter(ND_SpacerPipe))
        ], S_FlocBaffle[0], [0; 0]*deg, ND_SpacerPipe, PS_Modules)
        arraymid ← ArrayLast(1, L_Floc/S_FlocBaffle[0] - 3, (-B_FlocBaffle)[0])
        last ← PipeF(SpacerCapLast_Origin - [
            2*B_FlocBaffle[0] - CapThickness(ND_SpacerPipe) + T_FlocBaffle;
            0;
            i*(S_Obstacle + outerdiameter(ND_SpacerPipe))
        ], (2*S_FlocBaffle)[0] - 2*CapThickness(ND_SpacerPipe), [0; 0]*deg, ND_SpacerPipe, PS_Modules)
        Script ← stack(Script, first, mid, arraymid, last)
    return Script
FlocModules := stack(FlocModCapsScript, FlocModPipeScript, FlocModSpacerScript, ThawCapPipe, ArrayCapPipe, FrzCapPipe, ThawSpacer, ArraySpacer, FlocModSpacerLast, FrzSpacer)
# Channel Drains
FlocTankDrainCouplingScript :=
    Local ← layer_new("FlocDrainCouplingPlu", green)
    for i ∈ 0 .. last(Y_FlocDrainValves)
        Local ← stack(Local, CouplingSUBF([-L_Floc - SocketDepth(ND_FlocValve); Y_FlocDrainValves[i]; Floc_Origin[2]], [0; 0]*deg, ND_FlocValve, PS_Default, ["FlocTankCon"]))
    return stack(Local, FreezeLayer("FlocDrainCouplingPlu"))
FlocTankDrainPipeScript :=
    Local ← layer_new("FlocDrainPipePlu", blue)
    for i ∈ 0 .. last(Y_FlocDrainValves)
        Local ← stack(Local, PipeSUBF([
            -L_Floc - CouplingLength(ND_FlocValve) + SocketDepth(ND_FlocValve);
            Y_FlocDrainValves[i];
            Floc_Origin[2]
        ], max(T_PlantWall - CouplingLength(ND_FlocValve), 0 m) + 2*SocketDepth(ND_FlocValve), [0; 0]*deg, ND_FlocValve, PS_Default, ["FlocTankCon"]))
    return stack(Local, FreezeLayer("FlocDrainPipePlu"))
FlocDrainAdapterLayer := layer_new("FlocDrainAdapterPlu", blue3)
DrawFlocDrainAdapter1 := MaleAdapterF(FlocAdapter1_Origin, [0; 0]*deg, ND_FlocValve, PS_Default)
FlocTankDrainAdapterScript := stack(FlocDrainAdapterLayer, DrawFlocDrainAdapter1, FreezeLayer("FlocDrainAdapterPlu"))
FlocDrainValveLayer := layer_new("FlocDrainValvePlu", blue3)
InsertFlocDrainValve := insertdwg("https://confluence.cornell.edu/download/attachments/173604905/Floc-Scaled-Gate-Valve-Threaded.dwg", FlocValve_Origin, D_FlocScale, D_FlocScale, 0 deg)
FlocTankDrainValveScript := stack(FlocDrainValveLayer, InsertFlocDrainValve, FreezeLayer("FlocDrainValvePlu"))
# For this script to work, you need to modify the search path in AutoCAD everytime you want to test this on a different computer.  Go to tools->options the under search directory add a new file path.  Browse to find the Final Desgins Folder (or equivalent on a different sevrer).
# Iterates through the values of drain locations and inserts a valve
ThawFlocDrains := ThawMultiple(["FlocDrainAdapterPlu"; "FlocDrainValvePlu"])
ArrayFlocDrains := array_all(ceil(N_FlocChannels/2), 1, 2*(W_FlocChannel + T_FlocChannelWall))
FreezeDrains := FreezeMultiple(["FlocDrainAdapterPlu"; "FlocDrainValvePlu"])
FlocDrainArray := stack(ThawFlocDrains, ArrayFlocDrains, FreezeDrains)
# Rapid Mix Components
FlocRMLayer := layer_new("FlocRMCouplingPlu", green)
DrawFlocRMCoupling := CouplingSUBF(FlocCoupling_Origin, [270; 0]*deg, ND_RMPipe, PS_Default, ["FlocTankCon"])  # FlocModPipeFrz
FreezeFlocRMCoupling := FreezeLayer("FlocRMCouplingPlu")
# Orifice Plate
LayerRMOrificePlate := layer_new("FlocRmOrificePlate", red)
RMOrificePlate := CylinderF(FlocCoupling_Origin, outerradius(ND_RMPipe), T_RMOrificePlate, [90; 0; 0]*deg)
FreezeRMOrificePlate := FreezeLayer("FlocRmOrificePlate")
RMOrifice := CylinderF(FlocCoupling_Origin, D_RMOrifice/2, T_RMOrificePlate, [90; 0; 0]*deg)
SubtractRMOrifice := SubtractF(["FlocRmOrificePlate"], "DeleteMe")
RMOrificePlateScript := stack(LayerRMOrificePlate, RMOrificePlate, FreezeRMOrificePlate, RMOrifice, GroupDelete, SubtractRMOrifice)
FlocRMPlateHolderLayer := layer_new("FlocRmPlateHolder", red)
T_PlantWall - SocketDepth(ND_RMPipe) = 0.093 m
RMOrificePlateHolderStub := PipeF(FlocCoupling_Origin - [0; T_RMOrificePlate; 0], T_PlantWall - SocketDepth(ND_RMPipe), [90; 0; 0]*deg, ND_RMPipe, PS_Default)
FlocRmPlateHolderFrz := FreezeLayer("FlocRmPlateHolder")
# Orifice Plate Rod
D_RMOrificePlateRod := 3/8*in
OrificePlateRodLayer := layer_new("FlocOrificePlateRod", black)
OrificePlateRod := CylinderF(FlocCoupling_Origin - [0; T_RMOrificePlate + SocketDepth(ND_RMPipe) - L_FlocCouplingExt/2; -ConRadius(ND_RMPipe) - zc], D_RMOrificePlateRod, OuterDiameterFittingPVC(ND_RMPipe) + 2*zc, [0; 270; 0]*deg)
FreezeOrificePlateRod := FreezeLayer("FlocOrificePlateRod")
SubtractOrificePlateRodCoupling := SubtractF(["FlocRMCouplingPlu"], "DeleteMe")
SubtractOrificePlateRodPipe := SubtractF(["FlocRmPlateHolder"], "DeleteMe")
OrificePlateRodScript := stack(OrificePlateRod, GroupDelete, SubtractOrificePlateRodCoupling, OrificePlateRod, GroupDelete, SubtractOrificePlateRodPipe, OrificePlateRodLayer, OrificePlateRod, FreezeOrificePlateRod)
FlocRMScript := stack(FlocRMLayer, DrawFlocRMCoupling, FreezeFlocRMCoupling, RMOrificePlateScript, FlocRMPlateHolderLayer, RMOrificePlateHolderStub, FlocRmPlateHolderFrz, OrificePlateRodScript)
ThawAll := ThawMultiple(["Floc*"])
MoveFloc := MoveAll(Floc_Origin, Floc_Origin + [
    -W_SedBay - 2*T_PlantWall;
    -(L_Sed - W_Floc) + CouplingLength(ND_RMPipe) - T_PlantWall - T_FlocChannelWall;
    0 m
]) = "_move all  0,1.2168,0 -1.3668,-0.4017,0"
FreezeAll := FreezeMultiple(["Floc*"])
AC_FlocTankLow := stack(FlocTankScript, FlocTankBaffleScriptV, FlocModules, FlocTankDrainCouplingScript, FlocTankDrainPipeScript, FlocTankDrainAdapterScript, FlocTankDrainValveScript, FlocDrainArray, FlocRMScript, ThawAll, MoveFloc, FreezeAll)
