# [reference: MasterProgram.xmcd]
Sludgescript(p1, p2, p3, p4, p5, p6, p7, ND, R1, R2, R3, L, n1, n2, d1, win1, win2, EN) :=
    viewtop ← viewtop
    pipe1 ← Pipe(p1, ND, L, EN)
    zoom_win ← zoom_win(win1, win2)
    cylinder3 ← cylinderD(p2, R3, p3)
    viewrightside ← viewrightside
    array1 ← array(p4, n1, n2, -d1)
    subtract2 ← subtractH(p5, p6, p7)
    one ← concat(viewtop, zoom_win)
    two ← pipe1
    three ← cylinder3
    four ← viewrightside1
    five ← concat(array1, viewtop, subtract2)
    return stack(one, two, three, four, five)
Sludgepipe1(sludgepipe_origin, ND, sludgepipe_outr, sludgepipe_inr, rad_hole, tank_length, orifice_dist, EN) := Sludgescript([sludgepipe_origin[0]; sludgepipe_origin[1]; sludgepipe_origin[2]], [sludgepipe_origin[0]; sludgepipe_origin[1]; sludgepipe_origin[2] + tank_length - orifice_dist], [
    sludgepipe_origin[0];
    sludgepipe_origin[1] + sludgepipe_outr + zc;
    sludgepipe_origin[2] + tank_length - orifice_dist
], [
    sludgepipe_origin[1] + sludgepipe_outr + zc;
    sludgepipe_origin[2] + tank_length - orifice_dist;
    sludgepipe_origin[0]
], [sludgepipe_origin[0]; sludgepipe_origin[1] - sludgepipe_outr], [sludgepipe_origin[0] + rad_hole + zc; sludgepipe_origin[1] + sludgepipe_outr + 2*zc], [sludgepipe_origin[0] - rad_hole - zc; sludgepipe_origin[1] - zc], ND, sludgepipe_outr, sludgepipe_inr, rad_hole, tank_length, floor(tank_length/orifice_dist), 1, orifice_dist, [
    sludgepipe_origin[0] - sludgepipe_outr;
    sludgepipe_origin[1] - sludgepipe_outr;
    sludgepipe_origin[2]
], [
    sludgepipe_origin[0] + sludgepipe_outr;
    sludgepipe_origin[1] + sludgepipe_outr + zc;
    sludgepipe_origin[2]
], EN)
# p6 | p7 | ND
# p1 | p2 | p3 | p4 | p5
Sludgepipe(sludgepipe_origin, ND_sludge, tank_length, orifice_rad, orifice_dist, EN_PipeSpec) := Sludgepipe1(sludgepipe_origin, ND_sludge, outerradius(ND_sludge), innerD(ND_sludge, EN_PipeSpec)/2, orifice_rad, tank_length, orifice_dist, EN_PipeSpec)
Manifoldscript(p1, p2, p3, p4, p5, p6, p7, ND, R3, L, n1, n2, d1, win1, win2, EN) :=
    sludgepipe ← Sludgepipe(p1, ND, L, R3, d1, EN)
    viewtop ← viewtop
    zoom_win ← zoom_win(win1, win2)
    cylinder3 ← cylinderB(p2, R3, p4)
    viewrightside ← viewrightside
    array1 ← arrayB(p5, n1, n2, -d1)
    subtract2 ← subtractH(p3, p7, p6)
    one ← concat(cylinder3, viewrightside, array1)
    two ← concat(viewtop, subtract2)
    return stack(sludgepipe, zoom_win, one, two)
Manifold1(manifold_origin, ND_Manifold, manifold_outr, manifold_inr, orifice_rad, tank_length, orifice_dist, EN_PipeSpec) := Manifoldscript(manifold_origin, [manifold_origin[0]; manifold_origin[1]; manifold_origin[2] + tank_length - orifice_dist], [manifold_origin[0]; manifold_origin[1] - manifold_outr], [
    manifold_origin[0] + (manifold_outr*cos(π/6)) + manifold_outr;
    manifold_origin[1] + (manifold_outr*sin(π/6)) + manifold_outr;
    manifold_origin[2] + tank_length - orifice_dist
], [
    manifold_origin[1] + (manifold_outr*sin(π/6)) + manifold_outr;
    manifold_origin[2] + tank_length - orifice_dist
], [manifold_origin[0]; manifold_origin[1]], [
    manifold_origin[0] + (manifold_outr*cos(π/3)) + 2*zc;
    manifold_origin[0] + (manifold_outr*sin(π/3)) + 2*zc
], ND_Manifold, orifice_rad, tank_length, floor(tank_length/orifice_dist), 1, orifice_dist, [manifold_origin[0] - manifold_outr; manifold_origin[1] - manifold_outr; manifold_origin[2]], [
    manifold_origin[0] + manifold_outr + zc;
    manifold_origin[1] + manifold_outr + zc;
    manifold_origin[2]
], EN_PipeSpec)
Manifold(manifold_origin, ND_Manifold, orifice_rad, tank_length, orifice_dist, EN_PipeSpec) := Manifold1(manifold_origin, ND_Manifold, outerradius(ND_Manifold), innerD(ND_Manifold, EN_PipeSpec)/2, orifice_rad, tank_length, orifice_dist, EN_PipeSpec)
SedLaunderscript :=
    layernew ← layer_new("launder", blue)
    viewrightside ← viewrightside1
    launder1 ← Manifold(manifold_origin, ND_SedLaunder, D_SedLaunderOrifice/2, L_SedLaunder, B_SedLaunderOrifices, EN_PipeSpec)
    bayarray1 ← concat("-array", sp, "ALL", sp, sp, "r", sp, stringit_nounits(N_SedBays), sp, "1", sp, stringit(W_SedBay + W_SedBayDivider/2))
    layerset1 ← layer_set("0")
    layerfreeze ← layer_freeze("launder")
    one ← stack(layernew, viewrightside, launder1, bayarray1, layerset1, layerfreeze)
SedLaunderOrifice_origin := [SedLaunder_origin[0]; SedLaunder_origin[1]; SedLaunder_origin[2] + L_Sed - B_SedLaunderOrifices]  # error: This variable is undefined.
manifold_origin := [
    W_SedBay/(N_SedLaunders + 1);
    HW_Sed - HL_SedLaunder - ND_SedLaunder/2;
    W_ExitChannel + T_ChannelWall
]
SedLaunderscript :=
    viewtop ← viewtop1
    pipe1 ← Pipe(Sedlaunder_origin, ND_SedLaunder, L_Sed, EN_PipeSpec)
    win1 ← [
        Sedlaunder_origin[0] - outerdiameter(ND_SedLaunder)/2 - zc;
        Sedlaunder_origin[1] - outerdiameter(ND_SedLaunder)/2 - zc;
        SedLaunder_origin[2]
    ]
    win2 ← [
        (Sedlaunder_origin[0] + outerdiameter(ND_SedLaunder)/2) + zc;
        Sedlaunder_origin[1] + outerdiameter(ND_SedLaunder)/2 + zc;
        SedLaunder_origin[2]
    ]
    zoom_win ← zoom_win(win1, win2)
    cylinder3 ← cylinderD(SedLaunderOrifice_origin, D_SedLaunderOrifice/2, [
        SedLaunder_origin[0];
        SedLaunder_origin[1] + outerdiameter(ND_SedLaunder)/2 + zc;
        SedLaunder_origin[2] + L_Sed - B_SedLaunderOrifices
    ])
    viewrightside ← viewrightside
    array1 ← array(p4, n1, n2, -d1)
    subtract2 ← subtractH(p5, p6, p7)  # error: This placeholder is empty.
