# There should be no reason to use functions highlighted in RED (unless you are writing a plant element function). Look to MtoATranslators Wrapped for alternatives.
# Automated Design: AutoCAD: Basics
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# Colors
grey := [132; 132; 132]
ltgrey := [214; 214; 214]
dkgrey := [91; 91; 91]
blue := [0; 255; 255]
black := [0; 0; 0]
blue2 := [0; 191; 255]
blue3 := [0; 127; 255]
green := [0; 255; 0]
purple := [127; 0; 255]
ltpurple := [125; 0; 160]
red := [255; 0; 0]
yellow := [255; 255; 0]
# Using Numbers in Code
sp := " "
zc := .01 m
stringit(x) := num2str(round(x/m, 5))
stringit_nounits(x) := num2str(round(x, 5))
point(pointarray) :=
    temp ← ""
    for i ∈ 0 .. (rows(pointarray) - 1)
        temp ← concat(temp, stringit(pointarray[i]))
        temp ← concat(temp, ",") if i < (rows(pointarray) - 1)
    temp
point_nounits(pointarray) :=
    temp ← ""
    for i ∈ 0 .. (rows(pointarray) - 1)
        temp ← concat(temp, stringit_nounits(pointarray[i]))
        temp ← concat(temp, ",") if i < (rows(pointarray) - 1)
    temp
# Views
# View function, generates ACAD code to shift view to specified angle
# inputs: x= t (top), f (front), r (right), l (left)
# e.g. view("t"), view("f"), view("r"), view("l")
# after testing on the beta server, all view functions except for view1(x), and all calls to other functions will be replaced with the correct view1(x) call
viewtop1 := concat("_-view", sp, "o", sp, "t")
viewtop := concat("_-view", sp, "o", sp, "t", sp)
view(x) := concat("_-view", sp, "o", sp, x, sp)
# we need to eventually bother to figure out when we need the extra space and when we don't...then we can update to the new view functions in green
viewfront := concat("_-view", sp, "o", sp, "f", sp)
view1(x) := concat("_-view", sp, "o", sp, x)
# extra space at the end should not be necessary when stacking; may be necessary when concatenating--figure this out!!!
viewfront1 := concat("_-view", sp, "o", sp, "f")
viewse := concat("-view", sp, "se", sp)  # would replace the concat call at the very end of LayoutsAC, but I'm not sure where/what else
viewrightside := concat("_-view", sp, "o", sp, "r", sp)
viewisometric := concat("vpoint", sp, "1,1,1", sp)
mechanical*design*convention
# can't find where this is used/why it would be useful. also, should this be a more general function for viewing from any point??
viewrightside1 := concat("_-view", sp, "o", sp, "r")
viewleftside := concat("_-view", sp, "o", sp, "l")
# Cylinders
cylinderB(p1, R1, p2) :=
    concat("_cylinder", sp, point(p1[:, 0]), sp, stringit(R1), sp, "c", sp, point(p2[:, 0]), sp) if acad_version == 2004 or 2006
    concat("_cylinder", sp, point(p1[:, 0]), sp, stringit(R1), sp, "a", sp, point(p2[:, 0]), sp) if acad_version == 2007
    concat("_cylinder", sp, point(p1[:, 0]), sp, stringit(R1), sp, "a", sp, point(p2[:, 0]), sp) if acad_version == 2008
    concat("_cylinder", sp, point(p1[:, 0]), sp, stringit(R1), sp, "f", sp, point(p2[:, 0]), sp) otherwise
# only cylinderD is used in CylinderF and CylinderSUBF; cylinderB is used in PlumbingF (in ElbowF and ElbowSUBF) Is there a difference when the space is added at the end of the function?
# these cylinders should not be used outside of drawing functions!!! use CylinderF instead. (Found in MtoA Translators Wrapped). If you need an extra space, manually concat an "sp" into your code.
cylinderD(p1, R1, p2) :=
    concat("_cylinder", sp, point(p1[:, 0]), sp, stringit(R1), sp, "c", sp, point(p2[:, 0])) if acad_version == 2004 or 2006
    concat("_cylinder", sp, point(p1[:, 0]), sp, stringit(R1), sp, "a", sp, point(p2[:, 0])) if acad_version == 2007
    concat("_cylinder", sp, point(p1[:, 0]), sp, stringit(R1), sp, "a", sp, point(p2[:, 0])) otherwise
# figure out if older versions of autocad still need to be accounted for and work autocad 2011 and 2012 into the code
# Unions
# NEW UNION FUNCTIONS
# Union.2, Union.3, Union.4, Union.All, Union.Elbow and Union.Multiple
unionA(p1, p2) := concat("_union", sp, point(p1[:, 0]), sp, point(p2[:, 0]), sp, sp)
Union_2(p1, p2) := concat("_union", sp, point(p1[:, 0]), sp, point(p2[:, 0]), sp)
# Union 2, 3, and 4 shouldn't be necessary; UnionMultiple covers any length of point array.
unionB(p1, p2, p3, p4) := concat("_union", sp, point(p1[:, 0]), sp, point(p2[:, 0]), sp, point(p3[:, 0]), sp, point(p4[:, 0]), sp, sp)
Union_3(p1, p2, p3) := concat("_union", sp, point(p1[:, 0]), sp, point(p2[:, 0]), sp, point(p3[:, 0]), sp)
unionC(p1, p2) := concat("_union", sp, point(p1[:, 0]), sp, point(p2[:, 0]), sp)
Union_4(p1, p2, p3, p4) := concat("_union", sp, point(p1[:, 0]), sp, point(p2[:, 0]), sp, point(p3[:, 0]), sp, point(p4[:, 0]), sp)
union_all := concat("_union", sp, "all", sp, sp)
Union_All := concat("_union", sp, "all", sp)
Union_Elbow(p1, p2, p3, R1, R2) := concat("_union", sp, point(p1[:, 0]), sp, "1", sp, "@", stringit(R1 + R2), "<45", sp, point(p2[:, 0]), sp, point(p3[:, 0]), sp)
union_allA := concat("_union", sp, "all", sp)
# is union elbow at all necessary? where is/would it be used?
bigunion_elbow(p1, p2, p3, R1, R2) := concat("_union", sp, point(p1[:, 0]), sp, "1", sp, "@", stringit(R1 + R2), "<45", sp, point(p2[:, 0]), sp, point(p3[:, 0]), sp)
UnionMultiple(PointArray) :=
    one ← concat("_union", sp)
    for i ∈ 0 .. last(PointArray)
        one ← concat(one, point(PointArray[i][:, 0]), sp)
    return one
unionA(zc_point, zc_point) =  # error: This variable is undefined.
union_allA = "_union all "
bigunion(p1, p2, p3, p4) := concat("_union", sp, point(p1[:, 0]), sp, point(p2[:, 0]), sp, point(p3[:, 0]), sp, point(p4[:, 0]), sp, sp)
Union_2(zc_point, zc_point) =  # error
Union_All = "_union all "
bigunionA(p1, p2, p3, p4) := concat("_union", sp, point(p1[:, 0]), sp, point(p2[:, 0]), sp, point(p3[:, 0]), sp, point(p4[:, 0]), sp)
unionB(zc_point, zc_point, zc_point, zc_point) =  # error
Union_4(zc_point, zc_point, zc_point, zc_point) =  # error
# Union
# these functions were originally listed below--figure out which (if any) are useful
bigunion_elbow(p1, p2, p3, R1, R2) := concat("_union", sp, point(p1[:, 0]), sp, "1", sp, "@", stringit(R1 + R2), "<45", sp, point(p2[:, 0]), sp, point(p3[:, 0]), sp)
bigunion(p1, p2, p3, p4) := concat("_union", sp, point(p1[:, 0]), sp, point(p2[:, 0]), sp, point(p3[:, 0]), sp, point(p4[:, 0]), sp, sp)
# The replacement functions for UNION commands are already listed above.
# The cases for these functions are within the range covered by the replacers.
bigunionA(p1, p2, p3, p4) := concat("_union", sp, point(p1[:, 0]), sp, point(p2[:, 0]), sp, point(p3[:, 0]), sp, point(p4[:, 0]), sp)
# Subtractions
SubtractGeneral(PointArrayFrom, PointArrayToSubtract) :=
    Local ← concat("_subtract", sp)
    for i ∈ 0 .. last(PointArrayFrom)
        Local ← concat(Local, point(PointArrayFrom[i]), sp)
    for j ∈ 0 .. last(PointArrayToSubtract)
        Local ← concat(Local, sp, point(PointArrayToSubtract[j]))
    Local ← concat(Local, sp)
    return Local
SubtractAll(p1) := concat("_subtract", sp, point(p1[:, 0]), sp, sp, "all", sp)
# Mirrors
# The top four functions don't work, because they should all end in either 'n' or 'y' when AUTOCAD asks to erase the source object - they are probably out of date
Mirror(p1, p2, p3) := concat("_mirror", sp, point(p1[:, 0]), sp, sp, point(p2[:, 0]), sp, point(p3[:, 0]), sp, "n")
mirror(p1, p2, p3) := concat("_mirror", sp, point(p1[:, 0]), sp, sp, point(p2[:, 0]), sp, point(p3[:, 0]), sp)
Mirror3D_zx(p1, p2) := concat("_mirror3d", sp, point(p1[:, 0]), sp, sp, "zx", sp, point(p2[:, 0]), sp, "n")
mirrorA(p1, p2, p3) := concat("_mirror", sp, point(p1[:, 0]), sp, sp, point(p2[:, 0]), sp, point(p3[:, 0]), sp, sp)
Mirror3DAll_zx(p1) := concat("_mirror3d", sp, "all", sp, sp, "zx", sp, point(p1[:, 0]), sp, "n")
mirrorB(p1, p2, p3, p4) := concat("_mirror", sp, p1[:, 0], sp, point(p2[:, 0]), sp, sp, point(p3[:, 0]), sp, point(p4[:, 0]), sp, sp)
Mirror3D_yz(p1, p2) := concat("_mirror3d", sp, point(p1[:, 0]), sp, sp, "yz", sp, point(p2[:, 0]), sp, "n")
mirrorC(p1, p2, p3, p4) := concat("_mirror", sp, point(p1[:, 0]), sp, point(p2[:, 0]), sp, sp, point(p3[:, 0]), sp, point(p4[:, 0]), sp)
MirrorAll(p1, p2, Option) := concat("_mirror", sp, "all", sp, sp, point(p1[:, 0]), sp, point(p2[:, 0]), sp, Option)
mirrorD(p1, p2, p3) := concat("_mirror", sp, point(p1[:, 0]), sp, sp, point(p2[:, 0]), sp, point(p3[:, 0]), sp, "n")
# option is "y" or "n" to delete source object
mirror3d(p1, p2) := concat("_mirror3d", sp, point(p1[:, 0]), sp, sp, "zx", sp, point(p2[:, 0]), sp, "n")
mirror3d_all(p2) := concat("_mirror3d", sp, "all", sp, sp, "zx", sp, point(p2[:, 0]), sp, "n")
mirror3dyz(p1, p2) := concat("_mirror3d", sp, point(p1[:, 0]), sp, sp, "yz", sp, point(p2[:, 0]), sp, "n")
mirror_all(p1, p2) := concat("_mirror", sp, "all", sp, sp, point(p1[:, 0]), sp, point(p2[:, 0]), sp)  # This one is also probably out of date
mirror_allyes(p1, p2) := concat("_mirror", sp, "all", sp, sp, point(p1[:, 0]), sp, point(p2[:, 0]), sp, "y")
Mirror3dAll(Plane, ReflectionPoint, Erase) := concat("mirror3d", sp, "all", sp, sp, Plane, sp, point(ReflectionPoint[:, 0]), sp, Erase, sp, sp)
# Plane must be either "xy", "yz", or "zx" - you must include quotes
# Erase is either "y" for yes, or "n" for no - include quotes
Mirror3dGroup(GroupName, Plane, ReflectionPoint, Erase) :=
    one ← concat("mirror3d", sp, "g", sp, GroupName)
    two ← concat(Plane, point(ReflectionPoint[:, 0]), sp, Erase, sp)
    return stack(one, two)
MirrorLast(p1, p2, Erase) := concat("_mirror", sp, "l", sp, sp, point(p1[:, 0]), sp, point(p2[:, 0]), sp, Erase, sp, sp)
MirrorGroup(p1, p2, GroupName, Erase) := concat("_mirror", sp, "g", sp, GroupName, sp, sp, point(p1[:, 0]), sp, point(p2[:, 0]), sp, Erase, sp, sp)
# Torus and Box Functions
# Torus
torus(p1, R1, R2) := concat("_torus", sp, point(p1[:, 0]), sp, stringit(R1), sp, stringit(R2), sp)
# The Torus and Box functions should not be used outside of drawing functions!!! Use TorusF and BoxF instead found in MtoATranslators wrapped. If you need to add spaces, manually concat an "sp" into your code.
torus1(p1, R1, R2) := concat("_torus", sp, point(p1[:, 0]), sp, stringit(R1), sp, stringit(R2))
# Box
Torus(p1, R1, R2) := concat("_torus", sp, point(p1[:, 0]), sp, stringit(R1), sp, stringit(R2))
box(p1, p2) := concat("_box", sp, point(p1[:, 0]), sp, point(p2[:, 0]))
Box(p1, p2) := concat("_box", sp, point(p1[:, 0]), sp, point(p2[:, 0]))
boxA(p1, p2) := concat("_box", sp, point(p1[:, 0]), sp, point(p2[:, 0]), sp)
# Zoom
zoom := concat("_zoom", sp, "e", sp)
zoomA := concat("_zoom", sp, "e")
zoom_extents := concat("_zoom",sp,"e")
zoom_win(p1, p2) := concat("_zoom", sp, "w", sp, point(p1[:, 0]), sp, point(p2[:, 0]))
zoom_window(p1, p2) := concat("_zoom", sp, "w", sp, point(p1[:, 0]), sp, point(p2[:, 0]))
zoom_wina(p1, p2) := concat("_zoom", sp, "w", sp, point(p1[:, 0]), sp, point(p2[:, 0]), sp)
# Move
move(p1, p2, p3) := concat("_move", sp, point(p1[:, 0]), sp, sp, point(p2[:, 0]), sp, "@", point(p3[:, 0]))
Move_Angle(object, p2, p3) := concat("_move", sp, point(object[:, 0]), sp, sp, point(p2[:, 0]), sp, "@", point(p3[:, 0]))
move_all(p1, p2) := concat("_move", sp, "all", sp, sp, point(p1[:, 0]), sp, point(p2[:, 0]))
Move_All(p2, p3) := concat("_move", sp, "all", sp, sp, point(p2[:, 0]), sp, point(p3[:, 0]))
move_allD(p1) := concat("_move", sp, "all", sp, sp, "d", sp, point(p1[:, 0]))
Move_AllDisplace(p2) := concat("_move", sp, "all", sp, sp, "d", sp, point(p2[:, 0]))
MoveLast(bp, np) := concat("_move", sp, "l", sp, sp, point(bp[:, 0]), sp, point(np[:, 0]), sp, sp)
# Array
Array_Rect(object, nrow, ncol, dist) := concat("-array", sp, point(object[:, 0]), sp, sp, "R", sp, stringit_nounits(nrow), sp, stringit_nounits(ncol), sp, stringit(dist), sp)
array(p1, nrow, ncol, distorifice) := concat("-array", sp, point(p1[:, 0]), sp, sp, "R", sp, stringit_nounits(nrow), sp, stringit_nounits(ncol), sp, stringit(distorifice), sp)
a1 := [1; 2; 3]*m
b1 := [2; 3; 4]*m
b2 := [3; 4; 5]*m
arrayA(p1, p2, nitem, angle) := concat("-array", sp, point(p1[:, 0]), sp, sp, "P", sp, point(p2[:, 0]), sp, stringit_nounits(nitem), sp, stringit_nounits(angle), sp, "Y")
Array_Polar(object, p2, nitem, angle) := concat("-array", sp, point(object[:, 0]), sp, sp, "P", sp, point(p2[:, 0]), sp, stringit_nounits(nitem), sp, stringit_nounits(angle), sp, "Y")
arrayB(p1, nrow, ncol, distorifice) := concat("-array", sp, point(p1[:, 0]), sp, sp, "R", sp, stringit_nounits(nrow), sp, stringit_nounits(ncol), sp, stringit(distorifice))
Array_All(nrow, ncol, dist) := concat("-array", sp, "all", sp, sp, "R", sp, stringit_nounits(nrow), sp, stringit_nounits(ncol), sp, stringit(dist))
array2D(p1, p2, nrow, ncol, drow, dcol) := concat("-array", sp, point(p1[:, 0]), sp, point(p2[:, 0]), sp, sp, "R", sp, stringit_nounits(nrow), sp, stringit_nounits(ncol), sp, stringit(drow), sp, stringit(dcol))
# Array 2d == ?
CopyGeneral([a1], [b1; b2], "y") =  # error
Array_LastRect(nrow, ncol, dist) := concat("-array", sp, "l", sp, sp, "R", sp, stringit_nounits(nrow), sp, stringit_nounits(ncol), sp, stringit(dist))
array_all(nrow, ncol, dist) := concat("-array", sp, "all", sp, sp, "R", sp, stringit_nounits(nrow), sp, stringit_nounits(ncol), sp, stringit(dist))
Copy_Angle(a1, b1, b2) =  # error
Array_LastPolar(p2, nitems, angle) := concat("-array", sp, "l", sp, sp, "P", sp, point(p2[:, 0]), sp, stringit_nounits(nitems), sp, stringit_nounits(angle/deg), sp, "Y")
CopyGeneral([a1], [b2; b1], "n") =  # error
ArrayLast(nrow, ncol, dist) := concat("-array", sp, "l", sp, sp, "R", sp, stringit_nounits(nrow), sp, stringit_nounits(ncol), sp, stringit(dist))
Array_Group(nrow, ncol, dist, GroupName) :=
    Local ← concat("-array", sp, "g", sp, GroupName)
    Local ← stack(Local, sp, concat("R", sp, stringit_nounits(nrow), sp, stringit_nounits(ncol), sp, stringit(dist)))
CopyGeneral([a1], [b1; b2], 1) =  # error
ArrayMultiple(PointArray, nrow, ncol, drow, dcol) :=
    Local ← "-array"
    for i ∈ 0 .. last(PointArray)
        Local ← stack(Local, point(PointArray[i]))
    Local ←
        stack(Local, concat(sp, "R", sp, stringit_nounits(nrow), sp, stringit_nounits(ncol), sp, stringit(dcol))) if nrow == 1
        stack(Local, concat(sp, "R", sp, stringit_nounits(nrow), sp, stringit_nounits(ncol), sp, stringit(drow))) if ncol == 1
        stack(Local, concat(sp, "R", sp, stringit_nounits(nrow), sp, stringit_nounits(ncol), sp, stringit(drow), sp, stringit(dcol))) otherwise
    return Local
ArrayLastPolar(RotationPoint, NumItems, Angle) := concat("-array", sp, "l", sp, sp, "P", sp, point(RotationPoint[:, 0]), sp, stringit_nounits(NumItems), sp, stringit_nounits(Angle/deg), sp, "Y")
# Rotate
rotate_3d(p1, p2, axis, ϕ) := concat("_rotate3d", sp, point(p1[:, 0]), sp, sp, axis, sp, point(p2[:, 0]), sp, stringit_nounits(ϕ))
Rotate3D(object, p2, axis, angle) := concat("_rotate3d", sp, point(object[:, 0]), sp, sp, axis, sp, point(p2[:, 0]), sp, stringit_nounits(angle))
Rotate3D_Double(object1, object2, p2, axis, angle) := concat("_rotate3d", sp, point(object1[:, 0]), sp, point(object2[:, 0]), sp, sp, axis, sp, point(p2[:, 0]), sp, stringit_nounits(angle))
rotate_3dA(p1, p2, p3, axis, ϕ) := concat("_rotate3d", sp, point(p1[:, 0]), sp, point(p2[:, 0]), sp, sp, axis, sp, point(p3[:, 0]), sp, stringit_nounits(ϕ))
Rotate(object, angle) := concat("_rotate", sp, point(object[:, 0]), sp, sp, point(object[:, 0]), sp, stringit_nounits(angle))
rotate_3d1(p1, p2, axis, ϕ) := concat("_rotate3d", sp, point(p1[:, 0]), sp, sp, axis, sp, point(p2[:, 0]), sp, stringit_nounits(ϕ), sp)
Rotate_All(object, angle) := concat("_rotate", sp, "all", sp, sp, point(object[:, 0]), sp, stringit_nounits(angle))
rotate(p1, ϕ) := concat("_rotate", sp, point(p1[:, 0]), sp, sp, point(p1[:, 0]), sp, stringit_nounits(ϕ))
Rotate3D_All(object, axis, angle) := concat("_rotate3d", sp, "all", sp, sp, axis, sp, point(object[:, 0]), sp, num2str(90 - angle/deg))
rotate_All(p1, ϕ) := concat("_rotate", sp, "all", sp, sp, point(p1[:, 0]), sp, stringit_nounits(ϕ))
rotate_3dAll(p1, axis, ϕ) := concat("_rotate3d", sp, "all", sp, sp, axis, sp, point(p1[:, 0]), sp, num2str(90 - ϕ/deg))
Rotate_Group(group, axis, p2, angle) := concat("_rotate3d", sp, "g", sp, group, sp, sp, axis, sp, point(p2[:, 0]), sp, num2str(angle/deg))
RotateGroup(GroupName, axis, p1, ϕ) := concat("_rotate3d", sp, "g", sp, GroupName, sp, sp, axis, sp, point(p1[:, 0]), sp, num2str(ϕ/deg))
Rotate3D_Last(p2, axis, angle) := concat("rotate3d", sp, "l", sp, sp, axis, sp, point(p2[:, 0]), sp, stringit_nounits(angle/deg))
Rotate3DLast(RotationPoint, axis, ϕ) := concat("rotate3d", sp, "l", sp, sp, axis, sp, point(RotationPoint[:, 0]), sp, stringit_nounits(ϕ/deg))
# Group
GroupAll(GroupName) :=
    one ← concat("-group", sp, "c", sp, GroupName, sp, "y", sp)
    two ← concat("all", sp)
    three ← stack(one, two)
    three
# The GroupName argument must be given with quotes around it!
# This will only work if the group already exists!
Group(GroupName, p1) :=
    one ← concat("-group", sp, "c", sp, GroupName, sp)
    two ← concat(point(p1[:, 0]), sp)
    return stack(one, two)
GroupSelect(GroupName, ArrayOfPoints) :=
    one ← concat("-group", sp, "c", sp, GroupName, sp, "y", sp)
    for i ∈ 0 .. last(ArrayOfPoints)
        one ← stack(one, point(ArrayOfPoints[i][:, 0]))
    one[last(one)] ← concat(one[last(one)], sp)
    return one
ExplodeGroup(GroupName) := concat("-group", sp, "e", sp, GroupName, sp)
CopyGroup(GroupName, BasePoint, ArrayOfCopyPoints) :=
    one ← concat("_copy", sp, "g", sp, GroupName, sp, sp, point(BasePoint[:, 0]))
    for i ∈ 0 .. last(ArrayOfCopyPoints)
        one ← stack(one, point(ArrayOfCopyPoints[i][:, 0]))
    one ← stack(one, "e")
    return one
GroupAdd(GroupName, ArrayOfGroupsToAdd) :=
    one ← concat("-group", sp, "a", sp, GroupName, sp)
    for i ∈ 0 .. last(ArrayOfGroupsToAdd)
        one ← stack(one, "g", sp, ArrayOfGroupsToAdd[i], sp)
    one ← stack(one, sp)
    return one
SelectionStyle(type) := concat("_pickstyle", sp, stringit_nounits(type))
# type = 1 sets to group selection
# type = 0 sets to individual selection
SubtractGroups(GroupsToSubtractFrom, GroupToSubtract) :=
    local ← "_subtract"
    for i ∈ 0 .. last(GroupsToSubtractFrom)
        local ← stack(local, concat("g", sp, GroupsToSubtractFrom[i]))
    local ← stack(local, concat(sp, "g", sp, GroupToSubtract, sp))
    local
GroupLast(GroupName) :=
    one ← concat("-group", sp, "c", sp, GroupName, sp, "y", sp)
    two ← concat("l", sp)
    three ← stack(one, two)
    three
# Layer
layer_new(title, color) :=
    one ← concat("-layer", sp, "m", sp, title)
    two ← concat("c", sp, "t", sp, point_nounits(color[:, 0]))
    three ← concat(title)
    four ← concat(sp, sp)
    tot ← stack(one, two, three, four)
    return tot
# layer.new is the only one of these layer functions you should be using. Other than that, if you want to edit a frozen layer, use SelectLayer(LayerName). If you want to freeze a layer, use FreezeLayer(LayerName). Both of these functions can be found in the MtoA Translator Wrapped.
layer_set(title) :=
    one ← concat("-layer", sp, "s", sp, title)
    two ← concat(sp, sp)
    tot ← stack(one, two)
    return tot
layer_new1(title, color) :=
    one ← concat("-layer", sp, "m", sp, title)
    two ← concat("c", sp, "c", sp, point_nounits(color[:, 0]))
    three ← concat(title)
    four ← concat(sp, sp)
    tot ← stack(one, two, three, four)
    return tot
layer_freeze(title) :=
    one ← concat("-layer", sp, "f", sp, title)
    two ← concat(sp, sp)
    tot ← stack(one, two)
    return tot
layer_thaw(title) :=
    one ← concat("-layer", sp, "t", sp, title)
    two ← concat(sp, sp)
    tot ← stack(one, two)
    return tot
ThawMultiple(LayerVector) :=
    Local ← concat("-layer", sp, "t", sp, LayerVector[0])
    if last(LayerVector) ≥ 2
        for i ∈ 1 .. last(LayerVector) - 1
            Local ← stack(Local, concat("t", sp, LayerVector[i]))
    return stack(Local, concat("t", sp, LayerVector[last(LayerVector)]), concat(sp, sp))
FreezeMultiple(LayerVector) :=
    Local ← stack(layer_set("0"), concat("-layer", sp, "f", sp, LayerVector[0]))
    if last(LayerVector) ≥ 2
        for i ∈ 1 .. last(LayerVector) - 1
            Local ← stack(Local, concat("f", sp, LayerVector[i]))
    return stack(Local, concat("f", sp, LayerVector[last(LayerVector)]), concat(sp, sp))
# Loft
Loft(p1, p2) :=
    one ← concat("select", sp, point(p1[:, 0]), sp, point(p2[:, 0]), sp, sp, "loft", sp)
    two ← stack(one)
    return two
# Pline
# update all Pline functions to use 3dPoly
Pline(PointArray) :=
    one ← concat("_pline")
    for i ∈ 0 .. last(PointArray)
        one ← stack(one, point(PointArray[i][:, 0]))
    one[last(one)] ← concat(one[last(one)], sp)
    return one
Pline3D(PointArray) :=
    one ← "3dpoly"
    for i ∈ 0 .. last(PointArray)
        one ← stack(one, point(PointArray[i][:, 0]))
    one[last(one)] ← concat(one[last(one)], sp)
    return one
# Extrude
extrude(p1, L) :=
    concat("_extrude", sp, point(p1[:, 0]), sp, sp, stringit(L), sp) if acad_version == 2006
    concat("_extrude", sp, point(p1[:, 0]), sp, sp, stringit(L)) if acad_version == 2008
    concat("_extrude", sp, point(p1[:, 0]), sp, sp, stringit(L)) otherwise
# Erase
EraseAll := concat("_.erase", sp, "all", sp, sp)
erase(p1) := concat("_erase", sp, point(p1[:, 0]), sp)
# Block
block(title, bp, ip) :=
    one ← concat("-block", sp, title)
    two ← concat(point(bp[:, 0]), sp, "all", sp)
    three ← concat("-insert", sp, title)
    four ← concat(point(ip[:, 0]), sp)
    five ← concat(sp)
    tot ← stack(one, two, three, four, five)
    return tot
# Wedge
wedge3d(p1, p2) := concat("_wedge", sp, point(p1[:, 0]), sp, point(p2[:, 0]))
# Circle
circle(OriginPoint, Radius) := concat("c", sp, point(OriginPoint[:, 0]), sp, stringit(Radius), sp)
# Miscellaneous
cleanscreen := concat("_CleanScreenON")
# Insert Block | update to scale in all dimensions!!!
insertdwg(filepath, insertionpoint, Xscalefactor, Yscalefactor, AN_rotation) := stack(concat("-insert", sp, filepath), concat(point(insertionpoint[:, 0]), sp, "x", sp, stringit_nounits(Xscalefactor), sp, stringit_nounits(Yscalefactor), sp, sp, stringit_nounits(AN_rotation/deg)))
# Note: This is preliminary.  This uses a 4 in valve and scales it according to the needs of the plant being drawn.
# Sweep
SweepSurface(ShapePoint, PathPoint) :=
    SetSurfaceAssociativity ← concat("surfaceassociativity", sp, "0")
    SetDelObj ← concat("delobj", sp, "2")
    Sweep ← concat("sweep", sp, "mo", sp, "su", sp, point(ShapePoint[:, 0]), sp, sp, point(PathPoint[:, 0]), sp)
    return stack(SetSurfaceAssociativity, SetDelObj, Sweep)
SweepSolid(ShapePoint, PathPoint) :=
    SetSurfaceAssociativity ← concat("surfaceassociativity", sp, "0")
    SetDelObj ← concat("delobj", sp, "2")
    Sweep ← concat("sweep", sp, "mo", sp, "so", sp, point(ShapePoint[:, 0]), sp, sp, point(PathPoint[:, 0]), sp)
    return stack(SetSurfaceAssociativity, SetDelObj, Sweep)
# Arc
Arc(CenterPoint, StartPoint, Angle) := concat("arc", sp, "c", point(CenterPoint[:, 0]), sp, point(StartPoint[:, 0]), sp, "a", sp, Angle, sp)
# Center specifies the center of an imaginary circle (i.e. the pivot point for the start point)
# StartPoint MUST be a 2-D point only!!! | EndPoint is relative to StartPoint NOT the origin.
# Dimension
LinearDim(StartPoint, DistToEndPoint, DimLocation, Orientation) :=
    dim ← concat("dimlinear", sp, point(StartPoint[:, 0]), sp, concat("0,", stringit(DistToEndPoint)), sp, Orientation, sp, concat("@", stringit(DimLocation), "0")) if Orientation == "v"
    dim ← concat("dimlinear", sp, point(StartPoint[:, 0]), sp, concat(stringit(DistToEndPoint), ",0"), sp, Orientation, sp, concat("@0,", stringit(DimLocation))) otherwise
    return dim
