# There should be no reason to use functions highlighted in RED (unless you are writing a plant element function). Look to MtoATranslators Wrapped for alternatives. Functions that are unused in the code are highlighted in blue. Try to find another currently used function before using unused functions.
# Automated Design: AutoCAD: Basics
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# Colors
grey := [132; 132; 132]
ltgrey := [214; 214; 214]
dkgrey := [91; 91; 91]
blue := [0; 255; 255]
black := [0; 0; 0]
blue2 := [0; 191; 255]
blue3 := [0; 127; 255]
green := [0; 255; 0]
purple := [127; 0; 255]
ltpurple := [125; 0; 160]
red := [255; 0; 0]
yellow := [255; 255; 0]
orange := [255; 165; 0]
# Using Numbers in Code
sp := " "
zc := .01 m
stringit(x) := num2str(round(x/m, 5))
stringit_nounits(x) := num2str(round(x, 5))
point(pointarray) :=
    temp ← ""
    for i ∈ 0 .. (rows(pointarray) - 1)
        temp ← concat(temp, stringit(pointarray[i]))
        temp ← concat(temp, ",") if i < (rows(pointarray) - 1)
    temp
point_nounits(pointarray) :=
    temp ← ""
    for i ∈ 0 .. (rows(pointarray) - 1)
        temp ← concat(temp, stringit_nounits(pointarray[i]))
        temp ← concat(temp, ",") if i < (rows(pointarray) - 1)
    temp
# Reusable Variables
# See Group Delete Command at the bottom of the Group Commands area
# Selection
SelectWindow(WindowArray) :=
    Local ← concat("select", sp, "w")
    for i ∈ 0 .. rows(WindowArray) - 1
        Local ← stack(Local, concat(point(WindowArray[i, 0]), sp, point(WindowArray[i, 1])))
    Local[last(Local)] ← concat(Local[last(Local)], sp, sp)
    Local
# Views
# View function, generates ACAD code to shift view to specified angle inputs: x= t (top), f (front), r (right), l (left) e.g. view("t"), view("f"), view("r"), view("l")
# sw = southwest iso; se = southeast iso, etc --> view("sw"); view("se")
view(x) :=
    concat("_-view", sp, x) if strlen(x) == 2
    concat("_-view", sp, "o", sp, x) otherwise
## Visual Styles
# Visual styles function shades the object in different shades for desired view.
# Specify the inputs: x = 2 (2dwireframe), w (wireframe), h (hidden), r (realistic), c (conceptual), s (shaded), e (shaded with edges), g (shades of Gray), sk (sketchy), x (x-ray), o (other).
vscurrent(x) := concat("_vscurrent", sp, x, sp)
# Cylinders
cylinderD(p1, R1, p2) := concat("_cylinder", sp, point(p1[:, 0]), sp, stringit(R1), sp, "a", sp, point(p2[:, 0]))
# this cylinder should not be used outside of drawing functions!!! use CylinderF instead. (Found in MtoA Translators Wrapped). If you need an extra space, manually concat an "sp" into your code.
# Brep
BrepAll := concat("brep", sp, "all", sp)
# Unions
Union_All := concat("_union", sp, "all", sp)
UnionMultiple(PointArray) :=
    one ← concat("_union", sp)
    for i ∈ 0 .. last(PointArray)
        one ← concat(one, point(PointArray[i][:, 0]), sp)
    return one
# Subtractions
SubtractGeneral(PointArrayFrom, PointArrayToSubtract) :=
    Local ← concat("_subtract", sp)
    for i ∈ 0 .. last(PointArrayFrom)
        Local ← concat(Local, point(PointArrayFrom[i]), sp)
    for j ∈ 0 .. last(PointArrayToSubtract)
        Local ← concat(Local, sp, point(PointArrayToSubtract[j]))
    Local ← concat(Local, sp)
    return Local
SubtractAll(p1) := concat("_subtract", sp, point(p1[:, 0]), sp, sp, "all", sp)
# Torus
Torus(p1, R1, R2) := concat("_torus", sp, point(p1[:, 0]), sp, stringit(R1), sp, stringit(R2))
# The Torus and Box functions should not be used outside of drawing functions!!! Use TorusF and BoxF instead found in MtoATranslators wrapped. If you need to add spaces, manually concat an "sp" into your code.
# Box
Box(p1, p2) := concat("_box", sp, point(p1[:, 0]), sp, point(p2[:, 0]))
# Zoom
zoom_extents := concat("_zoom",sp,"e")
ZoomWindow(p1, p2) := concat("_zoom", sp, "w", sp, point(p1[:, 0]), sp, point(p2[:, 0]))
ZoomExtents := concat("z", sp, "e", sp)
ZoomObject := concat("z", sp, "o", sp, "all", sp)
# Mirrors
MirrorAll(p1, p2, Erase) := concat("_mirror", sp, "all", sp, sp, point(p1[:, 0]), sp, point(p2[:, 0]), sp, Erase)
# Plane must be either "xy", "yz", or "zx" - you must include quotes
# Erase is either "y" for yes, or "n" for no - include quotes
Mirror(p1, p2, p3, Erase) := concat("_mirror", sp, point(p1[:, 0]), sp, sp, point(p2[:, 0]), sp, point(p3[:, 0]), sp, Erase, sp)
MirrorLast(p1, p2, Erase) := concat("_mirror", sp, "l", sp, sp, point(p1[:, 0]), sp, point(p2[:, 0]), sp, Erase, sp, sp)
MirrorGroup(p1, p2, GroupName, Erase) := concat("_mirror", sp, "g", sp, GroupName, sp, sp, point(p1[:, 0]), sp, point(p2[:, 0]), sp, Erase, sp, sp)
# If you need to mirror several objects, use a group function and then MirrorGroup or Mirror3dGroup.
Mirror3dAll(Plane, ReflectionPoint, Erase) := concat("mirror3d", sp, "all", sp, sp, Plane, sp, point(ReflectionPoint[:, 0]), sp, Erase, sp, sp)
Mirror3dLast(Plane, ReflectionPoint, Erase) := concat("mirror3d", sp, "l", sp, sp, Plane, sp, point(ReflectionPoint[:, 0]), sp, Erase, sp, sp)
Mirror3dGroup(GroupName, Plane, ReflectionPoint, Erase) := concat("_mirror3d", sp, "g", sp, GroupName, sp, Plane, point(ReflectionPoint[:, 0]), sp, Erase, sp, sp)
Mirror3dSelect(p1, p2, Plane, Erase) := concat("_mirror3d", sp, point(p1[:, 0]), sp, sp, Plane, sp, point(p2[:, 0]), sp, Erase, sp, sp)
# This function is currently unused in the code, but can be used to select a particular 3d object that needs to be mirrored.
MirrorSelection(p1, p2, Erase) := concat("mirror", sp, point(p1[:, 0]), sp, point(p2[:, 0]), sp, Erase, sp, sp)
# Move
Move(p1, p2, p3) := concat("_move", sp, point(p1[:, 0]), sp, sp, point(p2[:, 0]), sp, "@", point(p3[:, 0]))
Move_Angle(object, p2, p3) := concat("_move", sp, point(object[:, 0]), sp, sp, point(p2[:, 0]), sp, "@", point(p3[:, 0]))
MoveLast(p1, p2) := concat("_move", sp, "l", sp, sp, point(p1[:, 0]), sp, point(p2[:, 0]), sp, sp)
Move_AllDisplace(p2) := concat("_move", sp, "all", sp, sp, "d", sp, point(p2[:, 0]))
MoveAll(p1, p2) := concat("_move", sp, "all", sp, sp, point(p1[:, 0]), sp, point(p2[:, 0]))
# Array
array_all(nrow, ncol, dist) := concat("-array", sp, "all", sp, sp, "R", sp, stringit_nounits(nrow), sp, stringit_nounits(ncol), sp, stringit(dist))
# These functions are currently unused in the code; they may be eliminated in the future if uses for them are not found.
ArrayLast(nrow, ncol, dist) := concat("-array", sp, "l", sp, sp, "R", sp, stringit_nounits(nrow), sp, stringit_nounits(ncol), sp, stringit(dist))
array(p1, nrow, ncol, distorifice) := concat("-array", sp, point(p1[:, 0]), sp, sp, "R", sp, stringit_nounits(nrow), sp, stringit_nounits(ncol), sp, stringit(distorifice), sp)
ArrayLastPolar(RotationPoint, NumItems, Angle) := concat("-array", sp, "l", sp, sp, "P", sp, point(RotationPoint[:, 0]), sp, stringit_nounits(NumItems), sp, stringit_nounits(Angle/deg), sp, "Y")
arrayA(p1, p2, nitem, angle) := concat("-array", sp, point(p1[:, 0]), sp, sp, "P", sp, point(p2[:, 0]), sp, stringit_nounits(nitem), sp, stringit_nounits(angle), sp, "Y")
ArrayMultiple(PointArray, nrow, ncol, drow, dcol) :=
    Local ← "-array"
    for i ∈ 0 .. last(PointArray)
        Local ← stack(Local, point(PointArray[i]))
    Local ←
        stack(Local, concat(sp, "R", sp, stringit_nounits(nrow), sp, stringit_nounits(ncol), sp, stringit(dcol))) if nrow == 1
        stack(Local, concat(sp, "R", sp, stringit_nounits(nrow), sp, stringit_nounits(ncol), sp, stringit(drow))) if ncol == 1
        stack(Local, concat(sp, "R", sp, stringit_nounits(nrow), sp, stringit_nounits(ncol), sp, stringit(drow), sp, stringit(dcol))) otherwise
    return Local
arrayB(p1, nrow, ncol, distorifice) := concat("-array", sp, point(p1[:, 0]), sp, sp, "R", sp, stringit_nounits(nrow), sp, stringit_nounits(ncol), sp, stringit(distorifice))
array2D(p1, p2, nrow, ncol, drow, dcol) := concat("-array", sp, point(p1[:, 0]), sp, point(p2[:, 0]), sp, sp, "R", sp, stringit_nounits(nrow), sp, stringit_nounits(ncol), sp, stringit(drow), sp, stringit(dcol))
Array_Rect(object, nrow, ncol, dist) := concat("-array", sp, point(object[:, 0]), sp, sp, "R", sp, stringit_nounits(nrow), sp, stringit_nounits(ncol), sp, stringit(dist), sp)
Array_Polar(object, p2, nitem, angle) := concat("-array", sp, point(object[:, 0]), sp, sp, "P", sp, point(p2[:, 0]), sp, stringit_nounits(nitem), sp, stringit_nounits(angle), sp, "Y")
Array_All(nrow, ncol, dist) := concat("-array", sp, "all", sp, sp, "R", sp, stringit_nounits(nrow), sp, stringit_nounits(ncol), sp, stringit(dist))
Array_Group(nrow, ncol, dist, GroupName) :=
    Local ← concat("-array", sp, "g", sp, GroupName)
    Local ← stack(Local, sp, concat("R", sp, stringit_nounits(nrow), sp, stringit_nounits(ncol), sp, stringit(dist)))
ArrayLastGen(nrow, ncol, drow, dcol) :=
    Local ←
        stack(concat("-array", sp, "l", sp), concat(sp, "R", sp, stringit_nounits(nrow), sp, stringit_nounits(ncol), sp, stringit(dcol))) if nrow == 1
        stack(concat("-array", sp, "l", sp), concat(sp, "R", sp, stringit_nounits(nrow), sp, stringit_nounits(ncol), sp, stringit(drow))) if ncol == 1
        stack(concat("-array", sp, "l", sp), concat(sp, "R", sp, stringit_nounits(nrow), sp, stringit_nounits(ncol), sp, stringit(drow), sp, stringit(dcol))) otherwise
    return Local
ArrayAllGen(nrow, ncol, drow, dcol) :=
    Local ←
        stack(concat("-array", sp, "all"), concat(sp, "R", sp, stringit_nounits(nrow), sp, stringit_nounits(ncol), sp, stringit(dcol))) if nrow == 1
        stack(concat("-array", sp, "all"), concat(sp, "R", sp, stringit_nounits(nrow), sp, stringit_nounits(ncol), sp, stringit(drow))) if ncol == 1
        stack(concat("-array", sp, "all"), concat(sp, "R", sp, stringit_nounits(nrow), sp, stringit_nounits(ncol), sp, stringit(drow), sp, stringit(dcol))) otherwise
    return Local
# not fully tested as of 12/28/2016
# Rotate
# These functions are currently unused in the code; they may be eliminated in the future if uses for them are not found.
Rotate3DLast(RotationPoint, axis, angle) := concat("rotate3d", sp, "l", sp, sp, axis, sp, point(RotationPoint[:, 0]), sp, stringit_nounits(angle/deg))
Rotate3D(object, p2, axis, angle) := concat("_rotate3d", sp, point(object[:, 0]), sp, sp, axis, sp, point(p2[:, 0]), sp, stringit_nounits(angle))
Rotate_All(object, angle) := concat("_rotate", sp, "all", sp, sp, point(object[:, 0]), sp, stringit_nounits(angle/deg))
Rotate3D_Double(object1, object2, p2, axis, angle) := concat("_rotate3d", sp, point(object1[:, 0]), sp, point(object2[:, 0]), sp, sp, axis, sp, point(p2[:, 0]), sp, stringit_nounits(angle))
Rotate3D_All(object, axis, angle) := concat("_rotate3d", sp, "all", sp, sp, axis, sp, point(object[:, 0]), sp, stringit_nounits(angle/deg))
Rotate(object, angle) := concat("_rotate", sp, point(object[:, 0]), sp, sp, point(object[:, 0]), sp, stringit_nounits(angle))
Rotate_Group(group, axis, p2, angle) := concat("_rotate3d", sp, "g", sp, group, sp, sp, axis, sp, point(p2[:, 0]), sp, num2str(angle/deg))
# Group
GroupAll(GroupName) :=
    one ← concat("-group", sp, "c", sp, GroupName, sp, "y", sp)
    two ← concat("all", sp)
    three ← stack(one, two)
    three
# These functions are currently unused.
# The GroupName argument must be given with quotes around it!
# This will only work if the group already exists!
ExplodeGroup(GroupName) := concat("-group", sp, "e", sp, GroupName, sp)
Group(GroupName, p1) :=
    one ← concat("-group", sp, "c", sp, GroupName, sp)
    two ← concat(point(p1[:, 0]), sp)
    return stack(one, two)
GroupAdd(GroupName, ArrayOfGroupsToAdd) :=
    one ← concat("-group", sp, "a", sp, GroupName, sp)
    for i ∈ 0 .. last(ArrayOfGroupsToAdd)
        one ← stack(one, "g", sp, ArrayOfGroupsToAdd[i], sp)
    one ← stack(one, sp)
    return one
GroupSelect(GroupName, ArrayOfPoints) :=
    one ← concat("-group", sp, "c", sp, GroupName, sp, "y", sp)
    for i ∈ 0 .. last(ArrayOfPoints)
        one ← stack(one, point(ArrayOfPoints[i][:, 0]))
    one[last(one)] ← concat(one[last(one)], sp)
    return one
SelectionStyle(type) := concat("_pickstyle", sp, stringit_nounits(type))
# type = 1 sets to group selection
# type = 0 sets to individual selection
CopyGroup(GroupName, BasePoint, ArrayOfCopyPoints) :=
    one ← concat("_copy", sp, "g", sp, GroupName, sp, sp, point(BasePoint[:, 0]))
    for i ∈ 0 .. last(ArrayOfCopyPoints)
        one ← stack(one, point(ArrayOfCopyPoints[i][:, 0]))
    one ← stack(one, "e")
    return one
SubtractGroups(GroupsToSubtractFrom, GroupToSubtract) :=
    local ← "_subtract"
    for i ∈ 0 .. last(GroupsToSubtractFrom)
        local ← stack(local, concat("g", sp, GroupsToSubtractFrom[i]))
    local ← stack(local, concat(sp, "g", sp, GroupToSubtract, sp))
    local
GroupLast(GroupName) :=
    one ← concat("-group", sp, "c", sp, GroupName, sp, "y", sp)
    two ← concat("l", sp)
    three ← stack(one, two)
    three
GroupDelete := GroupAll("DeleteMe")
# Layer
layer_new(title, color) :=
    one ← concat("-layer", sp, "m", sp, title)
    two ← concat("c", sp, "t", sp, point_nounits(color[:, 0]))
    three ← concat(title)
    four ← concat(sp, sp)
    tot ← stack(one, two, three, four)
    return tot
# layer.new is the only one of these layer functions you should be using. Other than that, if you want to edit a frozen layer, use SelectLayer(LayerName). If you want to freeze a layer, use FreezeLayer(LayerName). Both of these functions can be found in the MtoA Translator Wrapped.
layer_set(title) :=
    one ← concat("-layer", sp, "s", sp, title)
    two ← concat(sp, sp)
    tot ← stack(one, two)
    return tot
layer_freeze(title) :=
    one ← concat("-layer", sp, "f", sp, title)
    two ← concat(sp, sp)
    tot ← stack(one, two)
    return tot
layer_thaw(title) :=
    one ← concat("-layer", sp, "t", sp, title)
    two ← concat(sp, sp)
    tot ← stack(one, two)
    return tot
SelectLayer(LayerName) := stack(layer_thaw(LayerName), layer_set(LayerName))
Freezeall := stack("-layer", "f", "~0", "")
FreezeLayer(LayerName) := stack(GroupAll(LayerName), layer_set("0"), layer_freeze(LayerName))
ThawMultiple(LayerVector) :=
    Local ← concat("-layer", sp, "t", sp, LayerVector[0])
    if last(LayerVector) ≥ 2
        for i ∈ 1 .. last(LayerVector) - 1
            Local ← stack(Local, concat("t", sp, LayerVector[i]))
    return
        stack(Local, concat(sp, sp)) if last(LayerVector) == 0
        stack(Local, concat("t", sp, LayerVector[last(LayerVector)]), concat(sp, sp)) otherwise
FreezeMultiple(LayerVector) :=
    Local ← stack(layer_set("0"), concat("-layer", sp, "f", sp, LayerVector[0]))
    if last(LayerVector) ≥ 2
        for i ∈ 1 .. last(LayerVector) - 1
            Local ← stack(Local, concat("f", sp, LayerVector[i]))
    return
        stack(Local, concat(sp, sp)) if last(LayerVector) == 0
        stack(Local, concat("f", sp, LayerVector[last(LayerVector)]), concat(sp, sp)) otherwise
SubtractF(GroupsToSubtractFrom, GroupToSubtract) :=
    local ← layer_thaw(GroupsToSubtractFrom[0])
    if last(GroupsToSubtractFrom) > 0
        for i ∈ 1 .. last(GroupsToSubtractFrom)
            local ← stack(local, layer_thaw(GroupsToSubtractFrom[i]))
    local ← stack(local, "_subtract")
    for i ∈ 0 .. last(GroupsToSubtractFrom)
        local ← stack(local, concat("g", sp, GroupsToSubtractFrom[i]))
    local ← stack(local, concat(sp, "g", sp, GroupToSubtract, sp))
    for i ∈ 0 .. last(GroupsToSubtractFrom)
        local ← stack(local, layer_freeze(GroupsToSubtractFrom[i]))
    local
# GroupsToSubtractFrom must be defined as an array, even if it only has one value!! The group names must be entered with quotes around them.
FreezeVP(LayerVector) :=
    Local ← concat("vplayer", sp, "f", sp, LayerVector[0])
    if last(LayerVector) > 0
        for i ∈ 1 .. last(LayerVector)
            Local ← stack(Local, concat(sp, sp, sp, "f", sp, LayerVector[i]))
    return stack(Local, sp)
RenameLayer(OldName, NewName) := stack(concat("-layer", sp, "R", sp, OldName), NewName, concat(sp, sp))
# Loft
Loft(p1, p2) :=
    one ← concat("select", sp, point(p1[:, 0]), sp, point(p2[:, 0]), sp, sp, "loft", sp)
    two ← stack(one)
    return two
# Pline
Pline(PointArray) :=
    one ← concat("_pline")
    for i ∈ 0 .. last(PointArray)
        one ← stack(one, point(PointArray[i][:, 0]))
    one[last(one)] ← concat(one[last(one)], sp)
    return one
Pline3D(PointArray) :=
    one ← "3dpoly"
    for i ∈ 0 .. last(PointArray)
        one ← stack(one, point(PointArray[i][:, 0]))
    one[last(one)] ← concat(one[last(one)], sp)
    return one
# Extrude
extrude(p1, L) := concat("_extrude", sp, point(p1[:, 0]), sp, sp, stringit(L))
ExtrudeLast(L) := concat("_extrude", sp, "l", sp, sp, stringit(L))
# Wedge
wedge3d(p1, p2) := concat("_wedge", sp, point(p1[:, 0]), sp, point(p2[:, 0]))
# Note: This is preliminary.  This uses a 4 in valve and scales it according to the needs of the plant being drawn.
# Insert Block | update to scale in all dimensions!!!
# AutoCAD allows you to use internet URLs (including http and file endings) in place of filepaths.
insertdwg(filepath, insertionpoint, Xscalefactor, Yscalefactor, AN_rotation) := stack(concat("-insert", sp, filepath), concat(point(insertionpoint[:, 0]), sp, "x", sp, stringit_nounits(Xscalefactor), sp, stringit_nounits(Yscalefactor), sp, sp, stringit_nounits(AN_rotation/deg)))
InsertDwg(FittingType, Origin, ND, AN_rotation) := insertdwg(FittingType[0], Origin, OR(ND)/FittingType[1], OR(ND)/FittingType[1], AN_rotation)  # error: This variable is undefined.
# EndPoint is relative to StartPoint NOT the origin.
# StartPoint MUST be a 2-D point only!!!
# Dimension
LinearDim(StartPoint, DistToEndPoint, DimLocation, Orientation) :=
    dim ← concat("dimlinear", sp, point(StartPoint[:, 0]), sp, concat("0,", stringit(DistToEndPoint)), sp, Orientation, sp, concat("@", stringit(DimLocation), "0")) if Orientation == "v"
    dim ← concat("dimlinear", sp, point(StartPoint[:, 0]), sp, concat(stringit(DistToEndPoint), ",0"), sp, Orientation, sp, concat("@0,", stringit(DimLocation))) otherwise
    return dim
# Circle
circle(OriginPoint, Radius) := concat("c", sp, point(OriginPoint[:, 0]), sp, stringit(Radius))
# Flex Cylinder
Given
dist := .2
inlet[1] == m_par*inlet[0] + b_par
outlet[1] == m_par*outlet[0] + b_par
LinVars(inlet, outlet, m_par, b_par) := Find(m_par, b_par)
Given
Cat_Lt == integral(sqrt(((outlet[0] - inlet[0])/n_temp)^2 + (LinVars(inlet, outlet, 1, 1)[0]*(outlet[0] - inlet[0])/n_temp)^2 + ((2*A_par)*(inlet[0] + t_par*(outlet[0] - inlet[0])/n_temp) + B_par)^2), t_par = 0 .. n_temp)
inlet[2] == A_par*inlet[0]^2 + B_par*inlet[0] + C_par
outlet[2] == A_par*outlet[0]^2 + B_par*outlet[0] + C_par
A_par > 0
XVars(A_par, B_par, C_par, inlet, outlet, Cat_Lt, n_temp) := Find(A_par, B_par, C_par)
Given
Cat_Lt == integral(sqrt(((outlet[0] - inlet[0])/n_temp)^2 + (LinVars(inlet, outlet, 1, 1)[0]*(outlet[0] - inlet[0])/n_temp)^2 + ((2*D_par)*(inlet[1] + t_par*(outlet[1] - inlet[1])/n_temp) + E_par)^2), t_par = 0 .. n_temp)
inlet[2] == D_par*inlet[1]^2 + E_par*inlet[1] + F_par
outlet[2] == D_par*outlet[1]^2 + E_par*outlet[1] + F_par
D_par > 0
YVars(D_par, E_par, F_par, inlet, outlet, Cat_Lt, n_temp) := Find(D_par, E_par, F_par)
ParPointF(n_temp, dir_temp, inlet, outlet, Cat_Lt) :=
    inlet[0] ← inlet[0]*(-1)
    outlet[0] ← outlet[0]*(-1)
    offset ← -dist*dir_temp*m
    for t ∈ 0 .. n_temp
        if |inlet[0] - outlet[0]| > |inlet[1] - outlet[1]|
            ParPoint[t + 2] ← [
                inlet[0] + t*(outlet[0] - inlet[0])/n_temp;
                LinVars(inlet/m, outlet/m, 0, 0)[0]*(inlet[0] + t*(outlet[0] - inlet[0])/n_temp) + LinVars(inlet/m, outlet/m, 0, 0)[1]*m;
                XVars(0, 0, 0, inlet/m, outlet/m, Cat_Lt/m, n_temp)[0]*(inlet[0] + t*(outlet[0] - inlet[0])/n_temp)^2/m + XVars(0, 0, 0, inlet/m, outlet/m, Cat_Lt/m, n_temp)[1]*(inlet[0] + t*(outlet[0] - inlet[0])/n_temp) + XVars(0, 0, 0, inlet/m, outlet/m, Cat_Lt/m, n_temp)[2]*m
            ]
        if |inlet[1] - outlet[1]| ≥ |inlet[0] - outlet[0]|
            ParPoint[t + 2] ← [
                ((inlet[1] + t*(outlet[1] - inlet[1])/n_temp) - (LinVars(inlet/m, outlet/m, 0, 0)[1]*m))/LinVars(inlet/m, outlet/m, 1, 1)[0];
                inlet[1] + t*(outlet[1] - inlet[1])/n_temp;
                YVars(0, 0, 0, inlet/m, outlet/m, Cat_Lt/m, n_temp)[0]*(inlet[1] + t*(outlet[1] - inlet[1])/n_temp)^2/m + YVars(0, 0, 0, inlet/m, outlet/m, Cat_Lt/m, n_temp)[1]*(inlet[1] + t*(outlet[1] - inlet[1])/n_temp) + YVars(0, 0, 0, inlet/m, outlet/m, Cat_Lt/m, n_temp)[2]*m
            ]
    for tt ∈ 0 .. 1
        ParPoint[tt] ← offset[0, 0]*(2 - tt) + inlet
        ParPoint[tt + n_temp + 3] ← offset[0, 1]*(tt + 1) + outlet
    return ParPoint
TanPoints(n_temp, dir_temp, inlet, outlet, Cat_Lt) :=
    x ← ParPointF(n_temp, dir_temp, inlet, outlet, Cat_Lt)
    offset ← -dist*dir_temp
    [x[0] - offset[0, 0]*m; x[last(x)] + offset[0, 1]*m]
FlexCylinderF(n_temp, dir_temp, inlet, outlet, Cat_Lt, D) :=
    PP ← ParPointF(n_temp, dir_temp, inlet, outlet, Cat_Lt)
    TP ← TanPoints(n_temp, dir_temp, inlet, outlet, Cat_Lt)
    Path ← concat("spline", sp, point(PP[0]), sp, "t", sp, point(TP[0]), sp)
    for j ∈ 1 .. last(PP)
        Path ← concat(Path, point(PP[j]), sp)
    Path ← concat(Path, "t", sp, point(TP[1]))
    DrawCircle ← circle(PP[0], D/2)
    CirclePoint ← [-D/2; 0; 0] + PP[0]
    SetSurfaceAssociativity ← concat("surfaceassociativity", sp, "0")
    SetDelObj ← concat("delobj", sp, "2")
    Sweep ← concat("sweep", sp, "mo", sp, "so", sp, point(CirclePoint), sp, sp, point(PP[1]))
    Concat ← concat(DrawCircle, sp, SetSurfaceAssociativity)
    ZoomFlex ← concat("z", sp, "e")
    SplineEdit ← concat("splinedit", sp, point(PP[0]), sp, "p", sp, "10", sp, sp)
    FinalStack ← stack(Path, SplineEdit, ZoomFlex, Concat, SetDelObj, Sweep)
    return FinalStack
# Erase
EraseAll := concat("_erase", sp, "all", sp)
Erase(p1) := concat("_erase", sp, point(p1[:, 0]), sp)
# Block
block(title, bp, ip) :=
    one ← concat("-block", sp, title)
    two ← concat(point(bp[:, 0]), sp, "all", sp)
    three ← concat("-insert", sp, title)
    four ← concat(point(ip[:, 0]), sp)
    five ← concat(sp)
    tot ← stack(one, two, three, four, five)
    return tot
# Miscellaneous
cleanscreen := concat("_CleanScreenON")
# Sweep
SweepSurface(ShapePoint, PathPoint) :=
    SetSurfaceAssociativity ← concat("surfaceassociativity", sp, "0")
    SetDelObj ← concat("delobj", sp, "2")
    Sweep ← concat("sweep", sp, "mo", sp, "su", sp, point(ShapePoint[:, 0]), sp, sp, point(PathPoint[:, 0]), sp)
    return stack(SetSurfaceAssociativity, SetDelObj, Sweep)
SweepSolid(ShapePoint, PathPoint) :=
    SetSurfaceAssociativity ← concat("surfaceassociativity", sp, "0")
    SetDelObj ← concat("delobj", sp, "2")
    Sweep ← concat("sweep", sp, "mo", sp, "so", sp, point(ShapePoint[:, 0]), sp, sp, point(PathPoint[:, 0]), sp)
    return stack(SetSurfaceAssociativity, SetDelObj, Sweep)
# Arc
# Center specifies the center of an imaginary circle (i.e. the pivot point for the start point)
Arc(CenterPoint, StartPoint, Angle) := concat("arc", sp, "c", point(CenterPoint[:, 0]), sp, point(StartPoint[:, 0]), sp, "a", sp, Angle, sp)
# Polygon
Polygon(numSides, CenterPoint, radius) := concat("polygon", sp, stringit_nounits(numSides), sp, point(CenterPoint[:, 0]), sp, "i", sp, stringit(radius))
# Layouts
SetLayout(Layout) := concat("layout", sp, "s", sp, Layout)
LabelLayout(Text, TextSize, Start, End, Rotation) := concat("-mtext ", point(Start), sp, "height ", stringit(TextSize), sp, "r ", stringit(Rotation), sp, point(End), sp, Text)
CreateLayout(LayoutName) := concat("-layout ", "n ", stringit(LayoutName), sp)
SetLayout(LayoutName) := concat("-layout ", "s ", stringit(LayoutName), sp)
VPortErase(VPort1, VPort2) := concat(".erase ", point(VPort1), sp, point(VPort2), sp)
VPortNew(Corner1, Corner2) := concat("-vport ", point(Corner1), sp, point(Corner2), sp, "z ", "e")
ChangeView(CornerA, CornerB) := concat("ms ", "z ", "w ", point(CornerA), sp, point(CornerB), sp, "ps")
# Section Cuts
RenameLayout(Original, New) := stack(concat("layout", sp, "r", sp, Original), New)
LayerOff(LayerName) := stack("-Layer", "Off", LayerName, "y", "")
Enter := ""
SectionCut(Point1, Point2, Direction, SectionName, Point3, Angle1, LayerName, Angle2) :=
    SwitchSpace ← ".ms"
    FreezeAll ← FreezeLayer("*")
    SectionLayer ← layer_new(SectionName, blue)
    DrawSection ← concat("Sectionplane", sp, "D")
    Point1 ← concat(point(Point1))
    Point2 ← concat(point(Point2))
    Direction ← concat(point(Direction))
    Thaw ← concat("laythw")
    SelectSection ← concat("Select", sp, "L")
    SectionPlanetoBlock ← concat("SPTB", sp, "last", Enter)
    Rotation ← stringit_nounits(Angle1/deg)
    InsertionPoint ← stack(point(Point3), "1", "1", Rotation)
    LayerOff ← LayerOff(LayerName)
    Flip ← stack("Rotate3D", "L", Enter, "y", "0,0,0", stringit_nounits(Angle2/deg))
    return stack(SwitchSpace, FreezeAll, SectionLayer, DrawSection, Point1, Point2, Enter, Direction, Thaw, SelectSection, sp, SectionPlanetoBlock, InsertionPoint, LayerOff, Flip)
# unmodified version; see SectionsCuts_vlk24 temporarily updated version
