# [reference: EtFlocSedFi.xmcd]
# Mathcad to AutoCAD translators:
# The wrapped MtoA translator contains the functions that the user will want to access. These functions will draw pieces with full functionality - specifying the location, dimension, and orientation of the object. Also, it contains layer control and subtraction capabilities for grouped objects.
# Layers
PVCLayer := layer_new("PVC", ltgrey)
SteelLayer := layer_new("Steel", grey)
SelectPVCLayer := SelectLayer("PVC")
SelectSteelLayer := SelectLayer("Steel")
PVCFrz := FreezeLayer("PVC")
SteelFrz := FreezeLayer("Steel")
ThawPVC := ThawMultiple(["PVC"])
ThawSteel := ThawMultiple(["Steel"])
vscurrentXray := vscurrent("x")
UHoleLayer := layer_new("UHole", grey)
SelectUHoleLayer := SelectLayer("Uhole")
UHoleFrz := FreezeLayer("UHole")
ThawUHole := ThawMultiple(["UHole"])
# Dimensions
OD_ManifoldPipe := 2.375 in = 6.0325 cm
W_Body := 10 cm
T_Body := .75 in = 1.905 cm
OD_SteelLoop := 1.5 cm
H_Body := 20 cm
L_Pin := 1.75 in = 4.445 cm
L_TopOfPinToTop := 1.5 cm
T_Latch := 0.5 in = 1.27 cm
W_Latch := 2.3 cm
D_PinHole := 1/4*in = 0.635 cm
H_Latch := 15 cm
OD_CotterPin := 3/8*in = 0.9525 cm
H_Extend := 10 cm
# Unclear Dimensions
# Assuming there is a "space" between each spacers realistically. Even if it is a small 0.01cm space.
Space := 0.01 cm
# Body
Body_Origin := [0 m; 0 m; 0 m]
Body_FarCorner := Body_Origin + [W_Body; H_Body; -T_Body]
BodyBox := Box(Body_Origin, Body_FarCorner)
# Extend Body
TopBody_Origin := [0 m; Space + H_Body; 0 m]
TopBody_FarCorner := TopBody_Origin + [W_Body; -Space + H_Extend; -T_Body]
TopBodyBox := Box(TopBody_Origin, TopBody_FarCorner)
BottomBody_Origin := [0 m; -Space; 0 m]
BottomBody_FarCorner := Body_Origin + [W_Body; Space - H_Extend; -T_Body]
BottomBodyBox := Box(BottomBody_Origin, BottomBody_FarCorner)
# Cutting Out Where the Manifold Pipe Fits
# This is assuming 1.5cm  does not include radius of pin. Need clarification from Fabrication team.
PipeFit_Origin := [W_Body/2; H_Body - L_TopOfPinToTop - D_PinHole/2; 0 m]
PipeFit := CylinderF(PipeFit_Origin, OD_ManifoldPipe/2, T_Body, [0; -90; 0]*deg)
RemovePVC := SubtractF(["PVC"], "DeleteMe")
PipeFitBottom_Origin := [W_Body/2; -L_TopOfPinToTop - D_PinHole/2; 0 m]
PipeFitBottom := CylinderF(PipeFitBottom_Origin, OD_ManifoldPipe/2, T_Body, [0; -90; 0]*deg)
# Chamfer Blocks: Draw and Subtract
# Need to insert commands that write AutoCAD scripts to chamfer the filter openings for smooth insertion of the pipes. Cannot use any of the chamfer or truncate commands because they require cursor selection, which is difficult to do in AutoCAD scripts meant for command insertion.
Block_Origin := [W_Body/2 - OD_ManifoldPipe/2; H_Body - L_TopOfPinToTop - D_PinHole/2; 0 m]
Block_FarCorner := Block_Origin + [D_PinHole; L_TopOfPinToTop + D_PinHole/2; -T_Body]
BlockBox := Box(Block_Origin, Block_FarCorner)
BlockBottom_Origin := [W_Body/2 - OD_ManifoldPipe/2; -Space - L_TopOfPinToTop - D_PinHole/2; 0 m]
BlockBottom_FarCorner := BlockBottom_Origin + [D_PinHole; L_TopOfPinToTop + D_PinHole/2; -T_Body]
BlockBottomBox := Box(BlockBottom_Origin, BlockBottom_FarCorner)
# Pin Hole
PinHole_Origin := [W_Body - W_Latch/2; H_Body - L_TopOfPinToTop - D_PinHole/2; 0 m]
PinHole := CylinderF(PinHole_Origin, D_PinHole/2, T_Body, [0; -90; 0]*deg)
PinHoleBottom_Origin := [W_Body - W_Latch/2; -Space - L_TopOfPinToTop - D_PinHole/2; 0 m]
PinBottomHole := CylinderF(PinHoleBottom_Origin, D_PinHole/2, T_Body, [0; -90; 0]*deg)
# Cotter Pin
# Should we include a pin head for the cotter pin to show the 3/8" diameter?
Pin_Origin := PinHole_Origin + [0 m; 0 m; (L_Pin - T_Body)/2]
Pin := CylinderF(Pin_Origin, D_PinHole/2, L_Pin, [0; -90; 0]*deg)
PinBottom_Origin := PinHoleBottom_Origin + [0 m; 0 m; (L_Pin - T_Body)/2]
PinBottom := CylinderF(PinBottom_Origin, D_PinHole/2, L_Pin, [0; -90; 0]*deg)
# Latch
Latch1_Origin := [W_Body - W_Latch; -H_Latch + 7.4 cm; T_Latch]
Latch1_FarCorner := Latch1_Origin + [W_Latch; H_Latch; -T_Latch]
Latch1 := Box(Latch1_Origin, Latch1_FarCorner)
Latch1B_Origin := Latch1_Origin + [0 m; 0 m; -T_Body - T_Latch]
Latch1B_FarCorner := Latch1B_Origin + [W_Latch; H_Latch; -T_Latch]
Latch1B := Box(Latch1B_Origin, Latch1B_FarCorner)
Latch2_Origin := [W_Body - W_Latch; -H_Latch + 7.4 cm + H_Body; T_Latch]
Latch2_FarCorner := Latch2_Origin + [W_Latch; H_Latch; -T_Latch]
Latch2 := Box(Latch2_Origin, Latch2_FarCorner)
Latch2B_Origin := Latch2_Origin + [0 m; 0 m; -T_Body - T_Latch]
Latch2B_FarCorner := Latch2B_Origin + [W_Latch; H_Latch; -T_Latch]
Latch2B := Box(Latch2B_Origin, Latch2B_FarCorner)
# L Bracket U Holes
UHoleCircle_Origin := Body_Origin + [W_Body - W_LBracket1/2; -L_TopOfPinToTop - D_Pin/2; T_LBracket]
UHoleCircle := CylinderF(UHoleCircle_Origin, D_Pin/2, 2*T_LBracket + T_Body, [0; -90; 0]*deg)
RemoveUHole := SubtractF(["Steel"], "DeleteMe")
UHolePrism_Origin := Body_Origin + [W_Body - W_LBracket1/2; -L_TopOfPinToTop; T_LBracket]
UHolePrism_FarCorner := UHolePrism_Origin + [-W_LBracket1/2; -D_Pin; -2*T_LBracket - T_Body]
UHolePrism := Box(UHolePrism_Origin, UHolePrism_FarCorner)
UHoleCircle2_Origin := Body_Origin + [W_Body - W_LBracket1/2; H_Body - L_TopOfPinToTop - D_Pin/2; T_LBracket]
UHoleCircle2 := CylinderF(UHoleCircle2_Origin, D_Pin/2, 2*T_LBracket + T_Body, [0; -90; 0]*deg)
UHolePrism2_Origin := Body_Origin + [W_Body - W_LBracket1/2; H_Body - L_TopOfPinToTop; T_LBracket]
UHolePrism2_FarCorner := UHolePrism2_Origin + [-W_LBracket1/2; -D_Pin; -2*T_LBracket - T_Body]
UHolePrism2 := Box(UHolePrism2_Origin, UHolePrism2_FarCorner)
# Stack MathCAD Scripts
PVCBody_Script := stack(PVCLayer, BodyBox, PVCFrz, SelectPVCLayer, TopBodyBox, PVCFrz, SelectPVCLayer, BottomBodyBox, PVCFrz, SelectPVCLayer, PipeFit, GroupDelete, RemovePipeFit, PVCFrz, SelectPVCLayer, PipeFitBottom, GroupDelete, RemovePVC, PVCFrz, SelectPVCLayer, BlockBox, GroupDelete, RemovePVC, PVCFrz, SelectPVCLayer, BlockBottomBox, GroupDelete, RemovePVC, PVCFrz, SelectPVCLayer, PinHole, GroupDelete, RemovePinHole, PVCFrz, SelectPVCLayer, PinBottomHole, GroupDelete, RemovePinHole, PVCFrz)
LBracket_Script := stack(SteelLayer, LBracket1, Union_All, SteelFrz, SelectSteelLayer, LBracket1B, Union_All, SteelFrz, SelectSteelLayer, LBracket2, Union_All, SteelFrz, SelectSteelLayer, LBracket2B, Union_All, SteelFrz, SelectSteelLayer, UHoleCircle, GroupDelete, RemoveUHole, SteelFrz, SelectSteelLayer, UHolePrism, GroupDelete, RemoveUHole, SteelFrz, SelectSteelLayer, UHoleCircle2, GroupDelete, RemoveUHole, SteelFrz, SelectSteelLayer, UHolePrism2, GroupDelete, RemoveUHole, SteelFrz)
Pin_Script := stack(SteelLayer, Pin, SteelFrz, sp, SelectSteelLayer, PinBottom, SteelFrz, ThawPVC, ThawSteel, vscurrentXray)
Spacer_Script := stack(PVCBody_Script, LBracket_Script, Pin_Script)
# [component: inputs Spacer_Script]
PVCBody_Script := stack(PVCLayer, BodyBox, PVCFrz, SelectPVCLayer, TopBodyBox, PVCFrz, SelectPVCLayer, BottomBodyBox, PVCFrz, SelectPVCLayer, PipeFit, GroupDelete, RemovePipeFit, PVCFrz, SelectPVCLayer, PipeFitBottom, GroupDelete, RemovePipeFit, PVCFrz, SelectPVCLayer, PinHole, GroupDelete, RemovePinHole, PVCFrz, SelectPVCLayer, PinBottomHole, GroupDelete, RemovePinHole, PVCFrz)
Pin_Script := stack(SteelLayer, Pin, SteelFrz, SelectSteelLayer, PinBottom, SteelFrz)
LBracket_Script := stack(SteelLayer, LBracket1, Union_All, SteelFrz, SelectSteelLayer, LBracket1B, Union_All, SteelFrz, SelectSteelLayer, UHoleCircle, GroupDelete, RemoveUHoleCircle, SteelFrz, SelectSteelLayer, UHolePrism, GroupDelete, RemoveUHolePrism, SteelFrz, ThawPVC, ThawSteel, vscurrentXray)
Spacer_Script := stack(PVCBody_Script, Pin_Script, LBracket_Script)
