# [reference: MtoATranslators.xmcd]
# Mathcad to AutoCAD translators:
# The wrapped MtoA translator contains the functions that the user will want to access. These functions will draw pieces with full functionality - specifying the location, dimension, and orientation of the object. Also, it contains layer control and subtraction capabilities for grouped objects.
# Layers
WoodLayer := layer_new("Wood", ltgrey)
SteelLayer := layer_new("Steel", grey)
SelectWoodLayer := SelectLayer("Wood")
SelectSteelLayer := SelectLayer("Steel")
WoodFrz := FreezeLayer("Wood")
SteelFrz := FreezeLayer("Steel")
ThawWood := ThawMultiple(["Wood"])
ThawSteel := ThawMultiple(["Steel"])
vscurrentXray := vscurrent("x")
RemoveSteel := SubtractF(["Steel"], "DeleteMe")
# Dimensions
W_LBody := 116 cm
W_Steel := 64 cm
T_Body := 5 cm
H_SteelSide := 4 cm
H_Body := 23 cm
T_SteelSide := 0.5 cm
W_RBody := 24 cm
# Left Body
Body_Origin := [0 m; 0 m; 0 m]
LBody_FarCorner := Body_Origin + [W_LBody; H_Body; -T_Body]
LBodyBox := Box(Body_Origin, LBody_FarCorner)
# Right Body
RBody_Origin := [W_LBody + 1 cm; 0 m; 0 m]
RBody_FarCorner := RBody_Origin + [W_RBody; H_Body; -T_Body]
RBodyBox := Box(RBody_Origin, RBody_FarCorner)
# Insert Hinge
T_Hinge := 0.9 cm
Hinge_Origin := [W_LBody + 0.5 cm; 0 m; -T_Body - T_Hinge]
Hinge := insertdwg("https://confluence.cornell.edu/download/attachments/173604905/3%20Hole%20Hinge.dwg?version=1&modificationDate=1462992553049&api=v2", Hinge_Origin, 8.35/100, 8.35/100, 0 deg)
RotateHinge := Rotate3DLast(Hinge_Origin, "X", 90 deg)
RotateFitHinge := Rotate3DLast(Hinge_Origin, "Y", 180 deg)
RotateZHinge := Rotate3DLast(Hinge_Origin, "z", 90 deg)
# Steel Sides
# Need clarificaiton on documents. Thinking of drawing two boxes and subtracting wth the wooden box in steel layer.kee in mind that the steel components are gapped.
# T.SteelSide is the thickness of the steel and H.SteelSide is the height of the steel on both sides.
SteelStrip_Origin := [W_LBody + W_RBody - W_Steel - 8 cm; T_SteelSide + H_Body; T_SteelSide]
SteelStrip_FarCorner := SteelStrip_Origin + [W_Steel; -H_SteelSide; -H_SteelSide]
SteelStrip := Box(SteelStrip_Origin, SteelStrip_FarCorner)
SteelStrip1_Origin := SteelStrip_Origin + [0; -H_Body + H_SteelSide - 2*T_SteelSide; 0]
SteelStrip1_FarCorner := SteelStrip1_Origin + [W_Steel; -H_SteelSide; -H_SteelSide]
SteelStrip1 := Box(SteelStrip1_Origin, SteelStrip1_FarCorner)
OmitBox := Box(Body_Origin, RBody_FarCorner)
# Stack MathCAD Scripts
WoodBody_Script := stack(WoodLayer, LBodyBox, WoodFrz, SelectWoodLayer, RBodyBox, WoodFrz)
SteelBody_Script := stack(SteelLayer, SteelStrip, sp, SteelStrip1, SteelFrz, SelectSteelLayer, OmitBox, GroupDelete, RemoveSteel, SteelFrz, ThawSteel)
HardwareBody_Script := stack(Hinge, RotateHinge, RotateFitHinge, RotateZHinge)
Platform_Script := stack(WoodBody_Script, SteelBody_Script, HardwareBody_Script, ZoomObject, ThawWood)
# [component: inputs Platform_Script]
