# DRAIN WALKWAY
# Walkway 1 (the walkway on the right side of the plant)
# ASSUMPTIONS
# Distance between the tanks and the stairs.
# Space for operator mobility.
S_Operator := .5 m
H_Walkway := 50 cm  # Distance from the top border of the wall
# T.Walkway is driven from the Stairs function
# Ho_Stairs ← 20 cm
# N_Stairs ← round(H_Total/Ho_Stairs)
# H_Stairs ← H_Total/N_Stairs
# but Ho.Stairs cannot be used instead of 20cm..
# maybe because it's under function/programming bar?
T_Walkway := H_CoagStairs/round(H_CoagStairs/(20 cm))
T_Walkway =  # error: This variable is undefined.
# Thickness of the walkway (z dimension)
# **This used to be 30cm but because the thickness of each step is 0.1913m, and because we want to match the floor thickness to the stiars thickness, it had to be changed.
# **H.Stairs is undefined to be used as T.Walkway! WHY??
W_Walkway := 1 m  # Walkway width, walking area (x dimension)
# ORIGIN POINTS
Walkway_Origin := [Plant_Origin[0] + T_PlantWall; Plant_Origin[1]; H_Sed - H_Walkway]
# The walkway origin is located at the left corner of the Sed Tank (Opposite corner to the plant origin), outside the wall.
# DIMENSION POINTS
# Includes the width of all Sed and Floc tanks in one long walkway.
Walkway_Dimensions := [
    W_Walkway;
    N_SedTanks*(W_Sed + T_PlantWall) + (N_FlocChannels*(W_FlocChannel + T_PlantWall)) + W_EtWalkway + CouplingLength(ND_RMPipe) + ElbowRadius(ND_RMPipe) + ShortTeeLength(ND_RMPipe) - T_PlantWall + W_Et;
    T_Walkway
]
Drainboxes_Dimensions := [4*D_SedDrainValve; 2*D_SedDrainValve; T_Walkway]
FlocDrainboxes_Dimensions := [4*D_FlocValve; 2*D_FlocValve; T_Walkway]
# WALKWAY SCRIPT
WalkwayLayer := layer_new("OpWalkwayCon", grey)
WalkwayBox := BoxF(Walkway_Origin, Walkway_Origin + Walkway_Dimensions, [0; 0; 0]*deg)
FreezeWalkwayBox := FreezeLayer("OpWalkwayCon")
DrainBoxes :=
    for i ∈ 0 .. N_SedBays - 1
        Total ← BoxF([
            Plant_Origin[0] + T_PlantWall;
            W_SedBay*(N_SedBays - i) - 0.5*W_SedBay - D_SedDrainValve;
            Walkway_Origin[2]
        ], [
            Plant_Origin[0] + T_PlantWall;
            W_SedBay*(N_SedBays - i) - 0.5*W_SedBay - D_SedDrainValve;
            Walkway_Origin[2]
        ] + Drainboxes_Dimensions, [0; 0; 0]*deg)
    Total ← stack(Total, array_all(N_SedTanks, 1, W_SedBay*N_SedBays + T_PlantWall)) if N_SedTanks ≠ 1
    for j ∈ 0 .. last(Y_FlocDrainValves)
        Total ← stack(Total, BoxF([Plant_Origin[0] + T_PlantWall; Y_FlocDrainValves[j] - D_FlocValve; Walkway_Origin[2]], [Plant_Origin[0] + T_PlantWall; Y_FlocDrainValves[j] - D_FlocValve; Walkway_Origin[2]] + FlocDrainboxes_Dimensions, [0; 0; 0]*deg))
    return Total
Group := GroupAll("DeleteMe")
Subtract := SubtractF(["OpWalkwayCon"], "DeleteMe")
Walkway_Script := stack(WalkwayLayer, WalkwayBox, FreezeWalkwayBox, DrainBoxes, Group, Subtract)
# ENTRANCE TANK WALKWAY
# Walkway 2 (Next to the entrance tank)
# ASSUMPTIONS
# the walkway is set to 1.5m
# ORIGIN POINTS:
Walkway2_Origin := [Plant_Origin[0] + T_PlantWall; Et_Origin[1] - T_PlantWall; H_Sed - H_Walkway]
# DIMENSION POINTS:
Walkway2_Dimensions := [
    -L_Et - 2*T_PlantWall;
    -Et_Origin[1] + (Plant_Origin[1] + W_SedBay*N_SedBays*N_SedTanks + W_FlocChannel*N_FlocChannels + (N_SedTanks + N_FlocChannels + 1)*T_PlantWall);
    T_Walkway
]
# WALKWAY2 SCRIPT
ThawWalkwayBox := SelectLayer("OpWalkwayCon")
WalkwayBox2 := BoxF(Walkway2_Origin, Walkway2_Origin + Walkway2_Dimensions, [0; 0; 0]*deg)
FreezeWalkwayBox := FreezeLayer("OpWalkwayCon")
Walkway2_Script := stack(ThawWalkwayBox, WalkwayBox2, FreezeWalkwayBox)
# PIPE PATH
# space for the RM Pipe going through the walkway
# ORIGIN POINT
PipePath_Origin := [RMTee_Origin[0] - ID_RMPipe; Et_Origin[1] - T_PlantWall; Walkway2_Origin[2]]
# DIMENSION POINTS:
PipePath_Dimensions := [2*ID_RMPipe; -3*ID_RMPipe; T_Walkway]
# PIPE PATH SCRIPT
PipePathBox := BoxF(PipePath_Origin, PipePath_Origin + PipePath_Dimensions, [0; 0; 0]*deg)
Group := GroupAll("DeleteMe")
Subtract := SubtractF(["OpWalkwayCon"], "DeleteMe")
PipePath_Script := stack(PipePathBox, Group, Subtract)
# WALKWAY 3
# Coagulant Tank Walkway (Below the Coag tank)
# ORIGIN POINTS
Walkway3_Origin := [Plant_Origin[0] - T_PlantWall - L_Et; Plant_Origin[1]; H_Sed - H_Walkway]
# DIMENSIONS
Walkway3_Dimensions := [-W_Walkway; Et_Origin[1] - T_PlantWall; T_Walkway]
# WALKWAY3 SCRIPT
ThawWalkwayBox := SelectLayer("OpWalkwayCon")
WalkwayBox3 := BoxF(Walkway3_Origin, Walkway3_Origin + Walkway3_Dimensions, [0; 0; 0]*deg)
FreezeWalkwayBox := FreezeLayer("OpWalkwayCon")
Walkway3_Script := stack(ThawWalkwayBox, WalkwayBox3, FreezeWalkwayBox)
# COAGULANT PLATFORM
# ASSUMPTIONS
S_BetweenTanks := R_CoagTank  # Distance between alum tanks
# DIMENSION POINTS
Ap_Dimensions := [
    (4*R_CoagTank + 4*T_ChemTankWall) + 3*S_BetweenTanks;
    2*(R_CoagTank + T_ChemTankWall) + S_ChemTankBorder + S_Operator;
    -(CoagTank_Origin[2] - T_ChemTankWall - (H_Sed - H_Walkway))
]
H_CoagStairs := CoagTank_Origin[2] - T_ChemTankWall - (H_Sed - H_Walkway)
W_CoagStairs := Ap_Dimensions[1]
# ORIGIN POINTS
Ap_Origin := [
    CoagTank_Origin[0] - 3*(R_CoagTank + T_ChemTankWall) - 2*S_BetweenTanks;
    Et_Origin[1] - T_PlantWall;
    CoagTank_Origin[2] - T_ChemTankWall
]  # The platform origin is located in the left corner at the back (where there are not stairs)
# The stairs origin is located in the left corner at the front of the platform
Stairs_Origin := Ap_Origin
# PLATFORM SCRIPT
AlumPlatformLayer := layer_new("OpCoagplatformCon", grey)
PlatformStairs := Stairs(Stairs_Origin, W_CoagStairs, H_CoagStairs, 180 deg)
PlatformBox := BoxF(Ap_Origin, Ap_Origin + Ap_Dimensions, [0; 0; 0]*deg)
# If the number of flocculator channels is even,
# the platform will be mirrored.
Mirror := Mirror3dAll("YZ", [Plant_Origin[0] - 1/2*L_Sed; 0 m; 0 m], "Y")
FreezePlatformBox := FreezeLayer("OpCoagplatformCon")
ApScript :=
    stack(AlumPlatformLayer, PlatformStairs, PlatformBox, FreezePlatformBox) if mod(N_FlocChannels, 2) == 0
    stack(AlumPlatformLayer, PlatformStairs, PlatformBox, Mirror, FreezePlatformBox) otherwise
# CHLORINE TANK PLATFORM
# ASSUMPTIONS
S_BetweenTanksChlorine := R_ChlorineTank
ChlorineTank_Origin := [
    Plant_Origin[0] + 2.5*T_PlantWall + R_ChlorineTank;
    Plant_Origin[1] + T_ChemTankWall + R_ChlorineTank - 2/3*S_Walkway;
    CoagTank_Origin[2]
]
# DIMENSION POINTS
Cp_Dimensions := [
    2*(R_ChlorineTank + T_ChemTankWall) + S_ChemTankBorder + S_Operator;
    (4*R_ChlorineTank + 4*T_ChemTankWall) + 3*S_BetweenTanksChlorine;
    -(ChlorineTank_Origin[2] - T_ChemTankWall - (H_Sed - H_Walkway))
]
H_ChlorineTotal := ChlorineTank_Origin[2] - T_ChemTankWall - (H_Sed - H_Walkway)
W_ChlorineTotal := Cp_Dimensions[1]
# ORIGIN POINTS
# Walkway1 Origin was used to define the chlorine tanks platform origin.
Cp_Origin := [Walkway_Origin[0]; Walkway_Origin[1] - Cp_Dimensions[1]; ChlorineTank_Origin[2] - T_ChemTankWall]
Stairs_ChlorineOrigin := [Cp_Dimensions[0] + Cp_Origin[0]; Cp_Origin[1] + Cp_Dimensions[1]; Cp_Origin[2]]
# PLATFORM SCRIPT
ChlorinePlatformLayer := layer_new("OpChlorineplatformCon", grey)
ChlorineStairs := Stairs(Stairs_ChlorineOrigin, W_ChlorineTotal, H_ChlorineTotal, 0 deg)
ChlorinePlatformBox := BoxF(Cp_Origin, Cp_Origin + Cp_Dimensions, [0; 0; 0]*deg)
FreezeChlorinePlatformBox := FreezeLayer("OpChlorineplatformCon")
CpScript := stack(ChlorinePlatformLayer, ChlorineStairs, ChlorinePlatformBox, FreezeChlorinePlatformBox)
# FLOOR
# ORIGIN POINTS
Floor_Origin := [Walkway3_Origin[0] - Ap_Dimensions[0] - 4*W_Walkway; Walkway3_Dimensions[1]; H_Sed - H_Walkway]
# DIMENSIONS
Floor_Dimensions := [-Floor_Origin[0] + (Walkway3_Origin[0] - W_Walkway); -Walkway3_Dimensions[1]; T_Walkway]
# FLOOR SCRIPT
FloorLayer := layer_new("floor", grey)
FloorBox := BoxF(Floor_Origin, Floor_Origin + Floor_Dimensions, [0; 0; 0]*deg)
FreezeFloorBox := FreezeLayer("floor")
FloorScript := stack(FloorLayer, FloorBox, FreezeFloorBox)
# FLOOR2 (space in front of the stairs)
# ORIGIN POINTS
Floor2_Origin := [Walkway3_Origin[0] - Ap_Dimensions[0] - 4*W_Walkway; Walkway3_Dimensions[1]; H_Sed - H_Walkway]
# DIMENSIONS
Floor2_Dimensions := [1.9 m; S_Walkway; T_Walkway]
# FLOOR2 SCRIPT
ThawFloorBox := SelectLayer("floor")
Floor2Box := BoxF(Floor2_Origin, Floor2_Origin + Floor2_Dimensions, [0; 0; 0]*deg)
FreezeFloorBox := FreezeLayer("floor")
Floor2Script := stack(ThawFloorBox, Floor2Box, FreezeFloorBox)
# Union All Walkways and Floors
UnionTotal :=
    ThawWalkway ← SelectLayer("OpWalkwayCon")
    ThawFloor ← SelectLayer("floor")
    Union ← UnionMultiple([
        [Plant_Origin[0] + 2*T_PlantWall; Plant_Origin[1] + T_PlantWall; H_Sed - H_Walkway];
        [Plant_Origin[0] - 2*T_PlantWall - L_Et; Plant_Origin[1] + T_PlantWall; H_Sed - H_Walkway];
        [
            Walkway3_Origin[0] - Ap_Dimensions[0] - W_Walkway;
            Walkway3_Dimensions[1] - T_PlantWall;
            H_Sed - H_Walkway
        ];
        [
            Walkway3_Origin[0] - Ap_Dimensions[0] + T_PlantWall;
            Walkway3_Dimensions[1] + T_PlantWall;
            H_Sed - H_Walkway
        ]
    ])
    FreezeWalkway ← FreezeLayer("OpWalkwayCon")
    FreezeFloor ← FreezeLayer("floor")
    Final ← stack(ThawWalkway, ThawFloor, Union, FreezeWalkway, FreezeFloor)
    return Final
# The Union Doesn't do its JOB!!!
AC_OperatorAccess := stack(ApScript, Walkway_Script, Walkway2_Script, PipePath_Script, Walkway3_Script, CpScript, FloorScript, Floor2Script, UnionTotal)
