# Operator Access
# Coagulant Platform
CoagPlatform_Origin := [
    CoagTank_Origin[0] - 3*(R_CoagTank + T_ChemTankWall) - 2*S_ChemTanks;
    Et_Origin[1] - T_PlantWall;
    Plant_Origin[2] + H_Sed - H_WalkwayToTankWall
]
CoagPlatform_Dimensions := [
    4*(R_CoagTank + T_ChemTankWall) + 3*S_ChemTanks;
    W_EtCoagPlatform;
    CoagTank_Origin[2] - T_ChemTankWall - H_Sed + H_WalkwayToTankWall
]
H_CoagStairs := CoagPlatform_Dimensions[2]
W_CoagStairs := CoagPlatform_Dimensions[1]
CoagStairs_Origin := CoagPlatform_Origin + [0 m; 0 m; CoagPlatform_Dimensions[2]]
OpAccessLayer := layer_new("OpWalkwayCon", grey)
PlatformStairs := Stairs(CoagStairs_Origin, W_CoagStairs, H_CoagStairs, 180 deg)
PlatformBox := BoxF(CoagPlatform_Origin, CoagPlatform_Origin + CoagPlatform_Dimensions, [0; 0; 0]*deg)
PlatformSpillGuard := BoxF(CoagPlatform_Origin + CoagPlatform_Dimensions, CoagPlatform_Origin + CoagPlatform_Dimensions + [-T_ConcreteMin; -CoagPlatform_Dimensions[1]; T_ConcreteMin], [0; 0; 0]*deg)
Mirror := Mirror3dAll("YZ", [Plant_Origin[0] - 1/2*L_Sed; 0 m; 0 m], "Y")
# If the number of flocculator channels is even,
# the platform will be mirrored.
UnionPlatform1 := Union_All
CoagPlatformScript := stack(OpAccessLayer, PlatformStairs, PlatformBox, PlatformSpillGuard, UnionPlatform1)
# Drain Channel Walkway Floor
# Draws the floor over the main plant drain channel, to the left of the tanks.
DCWalkway_Origin := [
    Plant_Origin[0] + T_PlantWall;
    Plant_Origin[1];
    Plant_Origin[2] + H_Sed - H_WalkwayToTankWall - T_Floor
]
DCWalkway_Dimensions := [
    W_DCWalkway;
    N_SedTanks*(W_Sed + T_PlantWall) + N_FlocChannels*(W_FlocChannel + T_PlantWall) + W_EtWalkway + W_EtOverflowChannel + T_EtWeir + T_PlantWall + W_Et;
    T_Floor
]
SedDrainBoxes_Dimensions := [
    -(L_SedSludgeValvePipe - 2*SocketDepth(ND_SedSludgePipe) + 2*MaleAdapterLength(ND_SedSludgePipe) + ValveLength(ND_SedSludgePipe) - ValveSocket(ND_SedSludgePipe));
    2*ND_SedSludgePipe;
    T_Floor
]
FlocDrainBoxes_Dimensions := [
    -(2*MaleAdapterLength(ND_FlocValve) + ValveLength(ND_FlocValve) - ValveSocket(ND_FlocValve));
    2*ND_FlocValve;
    T_Floor
]
EtDrainBox_Dimensions := [
    2*MaleAdapterLength(ND_EtFlowControl) + ValveLength(ND_EtFlowControl) - ValveSocket(ND_EtFlowControl);
    2*ND_EtFlowControl;
    T_Floor
]
DCWalkwayBox := BoxF(DCWalkway_Origin, DCWalkway_Origin + DCWalkway_Dimensions, [0; 0; 0]*deg)
DCWalkway_Script := DCWalkwayBox
# Coagulant Platform Floor
# Draws the floor beneath the coagulant stock platform and to the left of it, at the base of the stairs.
# Calculate the length of the stairs for the x coordinate. Also needs to be incorporated into other floor origin points below. Ultimately these layout dimensions should be better organized in the design tool so that they can be easily optimized.
CoagFloor_Origin := [
    CoagPlatform_Origin[0] - 4 m;
    CoagPlatform_Origin[1];
    Plant_Origin[2] + H_Sed - H_WalkwayToTankWall - T_Floor
]
CoagFloor_Dimensions := [4 m + CoagPlatform_Dimensions[0]; CoagPlatform_Dimensions[1]; T_Floor]
FloorBox := BoxF(CoagFloor_Origin, CoagFloor_Origin + CoagFloor_Dimensions, [0; 0; 0]*deg)
CoagFloor_Script := FloorBox
# Entrance Tank Walkway Floor
# The floor between the entrance tank and the flocculator, but extending all the way to the left-most wall of the plant.
EtWalkway_Origin := [
    Plant_Origin[0] + T_PlantWall;
    Et_Origin[1] - T_PlantWall;
    Plant_Origin[2] + H_Sed - H_WalkwayToTankWall - T_Floor
]
EtWalkway_Dimensions := [
    -L_Et - 2*T_PlantWall - CoagPlatform_Dimensions[0] - 4 m;
    -Et_Origin[1] + W_SedBay*N_SedBays*N_SedTanks + W_FlocChannel*N_FlocChannels + (N_SedTanks + N_FlocChannels + 1)*T_PlantWall;
    T_Floor
]
EtWalkwayBox := BoxF(EtWalkway_Origin, EtWalkway_Origin + EtWalkway_Dimensions, [0; 0; 0]*deg)
FreezeEtWalkway := FreezeLayer("OpWalkwayCon")
# space for the RM Pipe going through the walkway
RMCutout_Origin := [
    RMTee_Origin[0] - innerdiameter(ND_RMPipe, PS_Default);
    Et_Origin[1] - T_PlantWall;
    EtWalkway_Origin[2]
]
RMCutout_Dimensions := [2*innerdiameter(ND_RMPipe, PS_Default); -3*innerdiameter(ND_RMPipe, PS_Default); T_Floor]
RMCutoutBox := BoxF(RMCutout_Origin, RMCutout_Origin + RMCutout_Dimensions, [0; 0; 0]*deg)
SubtractRMCutout := SubtractF(["OpWalkwayCon"], "DeleteMe")
EtWalkway_Script := stack(EtWalkwayBox, FreezeEtWalkway, RMCutoutBox, GroupAll("DeleteMe"), SubtractRMCutout)
# Flocculator Floor
# The floor area to the left of the flocculator.
FlocFloor_Origin := [
    CoagFloor_Origin[0];
    CoagFloor_Origin[1] + EtWalkway_Dimensions[1];
    Plant_Origin[0] + H_Sed - H_WalkwayToTankWall - T_Floor
]
FlocFloor_Dimensions := [
    Floc_Origin[0] - Wall_Dim[0] - CoagFloor_Origin[0] + T_PlantWall;
    -TotalFloc_Dim[1] - Wall_Dim[1] - T_PlantWall;
    T_Floor
]
SelectOpFloor := SelectLayer("OpWalkwayCon")
FlocFloor := BoxF(FlocFloor_Origin, FlocFloor_Origin + FlocFloor_Dimensions, [0; 0; 0]*deg)
FreezeOpFloor := FreezeLayer("OpWalkwayCon")
FlocFloor_Script := stack(SelectOpFloor, FlocFloor, FreezeOpFloor)
# Sedimentation Tank Floor
SedFloor_Origin := [
    Plant_Origin[0] - L_Sed - T_PlantWall;
    Plant_Origin[1];
    Plant_Origin[2] + H_Sed - H_WalkwayToTankWall - T_Floor
]
SedFloor_Dimensions := [
    CoagFloor_Origin[0] + L_Sed + T_PlantWall;
    N_SedTanks*W_Sed + (N_SedTanks - 1)*T_PlantWall;
    T_Floor
]
# SelectOpFloor
SedFloor := BoxF(SedFloor_Origin, SedFloor_Origin + SedFloor_Dimensions, [0; 0; 0]*deg)
# FreezeOpFloor
DrainBoxes :=
    Total ← BoxF([
        Plant_Origin[0] - L_Sed - T_PlantWall;
        W_SedBay*N_SedBays - 0.5*W_SedBay - ND_SedSludgePipe;
        DCWalkway_Origin[2]
    ], [
        Plant_Origin[0] - L_Sed - T_PlantWall;
        W_SedBay*N_SedBays - 0.5*W_SedBay - ND_SedSludgePipe;
        DCWalkway_Origin[2]
    ] + SedDrainBoxes_Dimensions, [0; 0; 0]*deg)
    if N_SedBays > 1
        for i ∈ 1 .. N_SedBays - 1
            Total ← stack(Total, BoxF([
                Plant_Origin[0] - L_Sed - T_PlantWall;
                W_SedBay*(N_SedBays - i) - 0.5*W_SedBay - ND_SedSludgePipe;
                DCWalkway_Origin[2]
            ], [
                Plant_Origin[0] - L_Sed - T_PlantWall;
                W_SedBay*(N_SedBays - i) - 0.5*W_SedBay - ND_SedSludgePipe;
                DCWalkway_Origin[2]
            ] + SedDrainBoxes_Dimensions, [0; 0; 0]*deg))
    Total ← stack(Total, array_all(N_SedTanks, 1, W_SedBay*N_SedBays + T_PlantWall)) if N_SedTanks > 1
    for j ∈ 0 .. last(Y_FlocDrainValves)
        Total ← stack(Total, BoxF([Plant_Origin[0] - L_Sed - T_PlantWall; Y_FlocDrainValves[j] - ND_FlocValve; DCWalkway_Origin[2]], [Plant_Origin[0] - L_Sed - T_PlantWall; Y_FlocDrainValves[j] - ND_FlocValve; DCWalkway_Origin[2]] + FlocDrainBoxes_Dimensions, [0; 0; 0]*deg))
    Total ← stack(Total, BoxF([
        Et_Origin[0] + T_PlantWall;
        Et_Origin[1] + S_Fitting + ConRadius(ND_EtDrain) - ND_EtFlowControl;
        DCWalkway_Origin[2]
    ], [
        Et_Origin[0] + T_PlantWall;
        Et_Origin[1] + S_Fitting + ConRadius(ND_EtDrain) - ND_EtFlowControl;
        DCWalkway_Origin[2]
    ] + EtDrainBox_Dimensions, [0; 0; 0]*deg))
    return Total
SubtractDrainBoxes := SubtractF(["OpWalkwayCon"], "DeleteMe")
SedFloor_Script := stack(SelectOpFloor, SedFloor, FreezeOpFloor, DrainBoxes, GroupDelete, SubtractDrainBoxes)
# Filter Floor
FiWalkway_Origin := [
    Plant_Origin[0] - L_Sed - W_DC - W_FiInletChannel - L_FiEntrance - L_FiExit - 5*T_PlantWall;
    max(Fi_origin[1] + W_Fi, FiExitBox_origin[1] + W_FiExit) + (Et_Origin[1] - W_Fi - T_PlantWall - W_EtWalkway - T_FiWall - Fi_origin[1]);
    FiExitBox_origin[2] - T_Floor
]
FiWalkway_Dim := [
    -(FiExitBox_origin[0] - Fi_origin[0] - L_FiExit - T_PlantWall - T_FiWall);
    -(max(Fi_origin[1] + W_Fi, FiExitBox_origin[1] + W_FiExit) - min(Fi_origin[1] - (T_FiWall + W_Fi)*(N_Fi - 1), Plant_Origin[1] - max((W_Fi + T_FiWall)*N_Fi, (2*W_FiEntrance + W_FiOverflow + 4*T_PlantWall)*ceil(N_Fi/2) - T_PlantWall + (W_Fi - W_FiOverflow/2 - T_PlantWall - W_FiEntrance + T_FiWall/2))));
    T_Floor
]
# SelectOpFloor
FiWalkway := BoxF(FiWalkway_Origin, FiWalkway_Origin + FiWalkway_Dim, [0; 0; 0]*deg)
# FreezeOpFloor
FiSiphonHole := BoxF([
    Plant_Origin[0] - L_Sed - W_DC - L_FiEntrance - L_FiExit - W_FiInletChannel - W_MpWalkway + 5*T_PlantWall - zc;
    Et_Origin[1] - W_Fi - T_PlantWall - W_EtWalkway - T_FiWall;
    FiExitBox_origin[2] - T_Floor - zc
], [
    Plant_Origin[0] - L_Sed - W_DC - L_FiEntrance - L_FiExit - W_FiInletChannel - W_MpWalkway + 5*T_PlantWall + 2*SocketDepth(ND_FiSiphon) + ShortTeeLength(ND_FiSiphon) + ConRadius(ND_FiSiphon) + 5 cm;
    Et_Origin[1] - W_Fi - T_PlantWall - W_EtWalkway - T_FiWall + T_ConcreteMin + 2*ConRadius(ND_FiSiphon) + 5 cm;
    FiExitBox_origin[2] + zc
], [0; 0; 0]*deg)
ArraySiphonHole := ArrayLast(2, 1, -(2*(ConRadius(ND_FiSiphon) + S_Fitting) + T_FiWall))
ArraySiphonPair := array_all(2, 1, -max((W_Fi + T_FiWall)*2, 2*W_FiEntrance + W_FiOverflow + 3*T_PlantWall))
FiTankHole1 := BoxF([
    FiWalkway_Origin[0];
    FiWalkway_Origin[1];
    Plant_Origin[2] + H_Sed - H_WalkwayToTankWall - T_Floor - zc
], [
    FiWalkway_Origin[0];
    FiWalkway_Origin[1];
    Plant_Origin[2] + H_Sed - H_WalkwayToTankWall - T_Floor - zc
] + [FiWalkway_Dim[0]; FiWalkway_Dim[1]; T_Floor + 2*zc], [0; 0; 0]*deg)
FiTankHole2 := BoxF([
    Plant_Origin[0] - L_Sed - W_DC - 5*T_PlantWall - 2*T_FiWall - W_MpWalkway - L_FiExit - L_FiEntrance - W_FiInletChannel - L_Fi;
    Et_Origin[1] - W_Fi - T_PlantWall - W_EtWalkway + W_Fi;
    Plant_Origin[2] + H_Sed - H_WalkwayToTankWall - T_Floor - zc
], [
    Plant_Origin[0] - L_Sed - W_DC - 5*T_PlantWall - W_MpWalkway - L_FiExit - L_FiEntrance - W_FiInletChannel;
    Et_Origin[1] - W_Fi - T_PlantWall - W_EtWalkway - 2*T_FiWall - (W_Fi + T_FiWall)*(N_Fi - 1);
    Plant_Origin[2] + H_Sed - H_WalkwayToTankWall + zc
], [0; 0; 0]*deg)
FiTankHole3 := BoxF([
    Plant_Origin[0] - L_Sed - W_DC - T_PlantWall;
    (Plant_Origin[0] - L_Sed - W_DC - 5*T_PlantWall - T_FiWall - W_MpWalkway - L_FiExit - L_FiEntrance - W_FiInletChannel - Fi_origin[1]) + Plant_Origin[1] - max((W_Fi + T_FiWall)*N_Fi, (2*W_FiEntrance + W_FiOverflow + 4*T_PlantWall)*ceil(N_Fi/2) - T_PlantWall + (W_Fi - W_FiOverflow/2 - T_PlantWall - W_FiEntrance + T_FiWall/2));
    Plant_Origin[2] + H_Sed - H_WalkwayToTankWall - T_Floor - zc
], [
    FiWalkway_Origin[0];
    (Plant_Origin[0] - L_Sed - W_DC - 5*T_PlantWall - T_FiWall - W_MpWalkway - L_FiExit - L_FiEntrance - W_FiInletChannel - Fi_origin[1]) + Plant_Origin[1] - max((W_Fi + T_FiWall)*N_Fi, (2*W_FiEntrance + W_FiOverflow + 4*T_PlantWall)*ceil(N_Fi/2) - T_PlantWall + (W_Fi - W_FiOverflow/2 - T_PlantWall - W_FiEntrance + T_FiWall/2)) + L_FiInletChannel;
    Plant_Origin[2] + H_Sed - H_WalkwayToTankWall + zc
], [0; 0; 0]*deg)
# GroupDelete
SubtractFiWalkwayPieces := SubtractF(["OpWalkwayCon"], "DeleteMe")
FiWalkway :=
    stack(SelectOpFloor, FiWalkway, FreezeOpFloor, FiSiphonHole, FiTankHole1, FiTankHole2, FiTankHole3, GroupDelete, SubtractFiWalkwayPieces) if N_Fi == 1
    stack(SelectOpFloor, FiWalkway, FreezeOpFloor, FiSiphonHole, ArraySiphonHole, FiTankHole1, FiTankHole2, FiTankHole3, GroupDelete, SubtractFiWalkwayPieces) if N_Fi == 2
    stack(SelectOpFloor, FiWalkway, FreezeOpFloor, FiSiphonHole, ArraySiphonHole, ArraySiphonPair, FiTankHole1, FiTankHole2, FiTankHole3, GroupDelete, SubtractFiWalkwayPieces) otherwise
# Calibration Column
SF_CalCol := 1.25
Ti_Res := 1.25*min
Q_CalColMax := SF_CalCol*Q_CdcMax
Vol_CalCol := Ti_Res*Q_CalColMax
# Effective column volume for 1.25 times the max flow rate through the chemical dose controller over 1.25 minutes
D_inCCMin := sqrt(4*Vol_CalCol/(π*(H_CoagTank - (Z_CoagulantOutlet - Z_CoagulantTankBottom) - H_PlantFreeboard)))
# Minimum inner diameter for a column no taller than the length between the Coagulant Stock Tank Freeboard and the Coagulant oulet for the effective column volume
ND_CalCol := NominalDiameter(D_inCCMin, PS_Default)  # Next largest nominal diameter for minimum inner diameter
D_inCalCol := innerdiameter(ND_CalCol, PS_Default)
H_CalCol := Vol_CalCol/(π*(D_inCalCol/2)^2)
# Calculate new height based on new inner diameter
H_CalCol =  # error: This variable is undefined.
OriginCalCol := [
    -Et_Origin[0] - L_Et - T_PlantWall - (S_ChemTanks - T_ConcreteMin)/2;
    Et_Origin[1] - T_PlantWall - ConRadius(ND_CalCol);
    Z_CoagulantOutlet
]
# Place the Calibration column halfway between the Coagulant Stock Tanks and the endge of the stock tank platform, just hanging off the platform and at the coagulant outlet height
Origin_TopCap := [OriginCalCol[0]; OriginCalCol[1]; OriginCalCol[2] + H_CalCol]  # Cap the pipe
MakeCalColLayer := layer_new("CDCCalColumn", ltpurple)
MainCalCol := PipeF(OriginCalCol, H_CalCol, [0; 90]*deg, ND_CalCol, PS_Default)
FreezeCalCol := FreezeLayer("CDCCalColumn")
MakeCapsLayer := layer_new("CDCCaps", blue2)
TopCap := CapF(Origin_TopCap, [0; -90]*deg, 1.5*in)
BottomCap := CapF(OriginCalCol, [0; 90]*deg, 1.5*in)
FreezeCapsLayer := FreezeLayer("CDCCaps")  # To draw the hole in the top cap, we are subtracting a cylinder from the top cap layer
Origin_Cylinder := [OriginCalCol[0]; OriginCalCol[1]; OriginCalCol[2] + H_CalCol/2]
R_cylinder := .5 cm
DrawCylinder := CylinderF(Origin_Cylinder, R_cylinder, H_CalCol, [0; 90]*deg)
LayCylinder := GroupAll("DeleteMe")
MakeHole := SubtractF(["CDCCaps"], "DeleteMe")
FreezeCylinder := FreezeLayer("Delete Me")
LayStand := layer_new("Boards", yellow)
BoardDim_Vert := [
    3.5*in;
    1.5*in;
    (1.1*H_CalCol) + OriginCalCol[2] - (CoagPlatform_Origin[2] + CoagPlatform_Dimensions[2])
]  # Start making the stand
Origin_VertBoard := [
    OriginCalCol[0] - BoardDim_Vert[0]/2;
    OriginCalCol[1] + ConRadius(ND_CalCol);
    CoagPlatform_Origin[2] + CoagPlatform_Dimensions[2]
]
FarCorner_VertBoard := BoardDim_Vert + Origin_VertBoard
BoardDim_Horiz := [3.5*in; BoardDim_Vert[2]/(2*tan(60*deg)); 1.5*in]
Origin_HorizBoard := Origin_VertBoard + [0; BoardDim_Vert[1]; 0]
FarCorner_HorizBoard := BoardDim_Horiz + Origin_HorizBoard
BoardDim_Slant := [3.5 in; 1.5 in; BoardDim_Vert[2]/(2*sin(60 deg))]
Origin_SlantBoard := FarCorner_HorizBoard
FarCorner_SlantBoard := Origin_SlantBoard + [-BoardDim_Slant[0]; -BoardDim_Slant[1]; BoardDim_Slant[2]]
MakeSlantBoard := BoxF(Origin_SlantBoard, FarCorner_SlantBoard, [0; 0; 30]*deg)
MakeVertBoard := BoxF(Origin_VertBoard, FarCorner_VertBoard, [0; 0; 0])
MakeHorizBoard := BoxF(Origin_HorizBoard, FarCorner_HorizBoard, [0; 0; 0])
FreezeBoards := FreezeLayer("Boards")
Image_CDCCalCol := stack(MakeCalColLayer, MainCalCol, FreezeCalCol, MakeCapsLayer, TopCap, BottomCap, FreezeCapsLayer, DrawCylinder, LayCylinder, MakeHole, FreezeCylinder, LayStand, MakeSlantBoard, MakeVertBoard, MakeHorizBoard, Union_All, FreezeBoards)
AC_OperatorAccess := stack(CoagPlatformScript, DCWalkway_Script, EtWalkway_Script, CoagFloor_Script, FlocFloor_Script, SedFloor_Script, FiWalkway, SelectOpFloor, Union_All, FreezeOpFloor, Image_CDCCalCol)
