# Operator Access
# Chemical Platform
# Width and length of the chemical platform are defined in ChemStockTanksAC
ChemPlatform_Origin := [
    CoagTank_Origin[0] + R_CoagTank + T_ChemTankWall + S_ChemTankBorder - L_EtChemPlatform;
    Et_Origin[1] + W_Et + T_PlantWall - W_EtChemPlatform;
    CoagTank_Origin[2] - T_ChemTankWall - T_PlantWall
]
ChemPlatform_Dimensions := [L_EtChemPlatform; W_EtChemPlatform; T_PlantWall]
CoagPlatformOld_Dimensions := [
    L_EtChemPlatform;
    W_EtChemPlatform;
    CoagTank_Origin[2] - T_ChemTankWall - H_Sed + H_WalkwayToTankWall
]
ChemPlatformWall_Origin := [
    ChemPlatform_Origin[0] + L_EtChemPlatform - T_PlantWall;
    ChemPlatform_Origin[1];
    Plant_Origin[2] + H_Sed - H_WalkwayToTankWall
]
ChemPlatformWall_Dimensions := [
    T_PlantWall;
    W_EtChemPlatform;
    CoagTank_Origin[2] - T_ChemTankWall - H_Sed + H_WalkwayToTankWall - T_PlantWall
]
H_ChemStairs := CoagTank_Origin[2] - T_ChemTankWall - H_Sed + H_WalkwayToTankWall
W_ChemStairs := W_EtChemPlatform
ChemStairs_Origin := ChemPlatform_Origin + [0 m; 0 m; ChemPlatform_Dimensions[2]]
OpAccessLayer := layer_new("OpWalkwayCon", grey)
PlatformStairs := Stairs(ChemStairs_Origin, W_ChemStairs, H_ChemStairs, 180 deg)
PlatformBox := BoxF(ChemPlatform_Origin, ChemPlatform_Origin + ChemPlatform_Dimensions, [0; 0; 0]*deg)
PlatformWall := BoxF(ChemPlatformWall_Origin, ChemPlatformWall_Origin + ChemPlatformWall_Dimensions, [0; 0; 0]*deg)
PlatformSpillGuard := BoxF(ChemPlatform_Origin + ChemPlatform_Dimensions, ChemPlatform_Origin + ChemPlatform_Dimensions + [-T_ConcreteMin; -ChemPlatform_Dimensions[1]; T_ConcreteMin], [0; 0; 0]*deg)
# unnecessary now
UnionPlatform1 := Union_All
FreezeEtWalkway := FreezeLayer("OpWalkwayCon")
R_Hole := outerdiameter(AvailND[index2(ND_CoagPiping, AvailND) + 1])/2
L_MaleInsertToHoleCenter := ElbowRadius(ND_CoagPiping) + L_BallValve + L_FirstPipe + L_SecondPipe
SubtractDrainWallBox := BoxF(ChemPlatformWall_Origin + [0 m; 2*L_PlatformHole; 0 m], ChemPlatformWall_Origin + [T_PlantWall; 4*L_PlatformHole; W_PlatformHole], [0; 0; 0]*deg)
SubtractDoseWallBox := BoxF(ChemWallHole_Origin, [
    ChemPlatformWall_Origin[0] + T_PlantWall;
    ChemPlatformWall_Origin[1] + 3*L_PlatformHole;
    ChemPlatform_Origin[2]
], [0; 0; 0]*deg)
SubtractCoagDrainPipe := CylinderF(CoagTank_Origin - [0 m; 0 m; T_ChemTankWall], R_Hole, T_PlantWall, [0; 270]*deg)
SubtractCoagDosePipe := CylinderF(CoagTank_Origin + [
    -sqrt(2)/2*(R_CoagTank + T_ChemTankWall + L_BulkheadFittingEnd + L_MaleInsertEnd + L_MaleInsertToHoleCenter);
    -sqrt(2)/2*(R_CoagTank + T_ChemTankWall + L_BulkheadFittingEnd + L_MaleInsertEnd + L_MaleInsertToHoleCenter);
    -T_ChemTankWall
], R_Hole, T_PlantWall, [0; 270]*deg)
SubtractCoag2DrainPipe := CylinderF(CoagTank_Origin - [0 m; 2*R_CoagTank + 2*T_ChemTankWall + S_ChemTankBorder; T_ChemTankWall], R_Hole, T_PlantWall, [0; 270]*deg)
SubtractCoag2DosePipe := CylinderF(CoagTank_Origin - [0 m; 2*R_CoagTank + 2*T_ChemTankWall + S_ChemTankBorder; T_ChemTankWall] + [
    -sqrt(2)/2*(R_CoagTank + T_ChemTankWall + L_BulkheadFittingEnd + L_MaleInsertEnd + L_MaleInsertToHoleCenter);
    sqrt(2)/2*(R_CoagTank + T_ChemTankWall + L_BulkheadFittingEnd + L_MaleInsertEnd + L_MaleInsertToHoleCenter);
    0 m
], R_Hole, T_PlantWall, [0; 270]*deg)
SubtractChlorDrainPipe := CylinderF(ChlorineTank_Origin - [0 m; 0 m; T_ChemTankWall], R_Hole, T_PlantWall, [0; 270]*deg)
SubtractChlorDosePipe := CylinderF(ChlorineTank_Origin + [
    0 m;
    -(R_ChlorineTank + T_ChemTankWall + L_BulkheadFittingEnd + L_MaleInsertEnd + L_MaleInsertToHoleCenter);
    -T_ChemTankWall
], R_Hole, T_PlantWall, [0; 270]*deg)
SubtractChlor2DrainPipe := CylinderF(ChlorineTank_Origin - [2*R_ChlorineTank + 2*T_ChemTankWall + S_ChemTankBorder; 0 m; T_ChemTankWall], R_Hole, T_PlantWall, [0; 270]*deg)
SubtractChlor2DosePipe := CylinderF(ChlorineTank_Origin + [
    -(2*R_ChlorineTank + 2*T_ChemTankWall + S_ChemTankBorder);
    -(R_ChlorineTank + T_ChemTankWall + L_BulkheadFittingEnd + L_MaleInsertEnd + L_MaleInsertToHoleCenter);
    -T_ChemTankWall
], R_Hole, T_PlantWall, [0; 270]*deg)
SubtractFilterCoagDrainPipe := CylinderF(FilterCoagTank_Origin - [0 m; 0 m; T_ChemTankWall], R_Hole, T_PlantWall, [0; 270]*deg)
SubtractFilterCoagDosePipe := CylinderF(FilterCoagTank_Origin + [
    0 m;
    R_ChlorineTank + T_ChemTankWall + L_BulkheadFittingEnd + L_MaleInsertEnd + L_MaleInsertToHoleCenter;
    -T_ChemTankWall
], R_Hole, T_PlantWall, [0; 270]*deg)
SubtractFilterCoag2DrainPipe := CylinderF(FilterCoagTank_Origin - [2*R_FilterCoagTank + 2*T_ChemTankWall + S_ChemTankBorder; 0 m; T_ChemTankWall], R_Hole, T_PlantWall, [0; 270]*deg)
SubtractFilterCoag2DosePipe := CylinderF(FilterCoagTank_Origin + [
    -(2*R_FilterCoagTank + 2*T_ChemTankWall + S_ChemTankBorder);
    R_ChlorineTank + T_ChemTankWall + L_BulkheadFittingEnd + L_MaleInsertEnd + L_MaleInsertToHoleCenter;
    -T_ChemTankWall
], R_Hole, T_PlantWall, [0; 270]*deg)
GroupPlatformSubtractions := GroupAll("DeleteMe")
SubtractPlatformHoles := SubtractF(["OpWalkwayCon"], "DeleteMe")
SubtractionScript := stack(FreezeEtWalkway, SubtractDrainWallBox, SubtractDoseWallBox, SubtractCoagDrainPipe, SubtractCoagDosePipe, SubtractCoag2DrainPipe, SubtractCoag2DosePipe, SubtractChlorDrainPipe, SubtractChlorDosePipe, SubtractChlor2DrainPipe, SubtractChlor2DosePipe, SubtractFilterCoagDrainPipe, SubtractFilterCoagDosePipe, SubtractFilterCoag2DrainPipe, SubtractFilterCoag2DosePipe, GroupPlatformSubtractions, SubtractPlatformHoles)
# If the number of flocculator channels is even,
# the platform will be mirrored. However, this shouldn't happen now.
Mirror := Mirror3dAll("YZ", [Plant_Origin[0] - 1/2*L_Sed; 0 m; 0 m], "Y")
ChemPlatform_Script := stack(OpAccessLayer, PlatformStairs, PlatformBox, PlatformWall, UnionPlatform1, SubtractionScript)
# Main Floor
Floor_Origin := [
    Plant_Origin[0] + T_PlantWall;
    Plant_Origin[1] - T_PlantWall;
    Plant_Origin[2] + H_Sed - H_WalkwayToTankWall - T_Floor
]
Floor_Dim := [
    -2*T_PlantWall - L_Sed - W_DCWalkway - 6 m;
    N_SedTanks*(N_SedBays*W_SedBay + T_PlantWall) + N_FlocChannels*(W_FlocChannel + T_PlantWall) + T_PlantWall + W_EtWalkway + W_Et + 2*T_PlantWall;
    T_Floor
]
SedDrainBoxes_Dimensions := [
    -(L_SedSludgeValvePipe - 2*SocketDepth(ND_SedSludgePipe) + 2*MaleAdapterLength(ND_SedSludgePipe) + ValveLength(ND_SedSludgePipe) - ValveSocket(ND_SedSludgePipe));
    2*ND_SedSludgePipe;
    T_Floor
]
FlocDrainBoxes_Dimensions := [
    -(2*MaleAdapterLength(ND_FlocValve) + ValveLength(ND_FlocValve) - ValveSocket(ND_FlocValve));
    2*ND_FlocValve;
    T_Floor
]
EtDrainBox_Dimensions := [
    2*MaleAdapterLength(ND_EtFlowControl) + ValveLength(ND_EtFlowControl) - ValveSocket(ND_EtFlowControl);
    2*ND_EtFlowControl;
    T_Floor
]
FloorBox := BoxF(Floor_Origin, Floor_Origin + Floor_Dim, [0; 0; 0]*deg)
SedSubBox_Origin := Plant_Origin + [T_PlantWall; -T_PlantWall; H_Sed - H_WalkwayToTankWall - T_Floor - zc]
SedSubBox_Dim := [-2*T_PlantWall - L_Sed; N_SedTanks*(N_SedBays*W_SedBay + T_PlantWall); T_Floor + 2*zc]
SedSubBox := BoxF(SedSubBox_Origin, SedSubBox_Origin + SedSubBox_Dim, [0; 0; 0]*deg)
FlocSubBox_Origin := Plant_Origin + [
    T_PlantWall;
    N_SedTanks*(N_SedBays*W_SedBay + T_PlantWall) - T_PlantWall;
    H_Sed - H_WalkwayToTankWall - T_Floor - zc
]
FlocSubBox_Dim := [-2*T_PlantWall - L_Sed; N_FlocChannels*(T_PlantWall + W_FlocChannel) + T_PlantWall; T_Floor + zc]
FlocSubBox := BoxF(FlocSubBox_Origin, FlocSubBox_Origin + FlocSubBox_Dim, [0; 0; 0]*deg)
EtSubBox_Origin := [
    Et_Origin[0] + T_PlantWall;
    Et_Origin[1] - T_PlantWall;
    Plant_Origin[2] + H_Sed - H_WalkwayToTankWall - T_Floor - zc
]
EtSubBox_Dim := [-2*T_PlantWall - L_Sed; 2*T_PlantWall + W_Et; T_Floor + zc]
EtSubBox := BoxF(EtSubBox_Origin, EtSubBox_Origin + EtSubBox_Dim, [0; 0; 0]*deg)
FiSubBox_Origin := [
    Fi_origin[0] + T_PlantWall;
    Fi_origin[1] + W_Fi + T_PlantWall;
    Plant_Origin[2] + H_Sed - H_WalkwayToTankWall - T_Floor - zc
]
FiSubBox_Dim := [-6 m + zc; -N_Fi*W_Fi - (N_Fi + 1)*T_PlantWall; T_Floor + zc]
FiSubBox := BoxF(FiSubBox_Origin, FiSubBox_Origin + FiSubBox_Dim, [0; 0; 0]*deg)
# space for the RM Pipe going through the walkway
RMCutout_Origin := [
    RMTee_Origin[0] - innerdiameter(ND_RMPipe, PS_Default);
    Et_Origin[1] - T_PlantWall;
    Plant_Origin[2] + H_Sed - H_WalkwayToTankWall - T_Floor - zc
]
RMCutout_Dimensions := [2*innerdiameter(ND_RMPipe, PS_Default); -3*innerdiameter(ND_RMPipe, PS_Default); T_Floor + 2*zc]
RMCutoutBox := BoxF(RMCutout_Origin, RMCutout_Origin + RMCutout_Dimensions, [0; 0; 0]*deg)
FlowControlCutout_Origin := [
    Et_Origin[0] - L_Sed - T_PlantWall;
    Et_Origin[1] + S_Fitting;
    Plant_Origin[2] + H_Sed - H_WalkwayToTankWall - T_Floor - zc
]
FlowControlCutout_Dim := [-4*ConRadius(ND_EtFlowControl); 2*ConRadius(ND_EtFlowControl); T_Floor + 2*zc]
FlowControlCutoutBox := BoxF(FlowControlCutout_Origin, FlowControlCutout_Origin + FlowControlCutout_Dim, [0; 0; 0]*deg)
DrainBoxes :=
    Total ← BoxF([
        Plant_Origin[0] - L_Sed - T_PlantWall;
        W_SedBay*N_SedBays - 0.5*W_SedBay - ND_SedSludgePipe;
        Floor_Origin[2]
    ], [
        Plant_Origin[0] - L_Sed - T_PlantWall;
        W_SedBay*N_SedBays - 0.5*W_SedBay - ND_SedSludgePipe;
        Floor_Origin[2]
    ] + SedDrainBoxes_Dimensions, [0; 0; 0]*deg)
    if N_SedBays > 1
        for i ∈ 1 .. N_SedBays - 1
            Total ← stack(Total, BoxF([
                Plant_Origin[0] - L_Sed - T_PlantWall;
                W_SedBay*(N_SedBays - i) - 0.5*W_SedBay - ND_SedSludgePipe;
                Floor_Origin[2]
            ], [
                Plant_Origin[0] - L_Sed - T_PlantWall;
                W_SedBay*(N_SedBays - i) - 0.5*W_SedBay - ND_SedSludgePipe;
                Floor_Origin[2]
            ] + SedDrainBoxes_Dimensions, [0; 0; 0]*deg))
    Total ← stack(Total, array_all(N_SedTanks, 1, W_SedBay*N_SedBays + T_PlantWall)) if N_SedTanks > 1
    for j ∈ 0 .. last(Y_FlocDrainValves)
        Total ← stack(Total, BoxF([Plant_Origin[0] - L_Sed - T_PlantWall; Y_FlocDrainValves[j] - ND_FlocValve; Floor_Origin[2]], [Plant_Origin[0] - L_Sed - T_PlantWall; Y_FlocDrainValves[j] - ND_FlocValve; Floor_Origin[2]] + FlocDrainBoxes_Dimensions, [0; 0; 0]*deg))
    Total ← stack(Total, BoxF([
        Et_Origin[0] + T_PlantWall;
        Et_Origin[1] + S_Fitting + ConRadius(ND_EtDrain) - ND_EtFlowControl;
        Floor_Origin[2]
    ], [
        Et_Origin[0] + T_PlantWall;
        Et_Origin[1] + S_Fitting + ConRadius(ND_EtDrain) - ND_EtFlowControl;
        Floor_Origin[2]
    ] + EtDrainBox_Dimensions, [0; 0; 0]*deg))
    return Total
SubtractBoxes := SubtractF(["OpWalkwayCon"], "DeleteMe")
# Filter Floor
FiWalkway_Origin := [
    Plant_Origin[0] - L_Sed - W_DC - W_FiInletChannel - L_FiEntrance - L_FiExit - 5*T_PlantWall;
    max(Fi_origin[1] + W_Fi, FiExitBox_origin[1] + W_FiExit) + (Et_Origin[1] - W_Fi - T_PlantWall - W_EtWalkway - T_FiWall - Fi_origin[1]);
    FiExitBox_origin[2] - T_PlantWall
]
FiWalkway_Dim := [
    -(FiExitBox_origin[0] - Fi_origin[0] - L_FiExit - T_PlantWall - T_FiWall);
    -(max(Fi_origin[1] + W_Fi, FiExitBox_origin[1] + W_FiExit) - min(Fi_origin[1] - (T_FiWall + W_Fi)*(N_Fi - 1), Plant_Origin[1] - max((W_Fi + T_FiWall)*N_Fi, (2*W_FiEntrance + W_FiOverflow + 4*T_PlantWall)*ceil(N_Fi/2) - T_PlantWall + (W_Fi - W_FiOverflow/2 - T_PlantWall - W_FiEntrance + T_FiWall/2))));
    T_Floor
]
# SelectOpFloor
FiWalkway := BoxF(FiWalkway_Origin, FiWalkway_Origin + FiWalkway_Dim, [0; 0; 0]*deg)
# FreezeOpFloor
FiSiphonHole := BoxF([
    FiWalkway_Origin[0] + FiWalkway_Dim[0];
    Et_Origin[1] - W_Fi - T_PlantWall - W_EtWalkway - T_FiWall;
    FiExitBox_origin[2] - T_PlantWall - zc
], [
    FiWalkway_Origin[0] + 2*SocketDepth(ND_FiSiphon) + ShortTeeLength(ND_FiSiphon) + ConRadius(ND_FiSiphon) + 5 cm + FiWalkway_Dim[0];
    Et_Origin[1] - W_Fi - T_PlantWall - W_EtWalkway - T_FiWall + T_ConcreteMin + 2*ConRadius(ND_FiSiphon) + 5 cm;
    FiExitBox_origin[2] - T_PlantWall + T_Floor + zc
], [0; 0; 0]*deg)
ArraySiphonHole := ArrayLast(2, 1, -(2*(ConRadius(ND_FiSiphon) + S_Fitting) + T_FiWall))
ArraySiphonPair := array_all(2, 1, -max((W_Fi + T_FiWall)*2, 2*W_FiEntrance + W_FiOverflow + 3*T_PlantWall))
FiTankHole1 := BoxF([
    FiWalkway_Origin[0];
    FiWalkway_Origin[1];
    Plant_Origin[2] + H_Sed - H_WalkwayToTankWall - T_Floor - zc
], [
    FiWalkway_Origin[0];
    FiWalkway_Origin[1];
    Plant_Origin[2] + H_Sed - H_WalkwayToTankWall - T_Floor - zc
] + [FiWalkway_Dim[0]; FiWalkway_Dim[1]; T_Floor + 2*zc], [0; 0; 0]*deg)
FiTankHole2 := BoxF([
    Plant_Origin[0] - L_Sed - W_DC - 5*T_PlantWall - 2*T_FiWall - W_MpWalkway - L_FiExit - L_FiEntrance - W_FiInletChannel - L_Fi;
    Et_Origin[1] - W_Fi - T_PlantWall - W_EtWalkway + W_Fi;
    Plant_Origin[2] + H_Sed - H_WalkwayToTankWall - T_Floor - zc
], [
    Plant_Origin[0] - L_Sed - W_DC - 5*T_PlantWall - W_MpWalkway - L_FiExit - L_FiEntrance - W_FiInletChannel;
    Et_Origin[1] - W_Fi - T_PlantWall - W_EtWalkway - 2*T_FiWall - (W_Fi + T_FiWall)*(N_Fi - 1);
    Plant_Origin[2] + H_Sed - H_WalkwayToTankWall + zc
], [0; 0; 0]*deg)
FiTankHole3 := BoxF([
    Plant_Origin[0] - L_Sed - W_DC - T_PlantWall;
    -T_PlantWall + (Et_Origin[1] - W_Fi - T_PlantWall - W_EtWalkway - T_FiWall - Fi_origin[1]) + Plant_Origin[1] - max((W_Fi + T_FiWall)*N_Fi, (2*W_FiEntrance + W_FiOverflow + 4*T_PlantWall)*ceil(N_Fi/2) - T_PlantWall + (W_Fi - W_FiOverflow/2 - T_PlantWall - W_FiEntrance + T_FiWall/2));
    Plant_Origin[2] + H_Sed - H_WalkwayToTankWall - T_Floor - zc
], [
    FiWalkway_Origin[0];
    (Et_Origin[1] - W_Fi - T_PlantWall - W_EtWalkway - T_FiWall - Fi_origin[1]) + Plant_Origin[1] - max((W_Fi + T_FiWall)*N_Fi, (2*W_FiEntrance + W_FiOverflow + 4*T_PlantWall)*ceil(N_Fi/2) - T_PlantWall + (W_Fi - W_FiOverflow/2 - T_PlantWall - W_FiEntrance + T_FiWall/2)) + L_FiInletChannel + T_PlantWall;
    Plant_Origin[2] + H_Sed - H_WalkwayToTankWall + zc
], [0; 0; 0]*deg)
# GroupDelete
SubtractFiWalkwayPieces := SubtractF(["OpWalkwayCon"], "DeleteMe")
FiWalkway :=
    stack(SelectOpFloor, FiWalkway, FreezeOpFloor, FiSiphonHole, FiTankHole1, FiTankHole2, FiTankHole3, GroupDelete, SubtractFiWalkwayPieces) if N_Fi == 1
    stack(SelectOpFloor, FiWalkway, FreezeOpFloor, FiSiphonHole, ArraySiphonHole, FiTankHole1, FiTankHole2, FiTankHole3, GroupDelete, SubtractFiWalkwayPieces) if N_Fi == 2
    stack(SelectOpFloor, FiWalkway, FreezeOpFloor, FiSiphonHole, ArraySiphonHole, ArraySiphonPair, FiTankHole1, FiTankHole2, FiTankHole3, GroupDelete, SubtractFiWalkwayPieces) otherwise
AC_OperatorAccess := stack(ChemPlatform_Script, SelectLayer("OpWalkwayCon"), FloorBox, FreezeLayer("OpWalkwayCon"), SedSubBox, FlocSubBox, EtSubBox, FiSubBox, RMCutoutBox, FlowControlCutoutBox, GroupAll("DeleteMe"), SubtractBoxes, DrainBoxes, GroupAll("DeleteMe"), SubtractBoxes, FiWalkway)
