# Automated Design: AutoCAD: Pipe Frame
# [reference: MasterProgram.xmcd]
pipeframe_origin := [0; 0; 0]
pipe_radius := 0.05 cm
B_pipelength := 1 m
numshort := 10
B_pipewidth := 1 m
Pipeframescript :=
    layer1 ← layer_new("Pipe frame", yellow)
    view1 ← viewfront1
    cylinder1 ← cylinderC(pipeframe_origin, pipe_radius, W_Sed)
    view2 ← viewtop1
    array1 ← array_all(1, numshort, B_pipewidth)
    cylinder2 ← cylinderC(pipeframe_origin, pipe_radius, L_Sed)
    layerfreeze1 ← layer_freeze("Pipe frame")
    one ← stack(layer1, view1, cylinder1, view2, array1, layerfreeze1)
    return one
# [component: inputs Pipeframescript]
