# [reference: MasterProgram.xmcd]
# Origin Points
# This can be removes when added to MP
GroupDelete := GroupAll("DeleteMe")
# Entrance Exit Filter
FiEntranceBox_origin := [
    Plant_Origin[0] - W_SedExitchannelPostweir - T_PlantWall;
    Plant_Origin[1] - W_FiEntrance - T_PlantWall;
    Z_FiEntranceBottom - SF_Fi
]
# These SF's should be removed once we understand Tamara's performance
FiExitBox_origin := [
    Plant_Origin[0] - W_SedExitchannelPostweir - 2*T_PlantWall - L_FiEntrance;
    Plant_Origin[1] - W_FiExit - T_PlantWall;
    Z_FiExitBottom - SF_Fi
]
Fi_origin := [
    Plant_Origin[0] - W_SedExitchannelPostweir - 4*T_PlantWall - L_FiEntrance - L_FiExit - W_MpWalkway;
    Plant_Origin[1] - W_Fi - T_PlantWall;
    Z_FiBottom
]
# Manifolds
FiManTee_Origin := Fi_origin + [-3/2*B_FiManifoldBranch; ConRadius(ND_FiManBranch) + ShortTeeLength(ND_FiManBranch); T_FiLayer]
BwManTee_Origin := Fi_origin + [
    -3/2*B_FiManifoldBranch;
    ConRadius(ND_FiBwManBranch) + ShortTeeLength(ND_FiBwManBranch);
    outerradius(ND_FiBwManBranch)
]
# Couplings
FiBwInletCoupling_origin := [
    FiEntranceBox_origin[0] - T_ConcreteMin - ConRadius(ND_FiBwTrunk);
    FiEntranceBox_origin[1] + W_FiEntrance - ConRadius(ND_FiBwTrunk);
    FiEntranceBox_origin[2] - CouplingLength(ND_FiBwTrunk) + SocketDepth(ND_FiBwTrunk)
]
FiInletCoupling1_origin := [
    FiEntranceBox_origin[0] - L_FiEntrance + T_ConcreteMin + ConRadius(ND_FiTrunk);
    FiEntranceBox_origin[1] + W_FiEntrance - ConRadius(ND_FiBwTrunk);
    FiEntranceBox_origin[2] - CouplingLength(ND_FiTrunk) + SocketDepth(ND_FiTrunk)
]
# This will be the pipe layout in the entrance and exit boxes to allow for 2 90 degree elbows in  Pipes 2 and 3 coming from the entrance box (on the right)
FiInletCoupling2_origin := [
    FiEntranceBox_origin[0] - T_ConcreteMin - ConRadius(ND_FiBwTrunk);
    FiEntranceBox_origin[1] + 2*T_ConcreteMin + 3*ConRadius(ND_FiTrunk);
    FiEntranceBox_origin[2] - CouplingLength(ND_FiTrunk) + SocketDepth(ND_FiTrunk)
]
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FiInletCoupling3_origin := [
    FiEntranceBox_origin[0] - L_FiEntrance + T_ConcreteMin + ConRadius(ND_FiTrunk);
    FiEntranceBox_origin[1] + 2*T_ConcreteMin + 3*ConRadius(ND_FiTrunk);
    FiEntranceBox_origin[2] - CouplingLength(ND_FiTrunk) + SocketDepth(ND_FiTrunk)
]
FiExitCoupling0_origin := [
    FiExitBox_origin[0] - T_ConcreteMin - ConRadius(ND_FiTrunk);
    FiExitBox_origin[1] + W_FiExit - ConRadius(ND_FiBwTrunk);
    FiExitBox_origin[2] - CouplingLength(ND_FiTrunk) + SocketDepth(ND_FiTrunk)
]
FiExitCoupling1_origin := [
    (FiExitBox_origin[0] - L_FiExit + T_ConcreteMin) + ConRadius(ND_FiTrunk);
    FiExitBox_origin[1] + W_FiExit - ConRadius(ND_FiBwTrunk);
    FiExitBox_origin[2] - CouplingLength(ND_FiTrunk) + SocketDepth(ND_FiTrunk)
]
FiExitCoupling2_origin := [
    FiExitBox_origin[0] - T_ConcreteMin - ConRadius(ND_FiTrunk);
    FiExitBox_origin[1] + T_ConcreteMin + ConRadius(ND_FiTrunk);
    FiExitBox_origin[2] - CouplingLength(ND_FiTrunk) + SocketDepth(ND_FiTrunk)
]
FiExitCoupling3_origin := [
    (FiExitBox_origin[0] - L_FiExit + T_ConcreteMin) + ConRadius(ND_FiExitWaste);
    FiExitBox_origin[1] + T_ConcreteMin + ConRadius(ND_FiExitWaste);
    FiExitBox_origin[2] - CouplingLength(ND_FiExitWaste) + SocketDepth(ND_FiExitWaste)
]
FiBwDrainCoupling_origin := [
    Fi_origin[0] + 2*T_PlantWall + L_FiBw + L_FiBwWeirDrain/2;
    Fi_origin[1] - T_PlantWall/2;
    Z_FiBwWeirDrainBottom - CouplingLength(ND_FiBwWeirDrain) + SocketDepth(ND_FiBwWeirDrain)
]
# Weirs
FiEntranceWeir_origin := [
    Plant_Origin[0] - W_SedExitchannelPostweir;
    Plant_Origin[1] - W_FiEntrance - T_PlantWall;
    Z_FiEntranceWeir
]
# Dimension Points
FiEntranceBox_dim := [L_FiEntrance; W_FiEntrance; H_FiEntrance + SF_Fi]
# These SF's need to be deleted once we figure out Tamara
FiExitBox_dim := [L_FiExit; W_FiExit; H_FiExit + SF_Fi]
Fi_dim := [L_Fi; W_Fi; H_Fi] = [1.4; 0.978446; 3.66732] m
FiEntranceWeir_dim := [-T_PlantWall; W_FiEntrance; Z_SedWeirExit - Z_FiEntranceWeir]
# Script Variables
# Inlet Channel
W_FiEntrance = 0.803756 m
LayerFiInletChannel := layer_new("FiInletChannel", ltgrey)
# The H.Sed-Z.SedWeirExit term can come out once we are not setting the top of the filter at Z=0
FiInletChannel :=
    if N_Fi == 1
        ChannelDrawing([
            Plant_Origin[0];
            Plant_Origin[1] + (-W_FiEntrance) - T_PlantWall;
            Plant_Origin[2] + H_Sed - H_ExitChannel - (H_Sed - Z_SedWeirExit)
        ], [W_FiEntrance; W_SedExitchannelPostweir; H_ExitChannel], T_ChannelWall, [90; 0; 0]*deg)
    otherwise
        ChannelDrawing([
            Plant_Origin[0];
            -(N_Fi*(W_FiEntrance + W_FiOverflow/2 + 3/2*T_PlantWall) - T_PlantWall) - T_PlantWall;
            Plant_Origin[2] + H_Sed - H_ExitChannel - (H_Sed - Z_SedWeirExit)
        ], [N_Fi*(W_FiEntrance + W_FiOverflow/2 + 3/2*T_PlantWall); W_SedExitchannelPostweir; H_ExitChannel], T_ChannelWall, [90; 0; 0]*deg)
# Since the channel is open at one end, this adds a wall to the far end of the channel
FiInletChannelCap :=
    if N_Fi == 1
        BoxF([
            Plant_Origin[0] - W_SedExitchannelPostweir - T_ChannelWall;
            -W_FiEntrance - T_PlantWall - T_ChannelWall;
            Plant_Origin[2] + H_Sed - H_ExitChannel - (H_Sed - Z_SedWeirExit) - T_ChannelWall
        ], [
            Plant_Origin[0] - W_SedExitchannelPostweir - T_ChannelWall;
            -W_FiEntrance - T_PlantWall - T_ChannelWall;
            Plant_Origin[2] + H_Sed - H_ExitChannel - (H_Sed - Z_SedWeirExit) - T_ChannelWall
        ] + [W_SedExitchannelPostweir + 2*T_ChannelWall; T_ChannelWall; H_ExitChannel + T_ChannelWall], [0; 0; 0]*deg)
    otherwise
        BoxF([
            Plant_Origin[0] - W_SedExitchannelPostweir - T_ChannelWall;
            -(N_Fi*(W_FiEntrance + W_FiOverflow/2 + 3/2*T_PlantWall) - T_PlantWall) - T_PlantWall - T_ChannelWall;
            Plant_Origin[2] + H_Sed - H_ExitChannel - (H_Sed - Z_SedWeirExit) - T_ChannelWall
        ], [
            Plant_Origin[0] - W_SedExitchannelPostweir - T_ChannelWall;
            -(N_Fi*(W_FiEntrance + W_FiOverflow/2 + 3/2*T_PlantWall) - T_PlantWall) - T_PlantWall - T_ChannelWall;
            Plant_Origin[2] + H_Sed - H_ExitChannel - (H_Sed - Z_SedWeirExit) - T_ChannelWall
        ] + [W_SedExitchannelPostweir + 2*T_ChannelWall; T_ChannelWall; H_ExitChannel + T_ChannelWall], [0; 0; 0]*deg)
EndBoxIf1 := BoxF([
    FiEntranceBox_origin[0] + T_PlantWall;
    FiEntranceBox_origin[1] - T_PlantWall - W_FiOverflow/2;
    Plant_Origin[2] + H_Sed - H_ExitChannel
], [Plant_Origin[0]; FiEntranceBox_origin[1] - T_PlantWall; Plant_Origin[2] + H_Sed], [0; 0; 0]*deg)  # NOT STACKED
EndBoxIf2 := BoxF([
    FiEntranceBox_origin[0] + T_PlantWall;
    FiEntranceBox_origin[1] - 3*T_PlantWall - W_FiOverflow - W_FiEntrance;
    Plant_Origin[2] + H_Sed - H_ExitChannel
], [
    Plant_Origin[0];
    FiEntranceBox_origin[1] - 2*T_PlantWall - W_FiOverflow - W_FiEntrance;
    Plant_Origin[2] + H_Sed
], [0; 0; 0]*deg)  # NOT STACKED
FreezeFiInletChannel := FreezeLayer("FiInletChannel")
FiEntWeir :=
    Weir1 ← BoxF(FiEntranceWeir_origin, FiEntranceWeir_origin + FiEntranceWeir_dim, [0; 0; 0]*deg)
    Weir2 ← BoxF([
        FiEntranceWeir_origin[0];
        FiEntranceWeir_origin[0] - 2*T_PlantWall - W_FiEntrance - W_FiOverflow;
        FiEntranceWeir_origin[2]
    ], [
        FiEntranceWeir_origin[0];
        FiEntranceWeir_origin[0] - 2*T_PlantWall - W_FiEntrance - W_FiOverflow;
        FiEntranceWeir_origin[2]
    ] + FiEntranceWeir_dim, [0; 0; 0]*deg)
    return
        Weir1 if N_Fi == 1
        stack(Weir1, Weir2) otherwise
SubtractEntWeir := SubtractF(["FiInletChannel"], "DeleteMe")
FiInletChannelScript := stack(LayerFiInletChannel, FiInletChannel, FiInletChannelCap, bigunion, FreezeFiInletChannel, FiEntWeir, GroupDelete, SubtractEntWeir)
# Filter Auxilary Script
# (Drain Channel, BW Box, BW Overflow, Distribution Box, Overflow Box)
# Tanks
LayerFiBw := layer_new("FiBwTanks", ltgrey)
FiBwTank := stack(Tank([Fi_origin[0] + T_PlantWall + L_FiBw; Fi_origin[1] - T_PlantWall/2 - W_FiBw/2; Z_FiBwBottom], [L_FiBw; W_FiBw; H_FiBw], T_PlantWall), " ")
FiBwDrainTank := stack(Tank([
    Fi_origin[0] + 2*T_PlantWall + L_FiBw + L_FiBwWeirDrain;
    Fi_origin[1] - T_PlantWall/2 - W_FiBwWeirDrain/2;
    Z_FiBwWeirDrainBottom
], [L_FiBwWeirDrain; W_FiBwWeirDrain; H_FiBwWeirDrain], T_PlantWall), " ")
LayerFiBwFreeze := FreezeLayer("FiBwTanks")
LayerFiOverflow := layer_new("FiOverflow", ltgrey)
FiOverflowTank := Tank([FiEntranceBox_origin[0]; FiEntranceBox_origin[1] - T_PlantWall - W_FiOverflow; Z_FiOverflowBottom], [L_FiOverflow; W_FiOverflow; H_FiOverflow], T_PlantWall)
FiDistTank := stack(Tank([FiExitBox_origin[0]; FiExitBox_origin[1] - T_PlantWall - W_FiOverflow; Z_FiOverflowBottom], [L_FiOverflow; W_FiOverflow; H_FiExit], T_PlantWall), "")
LayerFiOverflowFreeze := FreezeLayer("FiOverflow")
FiOverflowWeir := BoxF([FiEntranceBox_origin[0]; FiEntranceBox_origin[1] - T_PlantWall; FiEntranceWeir_origin[2]], [
    FiEntranceBox_origin[0] - L_FiWeir;
    FiEntranceBox_origin[1];
    FiEntranceBox_origin[2] + FiEntranceBox_dim[2]
], [0; 0; 0]*deg)  # Needs a programming bar for N.Fi=2
FiDistWeir := BoxF([FiExitBox_origin[0]; FiEntranceBox_origin[1] - T_PlantWall; Z_FiExitWeir], [
    FiExitBox_origin[0] - L_FiWeir;
    FiEntranceBox_origin[1];
    FiEntranceBox_origin[2] + FiExitBox_dim[2]
], [0; 0; 0]*deg)  # Needs a programming bar for N.Fi=2
FiSubtractOverDistWeirs := SubtractF(["FiOverflow"], "DeleteMe")
LayerFiBwDrain := layer_new("FiBwDrain", ltgrey)
FiBwDrainChannel := ChannelDrawing([
    Fi_origin[0] + T_PlantWall + L_FiBw/2 - outerdiameter(ND_DistPipe)/2 - 5 cm;
    Fi_origin[1] - T_PlantWall/2 - H_FiBwDrain/2;
    Z_FiBwBottom - H_FiBwDrain - T_PlantWall
], [
    L_FiEntrance + W_SedExitchannelPostweir + 4*T_PlantWall + L_FiExit + W_MpWalkway - outerdiameter(ND_DistPipe)/2 - 5 cm;
    H_FiBwDrain;
    H_FiBwDrain
], T_ChannelWall, [0; 0; 0]*deg)
FiBwDrainFreeze := FreezeLayer("FiBWDrain")
FiBwWeir := BoxF([Fi_origin[0] + 2*T_PlantWall + L_FiBw; Fi_origin[1] - T_PlantWall/2 - W_FiBw/2; Z_FiBwWeir], [
    Fi_origin[0] + T_PlantWall + L_FiBw;
    Fi_origin[1] - T_PlantWall/2 + W_FiBw/2;
    Z_FiBwBottom + H_FiBw
], [0; 0; 0]*deg)
FiSubtractBwWeir := SubtractF(["FiBwTanks"], "DeleteMe")
FiAuxTanksScript := stack(LayerFiBw, FiBwTank, FiBwDrainTank, bigunion, LayerFiBwFreeze, LayerFiOverflow, FiOverflowTank, FiDistTank, bigunion, LayerFiOverflowFreeze, FiOverflowWeir, FiDistWeir, GroupDelete, FiSubtractOverDistWeirs, LayerFiBwDrain, FiBwDrainChannel, FiBwDrainFreeze, FiBwWeir, GroupDelete, FiSubtractBwWeir)
# Couplings
LayerFiCoupling := layer_new("FiCoupling", green)
FiOverflowToDistCoupling := CouplingSUBF([
    FiExitBox_origin[0] + (T_PlantWall + CouplingLength(ND_DistPipe))/2 - SocketDepth(ND_DistPipe);
    FiExitBox_origin[1] - T_PlantWall - W_FiOverflow/2;
    Z_FiOverflowBottom - T_ConcreteMin - ConRadius(ND_DistPipe) + H_FiEntrance
], [0; 0]*deg, ND_DistPipe, EN_PipeSpec, ["FiOverflow"])
FiOverflowCoupling := CouplingSUBF([
    FiEntranceBox_origin[0] - L_FiOverflow/2;
    FiEntranceBox_origin[1] - T_PlantWall - W_FiOverflow/2;
    Z_FiOverflowBottom - CouplingLength(ND_FiEntranceOverflow) + SocketDepth(ND_FiEntranceOverflow)
], [0; 90]*deg, ND_FiEntranceOverflow, EN_PipeSpec, ["FiOverflow"])
DistCoupling := CouplingSUBF([
    FiExitBox_origin[0] - L_FiExit/2;
    FiExitBox_origin[1] - T_PlantWall - W_FiOverflow/2;
    Z_FiOverflowBottom - CouplingLength(ND_DistPipe) + SocketDepth(ND_DistPipe)
], [0; 90]*deg, ND_DistPipe, EN_PipeSpec, ["FiOverflow"])
FiBwCoupling := CouplingSUBF([
    Fi_origin[0] + T_PlantWall + L_FiBw/2;
    Fi_origin[1] - T_PlantWall/2;
    Z_FiBwBottom - CouplingLength(ND_FiBwDrain) + SocketDepth(ND_FiBwDrain)
], [0; 90]*deg, ND_FiBwDrain, EN_PipeSpec, ["FiBwTanks"])
FiBwDrainCoupling := CouplingSUBF(FiBwDrainCoupling_origin, [0; 90]*deg, ND_FiBwWeirDrain, EN_PipeSpec, ["FiBwTanks"])
LayerFiCouplingFreeze := FreezeLayer("FiCoupling")
FiAuxCouplingScript := stack(LayerFiCoupling, FiOverflowToDistCoupling, FiOverflowCoupling, DistCoupling, FiBwDrainCoupling, FiBwCoupling, LayerFiCouplingFreeze)
# Piping
# For all pipes, if the coupling does not extend out of the concrete floor, the pipe needs to extend 1 socket depth out of the concrete for the subsequent fitting.  If it does extend out of the concrete, we only want to the pipe length to be 2 socket depths: 1 for the coupling, 1 for the other fitting
LayerFiAuxPiping := layer_new("FiAuxPiping", blue)
FiOverflowConnectingPipe := PipeSUBF([
    FiExitBox_origin[0] + (T_PlantWall + CouplingLength(ND_DistPipe))/2 - SocketDepth(ND_DistPipe);
    FiExitBox_origin[1] - T_PlantWall - W_FiOverflow/2;
    Z_FiOverflowBottom - T_ConcreteMin - ConRadius(ND_DistPipe) + H_FiEntrance
], max((T_PlantWall - CouplingLength(ND_DistPipe)) + 2*SocketDepth(ND_DistPipe), 2*SocketDepth(ND_DistPipe)), [0; 0]*deg, ND_DistPipe, EN_PipeSpec, ["FiOverflow"])
FiOverflowToDistElbow := ElbowF([
    FiExitBox_origin[0] - SocketDepth(ND_DistPipe);
    FiExitBox_origin[1] - T_PlantWall - W_FiOverflow/2;
    Z_FiOverflowBottom - T_ConcreteMin - ConRadius(ND_DistPipe) + H_FiEntrance
], [90; 0; 90]*deg, ND_DistPipe, EN_PipeSpec)
FiOverflowConnectingPipe2 := PipeF([
    FiExitBox_origin[0] - ElbowRadius(ND_DistPipe) - SocketDepth(ND_DistPipe);
    FiExitBox_origin[1] - T_PlantWall - W_FiOverflow/2;
    Z_FiOverflowBottom - T_ConcreteMin - ConRadius(ND_DistPipe) + H_FiEntrance - ElbowRadius(ND_DistPipe)
], H_FiExit + SocketDepth(ND_DistPipe), [0; 270]*deg, ND_DistPipe, EN_PipeSpec)
FiDistPipe1 := PipeF([
    FiExitBox_origin[0] - L_FiExit/2;
    FiExitBox_origin[1] - T_PlantWall - W_FiOverflow/2;
    Z_FiOverflowBottom - CouplingLength(ND_DistPipe) + SocketDepth(ND_DistPipe)
], min(-(T_PlantWall - CouplingLength(ND_DistPipe)) - 2*SocketDepth(ND_DistPipe), -2*SocketDepth(ND_DistPipe)), [0; 90]*deg, ND_DistPipe, EN_PipeSpec)
FiDistElbow := ElbowF([
    FiExitBox_origin[0] - L_FiExit/2;
    FiExitBox_origin[1] - T_PlantWall - W_FiOverflow/2 - ElbowRadius(ND_DistPipe);
    Z_FiOverflowBottom - CouplingLength(ND_DistPipe) - ElbowRadius(ND_DistPipe) - SocketDepth(ND_DistPipe)
], [0; 90; 0]*deg, ND_DistPipe, EN_PipeSpec)
FiDistPipe2 := PipeF([
    FiExitBox_origin[0] - L_FiExit/2;
    FiExitBox_origin[1] - T_PlantWall - W_FiOverflow/2 - ElbowRadius(ND_DistPipe);
    (Z_FiOverflowBottom - CouplingLength(ND_DistPipe)) - SocketDepth(ND_DistPipe) - ElbowRadius(ND_DistPipe)
], 50 cm, [90; 0]*deg, ND_DistPipe, EN_PipeSpec)
Z_FiOverflowDrainPipeStart := Z_FiOverflowBottom - CouplingLength(ND_FiEntranceOverflow) + SocketDepth(ND_FiEntranceOverflow) = -0.832382 m
Z_FiOverflowDrainPipeEnd := Z_FiBwBottom - T_PlantWall - (10 cm + ConRadius(ND_FiEntranceOverflow)) + ElbowRadius(ND_FiEntranceOverflow) = -3.89592 m
FiOverflowDrainPipe := PipeSUBF([
    FiEntranceBox_origin[0] - L_FiOverflow/2;
    FiEntranceBox_origin[1] - T_PlantWall - W_FiOverflow/2;
    Z_FiOverflowDrainPipeStart
], Z_FiOverflowDrainPipeStart - Z_FiOverflowDrainPipeEnd, [0; 270]*deg, ND_FiEntranceOverflow, EN_PipeSpec, ["FiOverflow"])
FiOverflowDrainElbow := ElbowF([
    FiEntranceBox_origin[0] - L_FiOverflow/2;
    FiEntranceBox_origin[1] - T_PlantWall - W_FiOverflow/2;
    Z_FiOverflowDrainPipeEnd
], [180; 0; 90]*deg, ND_FiEntranceOverflow, EN_PipeSpec)
Z_FiBwOverflowPipeStart := Z_FiBwWeirDrainBottom - CouplingLength(ND_FiBwWeirDrain) + SocketDepth(ND_FiBwWeirDrain)
Z_FiBwOverflowPipeEnd := Z_FiBwBottom - T_PlantWall - (10 cm + ConRadius(ND_FiBwWeirDrain)) + ElbowRadius(ND_FiBwWeirDrain)
FiBwOverflowPipe := PipeSUBF([
    Fi_origin[0] + 2*T_PlantWall + L_FiBw + L_FiBwWeirDrain/2;
    Fi_origin[1] - T_PlantWall/2;
    Z_FiBwOverflowPipeStart
], Z_FiBwOverflowPipeStart - Z_FiBwOverflowPipeEnd, [0; 270]*deg, ND_FiBwWeirDrain, EN_PipeSpec, ["FiBwTanks"])
FiBwOverflowElbow := ElbowF([
    Fi_origin[0] + 2*T_PlantWall + L_FiBw + L_FiBwWeirDrain/2;
    Fi_origin[1] - T_PlantWall/2;
    Z_FiBwOverflowPipeEnd
], [180; 0; 90]*deg, ND_FiBwWeirDrain, EN_PipeSpec)
# This does not require a start/end because the elbow extends deeper than 10 cm and is under the Bw box so splashing shouldn't be a concern
FiBwDrainPipe := PipeSUBF([
    Fi_origin[0] + T_PlantWall + L_FiBw/2;
    Fi_origin[1] - T_PlantWall/2;
    Z_FiBwBottom - CouplingLength(ND_FiBwDrain) + SocketDepth(ND_FiBwDrain)
], min(-(T_PlantWall - CouplingLength(ND_FiBwDrain)) - 2*SocketDepth(ND_FiBwDrain), -2*SocketDepth(ND_FiBwDrain)), [0; 90]*deg, ND_FiBwDrain, EN_PipeSpec, ["FiBwTanks"])
FiBwDrainElbow := ElbowF([
    Fi_origin[0] + T_PlantWall + L_FiBw/2;
    Fi_origin[1] - T_PlantWall/2;
    Z_FiBwBottom + min(-T_PlantWall - SocketDepth(ND_FiBwDrain), -CouplingLength(ND_FiBwDrain) - SocketDepth(ND_FiBwDrain))
], [180; 0; 90]*deg, ND_FiBwDrain, EN_PipeSpec)
LayerFiPipingFreeze := FreezeLayer("FiAuxPiping")
FiAuxPipeScript := stack(LayerFiAuxPiping, FiOverflowConnectingPipe, FiOverflowToDistElbow, FiOverflowConnectingPipe2, FiDistPipe1, FiDistElbow, FiDistPipe2, FiOverflowDrainPipe, FiOverflowDrainElbow, FiBwOverflowPipe, FiBwOverflowElbow, FiBwDrainPipe, FiBwDrainElbow, LayerFiPipingFreeze)
FiAuxScript := stack(FiAuxTanksScript, FiAuxCouplingScript, FiAuxPipeScript)
# Filter Script
layernewfilt := layer_new("FiTank", ltgrey)
tankfilt := Tank(Fi_origin, Fi_dim, T_PlantWall)
addbox := BoxF([Fi_origin[0] + T_PlantWall; Fi_origin[1] - T_PlantWall; Fi_origin[2] - T_PlantWall], [Fi_origin[0] - Fi_dim[0] - T_PlantWall; Fi_origin[1] + Fi_dim[1] + T_PlantWall; Fi_origin[2]], [0; 0; 0]*deg)
group3 := FreezeLayer("SRSF filters")
layernewcouplings := layer_new("filtcouplings", green)
bwcoupling1 := CouplingSUBF([
    Fi_origin[0] + CouplingLength(ND_FiBwTrunk) - SocketDepth(ND_FiBwTrunk);
    FiBwInletCoupling_origin[1];
    Fi_origin[2] + outerdiameter(ND_FiBwManBranch)/2
], [0; 0]*deg, ND_FiBwTrunk, EN_PipeSpec, ["FiTank"])
coupling12 := CouplingSUBF([
    Fi_origin[0] + CouplingLength(ND_FiTrunk) - SocketDepth(ND_FiTrunk);
    FiBwInletCoupling_origin[1];
    Fi_origin[2] + outerdiameter(ND_FiBwManBranch)/2 + 20 cm
], [0; 0]*deg, ND_FiTrunk, EN_PipeSpec, ["FiTank"])
coupling13 := CouplingSUBF([
    Fi_origin[0] + CouplingLength(ND_FiTrunk) - SocketDepth(ND_FiTrunk);
    FiBwInletCoupling_origin[1];
    Fi_origin[2] + outerdiameter(ND_FiBwManBranch)/2 + 40 cm
], [0; 0]*deg, ND_FiTrunk, EN_PipeSpec, ["FiTank"])
coupling14 := CouplingSUBF([
    Fi_origin[0] + CouplingLength(ND_FiTrunk) - SocketDepth(ND_FiTrunk);
    FiBwInletCoupling_origin[1];
    Fi_origin[2] + outerdiameter(ND_FiBwManBranch)/2 + 60 cm
], [0; 0]*deg, ND_FiTrunk, EN_PipeSpec, ["FiTank"])
coupling15 := CouplingSUBF([
    Fi_origin[0] + CouplingLength(ND_FiTrunk) - SocketDepth(ND_FiTrunk);
    FiBwInletCoupling_origin[1];
    Fi_origin[2] + outerdiameter(ND_FiBwManBranch)/2 + 80 cm
], [0; 0]*deg, ND_FiTrunk, EN_PipeSpec, ["FiTank"])
coupling16 := CouplingSUBF([
    Fi_origin[0] + CouplingLength(ND_FiTrunk) - SocketDepth(ND_FiTrunk);
    FiBwInletCoupling_origin[1];
    Fi_origin[2] + outerdiameter(ND_FiBwManBranch)/2 + 100 cm
], [0; 0]*deg, ND_FiTrunk, EN_PipeSpec, ["FiTank"])
coupling17 := CouplingSUBF([
    Fi_origin[0] + CouplingLength(ND_FiTrunk) - SocketDepth(ND_FiTrunk);
    FiBwInletCoupling_origin[1];
    Fi_origin[2] + outerdiameter(ND_FiBwManBranch)/2 + 120 cm
], [0; 0]*deg, ND_FiTrunk, EN_PipeSpec, ["FiTank"])
siphonc1 := CouplingSUBF([
    Fi_origin[0] + CouplingLength(ND_FiSiphon) - SocketDepth(ND_FiSiphon);
    Fi_origin[1] + T_ConcreteMin + OuterDiameterFittingPVC(ND_FiSiphon)/2;
    Z_FiSiphonCoupling
], [0; 0]*deg, ND_FiSiphon, EN_PipeSpec, ["FiTank"])
layerfreezeco := FreezeLayer("filtcouplings")
mirror1 := Mirror3dGroup("filtercouplings", "y", [Fi_origin[0]; Fi_origin[1] - T_PlantWall; Fi_origin[2]], "n")
# Filter manifold
# Trunks
LayerTrunks := layer_new("FiTrunks", blue)
FiTrunk := ManifoldG([
    Fi_origin[0] + SocketDepth(ND_FiTrunk);
    FiBwInletCoupling_origin[1];
    Fi_origin[2] + T_FiLayer + outerdiameter(ND_FiBwManBranch)/2
], L_Fi + SocketDepth(ND_FiTrunk), B_FiManifoldBranch/2, [0; 0; 90]*deg, ND_FiTrunk, EN_PipeSpec, N_FiManBranch, 2*outerradius(ND_FiManBranch), B_FiManifoldBranch)
ArrayFiTrunks := ArrayLast(N_FiLayer, 1, T_FiLayer)
LayerBwTrunk := layer_new("BwTrunk", blue)
BwTrunk := ManifoldG([
    Fi_origin[0] + SocketDepth(ND_FiBwTrunk);
    FiBwInletCoupling_origin[1];
    Fi_origin[2] + ConRadius(ND_FiBwManBranch)
], L_Fi + SocketDepth(ND_FiBwTrunk), B_FiManifoldBranch/2, [0; 0; 90]*deg, ND_FiBwTrunk, EN_PipeSpec, N_FiManBranch, 2*outerradius(ND_FiBwManBranch), B_FiManifoldBranch)
FreezeFiTrunkLayer := FreezeLayer("FiTrunks")
FreezeBwTrunkLayer := FreezeLayer("BwTrunk")
FiTrunkScript := stack(LayerTrunks, FiTrunk, viewfront1, ArrayFiTrunks, viewtop1, FreezeFiTrunkLayer, LayerBwTrunk, BwTrunk, FreezeBwTrunkLayer)
# Filter Branches
LayerMan := layer_new("FiMan", red)
FiManBranch := PipeF(FiManTee_Origin, L_FiManBranch, [-90; 0]*deg, ND_FiManBranch, EN_FiBranchPipeSpec)
FiManTee := TeeF(FiManTee_Origin, [0; 0; 0]*deg, ND_FiManBranch, EN_FiBranchPipeSpec)
ArrayManBranches := array_all(1, N_FiManBranch - 2, -B_FiManifoldBranch)
FiManBranchRight := PipeF(FiManTee_Origin + [B_FiManifoldBranch; ElbowRadius(ND_FiManBranch) - ShortTeeLength(ND_FiManBranch); 0 m], L_FiManBranch, [-90; 0]*deg, ND_FiManBranch, EN_FiBranchPipeSpec)
FiManBranchLeft := PipeF(FiManTee_Origin + [-L_Fi + 2*B_FiManifoldBranch; ElbowRadius(ND_FiManBranch) - ShortTeeLength(ND_FiManBranch); 0 m], L_FiManBranch, [-90; 0]*deg, ND_FiManBranch, EN_FiBranchPipeSpec)
FiManBranchRightElbow := ElbowF(FiManTee_Origin + [B_FiManifoldBranch; ElbowRadius(ND_FiManBranch) - ShortTeeLength(ND_FiManBranch); 0 m], [0; 0; 180]*deg, ND_FiManBranch, EN_FiBranchPipeSpec)
FiManBranchLeftElbow := ElbowF(FiManTee_Origin + [-L_Fi + 2*B_FiManifoldBranch; ElbowRadius(ND_FiManBranch) - ShortTeeLength(ND_FiManBranch); 0 m], [180; 0; 0]*deg, ND_FiManBranch, EN_FiBranchPipeSpec)
ArrayFiMan := array_all(N_FiLayer, 1, T_FiLayer)
FiManScript := stack(LayerMan, FiManBranch, FiManTee, ArrayManBranches, FiManBranchRight, FiManBranchLeft, FiManBranchRightElbow, FiManBranchLeftElbow, viewfront1, ArrayFiMan, viewtop1)
# Backwash branches
BwManBranch := PipeF(BwManTee_Origin, L_FiBwManBranch, [-90; 0]*deg, ND_FiBwManBranch, EN_FiBranchPipeSpec)
ArrayBwManBranches := ArrayLast(1, N_FiManBranch - 2, -B_FiManifoldBranch)
BwManTee := TeeF(BwManTee_Origin, [0; 0; 0]*deg, ND_FiBwManBranch, EN_FiBranchPipeSpec)
BwManBranchRight := PipeF(BwManTee_Origin + [B_FiManifoldBranch; ElbowRadius(ND_FiBwManBranch) - ShortTeeLength(ND_FiBwManBranch); 0 m], L_FiBwManBranch, [-90; 0]*deg, ND_FiBwManBranch, EN_FiBranchPipeSpec)
BwManBranchLeft := PipeF(BwManTee_Origin + [-L_Fi + 2*B_FiManifoldBranch; ElbowRadius(ND_FiManBranch) - ShortTeeLength(ND_FiManBranch); 0 m], L_FiBwManBranch, [-90; 0]*deg, ND_FiBwManBranch, EN_FiBranchPipeSpec)
BwManBranchRightElbow := ElbowF(BwManTee_Origin + [B_FiManifoldBranch; ElbowRadius(ND_FiManBranch) - ShortTeeLength(ND_FiManBranch); 0 m], [0; 0; 180]*deg, ND_FiBwManBranch, EN_FiBranchPipeSpec)
BwManBranchLeftElbow := ElbowF(BwManTee_Origin + [-L_Fi + 2*B_FiManifoldBranch; ElbowRadius(ND_FiManBranch) - ShortTeeLength(ND_FiManBranch); 0 m], [180; 0; 0]*deg, ND_FiBwManBranch, EN_FiBranchPipeSpec)
FreezeFiManLayer := FreezeLayer("FiMan")
BwManScript := stack(BwManBranch, ArrayBwManBranches, BwManTee, ArrayBwManBranches, BwManBranchRight, BwManBranchLeft, BwManBranchRightElbow, BwManBranchLeftElbow, FreezeFiManLayer)
FiManScript := stack(FiTrunkScript, FiManScript, BwManScript)
mirror2 := Mirror3dGroup("filter manifolds", "y", [Fi_origin[0]; Fi_origin[1] - T_PlantWall; Fi_origin[2]], "n")
mirrormanbranch := Mirror3dGroup("manifold branches", "y", [Fi_origin[0]; Fi_origin[1] - T_PlantWall; Fi_origin[2]], "n")
# Siphon
layernewpipe := layer_new("siphon", blue)
spipe1 := PipeF([
    Fi_origin[0] + CouplingLength(ND_FiSiphon) - SocketDepth(ND_FiSiphon);
    Fi_origin[1] + T_ConcreteMin + OuterDiameterFittingPVC(ND_FiSiphon)/2;
    Z_FiSiphonCoupling
], 2*SocketDepth(ND_FiSiphon), [0; 180]*deg, ND_FiSiphon, EN_PipeSpec)
selbow1 := ElbowF([
    Fi_origin[0] + CouplingLength(ND_FiSiphon) + ElbowRadius(ND_FiSiphon) + SocketDepth(ND_FiSiphon);
    Fi_origin[1] + T_ConcreteMin + OuterDiameterFittingPVC(ND_FiSiphon)/2;
    Z_FiSiphonCoupling - ElbowRadius(ND_FiSiphon)
], [0; 0; 90]*deg, ND_FiSiphon, EN_PipeSpec)
spipe2 := PipeF([
    Fi_origin[0] - SocketDepth(ND_FiSiphon);
    Fi_origin[1] + T_ConcreteMin + OuterDiameterFittingPVC(ND_FiSiphon)/2;
    Z_FiSiphonCoupling
], 2*SocketDepth(ND_FiSiphon), [180; 0]*deg, ND_FiSiphon, EN_PipeSpec)
selbow2 := TeeF([
    Fi_origin[0] - SocketDepth(ND_FiSiphon);
    Fi_origin[1] + T_ConcreteMin + OuterDiameterFittingPVC(ND_FiSiphon)/2;
    Z_FiSiphonCoupling
], [90; 0; 0]*deg, ND_FiSiphon, EN_PipeSpec)
CouplingLength(ND_FiSiphon) = 0.15875 m
SocketDepth(ND_FiSiphon) = 0.057 m
spipe12 := PipeF([
    Fi_origin[0] + CouplingLength(ND_FiSiphon) + ElbowRadius(ND_FiSiphon) + SocketDepth(ND_FiSiphon);
    Fi_origin[1] + T_ConcreteMin + OuterDiameterFittingPVC(ND_FiSiphon)/2;
    Z_FiSiphonCoupling - ElbowRadius(ND_FiSiphon)
], Z_FiBwBottom - ND_FiSiphon, [0; 90]*deg, ND_FiSiphon, EN_PipeSpec)
isiphonpipe := PipeF([
    Fi_origin[0] - ShortTeeLength(ND_FiSiphon);
    Fi_origin[1] + T_ConcreteMin + OuterDiameterFittingPVC(ND_FiSiphon)/2;
    Z_FiSiphonCoupling - 100 cm
], 50 cm, [0; 90]*deg, ND_FiSiphon, EN_PipeSpec)
TeeLength(ND_FiSiphon) = 0.28575 m
isiphonpipec := PipeF([
    Fi_origin[0] + SocketDepth(ND_FiSiphon);
    Fi_origin[1] + T_ConcreteMin + OuterDiameterFittingPVC(ND_FiSiphon)/2;
    Z_FiSiphonCoupling
], 2*SocketDepth(ND_FiSiphon), [0; 180]*deg, ND_FiSiphon, EN_PipeSpec)
isiphonpipe2 := PipeF([
    Fi_origin[0] - ShortTeeLength(ND_FiSiphon);
    Fi_origin[1] + T_ConcreteMin + OuterDiameterFittingPVC(ND_FiSiphon)/2;
    Z_FiSiphonCoupling + 100 cm
], 50 cm, [0; 270]*deg, ND_FiSiphon, EN_PipeSpec)
Z_FiSiphonCoupling + TeeLength(ND_FiSiphon)/2
layerfreezepipe := FreezeLayer("siphon")
mirror3 := Mirror3dGroup("pipes", "y", [Fi_origin[0]; Fi_origin[1] - T_PlantWall; Fi_origin[2]], "n")
mirror4 := Mirror3dGroup("SRSF filters", "y", [Fi_origin[0]; Fi_origin[1] - T_PlantWall; Fi_origin[2]], "n")
FiScript :=
    if N_Fi == 1
        one ← stack(layernewfilt, tankfilt, group3, layernewcouplings, bwcoupling1, coupling12, coupling13, coupling14, coupling15, coupling16, coupling17, siphonc1, layerfreezeco, FiManScript)
        two ← stack(one, layernewpipe, bwpipe, pipe2, pipe3, pipe4, pipe5, pipe6, pipe7, spipe1, selbow1, spipe2, selbow2, spipe12, isiphonpipe, isiphonpipec, isiphonpipe2, dpipe, dpipeelbow, layerfreezepipe, bigunion, layerfreezefilt)
        return two
    if N_Fi ≥ 2
        three ← stack(layernewfilt, tankfilt, addbox, group3, layernewcouplings, bwcoupling1, coupling12, coupling13, coupling14, coupling15, coupling16, coupling17, siphonc1, layerset, layerfreezeco, mirror1, layerman, man1, man2, man3, man4, man5, man6, man7, layerset)
        four ← stack(three, layerfrman, rotateman, mirror2, layernewmbranches, man1script, man2script, man3script, man4script, man5script, man6script, man7script, frmanbranch, mirrormanbranch, layernewpipe, bwpipe, pipe2, pipe3, pipe4, pipe5, pipe6, pipe7, pipe7, spipe1, selbow1, spipe2, selbow2, spipe12, isiphonpipe, isiphonpipec, isiphonpipe2, dpipe, dpipeelbow, layerset, layerfreezepipe, mirror3, bigunion, layerfreezefilt, mirror4)
        return four  # error: This variable is undefined.
# Entrance and Exit Box Script
# Tanks
LayerFiEntExBoxes := layer_new("FiEntExBoxes", ltgrey)
FiEntBox := Tank(FiExitBox_origin, FiExitBox_dim, T_PlantWall)
FiExitBox := Tank(FiEntranceBox_origin, FiEntranceBox_dim, T_PlantWall)
FiSubtractEntExWeirs := SubtractF(["FiEntExBoxes"], "DeleteMe")
LayerFiEntExBoxesFreeze := FreezeLayer("FiEntExBoxes")
FiEntExTankScript := stack(LayerFiEntExBoxes, FiEntBox, FiExitBox, LayerFiEntExBoxesFreeze, FiEntWeir, FiOverflowWeir, FiDistWeir, GroupDelete, FiSubtractEntExWeirs)
# Couplings
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# This will be the pipe layout in the entrance and exit boxes to allow for 2 90 degree elbows in  Pipes 2 and 3 coming from the entrance box (on the right)
FiLayerEntExCoupling := layer_new("FiEntExCouplings", green)
FiExCoupling0 := CouplingSUBF(FiExitCoupling0_origin, [0; 90]*deg, ND_FiTrunk, EN_PipeSpec, ["FiEntExBoxes"])
FiExCoupling1 := CouplingSUBF(FiExitCoupling1_origin, [0; 90]*deg, ND_FiTrunk, EN_PipeSpec, ["FiEntExBoxes"])
FiExCoupling2 := CouplingSUBF(FiExitCoupling2_origin, [0; 90]*deg, ND_FiTrunk, EN_PipeSpec, ["FiEntExBoxes"])
FiExCoupling3 := CouplingSUBF(FiExitCoupling3_origin, [0; 90]*deg, ND_FiExitWaste, EN_PipeSpec, ["FiEntExBoxes"])
FiEntCoupling0 := CouplingSUBF(FiBwInletCoupling_origin, [0; 90]*deg, ND_FiBwTrunk, EN_PipeSpec, ["FiEntExBoxes"])
FiEntCoupling1 := CouplingSUBF(FiInletCoupling1_origin, [0; 90]*deg, ND_FiTrunk, EN_PipeSpec, ["FiEntExBoxes"])
FiEntCoupling2 := CouplingSUBF(FiInletCoupling2_origin, [0; 90]*deg, ND_FiTrunk, EN_PipeSpec, ["FiEntExBoxes"])
FiEntCoupling3 := CouplingSUBF(FiInletCoupling3_origin, [0; 90]*deg, ND_FiTrunk, EN_PipeSpec, ["FiEntExBoxes"])
FiLayerFreezeEntExCouplings := FreezeLayer("FiEntExCouplings")
mirror5 := Mirror3dGroup("controlcouplings", "y", [Fi_origin[0]; Fi_origin[1] - T_PlantWall; Fi_origin[2]], "n")  # Needs to be checked for N.Fi=2
FiEntExCouplingScript := stack(FiLayerEntExCoupling, FiExCoupling0, FiExCoupling1, FiExCoupling2, FiExCoupling3, FiEntCoupling0, FiEntCoupling1, FiEntCoupling2, FiEntCoupling3, FiLayerFreezeEntExCouplings)
# Pipes
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FiLayerFilterPlumbing := layer_new("FiPlumbing", blue)
# This is all of the piping between filter box, entrance and exit
# In means the pipe goes IN TO THE FILTER
# Out means it comes OUT OF THE FILTER
Z_FiInPipe0aStart := FiEntranceBox_origin[2] - CouplingLength(ND_FiBwTrunk) + SocketDepth(ND_FiBwTrunk)
Z_FiInPipe0aEnd := Fi_origin[2] + outerradius(ND_FiBwManBranch)/2 + ElbowRadius(ND_FiBwTrunk)
FiInPipe0a := PipeSUBF(FiBwInletCoupling_origin, FiBwInletCoupling_origin[2] - Z_FiInPipe0aEnd, [0; 270]*deg, ND_FiBwTrunk, EN_PipeSpec, ["FiEntExBoxes"])
FiInElbow0a := ElbowF([FiBwInletCoupling_origin[0]; FiBwInletCoupling_origin[1]; Z_FiInPipe0aEnd], [0; 0; -90]*deg, ND_FiBwTrunk, EN_PipeSpec)
X_FiBwTrunkPipeEnd := Fi_origin[0] + CouplingLength(ND_FiBwTrunk) - SocketDepth(ND_FiBwTrunk)
FiInPipe0b := PipeSUBF([
    FiBwInletCoupling_origin[0] - ElbowRadius(ND_FiBwTrunk);
    FiBwInletCoupling_origin[1];
    Z_FiInPipe0aEnd - ElbowRadius(ND_FiBwTrunk)
], FiBwInletCoupling_origin[0] - ElbowRadius(ND_FiBwTrunk) - X_FiBwTrunkPipeEnd, [0; 0]*deg, ND_FiBwTrunk, EN_PipeSpec, ["FiTank"])
FiIn0Script := stack(FiInPipe0a, FiInElbow0a, FiInPipe0b)
Z_FiInPipe1aEnd := Fi_origin[2] + outerradius(ND_FiBwManBranch)/2 + ElbowRadius(ND_FiTrunk) + 2*T_FiLayer
FiInPipe1a := PipeSUBF(FiInletCoupling1_origin, FiInletCoupling1_origin[2] - Z_FiInPipe1aEnd, [0; 270]*deg, ND_FiTrunk, EN_PipeSpec, ["FiEntExBoxes"])
FiInElbow1a := ElbowF([FiInletCoupling1_origin[0]; FiInletCoupling1_origin[1]; Z_FiInPipe1aEnd], [0; 0; -90]*deg, ND_FiTrunk, EN_PipeSpec)
X_FiTrunkPipeEnd := Fi_origin[0] + CouplingLength(ND_FiTrunk) - SocketDepth(ND_FiTrunk)
FiInPipe1b := PipeSUBF([
    FiInletCoupling1_origin[0] - ElbowRadius(ND_FiTrunk);
    FiBwInletCoupling_origin[1];
    Z_FiInPipe1aEnd - ElbowRadius(ND_FiTrunk)
], FiInletCoupling1_origin[0] - ElbowRadius(ND_FiTrunk) - X_FiTrunkPipeEnd, [0; 0]*deg, ND_FiTrunk, EN_PipeSpec, ["FiTank"])
FiIn1Script := stack(FiInPipe1a, FiInElbow1a, FiInPipe1b)
Z_FiInPipe2aEnd := Z_FiInPipe1aEnd + 2*T_FiLayer
FiInPipe2a := PipeSUBF(FiInletCoupling2_origin, FiInletCoupling2_origin[2] - Z_FiInPipe2aEnd, [0; 270]*deg, ND_FiTrunk, EN_PipeSpec, ["FiEntExBoxes"])
FiInElbow2a := ElbowF([FiInletCoupling2_origin[0]; FiInletCoupling2_origin[1]; Z_FiInPipe2aEnd], [0; 0; -90]*deg, ND_FiTrunk, EN_PipeSpec)
X_FiInPipe2bEnd := FiExitCoupling1_origin[0] - ConRadius(ND_FiTrunk) - T_ConcreteMin  # Gives 5 cm of clearance plus the elbow radius
FiInPipe2b := PipeF([
    FiInletCoupling2_origin[0] - ElbowRadius(ND_FiTrunk);
    FiInletCoupling2_origin[1];
    Z_FiInPipe2aEnd - ElbowRadius(ND_FiTrunk)
], FiInletCoupling2_origin[0] - ElbowRadius(ND_FiTrunk) - X_FiInPipe2bEnd, [0; 0]*deg, ND_FiTrunk, EN_PipeSpec)
FiInElbow2b := ElbowF([X_FiInPipe2bEnd; FiInletCoupling2_origin[1]; Z_FiInPipe2aEnd - ElbowRadius(ND_FiTrunk)], [-90; 180; 0]*deg, ND_FiTrunk, EN_PipeSpec)
Y_FiInPipe2cEnd := Fi_origin[1] + W_Fi - ConRadius(ND_FiBwTrunk) - ElbowRadius(ND_FiTrunk)  # This is BwTrunk because the Fi Trunks line up with that one
FiInPipe2c := PipeF([
    X_FiInPipe2bEnd - ElbowRadius(ND_FiTrunk);
    FiInletCoupling2_origin[1] + ElbowRadius(ND_FiTrunk);
    Z_FiInPipe2aEnd - ElbowRadius(ND_FiTrunk)
], Y_FiInPipe2cEnd - (FiInletCoupling2_origin[1] + ElbowRadius(ND_FiTrunk)), [-90; 0]*deg, ND_FiTrunk, EN_PipeSpec)
FiInElbow2c := ElbowF([
    X_FiInPipe2bEnd - ElbowRadius(ND_FiTrunk);
    Y_FiInPipe2cEnd;
    Z_FiInPipe2aEnd - ElbowRadius(ND_FiTrunk)
], [0; 0; 0]*deg, ND_FiTrunk, EN_PipeSpec)
FiInPipe2d := PipeSUBF([
    X_FiInPipe2bEnd - 2*ElbowRadius(ND_FiTrunk);
    Y_FiInPipe2cEnd + ElbowRadius(ND_FiTrunk);
    Z_FiInPipe2aEnd - ElbowRadius(ND_FiTrunk)
], X_FiInPipe2bEnd - 2*ElbowRadius(ND_FiTrunk) - X_FiTrunkPipeEnd, [0; 0]*deg, ND_FiTrunk, EN_PipeSpec, ["FiTank"])
FiIn2Script := stack(FiInPipe2a, FiInElbow2a, FiInPipe2b, FiInElbow2b, FiInPipe2c, FiInElbow2c, FiInPipe2d)
Z_FiInPipe3aEnd := Z_FiInPipe2aEnd + 2*T_FiLayer
FiInPipe3a := PipeSUBF(FiInletCoupling3_origin, FiInletCoupling3_origin[2] - Z_FiInPipe3aEnd, [0; 270]*deg, ND_FiTrunk, EN_PipeSpec, ["FiEntExBoxes"])
FiInElbow3a := ElbowF([FiInletCoupling3_origin[0]; FiInletCoupling3_origin[1]; Z_FiInPipe3aEnd], [0; 0; -90]*deg, ND_FiTrunk, EN_PipeSpec)
X_FiInPipe3bEnd := X_FiInPipe2bEnd
FiInPipe3b := PipeF([
    FiInletCoupling3_origin[0] - ElbowRadius(ND_FiTrunk);
    FiInletCoupling3_origin[1];
    Z_FiInPipe3aEnd - ElbowRadius(ND_FiTrunk)
], FiInletCoupling3_origin[0] - ElbowRadius(ND_FiTrunk) - X_FiInPipe3bEnd, [0; 0]*deg, ND_FiTrunk, EN_PipeSpec)
FiInElbow3b := ElbowF([X_FiInPipe3bEnd; FiInletCoupling3_origin[1]; Z_FiInPipe3aEnd - ElbowRadius(ND_FiTrunk)], [-90; 180; 0]*deg, ND_FiTrunk, EN_PipeSpec)
Y_FiInPipe3cEnd := Y_FiInPipe2cEnd
FiInPipe3c := PipeF([
    X_FiInPipe3bEnd - ElbowRadius(ND_FiTrunk);
    FiInletCoupling3_origin[1] + ElbowRadius(ND_FiTrunk);
    Z_FiInPipe3aEnd - ElbowRadius(ND_FiTrunk)
], Y_FiInPipe3cEnd - (FiInletCoupling3_origin[1] + ElbowRadius(ND_FiTrunk)), [-90; 0]*deg, ND_FiTrunk, EN_PipeSpec)
FiInElbow3c := ElbowF([
    X_FiInPipe3bEnd - ElbowRadius(ND_FiTrunk);
    Y_FiInPipe3cEnd;
    Z_FiInPipe3aEnd - ElbowRadius(ND_FiTrunk)
], [0; 0; 0]*deg, ND_FiTrunk, EN_PipeSpec)
FiInPipe3d := PipeSUBF([
    X_FiInPipe3bEnd - 2*ElbowRadius(ND_FiTrunk);
    Y_FiInPipe3cEnd + ElbowRadius(ND_FiTrunk);
    Z_FiInPipe3aEnd - ElbowRadius(ND_FiTrunk)
], X_FiInPipe3bEnd - 2*ElbowRadius(ND_FiTrunk) - X_FiTrunkPipeEnd, [0; 0]*deg, ND_FiTrunk, EN_PipeSpec, ["FiTank"])
FiIn3Script := stack(FiInPipe3a, FiInElbow3a, FiInPipe3b, FiInElbow3b, FiInPipe3c, FiInElbow3c, FiInPipe3d)
Z_FiOutPipe0aEnd := Z_FiInPipe1aEnd + T_FiLayer
FiOutPipe0a := PipeSUBF(FiExitCoupling0_origin, FiExitCoupling0_origin[2] - Z_FiOutPipe0aEnd, [0; -90]*deg, ND_FiTrunk, EN_PipeSpec, ["FiEntExBoxes"])
FiOutElbow0a := ElbowF([FiExitCoupling0_origin[0]; FiExitCoupling0_origin[1]; Z_FiOutPipe0aEnd], [0; 0; -90]*deg, ND_FiTrunk, EN_PipeSpec)
FiOutPipe0b := PipeSUBF([
    FiExitCoupling0_origin[0] - ElbowRadius(ND_FiTrunk);
    FiExitCoupling0_origin[1];
    Z_FiOutPipe0aEnd - ElbowRadius(ND_FiTrunk)
], FiExitCoupling0_origin[0] - ElbowRadius(ND_FiTrunk) - X_FiTrunkPipeEnd, [0; 0]*deg, ND_FiTrunk, EN_PipeSpec, ["FiTank"])
FiOut0Script := stack(FiOutPipe0a, FiOutElbow0a, FiOutPipe0b)
Z_FiOutPipe1aEnd := Z_FiOutPipe0aEnd + 2*T_FiLayer
FiOutPipe1a := PipeSUBF(FiExitCoupling1_origin, FiExitCoupling1_origin[2] - Z_FiOutPipe1aEnd, [0; -90]*deg, ND_FiTrunk, EN_PipeSpec, ["FiEntExBoxes"])
FiOutElbow1a := ElbowF([FiExitCoupling1_origin[0]; FiExitCoupling1_origin[1]; Z_FiOutPipe1aEnd], [0; 0; -90]*deg, ND_FiTrunk, EN_PipeSpec)
FiOutPipe1b := PipeSUBF([
    FiExitCoupling1_origin[0] - ElbowRadius(ND_FiTrunk);
    FiExitCoupling1_origin[1];
    Z_FiOutPipe1aEnd - ElbowRadius(ND_FiTrunk)
], FiExitCoupling1_origin[0] - ElbowRadius(ND_FiTrunk) - X_FiTrunkPipeEnd, [0; 0]*deg, ND_FiTrunk, EN_PipeSpec, ["FiTank"])
FiOut1Script := stack(FiOutPipe1a, FiOutElbow1a, FiOutPipe1b)
Z_FiOutPipe2aEnd := Z_FiOutPipe0aEnd - 2*T_FiLayer
FiOutPipe2a := PipeSUBF(FiExitCoupling2_origin, FiExitCoupling2_origin[2] - Z_FiOutPipe2aEnd, [0; -90]*deg, ND_FiTrunk, EN_PipeSpec, ["FiEntExBoxes"])
FiOutElbow2a := ElbowF([FiExitCoupling2_origin[0]; FiExitCoupling2_origin[1]; Z_FiOutPipe2aEnd], [-90; 90; 0]*deg, ND_FiTrunk, EN_PipeSpec)
Y_FiOutPipe2cEnd := Y_FiInPipe2cEnd
FiOutPipe2b := PipeF([
    FiExitCoupling2_origin[0];
    FiExitCoupling2_origin[1] + ElbowRadius(ND_FiTrunk);
    Z_FiOutPipe2aEnd - ElbowRadius(ND_FiTrunk)
], Y_FiOutPipe2cEnd - (FiExitCoupling2_origin[1] + ElbowRadius(ND_FiTrunk)), [-90; 0]*deg, ND_FiTrunk, EN_PipeSpec)
FiOutElbow2b := ElbowF([FiExitCoupling2_origin[0]; Y_FiOutPipe2cEnd; Z_FiOutPipe2aEnd - ElbowRadius(ND_FiTrunk)], [0; 0; 0]*deg, ND_FiTrunk, EN_PipeSpec)
FiOutPipe2c := PipeSUBF([
    FiExitCoupling2_origin[0] - ElbowRadius(ND_FiTrunk);
    Y_FiOutPipe2cEnd + ElbowRadius(ND_FiTrunk);
    Z_FiOutPipe2aEnd - ElbowRadius(ND_FiTrunk)
], FiExitCoupling2_origin[0] - ElbowRadius(ND_FiTrunk) - X_FiTrunkPipeEnd, [0; 0]*deg, ND_FiTrunk, EN_PipeSpec, ["FiTank"])
FiOut2Script := stack(FiOutPipe2a, FiOutElbow2a, FiOutPipe2b, FiOutElbow2b, FiOutPipe2c)
Z_FiOutPipe3aEnd := FiExitCoupling3_origin[2] - max((T_PlantWall - CouplingLength(ND_FiBwDrain)) + 2*SocketDepth(ND_FiBwDrain), 2*SocketDepth(ND_FiBwDrain))
FiOutPipe3a := PipeSUBF(FiExitCoupling3_origin, FiExitCoupling3_origin[2] - Z_FiOutPipe3aEnd, [0; -90]*deg, ND_FiExitWaste, EN_PipeSpec, ["FiEntExBoxes"])
FiOut3RotAng := atan((FiBwDrainCoupling_origin[1] - FiExitCoupling3_origin[1])/(FiBwDrainCoupling_origin[0] - FiExitCoupling3_origin[0])) = 39.9307 deg
X_FiOutPipe3bStart := FiExitCoupling3_origin[0] - ElbowRadius(ND_FiExitWaste)*cos(FiOut3RotAng) = -1.88062 m
Y_FiOutPipe3bStart := FiExitCoupling3_origin[1] - ElbowRadius(ND_FiExitWaste)*sin(FiOut3RotAng) = -0.926321 m
X_FiOutPipe3bEnd := FiBwDrainCoupling_origin[0] + ElbowRadius(ND_FiExitWaste)*cos(FiOut3RotAng) = -2.12405 m
Y_FiOutPipe3bEnd := FiBwDrainCoupling_origin[1] + ElbowRadius(ND_FiExitWaste)*sin(FiOut3RotAng) = -1.13008 m
FiOutElbow3a := ElbowF([FiExitCoupling3_origin[0]; FiExitCoupling3_origin[1]; Z_FiOutPipe3aEnd], [180; 180 + FiOut3RotAng/deg; 90]*deg, ND_FiExitWaste, EN_PipeSpec)
L_FiOutPipe3b := sqrt((X_FiOutPipe3bEnd - X_FiOutPipe3bStart)^2 + (Y_FiOutPipe3bEnd - Y_FiOutPipe3bStart)^2) = 0.317453 m
FiOutPipe3b := PipeF([X_FiOutPipe3bStart; Y_FiOutPipe3bStart; Z_FiOutPipe3aEnd - ElbowRadius(ND_FiExitWaste)], L_FiOutPipe3b, [FiOut3RotAng/deg; 0]*deg, ND_FiExitWaste, EN_PipeSpec)
FiOutElbow3b := ElbowF([X_FiOutPipe3bEnd; Y_FiOutPipe3bEnd; Z_FiOutPipe3aEnd - ElbowRadius(ND_FiExitWaste)], [90; FiOut3RotAng/deg; 90]*deg, ND_FiExitWaste, EN_PipeSpec)
Z_FiOutPipe3cEnd := Z_FiBwWeirDrainBottom + H_FiBwWeirDrain - 10 cm
FiOutPipe3c := PipeF([
    X_FiOutPipe3bEnd - ElbowRadius(ND_FiExitWaste)*cos(FiOut3RotAng);
    Y_FiOutPipe3bEnd - ElbowRadius(ND_FiExitWaste)*sin(FiOut3RotAng);
    Z_FiOutPipe3aEnd - 2*ElbowRadius(ND_FiExitWaste)
], Z_FiOutPipe3aEnd - 2*ElbowRadius(ND_FiExitWaste) - Z_FiOutPipe3cEnd, [0; -90]*deg, ND_FiExitWaste, EN_PipeSpec)
FiOut3Script := stack(FiOutPipe3a, FiOutElbow3a, FiOutPipe3b, FiOutElbow3b, FiOutPipe3c)
FiLayerFreezeFiPlumbing := FreezeLayer("FiPlumbing")
FiEntExitPipingScript := stack(FiLayerFilterPlumbing, FiIn0Script, FiIn1Script, FiIn2Script, FiIn3Script, FiOut0Script, FiOut1Script, FiOut2Script, FiOut3Script, FiLayerFreezeFiPlumbing)
mirror6 := Mirror3dGroup("controlpipes", "y", [Fi_origin[0]; Fi_origin[1] - T_PlantWall; Fi_origin[2]], "n")
mirror7 := Mirror3dGroup("SRSF controlboxes", "y", [Fi_origin[0]; Fi_origin[1] - T_PlantWall; Fi_origin[2]], "n")
FiEntExitScript := stack(FiEntExTankScript, FiEntExCouplingScript, FiEntExitPipingScript)
# [component: inputs FiEntExitScript]
AC_Filtertest := stack(FiInletChannelScript, FiAuxScript, FiEntExitScript, FiScript)  # error: This variable is undefined.
# [component: inputs AC_Filtertest]
AC_Filtertest =  # error: This variable is undefined.
