# [reference: SRSF jcw57.xmcd]
FilterInletTank_origin := [
    Plant_Origin[0];
    Plant_Origin[1] - T_PlantWall - W_ExitChannel;
    Plant_Origin[2] + H_Sed - H_ExitChannel
] = [0; -0.523167; 1.38183] m
FiEntranceBox_dim := [L_FiEntrance; W_FiEntrance; H_FiEntrance]
FiEntranceBox_origin := [
    Plant_Origin[0] - W_ExitChannel - T_PlantWall;
    Plant_Origin[1] - W_FiEntrance - T_PlantWall;
    Z_FiEntranceBottom
]
FiExitBox_dim := [L_FiExit; W_FiExit; H_FiExit]
FiExitBox_origin := [
    Plant_Origin[0] - W_ExitChannel - 2*T_PlantWall - L_FiEntrance;
    Plant_Origin[1] - W_FiExit - T_PlantWall;
    Z_FiExitBottom
]
Fi_origin := [
    Plant_Origin[0] - W_ExitChannel - 4*T_PlantWall - L_FiEntrance - L_FiExit - W_MpWalkway;
    Plant_Origin[1] - W_Fi - 1.5*T_PlantWall - OuterDiameterFittingPVC(ND_FiBwTrunk) - 1.5*T_ConcreteMin;
    Z_FiBottom
]
Fi_dim := [L_Fi; W_Fi + OuterDiameterFittingPVC(ND_FiBwTrunk) + 1.5*T_ConcreteMin + .5*T_PlantWall; H_Fi] = [1.1; 1.37827; 3.67456] m
FiEnclosureTank_origin := [Plant_Origin[0] - W_ExitChannel - 2*T_PlantWall; Plant_Origin[1] - 2*W_Fi; 0]
FiBwInletCoupling_origin := [
    Plant_Origin[0] - W_ExitChannel - T_PlantWall - 0.5*ND_FiBwTrunk - T_ConcreteMin;
    Plant_Origin[1] - T_PlantWall - 0.5*ND_FiBwTrunk - T_ConcreteMin;
    Z_FiEntranceBottom - CouplingLength(ND_FiBwTrunk) + SocketDepth(ND_FiBwTrunk)
] = [-0.674767; -0.3016; 0.690067] m
FiInletCoupling1_origin := [
    Plant_Origin[0] - W_ExitChannel - T_PlantWall - L_FiEntrance + (0.5*ND_FiTrunk) + T_ConcreteMin;
    Plant_Origin[1] - T_PlantWall - 0.5*ND_FiTrunk - T_ConcreteMin;
    Z_FiEntranceBottom - CouplingLength(ND_FiTrunk) + SocketDepth(ND_FiTrunk)
]
FiInletCoupling2_origin := [
    Plant_Origin[0] - W_ExitChannel - T_PlantWall - 0.5*ND_FiBwTrunk - T_ConcreteMin;
    Plant_Origin[1] - T_PlantWall - 2.5*ND_FiBwTrunk - T_ConcreteMin;
    Z_FiEntranceBottom - CouplingLength(ND_FiTrunk) + SocketDepth(ND_FiTrunk)
]
FiInletCoupling3_origin := [
    Plant_Origin[0] - W_ExitChannel - T_PlantWall - L_FiEntrance + (0.5*ND_FiTrunk) + T_ConcreteMin;
    Plant_Origin[1] - T_PlantWall - 2.5*ND_FiBwTrunk - T_ConcreteMin;
    Z_FiEntranceBottom - CouplingLength(ND_FiTrunk) + SocketDepth(ND_FiTrunk)
]
FiExitCoupling0_origin := [
    Plant_Origin[0] - W_ExitChannel - 2*T_PlantWall - 0.5*ND_FiTrunk - T_ConcreteMin - L_FiEntrance;
    Plant_Origin[1] - T_PlantWall - 0.5*ND_FiTrunk - T_ConcreteMin;
    Z_FiExitBottom - CouplingLength(ND_FiTrunk) + SocketDepth(ND_FiTrunk)
]
FiExitCoupling1_origin := [
    Plant_Origin[0] - W_ExitChannel - 2*T_PlantWall - 2*L_FiEntrance + (0.5*ND_FiTrunk) + T_ConcreteMin;
    Plant_Origin[1] - T_PlantWall - 0.5*ND_FiTrunk - T_ConcreteMin;
    Z_FiExitBottom - CouplingLength(ND_FiTrunk) + SocketDepth(ND_FiTrunk)
]
FiExitCoupling2_origin := [
    Plant_Origin[0] - W_ExitChannel - 2*T_PlantWall - 0.5*ND_FiBwTrunk - T_ConcreteMin - L_FiEntrance;
    Plant_Origin[1] - T_PlantWall - W_FiExit + T_ConcreteMin + 0.5*ND_FiTrunk;
    Z_FiExitBottom - CouplingLength(ND_FiTrunk) + SocketDepth(ND_FiTrunk)
]
FiExitCoupling3_origin := [
    Plant_Origin[0] - W_ExitChannel - 2*T_PlantWall - 2*L_FiEntrance + (0.5*ND_FiTrunk) + T_ConcreteMin;
    Plant_Origin[1] - T_PlantWall - W_FiExit + T_ConcreteMin + 0.5*ND_FiTrunk;
    Z_FiExitBottom - CouplingLength(ND_FiTrunk) + SocketDepth(ND_FiTrunk)
]
FiEntranceWeir_origin := [Plant_Origin[0] - W_ExitChannel; Plant_Origin[1] - W_FiEntrance - T_PlantWall; Z_FiEntranceWeir]
layer
