# Automated Design: AutoCAD: Sedimentation Tank
# Dimension Values
channelbox_dim :=
    dim ← [W_InletChannel; (N_SedTanks*W_Sed) + ((N_SedTanks + 1)*T_PlantWall); H_InletChannel] if sedlayout == 2
    dim ← [W_InletChannel; N_SedTanks*(W_Sed + T_PlantWall); H_InletChannel] if sedlayout == 3
    return dim
echannelbox_dim := [W_ExitChannel; N_SedTanks*(W_Sed + T_PlantWall); H_ExitChannel]
channelinletbox1_dim := [T_PlantWall; W_InletChannel + T_PlantWall; H_InletChannel]
channelinletbox2_dim := [W_InletChannel; W_Sed; H_Sed]
sedbottombox_dim := [-L_Sed; W_Sed; T_PlantWall]
channelclosebox_dim := [W_InletChannel + T_ChannelWall + T_PlantWall; T_PlantWall; H_InletChannel + T_ChannelWall]
channelinletwall_dim := [T_ChannelWall; W_Sed; H_Sed]
# The minimum function ensures that the control box is at least as wide as the SedChannel that it is connected to. If need be it can be even wider if the plumbing connections require it to be wider.
echanneltank_dim := [W_ExitChannel; 4*ConRadius(ND_PltWeir) + 3*S_Fitting; H_ExitChannel]
echanneltankbox_dim := [
    -W_ExitChannel;
    4*ConRadius(ND_PltWeir) + 3*S_Fitting;
    ConRadius(ND_PltWeir) + ElbowRadius(ND_PltWeir) + SocketDepth(ND_PltWeir)
]  # I replaced
S_Fitting + ElbowRadius(ND_PltWeir) + ConRadius(ND_PltWeir) + SocketDepth(ND_PltWeir)
ichanneltank_dim := [W_InletChannel; (2*ConRadius(ND_PltWeir)) + (2*S_Fitting); H_InletChannel]
with
W_InletChannel
# W_ExitChannel | or
# in the four functions at the left.
ichanneltankbox_dim := [
    -W_InletChannel;
    (2*ConRadius(ND_PltWeir)) + (2*S_Fitting);
    ConRadius(ND_PltWeir) + ElbowRadius(ND_PltWeir) + SocketDepth(ND_PltWeir)
]
framewall_dim := [-L_Sed; T_ConcreteMin; -H_SedFrameWall]
textbox_dim := [L_Sed/2; W_SedBay]
SedWeirExit_Dim :=
    [W_SedWeirExit; T_SedWeir; H_SedWeirExit] if EN_InletChannelGeom == Perpindicular_Weir
    [T_SedWeir; W_SedWeirExit; H_SedWeirExit] otherwise
sedweirexit_dim := [W_SedWeirExit; H_SedWeirExit; T_SedWeir]
sedweirinlet_dim := [W_SedWeirInlet; H_SedWeirInlet; T_SedWeir]
seddrainslope_dim := [sqrt(3)*H_SedSlope; D_SedDrainValve; -H_SedSlope]
# Origins Points
SedWeirInlet_Dim :=
    [W_SedWeirInlet; T_SedWeir; H_SedWeirInlet] if EN_InletChannelGeom == Perpindicular_Weir
    [T_SedWeir; W_SedWeirInlet; H_SedWeirInlet] otherwise
channel_origin := [
    Plant_Origin[0] - L_Sed + W_InletChannel;
    Plant_Origin[1] - T_PlantWall;
    Plant_Origin[2] + H_Sed - H_InletChannel
]
sedtankconnectingpipe_origin :=
    if sedlayout == 2
        origin ← [
            Plant_Origin[0] - SocketDepth(ND_PltWeir) - 2*ElbowRadius(ND_PltWeir);
            Plant_Origin[1] - T_PlantWall - S_Fitting - ConRadius(ND_PltWeir);
            Plant_Origin[2]
        ]
    return ← origin
echannel_origin :=
    origin ← [0; 0; 0]*m
    origin ← [Plant_Origin[0]; Plant_Origin[1] - T_PlantWall; Plant_Origin[2] + H_Sed - H_ExitChannel] if sedlayout == 2
    if sedlayout == 3
        origin ← [
            Plant_Origin[0] - L_Sed + W_InletChannel + T_ChannelWall + W_ExitChannel;
            Plant_Origin[1] - T_PlantWall;
            Plant_Origin[2] + H_Sed - H_ExitChannel
        ]
    if sedlayout == 4
        origin ← [
            Plant_Origin[0] - L_Sed + W_InletChannel + T_ChannelWall + W_ExitChannel;
            Plant_Origin[1] - T_PlantWall;
            Plant_Origin[2] + H_Sed - H_ExitChannel
        ]
    return origin
channelinletwall_origin := [Plant_Origin[0] - L_Sed + W_InletChannel; Plant_Origin[1]; Plant_Origin[2]]
isubtractbox_origin := [Plant_Origin[0] - L_Sed + W_InletChannel; Plant_Origin[1]; Plant_Origin[2] + H_Sed]
echanneltank_origin :=
    if sedlayout == 2
        origin ← [
            Plant_Origin[0];
            Plant_Origin[1] - T_PlantWall - (4*ConRadius(ND_PltWeir)) - (3*S_Fitting);
            Plant_Origin[2] + H_Sed - H_ExitChannel
        ]
    if sedlayout == 3
        origin ← [
            Plant_Origin[0] - L_Sed + W_InletChannel + T_ChannelWall + S_Fitting + ElbowRadius(ND_PltWeir) + ConRadius(ND_PltWeir) + SocketDepth(ND_PltWeir);
            Plant_Origin[1] - T_PlantWall - (4*ConRadius(ND_PltWeir)) - (3*S_Fitting);
            Plant_Origin[2] + H_Sed - H_ExitChannel
        ]
    origin
ichanneltank_origin :=
    if sedlayout == 2
        origin ← [
            Plant_Origin[0] - L_Sed - T_PlantWall + ichanneltank_dim[0] + T_PlantWall;
            Plant_Origin[1] - T_PlantWall - (2*ConRadius(ND_PltWeir)) - (2*S_Fitting);
            Plant_Origin[2] + H_Sed - H_InletChannel
        ]
    if sedlayout == 3
        origin ← [
            (Plant_Origin[0] - L_Sed + W_InletChannel) + T_ChannelWall;
            Plant_Origin[1] - T_PlantWall - (2*ConRadius(ND_PltWeir)) - (2*S_Fitting);
            Plant_Origin[2] + H_Sed - H_InletChannel
        ]
    origin
channelbox_origin := [Plant_Origin[0] - L_Sed; Plant_Origin[1] - T_PlantWall; Plant_Origin[2] + H_Sed - H_InletChannel]
echannelbox_origin :=
    origin ← [0; 0; 0]*m
    if sedlayout == 2
        origin ← [
            Plant_Origin[0] - W_ExitChannel;
            Plant_Origin[1] - T_PlantWall;
            Plant_Origin[2] + H_Sed - H_ExitChannel
        ]
    if sedlayout == 3
        origin ← [
            Plant_Origin[0] - L_Sed + W_InletChannel + T_ChannelWall;
            Plant_Origin[1] - T_PlantWall;
            Plant_Origin[2] + H_Sed - H_ExitChannel
        ]
    if sedlayout == 4
        origin ← [
            Plant_Origin[0] - L_Sed + W_InletChannel + T_ChannelWall;
            Plant_Origin[1] - T_PlantWall;
            Plant_Origin[2] + H_Sed - H_ExitChannel
        ]
    return origin
channelinletbox1_origin := [
    Plant_Origin[0] - L_Sed - T_PlantWall;
    Plant_Origin[1] + (.5*W_Sed) - (.5*W_InletChannel + T_PlantWall);
    Plant_Origin[2] + H_Sed - H_InletChannel
]
channelinletbox2_origin := [Plant_Origin[0] - L_Sed; Plant_Origin[1]; Plant_Origin[2]]
channelclosebox_origin := [
    Plant_Origin[0] - L_Sed - T_PlantWall - W_InletChannel - T_ChannelWall;
    Plant_Origin[1] - T_PlantWall;
    Plant_Origin[2] + H_Sed - H_InletChannel - T_ChannelWall
]
sedtankinletweirelbow_origin := [
    Plant_Origin[0] - L_Sed + (S_Fitting + ConRadius(ND_PltWeir));
    Plant_Origin[1] - T_PlantWall - S_Fitting - ConRadius(ND_PltWeir);
    Plant_Origin[2] - ShortTeeLength(ND_PltWeir)
]
sedtankexitweirelbow_origin :=
    if sedlayout == 2
        origin ← [
            Plant_Origin[0] - SocketDepth(ND_PltWeir) - 2*ElbowRadius(ND_PltWeir);
            Plant_Origin[1] - T_PlantWall - S_Fitting - ConRadius(ND_PltWeir);
            Plant_Origin[2] + ElbowRadius(ND_PltWeir)
        ]
    if sedlayout == 3
        origin ← [
            Plant_Origin[0] - L_Sed + W_InletChannel + T_ChannelWall + echanneltank_dim[0] - SocketDepth(ND_PltWeir);
            Plant_Origin[1] - T_PlantWall - S_Fitting - ConRadius(ND_PltWeir);
            Plant_Origin[2] + ElbowRadius(ND_PltWeir)
        ]
    return ← origin
sedtankexitweirelbow2_origin :=
    if sedlayout == 2
        origin ← [
            Plant_Origin[0] - SocketDepth(ND_PltWeir);
            Plant_Origin[1] - T_PlantWall - 2*S_Fitting - 3*ConRadius(ND_PltWeir);
            Plant_Origin[2] + ElbowRadius(ND_PltWeir)
        ]
    if sedlayout == 3
        origin ← [
            Plant_Origin[0] - L_Sed + W_InletChannel + T_ChannelWall + echanneltank_dim[0] - SocketDepth(ND_PltWeir);
            Plant_Origin[1] - T_PlantWall - S_Fitting - ConRadius(ND_PltWeir);
            Plant_Origin[2] + ElbowRadius(ND_PltWeir)
        ]
    return ← origin
exitweirpipecopy1_point :=
    if sedlayout == 2
        point ← [
            Plant_Origin[0] - SocketDepth(ND_PltWeir) - ElbowRadius(ND_PltWeir) - innerR(ND_PltWeir, PS_Default);
            Plant_Origin[1] - T_PlantWall - S_Fitting - ConRadius(ND_PltWeir);
            Plant_Origin[2] + ElbowRadius(ND_PltWeir)
        ]
    if sedlayout == 3
        point ← [
            Plant_Origin[0] - L_Sed + W_InletChannel + T_ChannelWall + echanneltank_dim[0] - SocketDepth(ND_PltWeir) - ElbowRadius(ND_PltWeir) - innerR(ND_PltWeir, PS_Default);
            Plant_Origin[1] - T_PlantWall - S_Fitting - ConRadius(ND_PltWeir);
            Plant_Origin[2] + ElbowRadius(ND_PltWeir)
        ]
    return point
exitweirpipecopy2_point :=
    if sedlayout == 2
        point ← [
            Plant_Origin[0] - SocketDepth(ND_PltWeir) - ElbowRadius(ND_PltWeir) - innerR(ND_PltWeir, PS_Default);
            Plant_Origin[1] - T_PlantWall - 2*S_Fitting - 3*ConRadius(ND_PltWeir);
            Plant_Origin[2] + ElbowRadius(ND_PltWeir)
        ]
    if sedlayout == 3
        point ← [
            Plant_Origin[0] - L_Sed + W_InletChannel + T_ChannelWall + echanneltank_dim[0] - SocketDepth(ND_PltWeir) - ElbowRadius(ND_PltWeir) - innerR(ND_PltWeir, PS_Default);
            Plant_Origin[1] - T_PlantWall - 2*S_Fitting - 3*ConRadius(ND_PltWeir);
            Plant_Origin[2] + ElbowRadius(ND_PltWeir)
        ]
    return point
ElbowRadius(ND_PltWeir) =  # error: This variable is undefined.
sedtankinletpipe1_origin := [
    Plant_Origin[0] - L_Sed + (.5*W_InletChannel);
    Plant_Origin[1] + (W_Sed/(2*N_SedInletPipes*N_SedBays));
    Plant_Origin[2] + H_Sed - H_InletChannel
]
inletweirpipe_origin := [
    Plant_Origin[0] - L_Sed + S_Fitting + ConRadius(ND_PltWeir);
    Plant_Origin[1] - T_PlantWall - S_Fitting - ConRadius(ND_PltWeir);
    Plant_Origin[2] + ShortTeeLength(ND_PltWeir)
]
sedtankinletweirelbow_origin =  # error
exitweirpipe_origin :=
    if sedlayout == 2
        origin ← [
            Plant_Origin[0] - ElbowRadius(ND_PltWeir) - SocketDepth(ND_PltWeir);
            Plant_Origin[1] - T_PlantWall - S_Fitting - ConRadius(ND_PltWeir);
            Plant_Origin[2] + ElbowRadius(ND_PltWeir)
        ]
    if sedlayout == 3
        origin ← [
            Plant_Origin[0] - L_Sed + W_InletChannel + T_ChannelWall + S_Fitting + ConRadius(ND_PltWeir);
            Plant_Origin[1] - T_PlantWall - S_Fitting - ConRadius(ND_PltWeir);
            Plant_Origin[2] + ElbowRadius(ND_PltWeir)
        ]
    return ← origin
Sedbottomslopes_origin := [0; 0; 0]
ExitWeirPipe_Origin := [
    -W_ExitChannel/2;
    -T_PlantWall - S_Fitting - ConRadius(ND_PltWeir);
    Plant_Origin[2] + ElbowRadius(ND_PltWeir)
] + Plant_Origin
Sedbottomslopes_dim := [
    Sedbottomslopes_origin[0] + W_SedBay;
    Sedbottomslopes_origin[1] + H_SedSludge + T_SedSludge;
    Sedbottomslopes_origin[2] + L_Sed
]
Sedbottomslopes_dim[0]/2 - W_SedSludge/2 =  # error
SedDrain_origin := [
    Sedbottomslopes_origin[0] + Sedbottomslopes_dim[0]/2 - W_SedSludge/2;
    Sedbottomslopes_origin[1];
    Sedbottomslopes_origin[2]
]
SedDrain_dim := [SedDrain_origin[0] + W_SedSludge; SedDrain_origin[1] + H_SedSludge; SedDrain_origin[2] + L_Sed]
W_SedInletBottom =  # error
SedDrainCover_origin := [
    Sedbottomslopes_origin[0] + Sedbottomslopes_dim[0]/2 - W_SedDrainCover/2;
    Sedbottomslopes_origin[1] + H_SedSludge;
    Sedbottomslopes_origin[2]
]
SedDrainCover_dim := [
    SedDrainCover_origin[0] + W_SedDrainCover;
    SedDrainCover_origin[1] + T_SedSludge;
    SedDrainCover_origin[2] + L_Sed
]
Sedbottomslopeslope_origin := [
    Sedbottomslopes_origin[0] + W_SedInletBottom;
    Sedbottomslopes_origin[1] + Sedbottomslopes_dim[1];
    Sedbottomslopes_origin[2]
]
SedTankDivider_Origin := [Plant_Origin[0]; Plant_Origin[1] + W_Sed; Plant_Origin[2]]
SedTankDivider_Dim := [
    SedTankDivider_Origin[0] - L_Sed;
    SedTankDivider_Origin[1] + T_PlantWall;
    SedTankDivider_Origin[2] + H_SedBayDivider
]
T_ManifoldCap := ConRadius(ND_SedManifold) - outerradius(ND_SedManifold)
DrainCover_origin := [Plant_Origin[0]; Plant_Origin[1] + W_SedInletBottom; Plant_Origin[2] + H_SedSludge]
iccoupling_origin := [
    -L_Sed + W_SedInletchannelPreweir/2;
    W_Sed - (W_SedBay/2);
    H_Sed - H_InletChannel - CouplingLength(ND_SedManifold) + SocketDepth(ND_SedManifold)
]
manifoldpipe_origin := [Plant_Origin[0] - T_ManifoldCap; Plant_Origin[1] + W_Sed - W_SedBay/2; Z_SedManifoldPipe]
manifoldelbow_origin := [-L_Sed + W_SedInletchannelPreweir/2; W_Sed - W_SedBay/2; Z_SedManifoldPipe]
Lamina_Origin := [
    Plant_Origin[0] - L_Sed + W_InletChannel + T_ChannelWall + L_SedPlate*cos(AN_SedPlate);
    Plant_Origin[1];
    Plant_Origin[2] + H_SedBayDivider + outerdiameter(ND_SedPlateFrame)
]
# These are the assumed dimensions for the frame that supports the lamella, they should probably be defined somewhere else.
SedPipeFrame_Origin := [
    Plant_Origin[0] - W_ExitChannel - T_ChannelWall - L_SedPlate*cos(60 deg) - outerradius(ND_SedFrameStub) + B_SedPlateHorizontal - T_SedPlate/sin(60 deg);
    Plant_Origin[1];
    Plant_Origin[2] + H_SedBayDivider + outerdiameter(ND_SedPlateFrame)/2
]
PVCCouplingNew_origin := [
    Plant_Origin[0] - W_ExitChannel - SocketDepth(ND_SedLaunder);
    Plant_Origin[1] + W_Sed/(N_SedLaunders*N_SedBays*2);
    Plant_Origin[2] + HW_Sed - H_SedAbove + outerradius(ND_SedLaunder)
]
FlexCouplingNew_origin := [
    {
        PVCCouplingNew_origin[0] - SocketDepth(ND_SedLaunder) if CouplingLength(ND_SedLaunder) ≥ T_ChannelWall
        Plant_Origin[0] - T_ChannelWall - W_ExitChannel otherwise
    };
    Plant_Origin[1] + W_Sed/(N_SedLaunders*N_SedBays*2);
    Plant_Origin[2] + HW_Sed - H_SedAbove + outerradius(ND_SedLaunder)
]
SedLaunderNippleNew_origin := [
    PVCCouplingNew_origin[0] - CouplingLength(ND_SedLaunder) + 2*SocketDepth(ND_SedLaunder);
    Plant_Origin[1] + W_Sed/(N_SedLaunders*N_SedBays*2);
    Plant_Origin[2] + HW_Sed - H_SedAbove + outerradius(ND_SedLaunder)
]
SedLaunderNew_origin := [
    FlexCouplingNew_origin[0] - SocketDepthFlex(ND_SedLaunder);
    Plant_Origin[1] + W_Sed/(N_SedLaunders*N_SedBays*2);
    Plant_Origin[2] + HW_Sed - H_SedAbove + outerradius(ND_SedLaunder)
]
LaunderCapNew_origin := [
    SedLaunderNew_origin[0] - L_SedLaunder;
    Plant_Origin[1] + W_Sed/(N_SedLaunders*N_SedBays*2);
    Plant_Origin[2] + HW_Sed - H_SedAbove + outerradius(ND_SedLaunder)
]
LengthSedLaunderNipple :=
    (SocketDepth(ND_SedLaunder) + SocketDepthFlex(ND_SedLaunder)) if CouplingLength(ND_SedLaunder) ≥ T_PlantWall
    (SocketDepth(ND_SedLaunder) + SocketDepthFlex(ND_SedLaunder) + (T_PlantWall - CouplingLength(ND_SedLaunder))) otherwise
SedLaunder_origin := [
    Plant_Origin[0] - W_ExitChannel - T_ChannelWall - L_SedLaunder + SocketDepth(ND_SedLaunder);
    Plant_Origin[1] + W_Sed/(N_SedLaunders*N_SedBays*2);
    Plant_Origin[2] + HW_Sed - H_SedAbove + outerradius(ND_SedLaunder)
]
LaunderLedge_Origin := [
    Plant_Origin[0] - L_Sed + T_ChannelWall + W_InletChannel;
    Plant_Origin[1];
    SedLaunderNew_origin[2] - CapDiameter(ND_SedLaunder)/2
]
SedLaunderOrifice_origin := [SedLaunder_origin[0]; SedLaunder_origin[1]; SedLaunder_origin[2] + L_Sed - B_SedLaunderOrifices]
textbox_origin := [-2*L_Sed; W_SedBay]
SedWeirExit_Origin :=
    [-W_ExitChannel; -T_PlantWall; H_Sed - H_ExitChannel] if Geom_ExitChannel == Perpindicular_Weir
    [-T_SedWeir - W_SedExitchannelPostweir; -T_PlantWall; H_Sed - H_ExitChannel]
sedweirexit_origin := [
    {
        -W_ExitChannel if Geom_ExitChannel == Perpindicular_Weir
        -T_PlantWall otherwise
    };
    H_Sed - H_ExitChannel;
    {
        T_PlantWall - T_SedWeir if Geom_ExitChannel == Perpindicular_Weir
        -W_SedExitchannelPostweir - T_SedWeir otherwise
    }
]
sedweirexit_origin =  # error
sedweirinlet_origin := [
    {
        -L_Sed if EN_InletChannelGeom == Perpindicular_Weir
        -T_PlantWall otherwise
    };
    H_Sed - H_InletChannel;
    {
        T_PlantWall - T_SedWeir if EN_InletChannelGeom == Perpindicular_Weir
        -L_Sed + W_SedInletchannelPreweir otherwise
    }
]
SedWeirInlet_Origin :=
    [-L_Sed; -T_PlantWall; H_Sed - H_InletChannel]
    [-L_Sed + W_SedInletchannelPreweir; -T_PlantWall; H_Sed - H_InletChannel]
FlocHopper_origin := [0; 0; 0]
FlocHopperBox_dim := [L_FlocHopper; T_FlocHopper; H_FlocHopper]
FlocHopperWedge_dim := [(L_FlocHopper - W_FlocHopper)/2; T_FlocHopper; FlocHopper_origin[2]]
LaunderLedge_Dim := [T_ConcreteMin; W_SedBay*N_SedBays; -T_ConcreteMin]
isubractbox_dim := [W_InletChannel; T_PlantWall; H_InletChannel]
inletweirpipe_length := H_Sed - H_InletChannel + HW_InletChannel - ElbowRadius(ND_PltWeir) - ConRadius(ND_PltWeir)
exitweirpipe_length := H_Sed - H_ExitChannel + H_PltWeir - ElbowRadius(ND_PltWeir) - ConRadius(ND_PltWeir)
connectingpipe_length := -((Plant_Origin[0] - L_Sed + S_Fitting + ConRadius(ND_PltWeir) + ShortTeeLength(ND_PltWeir)) - (Plant_Origin[0] - SocketDepth(ND_PltWeir) - 2*ElbowRadius(ND_PltWeir)))
seddrainslope_dim := [sqrt(3)*H_SedSlope; D_SedDrainValve; -H_SedSlope]
ManifoldLedge_Origin := [Plant_Origin[0]; Plant_Origin[1]; Z_SedManifoldPipe - CapDiameter(ND_SedManifold)/2]
ManifoldLedge_Dim := [-T_ConcreteMin; W_SedBay*N_SedBays; -T_ConcreteMin]
InfluentManifoldCap_Origin := [Plant_Origin[0] - T_ManifoldCap; manifoldpipe_origin[0]; Z_SedManifoldPipe]
# Sedtank Scripts
# Draw the main concrete components of the tank
SedTankLayer := layer_new("SedTankCon", grey)
MakeSedTank := Tank(Plant_Origin, [L_Sed; W_Sed; H_Sed], T_PlantWall)
SedLaunderLedge := BoxF(LaunderLedge_Origin, LaunderLedge_Origin + LaunderLedge_Dim, [0; 0; 0]*deg)
SedManifoldLedge := BoxF(ManifoldLedge_Origin, ManifoldLedge_Origin + ManifoldLedge_Dim, [0; 0; 0]*deg)
SedInletChannelFloor := BoxF([-L_Sed; 0 m; H_Sed - H_InletChannel] + Plant_Origin, [W_InletChannel - L_Sed; W_SedBay*N_SedBays; H_Sed - H_InletChannel - T_ChannelWall] + Plant_Origin, [0; 0; 0]*deg)
SedInletChannelWall := BoxF([W_InletChannel - L_Sed; 0 m; H_Sed - H_InletChannel - T_ChannelWall] + Plant_Origin, [W_InletChannel + T_ChannelWall - L_Sed; W_SedBay*N_SedBays; H_Sed] + Plant_Origin, [0; 0; 0]*deg)
SedExitChannelFloor := BoxF([0 m; 0 m; H_Sed - H_ExitChannel] + Plant_Origin, [-W_ExitChannel; W_SedBay*N_SedBays; H_Sed - H_ExitChannel - T_ChannelWall] + Plant_Origin, [0; 0; 0]*deg)
SedExitChannelWall := BoxF([-W_ExitChannel; 0 m; H_Sed - H_ExitChannel - T_ChannelWall] + Plant_Origin, [-T_ChannelWall - W_ExitChannel; W_SedBay*N_SedBays; H_Sed] + Plant_Origin, [0; 0; 0]*deg)
FreezeSedTank := FreezeLayer("SedTankCon")
SedDrainWedge :=
    WedgeF([Plant_Origin[0] - L_Sed; 0.5*W_SedBay - D_SedDrainValve/2; Plant_Origin[2]], seddrainslope_dim + [Plant_Origin[0] - L_Sed; 0.5*W_SedBay - D_SedDrainValve/2; Plant_Origin[2]], [0; 0; 0]*deg) if EN_PlantDrains == 0
    WedgeF([Plant_Origin[0]; 0.5*W_SedBay - D_SedDrainValve/2; Plant_Origin[2]], [-seddrainslope_dim[0]; seddrainslope_dim[1]; seddrainslope_dim[2]] + [Plant_Origin[0]; 0.5*W_SedBay - D_SedDrainValve/2; Plant_Origin[2]], [0; 0; 0]*deg) otherwise
ArrayWedgeBay := array_all(N_SedBays, 1, W_SedBay)
GroupSedPieces := GroupAll("DeleteMe")
# when this subtraction takes place, all pieces become part of the "tank" layer
SubtractSedPieces := SubtractF(["SedTankCon"], "DeleteMe")
Sedtanktankscript :=
    stack(viewtop1, SedTankLayer, MakeSedTank, SedLaunderLedge, SedManifoldLedge, SedInletChannelFloor, SedInletChannelWall, SedExitChannelFloor, SedExitChannelWall, Union_All, FreezeSedTank, SedDrainWedge, ArrayWedgeBay, GroupSedPieces, SubtractSedPieces) if N_SedBays > 1
    stack(viewtop1, SedTankLayer, MakeSedTank, SedLaunderLedge, SedManifoldLedge, SedInletChannelFloor, SedInletChannelWall, SedExitChannelFloor, SedExitChannelWall, Union_All, FreezeSedTank, SedDrainWedge, GroupSedPieces, SubtractSedPieces) otherwise
SedWeirExitLayer := layer_new("SedWeirexitCon", ltgrey)
DrawSedExitWeir1 := BoxF(SedWeirExit_Origin, SedWeirExit_Origin + SedWeirExit_Dim, [0; 0; 0]*deg)
DrawSedExitWeir2 := BoxF([-W_ExitChannel; -T_PlantWall; H_Sed - H_ExitChannel] + Plant_Origin, [-W_SedExitchannelPostweir; -T_PlantWall + T_SedWeir; H_Sed] + Plant_Origin, [0; 0; 0]*deg)
FreezeSedWeirExit := FreezeLayer("SedWeirexitCon")
Sedtankexitweirscript :=
    stack(SedWeirExitLayer, DrawSedExitWeir1, DrawSedExitWeir2, FreezeSedWeirExit) if Geom_ExitChannel ≠ Perpindicular_Weir
    stack(SedWeirExitLayer, DrawSedExitWeir1, FreezeSedWeirExit) otherwise
SedWeirInletLayer := layer_new("SedWeirinletCon", ltgrey)
DrawSedWeirInlet1 := BoxF(SedWeirInlet_Origin, SedWeirInlet_Origin + SedWeirInlet_Dim, [0; 0; 0]*deg)
DrawSedWeirInlet2 := BoxF([-L_Sed; -T_PlantWall; H_Sed - H_InletChannel] + Plant_Origin, [W_SedInletchannelPreweir - L_Sed; -T_PlantWall + T_SedWeir; H_Sed] + Plant_Origin, [0; 0; 0]*deg)
FreezeSedWeir := FreezeLayer("SedWeirinletCon")
Sedtankinletweirscript :=
    stack(SedWeirInletLayer, DrawSedWeirInlet1, FreezeSedWeir) if EN_InletChannelGeom == Perpindicular_Weir
    stack(SedWeirInletLayer, DrawSedWeirInlet1, DrawSedWeirInlet2, FreezeSedWeir) otherwise
SedCouplingLayer := layer_new("SedManCouplingPlumbing", ltgrey)
DrawSedCoupling := CouplingSUBF(iccoupling_origin, [0; 90]*deg, ND_SedManifold, PS_Default, ["SedTankCon"])
FreezeSedCoupling := FreezeLayer("SedManCouplingPlumbing")
Sedtankinletchannelscript := stack(SedCouplingLayer, DrawSedCoupling, FreezeSedCoupling)
SedDrainCouplings :=
    Local ← layer_new("SedDrainCouplingPlumbing", green)
    for i ∈ 0 .. N_SedBays - 1
        Local ←
            stack(Local, CouplingSUBF([-L_Sed - SocketDepth(ND_SedDrainAdapter); W_SedBay*i + 0.5*W_SedBay; Plant_Origin[2]], [0; 0]*deg, ND_SedDrainAdapter, PS_Default, ["SedTankCon"])) if EN_PlantDrains == 0
            otherwise
                stack(Local, CouplingSUBF([
                    Plant_Origin[0] + CouplingLength(ND_SedDrainAdapter) - SocketDepth(ND_SedDrainAdapter);
                    W_SedBay*i + 0.5*W_SedBay;
                    Plant_Origin[2]
                ], [0; 0]*deg, ND_SedDrainAdapter, PS_Default, ["SedTankCon"]))
    return Local
FreezeSedDrainCouplings := FreezeLayer("SedDrainCouplingPlumbing")
SedDrainPipes :=
    Local ← layer_new("SedDrainPipePlumbing", blue)
    for i ∈ 0 .. N_SedBays - 1
        Local ←
            if EN_PlantDrains == 0
                stack(Local, PipeSUBF([
                    -L_Sed - CouplingLength(ND_SedDrainAdapter) + SocketDepth(ND_SedDrainAdapter);
                    W_SedBay*i + 0.5*W_SedBay;
                    Plant_Origin[2]
                ], T_PlantWall + SocketDepth(ND_SedDrainAdapter), [0; 0]*deg, ND_SedDrainAdapter, PS_Default, ["SedTankCon"]))
            otherwise
                stack(Local, PipeSUBF([
                    Plant_Origin[0] + CouplingLength(ND_SedDrainAdapter) - SocketDepth(ND_SedDrainAdapter) + T_PlantWall + SocketDepth(ND_SedDrainAdapter);
                    W_SedBay*i + 0.5*W_SedBay;
                    Plant_Origin[2]
                ], T_PlantWall + SocketDepth(ND_SedDrainAdapter), [0; 0]*deg, ND_SedDrainAdapter, PS_Default, ["SedTank"]))
    return Local
FreezeSedDrainPipes := FreezeLayer("SedDrainPipePlumbing")
SedDrainAdapterLayer := layer_new("SedDrainAdapterPlumbing", green)
DrawSedDrainAdapter :=
    MaleAdapterF([-L_Sed - T_PlantWall - CouplingLength(ND_SedDrainAdapter); 0.5*W_SedBay; Plant_Origin[2]], [0; 0]*deg, ND_SedDrainAdapter, PS_Default) if EN_PlantDrains == 0
    otherwise
        MaleAdapterF([
            Plant_Origin[0] + CouplingLength(ND_SedDrainAdapter) - SocketDepth(ND_SedDrainAdapter) + T_PlantWall + SocketDepth(ND_SedDrainAdapter);
            0.5*W_SedBay;
            Plant_Origin[2]
        ], [180; 0]*deg, ND_SedDrainAdapter, PS_Default)
FreezeSedDrainAdapter := FreezeLayer("SedDrainAdapterPlumbing")
SedDrainValveLayer := layer_new("SedDrainValvesPlumbing", blue)
InsertSedDrainValves := insertdwg("VAL-Scaled-Gate-Valve-Threaded", [
    CouplingLength(ND_SedDrainAdapter) + T_PlantWall + MaleAdapterLength(ND_SedDrainAdapter) - ValveSocket(ND_SedDrainAdapter) + ValveLength(ND_SedDrainAdapter) - SocketDepth(ND_SedDrainAdapter);
    0.5*W_SedBay;
    0 m
], D_SedScale, D_SedScale, 0)
FreezeSedDrainValve := FreezeLayer("SedDrainValvesPlumbing")
SedDrainNippleLayer := layer_new("SedDrainNipplePlumbing", blue)
DrawSedDrainNipple := PipeF([
    CouplingLength(ND_SedDrainAdapter) + T_PlantWall + MaleAdapterLength(ND_SedDrainAdapter) - ValveSocket(ND_SedDrainAdapter) + ValveLength(ND_SedDrainAdapter);
    0.5*W_SedBay;
    0 m
], SocketDepth(ND_SedDrainAdapter) + ValveSocket(ND_SedDrainAdapter), [0; 0]*deg, ND_SedDrainAdapter, PS_Default)
FreezeSedDrainNipple := FreezeLayer("SedDrainNipplePlumbing")
SedDrainElbowLayer := layer_new("SedDrainElbowPlumbing", green)
DrawSedDrainElbow := ElbowF([
    CouplingLength(ND_SedDrainAdapter) + T_PlantWall + MaleAdapterLength(ND_SedDrainAdapter) - ValveSocket(ND_SedDrainAdapter) + ValveLength(ND_SedDrainAdapter);
    0.5*W_SedBay;
    0 m
], [-90; 0; 225]*deg, ND_SedDrainAdapter, PS_Default)
FreezeSedDrainElbow := FreezeLayer("SedDrainElbowPlumbing")
SedDrainScript := stack(SedDrainCouplings, FreezeSedDrainCouplings, SedDrainPipes, FreezeSedDrainPipes, SedDrainAdapterLayer, DrawSedDrainAdapter, FreezeSedDrainAdapter, SedDrainValveLayer, InsertSedDrainValves, FreezeSedDrainValve, SedDrainNippleLayer, DrawSedDrainNipple, FreezeSedDrainNipple, SedDrainElbowLayer, DrawSedDrainElbow, FreezeSedDrainElbow)
SedBottomSlopeLayer := layer_new("SedBottomslopesCon", ltgrey)
CreateSedPolyline := Pline([
    [Sedbottomslopeslope_origin[0]; Sedbottomslopeslope_origin[1]];
    [Sedbottomslopeslope_origin[0]; Sedbottomslopeslope_origin[1] - T_SedSludge];
    [Sedbottomslopeslope_origin[0] + T_ConcreteMin; Sedbottomslopeslope_origin[1] - T_SedSludge];
    [
        Sedbottomslopeslope_origin[0] + T_ConcreteMin;
        Sedbottomslopeslope_origin[1] - T_SedSludge - H_SedSludge
    ];
    [
        Sedbottomslopeslope_origin[0] - W_SedInletBottom;
        Sedbottomslopeslope_origin[1] - T_SedSludge - H_SedSludge
    ];
    [Sedbottomslopeslope_origin[0] - W_SedInletBottom; Z_SedSlopes];
    [Sedbottomslopeslope_origin[0] - W_SedInletBottom + T_ConcreteMin/2; Z_SedSlopes];
    [Sedbottomslopeslope_origin[0]; Sedbottomslopeslope_origin[1]]
])
ExtrudeSedPolyline := extrude([Sedbottomslopeslope_origin[0]; Sedbottomslopeslope_origin[1]], -L_Sed)
MirrorSedSlope := mirror3dyz(Sedbottomslopeslope_origin, [
    Sedbottomslopeslope_origin[0] + W_SedDrainCover/2;
    Sedbottomslopeslope_origin[1];
    Sedbottomslopeslope_origin[2]
])
ArraySedSlope := array_all(N_SedBays, 1, W_SedBay)
RightLedge := box([0 m; W_SedBay*N_SedBays - T_ConcreteMin/2; Z_SedSlopes], [-L_Sed; W_SedBay*N_SedBays; Z_SedSlopes + H_SedBetween])
LeftLedge := box([0 m; 0 m; Z_SedSlopes], [-L_Sed; T_ConcreteMin/2; Z_SedSlopes + H_SedBetween])
FreezeBottomSlopes := FreezeLayer("SedBottomslopesCon")
Sedbottomslopescript :=
    one ← stack(SedBottomSlopeLayer, viewrightside1, CreateSedPolyline, viewrightside1, ExtrudeSedPolyline, MirrorSedSlope, viewtop1, Union_All, FreezeBottomSlopes) if N_SedBays == 1 and H_SedBetween == 0
    one ← stack(SedBottomSlopeLayer, viewrightside1, CreateSedPolyline, viewrightside1, ExtrudeSedPolyline, MirrorSedSlope, viewtop1, RightLedge, LeftLedge, Union_All, FreezeBottomSlopes) if N_SedBays == 1 and H_SedBetween > 0
    one ← stack(SedBottomSlopeLayer, viewrightside1, CreateSedPolyline, viewrightside1, ExtrudeSedPolyline, MirrorSedSlope, viewtop1, ArraySedSlope, Union_All, FreezeBottomSlopes) if N_SedBays > 1 and H_SedBetween == 0
    one ← stack(SedBottomSlopeLayer, viewrightside1, CreateSedPolyline, viewrightside1, ExtrudeSedPolyline, MirrorSedSlope, viewtop1, ArraySedSlope, RightLedge, LeftLedge, Union_All, FreezeBottomSlopes) otherwise
    return one
InletChannelCouplingLayer := layer_new("SedIccouplingPlumbing", green)
DrawICCoupling := CouplingSUBF(iccoupling_origin, [0; 90]*deg, ND_SedManifold, PS_Default, ["SedTankCon"])
# pipe9_origin | pipe10_origin | pipe12_origin | pipe13_origin | pipe1_length
FreezeICCoupling := FreezeLayer("SedIccouplingPlumbing")
InfluentManifoldLayer := layer_new("SedManPipePlumbing", blue)
InfluentManPipeLayer := layer_new("SedManPipePlumbing", blue)
DrawInfluentManifold := ManifoldF(manifoldpipe_origin, L_SedManifoldPipe - ElbowRadius(ND_SedManifold) - T_ManifoldCap, -SocketDepth(ND_SedManifold) + CapHeight(ND_SedManifold) + zc + B_SedManifoldPort/2, [0; 0; 180]*deg, ND_SedManifold, PS_Default, N_SedManifoldPorts, D_SedManifoldPort, B_SedManifoldPort)
DrawSedManDiffuser := PipeF(manifoldpipe_origin - [
    CapHeight(ND_SedManifold) + D_SedManifoldPort/2 - T_ManifoldCap + B_SedManifoldPort/2;
    0 m;
    (ND_SedManifold/2)
], L_Diffuser, [0; -90]*deg, D_Diffuser, PS_Default)
ArraySedManDiffuser := ArrayLast(1, N_SedManifoldPorts, -B_SedManifoldPort)
FreezeSedManDiffuser := FreezeLayer("SedManPipePlumbing")
SedManCapLayer := layer_new("SedManCapPlumbing", yellow)
DrawSedManCap := CapF(manifoldpipe_origin, [0; 0]*deg, ND_SedManifold)
FreezeSedManCap := FreezeLayer("SedManCapPlumbing")
SedManElbowLayer := layer_new("SedManElbowPlumbing", green)
DrawSedManElbow := ElbowF([
    manifoldelbow_origin[0] + ElbowRadius(ND_SedManifold);
    manifoldelbow_origin[1];
    manifoldelbow_origin[2]
], [90; 0; -90]*deg, ND_SedManifold, PS_Default)
FreezeSedManElbow := FreezeLayer("SedManElbowPlumbing")
SedChimneyStopLayer := layer_new("SedChimneyStops", grey)
MakeSedChimneyStop := chimneystop([iccoupling_origin[0]; iccoupling_origin[1]; H_Sed - H_InletChannel - H_SedSludge], ND_SedManifold, HW_InletChannel, 1 in, PS_Default)
FreezeChimneyStop := FreezeLayer("SedChimneyStops")
ThawSedManPieces := ThawMultiple(["SedIccouplingPlumbing"; "SedManifold*"; "SedChimneyStops"])
ArraySedManPieces := array_all(N_SedBays, 1, -W_SedBay)
FreezeSedManPieces := FreezeMultiple(["SedIccouplingPlumbing"; "SedManifold*"; "SedChimneyStops"])
influentmanifoldscript :=
    stack(InletChannelCouplingLayer, DrawICCoupling, FreezeICCoupling, InfluentManifoldLayer, DrawInfluentManifold, DrawSedManDiffuser, ArraySedManDiffuser, FreezeSedManDiffuser, SedManCapLayer, DrawSedManCap, FreezeSedManCap, SedManElbowLayer, DrawSedManElbow, FreezeSedManElbow, SedChimneyStopLayer, MakeSedChimneyStop, FreezeChimneyStop) if N_SedBays == 1 and N_SedTanks == 1
    stack(InletChannelCouplingLayer, DrawICCoupling, FreezeICCoupling, InfluentManifoldLayer, DrawInfluentManifold, DrawSedManDiffuser, ArraySedManDiffuser, FreezeSedManDiffuser, SedManCapLayer, DrawSedManCap, FreezeSedManCap, SedManElbowLayer, DrawSedManElbow, FreezeSedManElbow, SedChimneyStopLayer, MakeSedChimneyStop, FreezeChimneyStop, ThawSedManPieces, ArraySedManPieces, FreezeSedManPieces) otherwise
SedInletPipeLayer := layer_new("SedInletManPipe", blue)
DrawSedInletPipe := PipeSUBF([
    iccoupling_origin[0];
    iccoupling_origin[1];
    manifoldelbow_origin[2] + ElbowRadius(ND_SedManifold) + SocketDepth(ND_SedManifold) + SocketDepthFlex(ND_SedManifold)
], iccoupling_origin[2] - (manifoldelbow_origin[2] + ElbowRadius(ND_SedManifold) + SocketDepth(ND_SedManifold) + SocketDepthFlex(ND_SedManifold)), [0; 90]*deg, ND_SedManifold, PS_Default, ["SedTank"])
DrawSedInletPipeNipple := PipeF([iccoupling_origin[0]; iccoupling_origin[1]; manifoldelbow_origin[2] + ElbowRadius(ND_SedManifold)], 2*SocketDepthFlex(ND_SedManifold), [0; 90]*deg, ND_SedManifold, PS_Default)
FreezeSedInletPipes := FreezeLayer("SedInletManPipe")
SedFlexManCouplingLayer := layer_new("SedManifoldFlexCoupling", [0; 0; 0])
DrawSedManFlexCoupling := FlexCouplingF([
    iccoupling_origin[0];
    iccoupling_origin[1];
    manifoldelbow_origin[2] + ElbowRadius(ND_SedManifold) + SocketDepth(ND_SedManifold)
], [0; 90]*deg, ND_SedManifold)
ArraySedManPieces := array_all(N_SedBays, 1, -W_SedBay)
FreezeSedManFlexCoupling := FreezeLayer("SedManifoldFlexCoupling")
FreezeSedManPieces := FreezeMultiple(["SedInletManPipe"; "SedManifoldFlexCoupling"])
inletpipescript :=
    one ← stack(SedInletPipeLayer, viewtop1, DrawSedInletPipe, DrawSedInletPipeNipple, FreezeSedInletPipes, SedFlexManCouplingLayer, DrawSedManFlexCoupling, FreezeSedManFlexCoupling) if N_SedBays == 1
    one ← stack(SedInletPipeLayer, viewtop1, DrawSedInletPipe, DrawSedInletPipeNipple, FreezeSedInletPipes, SedFlexManCouplingLayer, DrawSedManFlexCoupling, layer_thaw("SedInletManPipe"), ArraySedManPieces, FreezeSedManPieces) otherwise
SedDrainCoverLayer := layer_new("SedDrainCover", red)
SedDrainCoverBox := BoxF(DrainCover_origin, DrainCover_origin + [-L_Sed; W_SedDrainCover; T_SedSludge], [0; 0; 0]*deg)
FreezeDrainCover := FreezeLayer("SedDrainCover")
DrainCoverCylinder := CylinderF([
    DrainCover_origin[0] - L_Sed + B_SedSludgeOrifices/2;
    DrainCover_origin[1] + W_SedDrainCover/2;
    DrainCover_origin[2] - zc
], D_SedSludgeOrifice/2, T_SedSludge + 2*zc, [0; 90]*deg)
ArrayDrainCoverCylinder := array_all(1, N_SedSludgeOrifices, B_SedSludgeOrifices)
GroupDrainCoverCylinder := GroupAll("DeleteMe")
SubtractDrainCoverCylinder := SubtractF(["SedDrainCover"], "DeleteMe")
ThawDrainCover := layer_thaw("SedDrainCover")
ArrayDrainCoverBay := array_all(N_SedBays, 1, W_SedBay)
Draincoverscript :=
    stack(SedDrainCoverLayer, SedDrainCoverBox, FreezeDrainCover, DrainCoverCylinder, ArrayDrainCoverCylinder, GroupDrainCoverCylinder, SubtractDrainCoverCylinder, ThawDrainCover, ArrayDrainCoverBay, FreezeDrainCover) if N_SedBays > 1
    stack(SedDrainCoverLayer, SedDrainCoverBox, FreezeDrainCover, DrainCoverCylinder, ArrayDrainCoverCylinder, GroupDrainCoverCylinder, SubtractDrainCoverCylinder)
SedLaminaLayer := layer_new("SedLamina", purple)
DrawSedLamina := laminascript2(Lamina_Origin, W_SedBay, L_SedPlate, T_SedPlate, AN_SedPlate, N_SedModulePlates, N_SedModules, ND_SedModulePipe, ND_SedModulePipeSpace, S_SedPlateModule, S_SedModulePipes, L_SedModulePipe, N_SedPlateCol, B_SedPlateHorizontal)
MirrorSedLamina := Mirror3dAll("yz", [
    Plant_Origin[0] - W_ExitChannel - T_ChannelWall - ((L_Sed - 2*T_ChannelWall - W_InletChannel - W_ExitChannel)/2);
    0 m;
    0 m
], "y")
ArraySedLamina := array_all(N_SedBays, 1, W_SedBay)  # not arraying the lamina for now
FreezeSedLam := FreezeLayer("SedLamina")
SedTankLaminaScript := stack(SedLaminaLayer, DrawSedLamina, MirrorSedLamina, viewtop1, FreezeSedLam)
SedPipeFrameLayer := layer_new("SedPipeFrame", yellow)
PFPipeLong1 := PipeF([SedPipeFrame_Origin[0]; Plant_Origin[1] + B_SedPlateFrameVertical; SedPipeFrame_Origin[2]], SedPipeFrame_Origin[0] - Plant_Origin[0] + L_Sed, [0; 0]*deg, ND_SedPlateFrame, PS_Default)
PFPipeLong2 := PipeF([
    SedPipeFrame_Origin[0];
    Plant_Origin[1] + W_SedBay - B_SedPlateFrameVertical;
    SedPipeFrame_Origin[2]
], SedPipeFrame_Origin[0] - Plant_Origin[0] + L_Sed, [0; 0]*deg, ND_SedPlateFrame, PS_Default)
ArrayPFLong := array_all(N_SedBays, 1, W_SedBay)
PFPipePerpendicular := PipeF(SedPipeFrame_Origin, W_SedBay*N_SedBays, [270; 0]*deg, ND_SedPlateFrame, PS_Default)
ArrayPFPerp := ArrayLast(1, 3, -L_SedActive/2)
FreezePFLayer := FreezeLayer("SedPipeFrame")
PFStubLayer := layer_new("SedPipeFrameStub", yellow)
DrawPFStub := PipeF([
    SedPipeFrame_Origin[0];
    Plant_Origin[1] + B_SedPlateFrameVertical;
    SedPipeFrame_Origin[2] + outerradius(ND_SedPlateFrame)
], H_SedFrameStub, [0; 90]*deg, ND_SedFrameStub, 1)
ArrayPFStubRow := array_all(1, N_SedModules + 1, -B_SedFrameStub)
ArrayPFStubColumn := array_all(2, 1, W_SedBay - 2*B_SedPlateFrameVertical)
FreezePFStub := FreezeLayer("SedPipeFrameStub")
PFSLayer := layer_new("SedPipeFrameSupport", yellow)
DrawPFSFlange := CylinderF([
    SedPipeFrame_Origin[0];
    SedPipeFrame_Origin[1] + W_SedBay;
    SedPipeFrame_Origin[2] - outerdiameter(ND_SedPlateFrame)/2
], D_Flange/2, T_Flange, [0; 270]*deg)
DrawPFSPipe := CylinderF([
    SedPipeFrame_Origin[0];
    SedPipeFrame_Origin[1] + W_SedBay;
    SedPipeFrame_Origin[2] - outerdiameter(ND_SedPlateFrame)/2 - T_Flange
], outerradius(ND_SedPlateFrame), SedPipeFrame_Origin[2] - outerradius(ND_SedPlateFrame) - T_Flange - Z_SedSlopes, [0; 270]*deg)
ArrayPFS := array_all(1, 3, -L_SedActive/2)
FreezePFS := FreezeLayer("SedPipeFrameSupport")
SedPipeFrameScript :=
    stack(SedPipeFrameLayer, PFPipeLong1, PFPipeLong2, ArrayPFLong, PFPipePerpendicular, ArrayPFPerp, FreezePFLayer, PFStubLayer, DrawPFStub, ArrayPFStubRow, ArrayPFStubColumn, FreezePFStub, PFSLayer, DrawPFSFlange, DrawPFSPipe, ArrayPFS, FreezePFS) if N_SedBays > 1 and H_SedBetween ≠ 0 m
    stack(SedPipeFrameLayer, PFPipeLong1, PFPipeLong2, ArrayPFLong, PFPipePerpendicular, ArrayPFPerp, FreezePFLayer, PFStubLayer, DrawPFStub, ArrayPFStubRow, ArrayPFStubColumn, FreezePFStub) otherwise
# Start to array within bays all at once. Anything that is not subtracting from the tank can be arrayed where the tanks are arrayed.
SedLaunderLayer := layer_new("SedLaunder", blue)
SedLaunderPipe := PipeF(SedLaunderNew_origin, L_SedLaunder, [0 deg; 0 deg], ND_SedLaunder, PS_Default)
FreezeSedLaunder := FreezeLayer("SedLaunder")
SedLaunderOrifice1 := CylinderF([
    SedLaunderNew_origin[0] - B_SedLaunderOrifices/2 - SocketDepthFlex(ND_SedLaunder);
    SedLaunderNew_origin[1];
    SedLaunderNew_origin[2]
], D_SedLaunderOrifice/2, outerradius(ND_SedLaunder) + zc, [30; 90]*deg)
SedLaunderOrifice2 := CylinderF([
    SedLaunderNew_origin[0] - B_SedLaunderOrifices/2 - SocketDepthFlex(ND_SedLaunder);
    SedLaunderNew_origin[1];
    SedLaunderNew_origin[2]
], D_SedLaunderOrifice/2, outerradius(ND_SedLaunder) + zc, [-30; 90]*deg)
ArraySedLaunderOrifices := array_all(1, N_SedLaunderOrificesRow, -B_SedLaunderOrifices)
GroupSedLaunderOrifices := GroupAll("DeleteMe")
SubtractSedLaunderOrifices := SubtractF(["SedLaunder"], "DeleteMe")
SedLaunderFlexCouplingLayer := layer_new("SedFlexCoupling", red)
DrawSedLaunderFlexCoupling := FlexCouplingF(FlexCouplingNew_origin, [0 deg; 0 deg], ND_SedLaunder)
FreezeSedLaunderFlexCoupling := FreezeLayer("SedFlexCoupling")
SedLaunderCapLayer := layer_new("SedLaunderCap", yellow)
DrawSedLaunderCap := CapF(LaunderCapNew_origin, [0 deg; 180 deg], ND_SedLaunder)
FreezeSedLaunderCap := FreezeLayer("SedLaunderCap")
LaunderCouplingCapLayer := layer_new("SedLaunderCouplingCap", red)
DrawLaunderCouplingCap := laundercouplingcap([
    SedLaunder_origin[1];
    Plant_Origin[1] + Z_SedLaunder;
    Plant_Origin[2] - W_ExitChannel - SocketDepth(ND_SedLaunder)
], ND_SedLaunder, PS_Default)
FreezeCouplingCap := FreezeLayer("SedLaunderCouplingCap")
LaunderOrificeCapLayer := layer_new("SedLaunderOrificeCap", green)
DrawOrificeCap := launderorificecap([
    (Plant_Origin[1] - W_Sed/(N_SedLaunders*N_SedBays*2));
    Plant_Origin[1] + Z_SedLaunder;
    Plant_Origin[2] + W_ExitChannel + T_PlantWall - SocketDepth(ND_SedLaunder)
], ND_SedLaunder, D_CapOrifice, PS_Default)
FreezeOrificeCap := FreezeLayer("SedLaunderOrificeCap")
SedLaunderPVCCoupling :=
    Local ← layer_new("SedPVCCoupling", green)
    for b ∈ 0 .. N_SedBays - 1
        Local ← stack(Local, CouplingSUBF(PVCCouplingNew_origin + [0 m; W_SedBay*b; 0 m], [0 deg; 0 deg], ND_SedLaunder, PS_Default, ["SedTankCon"]))
FreezeLaunderPVCCoupling := FreezeLayer("SedPVCCoupling")
SedLaunderNippleLayer :=
    Local ← layer_new("SedLaunderNipple", blue)
    if CouplingLength(ND_SedLaunder) < T_ChannelWall
        for b ∈ 0 .. N_SedBays - 1
            Local ← stack(Local, PipeSUBF(SedLaunderNippleNew_origin + [0 m; W_SedBay*b; 0 m], LengthSedLaunderNipple, [0 deg; 0 deg], ND_SedLaunder, PS_Default, ["SedTankCon"]))
DrawSedLaunderNipple := PipeF(SedLaunderNippleNew_origin, LengthSedLaunderNipple, [0 deg; 0 deg], ND_SedLaunder, PS_Default)
FreezeLaunderNipple := FreezeLayer("SedLaunderNipple")
SedLaunderScript :=
    stack(SedLaunderLayer, SedLaunderPipe, FreezeSedLaunder, SedLaunderOrifice1, SedLaunderOrifice2, ArraySedLaunderOrifices, GroupSedLaunderOrifices, SubtractSedLaunderOrifices, SedLaunderFlexCouplingLayer, DrawSedLaunderFlexCoupling, FreezeSedLaunderFlexCoupling, SedLaunderCapLayer, DrawSedLaunderCap, FreezeSedLaunderCap, LaunderCouplingCapLayer, viewrightside1, DrawLaunderCouplingCap, FreezeCouplingCap, LaunderOrificeCapLayer, viewleftside, DrawOrificeCap, FreezeOrificeCap, viewtop1, SedLaunderPVCCoupling, FreezeLaunderPVCCoupling, SedLaunderNippleLayer, FreezeLaunderNipple) if CouplingLength(ND_SedLaunder) < T_ChannelWall
    stack(SedLaunderLayer, SedLaunderPipe, FreezeSedLaunder, SedLaunderOrifice1, SedLaunderOrifice2, ArraySedLaunderOrifices, GroupSedLaunderOrifices, SubtractSedLaunderOrifices, SedLaunderFlexCouplingLayer, DrawSedLaunderFlexCoupling, FreezeSedLaunderFlexCoupling, SedLaunderCapLayer, DrawSedLaunderCap, FreezeSedLaunderCap, LaunderCouplingCapLayer, viewrightside1, DrawLaunderCouplingCap, FreezeCouplingCap, LaunderOrificeCapLayer, viewleftside, DrawOrificeCap, FreezeOrificeCap, viewtop1, SedLaunderPVCCoupling, FreezeLaunderPVCCoupling, SedLaunderNippleLayer, DrawSedLaunderNipple, FreezeLaunderNipple) otherwise
# Array all of the pieces among bays and then tanks
ThawArrayBayPieces :=
    ThawMultiple(["SedDrainCover"; "SedLaunderOrificeCap"; "SedLaunderCouplingCap"; "SedFlexCoupling"; "SedLaunder"; "SedPipeFrameStub"; "SedDrainValvesPlumbing"; "SedDrainAdapterPlumbing"; "SedDrainNipplePlumbing"; "SedDrainElbowPlumbing"; "SedLaunderCap"]) if CouplingLength(ND_SedLaunder) < T_ChannelWall
    ThawMultiple(["SedDrainCover"; "SedLaunderOrificeCap"; "SedLaunderCouplingCap"; "SedFlexCoupling"; "SedLaunder"; "SedPipeFrameStub"; "SedDrainValvesPlumbing"; "SedLaunderNipple"; "SedDrainAdapterPlumbing"; "SedDrainNipplePlumbing"; "SedDrainElbowPlumbing"; "SedLaunderCap"]) otherwise
ArrayBayPieces := array_all(N_SedBays, 1, W_SedBay)
ThawAllSed :=
    if CouplingLength(ND_SedLaunder) < T_ChannelWall
        ThawMultiple([
            "SedTankCon";
            "SedBottomslopesCon";
            "SedIccouplingPlumbing";
            "SedLaunderNipple";
            "SedPVCCoupling";
            "chimneycoupling";
            "SedChimneyStops";
            "SedManPipePlumbing";
            "SedManCapPlumbing";
            "SedManElbowPlumbing";
            "SedInletManPipe";
            "SedManifoldFlexCoupling";
            "SedDrainAdapterPlumbing";
            "SedDrainNipplePlumbing";
            "SedDrainElbowPlumbing";
            "SedDrainPipePlumbing";
            "SedDrainCouplingPlumbing";
            "SedPVCCoupling";
            "SedLaunderNipple";
            "SedPipeFrame"
        ])
    otherwise
        ThawMultiple([
            "SedTankCon";
            "SedBottomslopesCon";
            "SedIccouplingPlumbing";
            "SedLaunderNipple";
            "SedPVCCoupling";
            "chimneycoupling";
            "SedChimneyStops";
            "SedManPipePlumbing";
            "SedManCapPlumbing";
            "SedManElbowPlumbing";
            "SedInletManPipe";
            "SedManifoldFlexCoupling";
            "SedDrainAdapterPlumbing";
            "SedDrainNipplePlumbing";
            "SedDrainElbowPlumbing";
            "SedDrainPipePlumbing";
            "SedDrainCouplingPlumbing";
            "SedPVCCoupling";
            "SedLaunderNipple";
            "SedPipeFrame"
        ])
ThawPFS := layer_thaw("SedPipeFrameSupport")
ArraySedTank := array_all(N_SedTanks, 1, W_Sed + T_PlantWall)
FreezeSedPieces := FreezeMultiple([
    "SedBottomslopesCon";
    "SedIccouplingPlumbing";
    "SedDrainCover";
    "SedLaunder";
    "SedFlexCoupling";
    "SedLaunderNipple";
    "SedPVCCoupling";
    "SedLaunderCap";
    "SedLaunderOrificeCap";
    "chimneycoupling";
    "SedChimneyStops";
    "SedManPipePlumbing";
    "SedManCapPlumbing";
    "SedManElbowPlumbing";
    "SedInletManPipe";
    "SedManifoldFlexCoupling";
    "SedDrainAdapterPlumbing";
    "SedDrainNipplePlumbing";
    "SedDrainElbowPlumbing";
    "SedDrainValvesPlumbing";
    "SedDrainPipePlumbing";
    "SedDrainCouplingPlumbing";
    "SedLaunderCouplingCap";
    "SedPVCCoupling";
    "SedLaunderNipple";
    "SedPipeFrame";
    "SedPipeFrameStub"
])
FreezePFS := FreezeLayer("SedPipeFrameSupport")
Sedtankarrayscript :=
    stack(ThawArrayBayPieces, ArrayBayPieces, ThawAllSed, ThawPFS, viewtop1, ArraySedTank, layer_set("0"), FreezeSedPieces, FreezePFS, FreezeSedTank) if N_SedBays > 1
    stack(ThawArrayBayPieces, ThawAllSed, viewtop1, ArraySedTank, layer_set("0"), FreezeSedPieces, FreezeSedTank) otherwise
SedExitChannelLayer := layer_new("SedExitchannelCon", ltgrey)
DrawSedExitChannel := Tank(echanneltank_origin, [W_ExitChannel; 4*ConRadius(ND_PltWeir) + 3*S_Fitting; H_ExitChannel], T_ChannelWall)
FreezeSedExitChannel := FreezeLayer("SedExitchannelCon")
SedChannelLayer := layer_new("SedInletchannelCon", ltgrey)
DrawSedChannel := Tank(ichanneltank_origin, [W_InletChannel; 2*ConRadius(ND_PltWeir) + 2*S_Fitting; H_InletChannel], T_ChannelWall)
FreezeSedChannel := FreezeLayer("SedInletchannelCon")
MakeSedInletChannel := BoxF([
    Plant_Origin[0] - L_Sed;
    Plant_Origin[1] - T_PlantWall - zc;
    Plant_Origin[2] + H_Sed - H_InletChannel
], [
    Plant_Origin[0] - L_Sed + W_InletChannel;
    Plant_Origin[1] + (N_SedTanks*N_SedBays*(W_SedBay + T_PlantWall) - T_PlantWall) + zc;
    Plant_Origin[2] + H_Sed
], [0; 0; 0]*deg)
MakeSedExitChannel := BoxF([
    Plant_Origin[0] - W_ExitChannel;
    Plant_Origin[1] - T_PlantWall - zc;
    Plant_Origin[2] + H_Sed - H_ExitChannel
], [
    Plant_Origin[0];
    N_SedTanks*N_SedBays*(W_SedBay + T_PlantWall) - T_PlantWall + zc;
    Plant_Origin[2] + H_Sed
], [0; 0; 0]*deg)
GroupSedChannelPieces := GroupAll("DeleteMe")
SubtractChannelPieces := SubtractF(["SedTankCon"; "SedExitchannelCon"; "SedInletchannelCon"], "DeleteMe")
# this will put tank, channel, and SedExitchannelCon in the same layer
SedTankChannels := stack(SedExitChannelLayer, DrawSedExitChannel, FreezeSedExitChannel, SedChannelLayer, DrawSedChannel, FreezeSedChannel, MakeSedInletChannel, MakeSedExitChannel, GroupSedChannelPieces, SubtractChannelPieces)
SedExitWeirLayer := layer_new("SedExitweir", blue)
SedExitWeirPipe1 := PipeSUBF(ExitWeirPipe_Origin, exitweirpipe_length, [0; 90]*deg, ND_PltWeir, PS_Default, ["SedTankCon"])
SedExitWeirPipe2 := PipeSUBF(ExitWeirPipe_Origin - [0 m; 2*ConRadius(ND_PltWeir) + S_Fitting; 0 m], exitweirpipe_length, [0; 90]*deg, ND_PltWeir, PS_Default, ["SedTankCon"])
FreezeSedExitWeir := FreezeLayer("SedExitweir")
sedechanneltankscript := stack(SedExitWeirLayer, SedExitWeirLayer, SedExitWeirPipe1, SedExitWeirPipe2, FreezeSedExitWeir)
# Not sure what will happen to highlighted scripts since the filter might change the arrangement
sedichanneltankscript :=
    SedInletWeirPipeLayer ← layer_new("SedInletWeir", blue)
    pipeiwp ← Pipe(inletweirpipe_origin, ND_PltWeir, inletweirpipe_length, PS_Default)
    layerfreezeiwp ← layer_freeze("SedInletWeir")
    layerfreezeiwt ← layer_freeze("inletweirtee")
    NewWastePipe ← layer_new("SedWastepipePlumbing", blue)
    SedWastePipe ← PipeF([
        sedtankinletweirelbow_origin[0] - ShortTeeLength(ND_PltWeir);
        sedtankinletweirelbow_origin[1];
        Plant_Origin[2]
    ], 1.25*ND_PltWeir, [0; 0]*deg, ND_PltWeir, PS_Default)
    FreezeWastePipe ← FreezeLayer("SedWastepipePlumbing")
    NewWasteElbow ← layer_new("SedWasteelbow", green)
    SedWasteElbow ← ElbowF([
        sedtankinletweirelbow_origin[0] - 1.25*ND_PltWeir - ShortTeeLength(ND_PltWeir);
        sedtankinletweirelbow_origin[1];
        Plant_Origin[2]
    ], [90; 0; 45]*deg, ND_PltWeir, PS_Default)
    FreezeWasteElbow ← FreezeLayer("SedWasteelbow")
    return stack(SedInletWeirPipeLayer, pipeiwp, layer_set("0"), layerfreezeiwp, layerfreezeiwt, NewWastePipe, SedWastePipe, FreezeWastePipe, NewWasteElbow, SedWasteElbow, FreezeWasteElbow)
weirpipescapsscript :=
    viewtops ← viewtop1
    layerweircaps ← layer_new("SedWeirpipecapPlumbing", dkgrey)
    iweircap ← cap(inletweirpipe_origin + [0; 0; inletweirpipe_length], ND_PltWeir, PS_Default)
    eweircap1 ← cap(ExitWeirPipe_Origin + [0; 0; exitweirpipe_length], ND_PltWeir, PS_Default)
    eweircap2 ← cap(ExitWeirPipe_Origin - [0 m; 2*ConRadius(ND_PltWeir) + S_Fitting; 0 m] + [innerD(ND_PltWeir, PS_Default)/2; 0; exitweirpipe_length], ND_PltWeir, PS_Default)
    layerset0 ← layer_set("0")
    layerfreezecaps ← layer_freeze("SedWeirpipecapPlumbing")
    one ← stack(viewtops, layerweircaps, iweircap, eweircap1, viewtops, eweircap2, layerset0, layerfreezecaps)
    return one
text := stack(layer_new("text", [0; 0; 0]), textbox(H_Text, textbox_origin, textbox_origin + textbox_dim, Disclaimer), layer_set("0"), layer_freeze("text"))
AC_SedTank :=
    stack(Sedtanktankscript, SedDrainScript, Sedtankexitweirscript, Sedtankinletweirscript, Sedbottomslopescript, influentmanifoldscript, inletpipescript, Draincoverscript, SedTankLaminaScript, SedPipeFrameScript, SedLaunderScript, Sedtankarrayscript, SedTankChannels, sedichanneltankscript, sedechanneltankscript, weirpipescapsscript) if (N_SedBays > 1 and N_SedTanks > 1)
    stack(Sedtanktankscript, SedDrainScript, Sedtankexitweirscript, Sedtankinletweirscript, Sedbottomslopescript, influentmanifoldscript, inletpipescript, Draincoverscript, SedTankLaminaScript, SedPipeFrameScript, SedLaunderScript, Sedtankarrayscript, SedTankChannels, sedichanneltankscript, sedechanneltankscript, weirpipescapsscript) if (N_SedBays ≤ 1 and N_SedTanks > 1)
    stack(Sedtanktankscript, SedDrainScript, Sedtankexitweirscript, Sedtankinletweirscript, Sedbottomslopescript, influentmanifoldscript, inletpipescript, Draincoverscript, SedTankLaminaScript, SedPipeFrameScript, SedLaunderScript, sedichanneltankscript, SedTankChannels, sedechanneltankscript, weirpipescapsscript) if (N_SedBays == 1 and N_SedTanks == 1)
    stack(Sedtanktankscript, SedDrainScript, Sedtankexitweirscript, Sedtankinletweirscript, Sedbottomslopescript, influentmanifoldscript, inletpipescript, Draincoverscript, SedTankLaminaScript, SedPipeFrameScript, SedLaunderScript, sedichanneltankscript, SedTankChannels, sedechanneltankscript, weirpipescapsscript) if (N_SedBays > 1 and N_SedTanks == 1)
