# [reference: MasterProgram.xmcd]
# Draw a single bay within a sed tank with
# Array the single bay then array the whole tanks
Plant_Origin := [0; 0; 0]
# Draw the Concrete components of the sedimentation tank (excluding channels and launder ledge)
SedTankLayer := layer_new("SedTankCon", grey)
# viewrightside1
# ViewRightSide1
SedSlopePolyline :=
    if Z_SedLamellaBottom - (Plant_Origin[2] + H_SedSideSlopes + ConRadius(ND_SedPlateFrame) + outerradius(ND_SedPlateFrame)) > 0
        Pline([
            [Plant_Origin[1] + W_Sed; Plant_Origin[2]];
            [Plant_Origin[1] + W_Sed; Plant_Origin[2]] + [-W_SedBay/2 + W_SedSludge/2; Plant_Origin[2]];
            [Plant_Origin[1] + W_Sed; Plant_Origin[2]] + [-W_SedBay/2 + W_SedSludge/2; H_SedSludge];
            [Plant_Origin[1] + W_Sed; Plant_Origin[2]] + [-W_SedBay/2 + W_SedSludge/2 + T_ConcreteMin; H_SedSludge];
            [Plant_Origin[1] + W_Sed; Plant_Origin[2]] + [-W_SedBay/2 + W_SedSludge/2 + T_ConcreteMin; H_SedSludge + H_SedDrainCoverTotal];
            [Plant_Origin[1] + W_Sed; Plant_Origin[2]] + [
                -T_ConcreteMin;
                ((W_SedBay - W_SedSludge)/2 - 2*T_ConcreteMin)*tan(AN_SedSlope) + H_SedSludge + H_SedDrainCoverTotal
            ];
            [Plant_Origin[1] + W_Sed; 0 m] + [-T_ConcreteMin; Z_SedLamellaBottom - ConRadius(ND_SedPlateFrame) - outerradius(ND_SedPlateFrame)];
            [Plant_Origin[1] + W_Sed; 0 m] + [0 m; Z_SedLamellaBottom - ConRadius(ND_SedPlateFrame) - outerradius(ND_SedPlateFrame)];
            [Plant_Origin[1] + W_Sed; Plant_Origin[2]]
        ])
    otherwise
        Pline([
            [Plant_Origin[1] + W_Sed; Plant_Origin[2]];
            [Plant_Origin[1] + W_Sed; Plant_Origin[2]] + [-W_SedBay/2 + W_SedSludge/2; Plant_Origin[2]];
            [Plant_Origin[1] + W_Sed; Plant_Origin[2]] + [-W_SedBay/2 + W_SedSludge/2; H_SedSludge];
            [Plant_Origin[1] + W_Sed; Plant_Origin[2]] + [-W_SedBay/2 + W_SedSludge/2 + T_ConcreteMin; H_SedSludge];
            [Plant_Origin[1] + W_Sed; Plant_Origin[2]] + [-W_SedBay/2 + W_SedSludge/2 + T_ConcreteMin; H_SedSludge + H_SedDrainCoverTotal];
            [Plant_Origin[1] + W_Sed; Plant_Origin[2]] + [
                -T_ConcreteMin;
                ((W_SedBay - W_SedSludge)/2 - 2*T_ConcreteMin)*tan(AN_SedSlope) + H_SedSludge + H_SedDrainCoverTotal
            ];
            [Plant_Origin[1] + W_Sed; Plant_Origin[2]] + [
                0 m;
                ((W_SedBay - W_SedSludge)/2 - 2*T_ConcreteMin)*tan(AN_SedSlope) + H_SedSludge + H_SedDrainCoverTotal
            ];
            [Plant_Origin[1] + W_Sed; Plant_Origin[2]]
        ])
# viewrightside1
ExtrudeSedSlopes := extrude([Plant_Origin[0] + W_Sed; Plant_Origin[1]], -L_Sed)
MirrorSedSlopes := MirrorLast([Plant_Origin[1] + W_Sed - W_SedBay/2; Plant_Origin[2]], [Plant_Origin[1] + W_Sed - W_SedBay/2; Plant_Origin[2] + zc], "n")
# viewtop1
ArraySedSlopes := array_all(N_SedBays, 1, -W_SedBay)
# viewfront1
SedHopper :=
    if H_SedHopperBackSlope > 0 m
        Pline([
            [Plant_Origin[0]; Plant_Origin[2]];
            [Plant_Origin[0]; Plant_Origin[2]] + [-L_SedHopper - T_ConcreteMin; 0 m];
            [Plant_Origin[0]; Plant_Origin[2]] + [-L_SedHopper - T_ConcreteMin; Z_SedFlocWeir];
            [Plant_Origin[0]; Plant_Origin[2]] + [-L_SedHopper; Z_SedFlocWeir];
            [Plant_Origin[0]; Plant_Origin[2]] + [-L_SedHopperBackSlope; ElbowRadius(ND_SedHopperDrain)];
            [Plant_Origin[0]; Plant_Origin[2]] + [0 m; H_SedHopperBackSlope + Z_SedHopperBottom];
            [Plant_Origin[0]; Plant_Origin[2]]
        ])
    if L_SedHopper < H_SedFlocWeir/tan(AN_SedSlope)
        Pline([
            [Plant_Origin[0]; Plant_Origin[2]];
            [Plant_Origin[0]; Plant_Origin[2]] + [-L_SedHopper - T_ConcreteMin; 0 m];
            [Plant_Origin[0]; Plant_Origin[2]] + [-L_SedHopper - T_ConcreteMin; Z_SedFlocWeir];
            [Plant_Origin[0]; Plant_Origin[2]] + [-L_SedHopper; Z_SedFlocWeir];
            [Plant_Origin[0]; Plant_Origin[2]] + [0 m; (H_SedFlocWeir/tan(AN_SedSlope) - L_SedHopper)*tan(AN_SedSlope)];
            [Plant_Origin[0]; Plant_Origin[2]]
        ])
    otherwise
        Pline([
            [Plant_Origin[0]; Plant_Origin[2]];
            [Plant_Origin[0]; Plant_Origin[2]] + [-L_SedHopper - T_ConcreteMin; 0 m];
            [Plant_Origin[0]; Plant_Origin[2]] + [-L_SedHopper - T_ConcreteMin; Z_SedFlocWeir];
            [Plant_Origin[0]; Plant_Origin[2]] + [-L_SedHopper; Z_SedFlocWeir];
            [Plant_Origin[0]; Plant_Origin[2]]
        ])
# viewfront
ExtrudeSedHopper := extrude([Plant_Origin[0]; Plant_Origin[2]] + [-L_SedHopper - T_ConcreteMin; Z_SedFlocWeir], -W_Sed)
# viewtop
SedManifoldLedge := BoxF([
    -L_SedHopper - T_ConcreteMin + Plant_Origin[0];
    Plant_Origin[1];
    Z_SedManifoldPipe - ConRadius(ND_SedManifold)
], [
    -L_SedHopper - 2*T_ConcreteMin + Plant_Origin[0];
    W_Sed + Plant_Origin[1];
    Z_SedManifoldPipe - ConRadius(ND_SedManifold) - T_ConcreteMin
], [0; 0; 0]*deg)
SedManifoldSlope := WedgeF(Plant_Origin - [L_Sed; 0 m; 0 m], [L_SedEndSlope; W_Sed; H_SedEndSlope] + Plant_Origin - [L_Sed; 0 m; 0 m], [0; 0; 0]*deg)
DrawSedTank := Tank(Plant_Origin, [L_Sed; W_Sed; H_Sed], T_PlantWall)
# unionall
FreezeSedTank := FreezeLayer("SedTankCon")
# this cuts a space for the channel on the side closest to the floc tank
SedInletChannelCut := BoxF([-L_Sed + W_SedInletChannel; W_Sed; H_Sed - H_SedInletChannel] + Plant_Origin, [-L_Sed; W_Sed + T_PlantWall; H_Sed] + Plant_Origin, [0; 0; 0]*deg)
SedExitChannelCut := BoxF(Plant_Origin + [0 m; W_Sed; H_Sed - H_SedExitChannel], Plant_Origin + [-W_SedExitChannel; W_Sed + T_PlantWall; H_Sed], [0; 0; 0]*deg)
MirrorSedChannelCuts := Mirror3dAll("zx", [Plant_Origin[0]; Plant_Origin[1] + W_Sed/2], "n")
GroupSedChannelCuts := GroupAll("DeleteMe")
SubtractSedChannelCuts := SubtractF(["SedTankCon"], "DeleteMe")
SedTankScript :=
    stack(SedTankLayer, viewrightside1, SedSlopePolyline, viewrightside1, ExtrudeSedSlopes, MirrorSedSlopes, viewfront1, SedHopper, viewfront1, ExtrudeSedHopper, viewtop1, SedManifoldLedge, SedManifoldSlope, DrawSedTank, union_allA, FreezeSedTank, SedInletChannelCut, SedExitChannelCut, MirrorSedChannelCuts, GroupSedChannelCuts, SubtractSedChannelCuts) if N_SedBays == 1
    stack(SedTankLayer, viewrightside1, SedSlopePolyline, viewrightside1, ExtrudeSedSlopes, MirrorSedSlopes, viewtop1, ArraySedSlopes, viewfront1, SedHopper, viewfront1, ExtrudeSedHopper, viewtop1, SedManifoldLedge, SedManifoldSlope, DrawSedTank, union_allA, FreezeSedTank, SedInletChannelCut, SedExitChannelCut, MirrorSedChannelCuts, GroupSedChannelCuts, SubtractSedChannelCuts) otherwise
# Draw the channels and launder ledge
SedChannelLayer := layer_new("SedChannelsCon", grey)
InletChannelVertBox := BoxF([-L_Sed + W_SedInletChannel; W_Sed; Z_SedChannelBottom] + Plant_Origin, [-L_Sed + W_SedInletChannel + T_ChannelWall; W_Sed - W_SedBay; H_Sed] + Plant_Origin, [0; 0; 0]*deg)
ExitChannelVertBox := BoxF([-W_SedExitChannel; W_Sed; Z_SedChannelBottom] + Plant_Origin, [-W_SedExitChannel - T_ChannelWall; W_Sed - W_SedBay; H_Sed] + Plant_Origin, [0; 0; 0]*deg)
InletChannelHorizBox := BoxF([-L_Sed; W_Sed; Z_SedChannelBottom] + Plant_Origin, [-L_Sed + W_SedInletChannel + T_ChannelWall; W_Sed - W_SedBay; Z_SedChannelBottom - T_ChannelWall] + Plant_Origin, [0; 0; 0]*deg)
ExitChannelHorizBox := BoxF([0 m; W_Sed; Z_SedChannelBottom] + Plant_Origin, [-W_SedExitChannel - T_ChannelWall; W_Sed - W_SedBay; Z_SedChannelBottom - T_ChannelWall] + Plant_Origin, [0; 0; 0]*deg)
SedLaunderLedge := BoxF([-L_Sed + W_SedInletChannel + T_ChannelWall; W_Sed; Z_SedLaunder - ConRadius(ND_SedLaunder)] + Plant_Origin, [
    -L_Sed + W_SedInletChannel + T_ChannelWall + T_ConcreteMin;
    W_Sed - W_SedBay;
    Z_SedLaunder - ConRadius(ND_SedLaunder) - T_ConcreteMin
] + Plant_Origin, [0; 0; 0]*deg)
# unionall
FreezeSedChannels := FreezeLayer("SedChannelsCon")
SedChannelScript := stack(SedChannelLayer, InletChannelVertBox, ExitChannelVertBox, InletChannelHorizBox, ExitChannelHorizBox, SedLaunderLedge, union_allA, FreezeSedChannels)
# Draw the manifold components
# Manifold origins:
SedManCoupling_Origin := [
    -L_Sed + T_ConcreteMin + ConRadius(ND_SedManifold);
    W_Sed - W_SedBay/2;
    Z_SedChannelBottom - SocketDepth(ND_SedManifold)
] + Plant_Origin
SedManNipple_Origin := [0 m; 0 m; -CouplingLength(ND_SedManifold) + 2*SocketDepth(ND_SedManifold)] + SedManCoupling_Origin
SedManFlexCoupling_Origin := [0 m; 0 m; -(SocketDepth(ND_SedManifold) + max(0 m, T_PlantWall - CouplingLength(ND_SedManifold)))] + SedManNipple_Origin
SedManVertPipe_Origin := [0 m; 0 m; -CouplingLengthFlex(ND_SedManifold) + SocketDepthFlex(ND_SedManifold)] + SedManFlexCoupling_Origin
SedManElbow_Origin := [
    SedManVertPipe_Origin[0] + ElbowRadius(ND_SedManifold);
    SedManVertPipe_Origin[1];
    Z_SedManifoldPipe
]
SedManPipe_Origin := SedManElbow_Origin + [L_SedManifoldPipe; 0 m; 0 m]  # This is the same as the cap origin
SedManRigCouplingLayer := layer_new("SedManCouplingPlumbing", green)
SedManRigidCoupling := CouplingSUBF(SedManCoupling_Origin, [0; 270]*deg, ND_SedManifold, PS_Default, ["SedChannelsCon"])
SedManRigCouplingFrz := FreezeLayer("SedManCouplingPlumbing")
SedManNippleLayer := layer_new("SedManNippleCoupling", blue)
SedManNipple := PipeSUBF(SedManNipple_Origin, SocketDepthFlex(ND_SedManifold) + SocketDepth(ND_SedManifold) + max(0 m, T_PlantWall - CouplingLength(ND_SedManifold)), [0; 270]*deg, ND_SedManifold, PS_Default, ["SedChannelsCon"])
SedManNipFrz := FreezeLayer("SedManNippleCoupling")
SedManFlexCouplingLayer := layer_new("SedManFlexCouplingPlumbing", black)
SedManFlexCoupling := FlexCouplingF(SedManFlexCoupling_Origin, [0; 270]*deg, ND_SedManifold)
SedManFlexCouplingFrz := FreezeLayer("SedManFlexCouplingPlumbing")
SedManVertLayer := layer_new("SedManVertPipePlumbing", blue)
SedManVertPipe := PipeF(SedManVertPipe_Origin, SedManVertPipe_Origin[2] - Z_SedManifoldPipe - ElbowRadius(ND_SedManifold), [0; 270]*deg, ND_SedManifold, PS_Default)
SedManVertFrz := FreezeLayer("SedManVertPipePlumbing")
SedManElbowLayer := layer_new("SedManElbowPlumbing", green)
SedManElbow := ElbowF(SedManElbow_Origin, [90; 0; 270]*deg, ND_SedManifold, PS_Default)
SedManElbowFrz := FreezeLayer("SedManElbowPlumbing")
SedManPipeLayer := layer_new("SedManPipePlumbing", blue)
SedManPipe := PipeF(SedManPipe_Origin, L_SedManifoldPipe, [0; 0], ND_SedManifold, PS_Default)
SedManPipeFrz := FreezeLayer("SedManPipePlumbing")
SedManCapLayer := layer_new("SedManCapPlumbing", green)
SedManCap := CapF(SedManPipe_Origin, [0; 0; 0]*deg, ND_SedManifold)
SedManCapFrz := FreezeLayer("SedManCapPlumbing")
SedManOrifice := CylinderF(SedManPipe_Origin + [-B_SedManifoldPort/2; 0 m; 0 m], D_SedManifoldPort/2, ND_SedManifold, [0; 270]*deg)
ArraySedManOrifice := array_all(1, N_SedManifoldPorts, -B_SedManifoldPort)
GroupSedManOrifices := GroupAll("DeleteMe")
CreateOrificeRow := stack(SedManOrifice, ArraySedManOrifice, GroupSedManOrifices)
SubtractSedManOrifices := stack(SubtractF(["SedManCapPlumbing"], "DeleteMe"), CreateOrificeRow, SubtractF(["SedManCapPlumbing"], "DeleteMe"))
SedManifoldScript := stack(SedManRigCouplingLayer, SedManRigidCoupling, SedManRigCouplingFrz, SedManNippleLayer, SedManNipple, SedManNipFrz, SedManFlexCouplingLayer, SedManFlexCoupling, SedManFlexCouplingFrz, SedManVertLayer, SedManVertPipe, SedManVertFrz, SedManElbowLayer, SedManElbow, SedManElbowFrz, SedManPipeLayer, SedManPipe, SedManPipeFrz, SedManCapLayer, SedManCap, SedManCapFrz, CreateOrificeRow, SubtractSedManOrifices)
# Draw the launder components
# Launder origins:
SedLaunderCoupling_Origin := [-W_SedExitChannel - SocketDepth(ND_SedLaunder); W_Sed - W_SedBay/2; Z_SedLaunder] + Plant_Origin
SedLaunderNipple_Origin := SedLaunderCoupling_Origin + [-CouplingLength(ND_SedLaunder) + 2*SocketDepth(ND_SedLaunder); 0 m; 0 m]
SedLaunderFlexCoupling_Origin := SedLaunderNipple_Origin - [SocketDepth(ND_SedLaunder) + max(0 m, T_PlantWall - CouplingLength(ND_SedLaunder)); 0 m; 0 m]
SedLaunderPipe_Origin := SedLaunderFlexCoupling_Origin - [SocketDepthFlex(ND_SedLaunder); 0 m; 0 m]
SedLaunderCap_Origin := SedLaunderPipe_Origin - [L_SedLaunder; 0 m; 0 m]
SedLaunderCouplingLayer := layer_new("SedLaunderCouplingPlumbing", green)
SedLaunderCoupling := CouplingSUBF(SedLaunderCoupling_Origin, [0; 0]*deg, ND_SedLaunder, PS_Default, ["SedChannelsCon"])
SedLaunderCouplingFrz := FreezeLayer("SedLaunderCouplingPlumbing")
SedLaunderNippleLayer := layer_new("SedLaunderNipplePlumbing", blue)
SedLaunderNipple := PipeSUBF(SedLaunderNipple_Origin, SocketDepth(ND_SedLaunder) + SocketDepthFlex(ND_SedLaunder) + max(0 m, T_PlantWall - CouplingLength(ND_SedLaunder)), [0; 0]*deg, ND_SedLaunder, PS_Default, ["SedChannelsCon"])
SedLaunderNippleFrz := FreezeLayer("SedLaunderNipplePlumbing")
SedLaunderFlexLayer := layer_new("SedLaunderFlexCouplingPlumbing", black)
SedLaunderFlexCoupling := FlexCouplingF(SedLaunderFlexCoupling_Origin, [0; 0]*deg, ND_SedLaunder)
SedLaunderFlexFrz := FreezeLayer("SedLaunderFlexCouplingPlumbing")
SedLaunderPipeLayer := layer_new("SedLaunderPipePlumbing", blue)
SedLaunderPipe := PipeF(SedLaunderPipe_Origin, L_SedLaunder, [0; 0]*deg, ND_SedLaunder, PS_Default)
SedLaunderPipeFrz := FreezeLayer("SedLaunderPipePlumbing")
SedLaunderCapLayer := layer_new("SedLaunderCapPlumbing", green)
SedLaunderCap := CapF(SedLaunderCap_Origin, [0; 180]*deg, ND_SedLaunder)
SedLaunderCapFrz := FreezeLayer("SedLaunderCapPlumbing")
SedLaunderOrifice := CylinderF([-CouplingLengthFlex(ND_SedLaunder) - D_SedLaunderOrifice; 0 m; 0 m] + SedLaunderPipe_Origin, D_SedLaunderOrifice/2, ND_SedLaunder, [30; 90]*deg)
ArraySedLaunderOrifices := array_all(1, N_SedLaunderOrifices, -B_SedLaunderOrifices)
MirrorSedLaunderOrifices := Mirror3dAll("zx", [Plant_Origin[0]; SedLaunderPipe_Origin[1]], "n")
GroupLaunderOrifices := GroupAll("DeleteMe")
SubtractLaunderOrifices := SubtractF(["SedLaunderPipePlumbing"], "DeleteMe")
SedLaunderScript := stack(SedLaunderCouplingLayer, SedLaunderCoupling, SedLaunderCouplingFrz, SedLaunderNippleLayer, SedLaunderNipple, SedLaunderNippleFrz, SedLaunderFlexLayer, SedLaunderFlexCoupling, SedLaunderFlexFrz, SedLaunderPipeLayer, SedLaunderPipe, SedLaunderPipeFrz, SedLaunderCapLayer, SedLaunderCap, SedLaunderCapFrz, SedLaunderOrifice, ArraySedLaunderOrifices, MirrorSedLaunderOrifices, GroupLaunderOrifices, SubtractLaunderOrifices)
# Draw the Floc Hopper Drain
SedHopperDrainCoupling_Origin := [
    -SocketDepth(ND_SedHopperDrain) + T_PlantWall;
    W_Sed - W_SedBay/2;
    Z_SedHopperBottom + outerradius(ND_SedHopperDrain)
] + Plant_Origin
SedHopperDrainPipe_Origin := SedHopperDrainCoupling_Origin + [2*SocketDepth(ND_SedHopperDrain) - CouplingLength(ND_SedHopperDrain); 0 m; 0 m]
SedHopperDrainAdapter_Origin := SedHopperDrainCoupling_Origin + [2*SocketDepth(ND_SedHopperDrain); 0 m; 0 m]  # same as nipple origin
SedHopperDrainValve_Origin := SedHopperDrainAdapter_Origin + [
    MaleAdapterLength(ND_SedHopperDrain) - SocketDepth(ND_SedHopperDrain) + ValveLength(ND_SedHopperDrain);
    0 m;
    0 m
]
SedHopperDrainElbow_Origin := SedHopperDrainValve_Origin + [SocketDepth(ND_SedHopperDrain); 0 m; 0 m]  # also nipple origin
SedHopperDrainLayer := layer_new("SedHopperDrain", blue)  # same as origin for nipple to elbow
SedHopperDrainPipe := PipeSUBF(SedHopperDrainPipe_Origin, L_SedHopperDrainPipe, [0; 0]*deg, ND_SedHopperDrain, PS_Default, ["SedTankCon"])
SedHopperDrainCoupling := CouplingSUBF(SedHopperDrainCoupling_Origin, [0; 0]*deg, ND_SedHopperDrain, PS_Default, ["SedTankCon"])
SedHopperDrainNippleToAdapter := PipeSUBF(SedHopperDrainAdapter_Origin, 2*SocketDepth(ND_SedHopperDrain), [0; 0]*deg, ND_SedHopperDrain, PS_Default, ["SedTankCon"])
SedHopperDrainAdapter := MaleAdapterF(SedHopperDrainAdapter_Origin, [180; 0]*deg, ND_SedHopperDrain, PS_Default)
SedHopperDrainValve := insertdwg("VAL-Scaled-Gate-Valve-Threaded", SedHopperDrainValve_Origin, 2*outerradius(ND_SedHopperDrain)/(1.16 m), 2*outerradius(ND_SedHopperDrain)/(1.16 m), 0 deg)
SedHopperDrainNippleToElbow := PipeF(SedHopperDrainElbow_Origin, ValveSocket(ND_SedHopperDrain) + SocketDepth(ND_SedHopperDrain), [0; 0]*deg, ND_SedHopperDrain, PS_Default)
SedHopperDrainElbow := ElbowF(SedHopperDrainElbow_Origin, [270; 0; 225]*deg, ND_SedHopperDrain, PS_Default)
FreezeSedDrainHopper := FreezeLayer("SedHopperDrain")
SedHopperDrainScript := stack(SedHopperDrainLayer, SedHopperDrainPipe, SedHopperDrainCoupling, SedHopperDrainNippleToAdapter, SedHopperDrainAdapter, SedHopperDrainValve, SedHopperDrainNippleToElbow, SedHopperDrainElbow, FreezeSedDrainHopper)
# Draw the sed drain cover
SedDrainCoverLayer := layer_new("SedDrainCoverCon", ltgrey)
SedDrainCoverPline := Pline3D([
    [
        Plant_Origin[0] - L_SedHopper - T_ConcreteMin;
        Plant_Origin[1] + W_Sed - (W_SedBay + W_SedDrainCover)/2;
        Plant_Origin[2] + H_SedSludge
    ];
    [
        Plant_Origin[0] - L_SedHopper - T_ConcreteMin;
        Plant_Origin[1] + W_Sed - (W_SedBay + W_SedDrainCover)/2;
        Plant_Origin[2] + H_SedSludge + H_SedDrainCoverTotal
    ];
    [
        Plant_Origin[0] - L_SedHopper - T_ConcreteMin;
        Plant_Origin[1] + W_Sed - W_SedBay/2 - outerradius(ND_SedJetReverser)*cos(AN_SedPlate);
        Plant_Origin[2] + T_ConcreteMin + outerradius(ND_SedJetReverser)*(1 + sin(AN_SedPlate))
    ];
    [
        Plant_Origin[0] - L_SedHopper - T_ConcreteMin;
        Plant_Origin[1] + W_Sed - W_SedBay/2 + outerradius(ND_SedJetReverser)*cos(AN_SedPlate);
        Plant_Origin[2] + T_ConcreteMin + outerradius(ND_SedJetReverser)*(1 + sin(AN_SedPlate))
    ];
    [
        Plant_Origin[0] - L_SedHopper - T_ConcreteMin;
        Plant_Origin[1] + W_Sed - (W_SedBay - W_SedDrainCover)/2;
        Plant_Origin[2] + H_SedSludge + H_SedDrainCoverTotal
    ];
    [
        Plant_Origin[0] - L_SedHopper - T_ConcreteMin;
        Plant_Origin[1] + W_Sed - (W_SedBay - W_SedDrainCover)/2;
        Plant_Origin[2] + H_SedSludge
    ];
    [
        Plant_Origin[0] - L_SedHopper - T_ConcreteMin;
        Plant_Origin[1] + W_Sed - (W_SedBay + W_SedDrainCover)/2;
        Plant_Origin[2] + H_SedSludge
    ]
])
# viewfront1
ExtrudeSedDrainCover := extrude([
    Plant_Origin[1] + W_Sed - W_SedBay/2 - outerradius(ND_SedJetReverser)*cos(AN_SedPlate);
    Plant_Origin[2] + T_ConcreteMin + outerradius(ND_SedJetReverser)*(1 + sin(AN_SedPlate))
], -L_SedDrainCoverSegment)
# viewtop1
FreezeSedDrainCover := FreezeLayer("SedDrainCoverCon")
SedJetRedirect := CylinderF([
    -L_SedHopper - T_ConcreteMin + zc/2;
    W_Sed - W_SedBay/2;
    H_SedSludge + T_ConcreteMin + outerradius(ND_SedJetReverser)
] + Plant_Origin, outerradius(ND_SedJetReverser), L_SedDrainCoverSegment + zc, [0; 0]*deg)
N_SedDrainCoverSegmentOrifices
SedDrainCoverOrifices := CylinderF([
    -L_SedHopper - T_ConcreteMin + (-(L_SedDrainCoverSegment - B_SedSludgeOrifices*(N_SedDrainCoverSegmentOrifices - 1))/2);
    W_Sed - W_SedBay/2;
    H_SedSludge + T_ConcreteMin + outerradius(ND_SedJetReverser)
] + Plant_Origin, D_SedSludgeOrifice/2, H_SedDrainCoverTotal, [0; 270]*deg)
ArraySedDrainOrifices := ArrayLast(1, N_SedDrainCoverSegmentOrifices, -B_SedSludgeOrifices)
GroupSedDrainCuts := GroupAll("DeleteMe")
SubtractSedDrainCuts := SubtractF(["SedDrainCoverCon"], "DeleteMe")
ThawSedDrainCover := SelectLayer("SedDrainCoverCon")
ArraySedDrainCover := ArrayLast(1, N_SedDrainCover, -L_SedDrainCoverSegment - S_SedDrainCoverSegment)
SedDrainCoverScript := stack(SedDrainCoverLayer, SedDrainCoverPline, viewrightside1, ExtrudeSedDrainCover, viewtop1, FreezeSedDrainCover, SedJetRedirect, SedDrainCoverOrifices, ArraySedDrainOrifices, GroupSedDrainCuts, SubtractSedDrainCuts, ThawSedDrainCover, ArraySedDrainCover, FreezeSedDrainCover)
# Draw the Lamella Pipe Frame
SedPipeFrame_Origin := [
    Plant_Origin[0] - W_SedExitChannel - T_ChannelWall - L_SedPlate*cos(60 deg) - outerradius(ND_SedFrameStub) + B_SedPlate/sin(AN_SedPlate) - T_SedPlate/sin(AN_SedPlate);
    Plant_Origin[1];
    Z_SedLamellaBottom - outerradius(ND_SedPlateFrame)
]
SedPipeFrameLayer := layer_new("SedPipeFrame", yellow)
PFPipeLong1 := PipeF([SedPipeFrame_Origin[0]; Plant_Origin[1] + B_SedPlateFrameVertical; SedPipeFrame_Origin[2]], SedPipeFrame_Origin[0] - Plant_Origin[0] + L_Sed, [0; 0]*deg, ND_SedPlateFrame, PS_Default)
PFPipeLong2 := PipeF([
    SedPipeFrame_Origin[0];
    Plant_Origin[1] + W_SedBay - B_SedPlateFrameVertical;
    SedPipeFrame_Origin[2]
], SedPipeFrame_Origin[0] - Plant_Origin[0] + L_Sed, [0; 0]*deg, ND_SedPlateFrame, PS_Default)
PFPipePerpendicular := PipeF(SedPipeFrame_Origin, W_SedBay*N_SedBays, [270; 0]*deg, ND_SedPlateFrame, PS_Default)
ArrayPFPerp := ArrayLast(1, 3, -L_SedActive/2)
FreezePFLayer := FreezeLayer("SedPipeFrame")
PFStubLayer := layer_new("SedPipeFrameStub", yellow)
DrawPFStub := PipeF([
    SedPipeFrame_Origin[0];
    Plant_Origin[1] + B_SedPlateFrameVertical;
    SedPipeFrame_Origin[2] + outerradius(ND_SedPlateFrame)
], H_SedFrameStub, [0; 90]*deg, ND_SedFrameStub, 1)
ArrayPFStubRow := array_all(1, N_SedModules + 1, -B_SedFrameStub)
ArrayPFStubColumn := array_all(2, 1, W_SedBay - 2*B_SedPlateFrameVertical)
FreezePFStub := FreezeLayer("SedPipeFrameStub")
PFSLayer := layer_new("SedPipeFrameSupport", yellow)
DrawPFSFlange := CylinderF([
    SedPipeFrame_Origin[0];
    SedPipeFrame_Origin[1] + W_SedBay;
    SedPipeFrame_Origin[2] - outerdiameter(ND_SedPlateFrame)/2
], D_Flange/2, T_Flange, [0; 270]*deg)
DrawPFSPipe := CylinderF([
    SedPipeFrame_Origin[0];
    SedPipeFrame_Origin[1] + W_SedBay;
    SedPipeFrame_Origin[2] - outerdiameter(ND_SedPlateFrame)/2 - T_Flange
], outerradius(ND_SedPlateFrame), SedPipeFrame_Origin[2] - outerradius(ND_SedPlateFrame) - T_Flange - (((W_SedBay - W_SedSludge)/2 - 2*T_ConcreteMin)*tan(AN_SedSlope) + H_SedSludge + H_SedDrainCoverTotal), [0; 270]*deg)
ArrayPFS := array_all(1, 3, -L_SedActive/2)
FreezePFS := FreezeLayer("SedPipeFrameSupport")
SedPipeFrameScript :=
    stack(SedPipeFrameLayer, PFPipeLong1, PFPipeLong2, PFPipePerpendicular, ArrayPFPerp, FreezePFLayer, PFStubLayer, DrawPFStub, ArrayPFStubRow, ArrayPFStubColumn, FreezePFStub, PFSLayer, DrawPFSFlange, DrawPFSPipe, ArrayPFS, FreezePFS) if N_SedBays > 1 and Z_SedLamellaBottom - (Plant_Origin[2] + H_SedSideSlopes + 2*ConRadius(ND_SedPlateFrame)) ≠ 0 m
    stack(SedPipeFrameLayer, PFPipeLong1, PFPipeLong2, PFPipePerpendicular, ArrayPFPerp, FreezePFLayer, PFStubLayer, DrawPFStub, ArrayPFStubRow, ArrayPFStubColumn, FreezePFStub) otherwise
# Draw the sed lamella
SedLaminaLayer := layer_new("SedLamina", purple)
Lamina_Origin := [
    Plant_Origin[0] - W_SedExitChannel - T_PlantWall - cos(AN_SedPlate)*L_SedPlate;
    Plant_Origin[1];
    Z_SedLamellaBottom + Plant_Origin[2]
]
DrawSedLamina := LaminaF(Lamina_Origin, AN_SedPlate, N_SedModulePlates, N_SedModules, W_SedBay, L_SedPlate, T_SedPlate, B_SedPlate, H_SedFrameStub, ND_SedFrameStub, ND_SedModulePipe, PS_Modules, ND_SedModulePipeSpace, PS_Modules)
MirrorSedLamina := Mirror3dAll("yz", Lamina_Origin, "y")
# not arraying the lamina for now
ArraySedLamina := array_all(N_SedBays, 1, W_SedBay)
FreezeSedLam := FreezeLayer("SedLamina")
SedTankLaminaScript := stack(SedLaminaLayer, DrawSedLamina, MirrorSedLamina, viewtop1, FreezeSedLam)
# Draw the Sludge Drain
SedSludgeDrainCoupling_Origin := [
    -SocketDepth(ND_SedSludgePipe) + T_PlantWall;
    W_Sed - W_SedBay/2;
    H_SedSludge - outerradius(ND_SedSludgePipe)
] + Plant_Origin
SedSludgeDrainPipe_Origin := SedSludgeDrainCoupling_Origin + [2*SocketDepth(ND_SedSludgePipe) - CouplingLength(ND_SedSludgePipe); 0 m; 0 m]
SedSludgeDrainAdapter_Origin := SedSludgeDrainCoupling_Origin + [
    3*SocketDepth(ND_SedHopperDrain) + MaleAdapterLength(ND_SedHopperDrain) + 1.5*ValveLength(ND_SedHopperDrain) + ElbowRadius(ND_SedHopperDrain);
    0 m;
    0 m
]
SedSludgeDrainValve_Origin := SedSludgeDrainAdapter_Origin + [
    MaleAdapterLength(ND_SedSludgePipe) - SocketDepth(ND_SedSludgePipe) + ValveLength(ND_SedSludgePipe);
    0 m;
    0 m
]
SedSludgeDrainElbow_Origin := SedSludgeDrainValve_Origin + [SocketDepth(ND_SedSludgePipe); 0 m; 0 m]
SedSludgeDrainLayer := layer_new("SedSludgeDrain", blue)
SedSludgeDrainPipe := PipeSUBF(SedSludgeDrainPipe_Origin, L_SedHopper + T_ConcreteMin + SocketDepth(ND_SedSludgePipe) + max(0 m, T_PlantWall - CouplingLength(ND_SedSludgePipe)), [0; 0]*deg, ND_SedSludgePipe, PS_Default, ["SedTankCon"])
SedSludgeDrainCoupling := CouplingSUBF(SedSludgeDrainCoupling_Origin, [0; 0]*deg, ND_SedSludgePipe, PS_Default, ["SedTankCon"])
SedSludgeDrainNippleToAdapter := PipeSUBF(SedSludgeDrainAdapter_Origin, 3*SocketDepth(ND_SedHopperDrain) + MaleAdapterLength(ND_SedHopperDrain) + 1.5*ValveLength(ND_SedHopperDrain) + ElbowRadius(ND_SedHopperDrain), [0; 0]*deg, ND_SedSludgePipe, PS_Default, ["SedTankCon"])
SedSludgeDrainAdapter := MaleAdapterF(SedSludgeDrainAdapter_Origin, [180; 0]*deg, ND_SedSludgePipe, PS_Default)
SedSludgeDrainValve := insertdwg("VAL-Scaled-Gate-Valve-Threaded", SedSludgeDrainValve_Origin, 2*outerradius(ND_SedSludgePipe)/(1.16 m), 2*outerradius(ND_SedSludgePipe)/(1.16 m), 0 deg)
SedSludgeDrainNippleToElbow := PipeF(SedSludgeDrainElbow_Origin, ValveSocket(ND_SedSludgePipe) + SocketDepth(ND_SedSludgePipe), [0; 0]*deg, ND_SedSludgePipe, PS_Default)
SedSludgeDrainElbow := ElbowF(SedSludgeDrainElbow_Origin, [270; 0; 225]*deg, ND_SedSludgePipe, PS_Default)
FreezeSedSludgeDrain := FreezeLayer("SedSludgeDrain")
SedSludgeScript := stack(SedSludgeDrainLayer, SedSludgeDrainPipe, SedSludgeDrainCoupling, SedSludgeDrainNippleToAdapter, SedSludgeDrainAdapter, SedSludgeDrainValve, SedSludgeDrainNippleToElbow, SedSludgeDrainElbow, FreezeSedSludgeDrain)
# 1) Short Drain cover and orifices
# 2) Sludge drain
# 3) Lamella
# 4) Pipe Frame
# 5) Sed tank array
# 6) Inlet and exit channel weirs
# 7) Drain Pipes
# Diffuser
circle2(OriginPoint, Radius) := concat("c", sp, point(OriginPoint[:, 0]), sp, stringit(Radius))
SedDiffuser_Origin := [
    SedManPipe_Origin[0] - B_SedManifoldPort/2;
    SedManPipe_Origin[1];
    SedManPipe_Origin[2] - outerradius(ND_SedManifold)
]
SedDiffLayer := layer_new("SedManifoldDiffuserPlumbing", blue)
SedDiffOuterCircleSection := circle2([SedDiffuser_Origin[0]; SedDiffuser_Origin[1]; SedDiffuser_Origin[2]], outerradius(ND_SedDiffuser))
SedDiffOuterRectangleSection := Pline3D([
    [
        SedDiffuser_Origin[0] + L_SedDiffuserOutlet/2 + T_SedDiffuserWall/Pi_PvcStretch;
        SedDiffuser_Origin[1] + W_SedDiffuserOutlet/2 + T_SedDiffuserWall/Pi_PvcStretch;
        SedDiffuser_Origin[2] - L_SedManifoldDiffuser
    ];
    [
        SedDiffuser_Origin[0] - L_SedDiffuserOutlet/2 - T_SedDiffuserWall/Pi_PvcStretch;
        SedDiffuser_Origin[1] + W_SedDiffuserOutlet/2 + T_SedDiffuserWall/Pi_PvcStretch;
        SedDiffuser_Origin[2] - L_SedManifoldDiffuser
    ];
    [
        SedDiffuser_Origin[0] - L_SedDiffuserOutlet/2 - T_SedDiffuserWall/Pi_PvcStretch;
        SedDiffuser_Origin[1] - W_SedDiffuserOutlet/2 - T_SedDiffuserWall/Pi_PvcStretch;
        SedDiffuser_Origin[2] - L_SedManifoldDiffuser
    ];
    [
        SedDiffuser_Origin[0] + L_SedDiffuserOutlet/2 + T_SedDiffuserWall/Pi_PvcStretch;
        SedDiffuser_Origin[1] - W_SedDiffuserOutlet/2 - T_SedDiffuserWall/Pi_PvcStretch;
        SedDiffuser_Origin[2] - L_SedManifoldDiffuser
    ];
    [
        SedDiffuser_Origin[0] + L_SedDiffuserOutlet/2 + T_SedDiffuserWall/Pi_PvcStretch;
        SedDiffuser_Origin[1] + W_SedDiffuserOutlet/2 + T_SedDiffuserWall/Pi_PvcStretch;
        SedDiffuser_Origin[2] - L_SedManifoldDiffuser
    ]
])
SedDiffZoomOuter := zoom_win([SedDiffuser_Origin[0] - L_SedDiffuserOutlet; SedDiffuser_Origin[1] + W_SedDiffuserOutlet], [SedDiffuser_Origin[0] + L_SedDiffuserOutlet; SedDiffuser_Origin[1] - W_SedDiffuserOutlet])
SedDiffOuterLoft := Loft([SedDiffuser_Origin[0] + outerradius(ND_SedDiffuser); SedDiffuser_Origin[1]; SedDiffuser_Origin[2]], [
    SedDiffuser_Origin[0] + L_SedDiffuserOutlet/2 + T_SedDiffuserWall/Pi_PvcStretch;
    SedDiffuser_Origin[1] + W_SedDiffuserOutlet/2 + T_SedDiffuserWall/Pi_PvcStretch;
    SedDiffuser_Origin[2] - L_SedManifoldDiffuser
])
SedDiffuserFreeze1 := FreezeLayer("SedManifoldDiffuserPlumbing")
SedDiffInnerCircleSection := circle2([SedDiffuser_Origin[0]; SedDiffuser_Origin[1]; SedDiffuser_Origin[2]], innerdiameter(ND_SedDiffuser, PS_Default)/2)
SedDiffInnerRectangleSection := Pline3D([
    [
        SedDiffuser_Origin[0] + L_SedDiffuserOutlet/2;
        SedDiffuser_Origin[1] + W_SedDiffuserOutlet/2;
        SedDiffuser_Origin[2] - L_SedManifoldDiffuser
    ];
    [
        SedDiffuser_Origin[0] - L_SedDiffuserOutlet/2;
        SedDiffuser_Origin[1] + W_SedDiffuserOutlet/2;
        SedDiffuser_Origin[2] - L_SedManifoldDiffuser
    ];
    [
        SedDiffuser_Origin[0] - L_SedDiffuserOutlet/2;
        SedDiffuser_Origin[1] - W_SedDiffuserOutlet/2;
        SedDiffuser_Origin[2] - L_SedManifoldDiffuser
    ];
    [
        SedDiffuser_Origin[0] + L_SedDiffuserOutlet/2;
        SedDiffuser_Origin[1] - W_SedDiffuserOutlet/2;
        SedDiffuser_Origin[2] - L_SedManifoldDiffuser
    ];
    [
        SedDiffuser_Origin[0] + L_SedDiffuserOutlet/2;
        SedDiffuser_Origin[1] + W_SedDiffuserOutlet/2;
        SedDiffuser_Origin[2] - L_SedManifoldDiffuser
    ]
])
SedDiffZoomInner := zoom_win([SedDiffuser_Origin[0] - L_SedDiffuserOutlet; SedDiffuser_Origin[1] + W_SedDiffuserOutlet], [SedDiffuser_Origin[0] + L_SedDiffuserOutlet; SedDiffuser_Origin[1] - W_SedDiffuserOutlet])
SedDiffInnerLoft := Loft([
    SedDiffuser_Origin[0] + innerdiameter(ND_SedDiffuser, PS_Default)/2;
    SedDiffuser_Origin[1];
    SedDiffuser_Origin[2]
], [
    SedDiffuser_Origin[0] + L_SedDiffuserOutlet/2;
    SedDiffuser_Origin[1] + W_SedDiffuserOutlet/2;
    SedDiffuser_Origin[2] - L_SedManifoldDiffuser
])
SedDiffGroupInner := GroupAll("DeleteMe")
SedDiffSubtract := SubtractF(["SedManifoldDiffuserPlumbing"], "DeleteMe")
SedDiffSelect := SelectLayer("SedManifoldDiffuserPlumbing")
SedDiffArray := Array_All(1, N_SedManifoldPorts, -B_SedManifoldPort)
SedDiffuserFreeze2 := FreezeLayer("SedManifoldDiffuserPlumbing")
SedDiffuserScript := stack(SedDiffLayer, SedDiffOuterCircleSection, SedDiffOuterRectangleSection, SedDiffZoomOuter, SedDiffOuterLoft, SedDiffuserFreeze1, SedDiffInnerCircleSection, SedDiffInnerRectangleSection, SedDiffZoomInner, SedDiffInnerLoft, SedDiffGroupInner, SedDiffSubtract, SedDiffSelect, SedDiffArray, SedDiffuserFreeze2)
# Array the Sed Tanks and bays Diffuser
ThawAllSed := layer_thaw("Sed*")
# FreezeSedTank
ArraySedBay := Array_All(N_SedBays, 1, -W_SedBay)
ThawSedTank := layer_thaw("SedTankCon")
ArraySedTank := Array_All(N_SedTanks, 1, W_Sed + T_PlantWall)
FreezeAllSed := layer_freeze("Sed*")
AC_SedTank :=
    stack(SedTankScript, SedChannelScript, SedDrainCoverScript, SedManifoldScript, SedLaunderScript, SedHopperDrainScript, SedSludgeScript, SedPipeFrameScript, SedTankLaminaScript, SedDiffuserScript) if N_SedBays == 1 and N_SedTanks == 1
    stack(SedTankScript, SedChannelScript, SedDrainCoverScript, SedManifoldScript, SedLaunderScript, SedHopperDrainScript, SedSludgeScript, SedPipeFrameScript, SedTankLaminaScript, SedDiffuserScript, ThawAllSed, FreezeSedTank, ArraySedBay, FreezeAllSed) if N_SedBays > 1 and N_SedTanks == 1
    stack(SedTankScript, SedChannelScript, SedDrainCoverScript, SedManifoldScript, SedLaunderScript, SedHopperDrainScript, SedSludgeScript, SedPipeFrameScript, SedTankLaminaScript, SedDiffuserScript, ThawAllSed, FreezeSedTank, ThawSedTank, ArraySedTank, FreezeAllSed) if N_SedTanks > 1 and N_SedBays == 1
    stack(SedTankScript, SedChannelScript, SedDrainCoverScript, SedManifoldScript, SedLaunderScript, SedHopperDrainScript, SedSludgeScript, SedPipeFrameScript, SedTankLaminaScript, SedDiffuserScript, ThawAllSed, FreezeSedTank, ArraySedBay, ThawSedTank, ArraySedTank, FreezeAllSed) otherwise
# [component: inputs AC_SedTank]
