# Sedimentation Tank Drawing
# Concrete components of the sedimentation tank (excluding channels and launder ledge)
SedTankLayer := layer_new("SedTankCon", grey)
# viewrightside1
# ViewRightSide1
SedSlopePolyline := Pline([
    [Plant_Origin[1] + W_Sed; Plant_Origin[2]] + [T_ConcreteMin; 0 m];
    [Plant_Origin[1] + W_Sed; Plant_Origin[2]] + [-W_SedBay/2 + W_SedSludge/2; 0 m];
    [Plant_Origin[1] + W_Sed; Plant_Origin[2]] + [-W_SedBay/2 + W_SedSludge/2; H_SedSludge];
    [Plant_Origin[1] + W_Sed; Plant_Origin[2]] + [-W_SedBay/2 + W_SedSludge/2 + T_SedDrainCoverLedge; H_SedSludge];
    [Plant_Origin[1] + W_Sed; Plant_Origin[2]] + [-W_SedBay/2 + W_SedSludge/2 + T_SedDrainCoverLedge; H_SedSludge + H_SedDrainCoverTotal];
    [Plant_Origin[1] + W_Sed; Plant_Origin[2]] + [0 m; H_SedSludge + T_ConcreteMin + outerradius(ND_SedJetReverser) + H_SedSideSlopes];
    [Plant_Origin[1] + W_Sed; 0 m] + [T_ConcreteMin; H_SedSludge + T_ConcreteMin + outerradius(ND_SedJetReverser) + H_SedSideSlopes];
    [Plant_Origin[1] + W_Sed; 0 m] + [T_ConcreteMin; 0 m]
])
# viewrightside1
ExtrudeSedSlopes := extrude([Plant_Origin[0] + W_Sed; Plant_Origin[1]], -L_Sed)
MirrorSedSlopes := MirrorLast([Plant_Origin[1] + W_Sed - W_SedBay/2; Plant_Origin[2]], [Plant_Origin[1] + W_Sed - W_SedBay/2; Plant_Origin[2] + zc], "n")
# viewtop1
ArraySedSlopes := array_all(N_SedBays, 1, -W_SedBay)
# viewfront1
SedHopper := Pline([
    [Plant_Origin[0]; Plant_Origin[2] + Z_SedHopperBottom];
    [Plant_Origin[0]; Plant_Origin[2] + Z_SedHopperBottom] + [-L_SedHopper - T_SedWeir; 0 m];
    [Plant_Origin[0]; Plant_Origin[2] + Z_SedHopperBottom] + [-L_SedHopper - T_SedWeir; H_SedHopper + H_SedHopperWeir];
    [Plant_Origin[0]; Plant_Origin[2] + Z_SedHopperBottom] + [-L_SedHopper; H_SedHopper + H_SedHopperWeir];
    [Plant_Origin[0]; Plant_Origin[2] + Z_SedHopperBottom] + [-L_SedHopper; H_SedHopper];
    [Plant_Origin[0]; Plant_Origin[2] + Z_SedHopperBottom]
])
# viewfront
ExtrudeSedHopper := extrude([Plant_Origin[0]; Plant_Origin[2] + Z_SedHopperBottom] + [-L_SedHopper; H_SedHopper + H_SedHopperWeir], -W_Sed)
# viewtop
SedManifoldLedge := BoxF([
    -L_SedHopper - T_SedWeir + Plant_Origin[0];
    Plant_Origin[1];
    Z_SedManifoldPipe - ConRadius(ND_SedManifold)
], [
    -L_SedHopper - T_ConcreteMin - T_SedWeir + Plant_Origin[0];
    W_Sed + Plant_Origin[1];
    Z_SedManifoldPipe - ConRadius(ND_SedManifold) - T_ConcreteMin
], [0; 0; 0]*deg)
SedManifoldSlope := WedgeF(Plant_Origin + [-L_Sed; 0 m; H_SedDrainCoverTotal + Z_SedSludge], [L_SedEndSlope; W_Sed; H_SedEndSlope] + Plant_Origin + [-L_Sed; 0 m; H_SedDrainCoverTotal + Z_SedSludge], [0; 0; 0]*deg)
SedManifoldSlopeBase := BoxF(Plant_Origin + [-L_Sed; 0 m; 0 m], [L_SedEndSlope; W_Sed; H_SedDrainCoverTotal + Z_SedSludge] + Plant_Origin + [-L_Sed; 0 m; 0 m], [0; 0; 0]*deg)
DrawSedTank := Tank(Plant_Origin, [L_Sed; W_Sed; H_Sed], T_PlantWall)
# unionall
FreezeSedTank := FreezeLayer("SedTankCon")
# this cuts a space for the channel on the side closest to the floc tank
SedInletChannelCut := BoxF([-L_Sed + W_SedInletChannel; W_Sed; H_Sed - H_SedInletChannel] + Plant_Origin, [-L_Sed; W_Sed + T_PlantWall; H_Sed] + Plant_Origin, [0; 0; 0]*deg)
SedExitChannelCut := BoxF(Plant_Origin + [0 m; W_Sed; H_Sed - H_SedExitChannel], Plant_Origin + [-W_SedExitChannel; W_Sed + T_PlantWall; H_Sed], [0; 0; 0]*deg)
MirrorSedChannelCuts := Mirror3dAll("zx", [Plant_Origin[0]; Plant_Origin[1] + W_Sed/2], "n")
GroupSedChannelCuts := GroupAll("DeleteMe")
SubtractSedChannelCuts := SubtractF(["SedTankCon"], "DeleteMe")
SedTankScript :=
    stack(SedTankLayer, view("r"), SedSlopePolyline, view("r"), ExtrudeSedSlopes, MirrorSedSlopes, view("f"), SedHopper, view("f"), ExtrudeSedHopper, view("t"), SedManifoldLedge, SedManifoldSlope, SedManifoldSlopeBase, DrawSedTank, Union_All, FreezeSedTank, SedInletChannelCut, SedExitChannelCut, MirrorSedChannelCuts, GroupSedChannelCuts, SubtractSedChannelCuts) if N_SedBays == 1
    stack(SedTankLayer, view("r"), SedSlopePolyline, view("r"), ExtrudeSedSlopes, MirrorSedSlopes, view("t"), ArraySedSlopes, view("f"), SedHopper, view("f"), ExtrudeSedHopper, view("t"), SedManifoldLedge, SedManifoldSlope, SedManifoldSlopeBase, DrawSedTank, Union_All, FreezeSedTank, SedInletChannelCut, SedExitChannelCut, MirrorSedChannelCuts, GroupSedChannelCuts, SubtractSedChannelCuts) otherwise
# Channels and Launder Ledge
SedChannelLayer := layer_new("SedChannelsCon", grey)
InletChannelVertBox := BoxF([-L_Sed + W_SedInletChannel; W_Sed; Z_SedChannelBottom] + Plant_Origin, [-L_Sed + W_SedInletChannel + T_ChannelWall; W_Sed - W_SedBay; H_Sed] + Plant_Origin, [0; 0; 0]*deg)
ExitChannelVertBox := BoxF([-W_SedExitChannel; W_Sed; Z_SedChannelBottom] + Plant_Origin, [-W_SedExitChannel - T_ChannelWall; W_Sed - W_SedBay; H_Sed] + Plant_Origin, [0; 0; 0]*deg)
InletChannelHorizBox := BoxF([-L_Sed; W_Sed; Z_SedChannelBottom] + Plant_Origin, [-L_Sed + W_SedInletChannel + T_ChannelWall; W_Sed - W_SedBay; Z_SedChannelBottom - T_ChannelWall] + Plant_Origin, [0; 0; 0]*deg)
ExitChannelHorizBox := BoxF([0 m; W_Sed; Z_SedChannelBottom] + Plant_Origin, [-W_SedExitChannel - T_ChannelWall; W_Sed - W_SedBay; Z_SedChannelBottom - T_ChannelWall] + Plant_Origin, [0; 0; 0]*deg)
SedLaunderLedge := BoxF([-L_Sed + W_SedInletChannel + T_ChannelWall; W_Sed; Z_SedLaunder - ConRadius(ND_SedLaunder)] + Plant_Origin, [
    -L_Sed + W_SedInletChannel + T_ChannelWall + T_ConcreteMin;
    W_Sed - W_SedBay;
    Z_SedLaunder - ConRadius(ND_SedLaunder) - T_ConcreteMin
] + Plant_Origin, [0; 0; 0]*deg)
# unionall
FreezeSedChannels := FreezeLayer("SedChannelsCon")
SedChannelScript := stack(SedChannelLayer, InletChannelVertBox, ExitChannelVertBox, InletChannelHorizBox, ExitChannelHorizBox, SedLaunderLedge, Union_All, FreezeSedChannels)
# Manifold Components
SedManCoupling_Origin := [
    -L_Sed + T_ConcreteMin + ConRadius(ND_SedManifold);
    W_Sed - W_SedBay/2;
    Z_SedChannelBottom - SocketDepth(ND_SedManifold)
] + Plant_Origin
SedManNipple_Origin := [0 m; 0 m; -CouplingLength(ND_SedManifold) + 2*SocketDepth(ND_SedManifold)] + SedManCoupling_Origin
SedManFlexCoupling_Origin := [0 m; 0 m; -(SocketDepth(ND_SedManifold) + max(0 m, T_PlantWall - CouplingLength(ND_SedManifold)))] + SedManNipple_Origin
SedManVertPipe_Origin := [0 m; 0 m; -CouplingLengthFlex(ND_SedManifold) + SocketDepthFlex(ND_SedManifold)] + SedManFlexCoupling_Origin
SedManElbow_Origin := [
    SedManVertPipe_Origin[0] + ElbowRadius(ND_SedManifold);
    SedManVertPipe_Origin[1];
    Z_SedManifoldPipe
]
SedManPipe_Origin := SedManElbow_Origin + [L_SedManifoldPipe; 0 m; 0 m]  # This is the same as the cap origin
SedManRigCouplingLayer := layer_new("SedManCouplingPlu", green)
SedManRigidCoupling := CouplingSUBF(SedManCoupling_Origin, [0; 270]*deg, ND_SedManifold, PS_Default, ["SedChannelsCon"])
SedManRigCouplingFrz := FreezeLayer("SedManCouplingPlu")
SedManNippleLayer := layer_new("SedManNippleCoupling", blue)
SedManNipple := PipeSUBF(SedManNipple_Origin, SocketDepthFlex(ND_SedManifold) + SocketDepth(ND_SedManifold) + max(0 m, T_PlantWall - CouplingLength(ND_SedManifold)), [0; 270]*deg, ND_SedManifold, PS_Default, ["SedChannelsCon"])
SedManNipFrz := FreezeLayer("SedManNippleCoupling")
SedManFlexCouplingLayer := layer_new("SedManFlexCouplingPlu", black)
SedManFlexCoupling := FlexCouplingF(SedManFlexCoupling_Origin, [0; 270]*deg, ND_SedManifold)
SedManFlexCouplingFrz := FreezeLayer("SedManFlexCouplingPlu")
SedManVertLayer := layer_new("SedManVertPipePlu", blue)
SedManVertPipe := PipeF(SedManVertPipe_Origin, SedManVertPipe_Origin[2] - Z_SedManifoldPipe - ElbowRadius(ND_SedManifold), [0; 270]*deg, ND_SedManifold, PS_Default)
SedManVertFrz := FreezeLayer("SedManVertPipePlu")
SedManElbowLayer := layer_new("SedManElbowPlu", green)
SedManElbow := ElbowF(SedManElbow_Origin, [90; 0; 270]*deg, ND_SedManifold, PS_Default)
SedManElbowFrz := FreezeLayer("SedManElbowPlu")
SedManPipeLayer := layer_new("SedManPipePlu", blue)
SedManPipe := PipeF(SedManPipe_Origin, L_SedManifoldPipe, [0; 0], ND_SedManifold, PS_Default)
SedManPipeFrz := FreezeLayer("SedManPipePlu")
SedManCapLayer := layer_new("SedManCapPlu", green)
SedManCap := CapF(SedManPipe_Origin, [0; 0; 0]*deg, ND_SedManifold)
SedManCapFrz := FreezeLayer("SedManCapPlu")
SedManOrifice := CylinderF(SedManPipe_Origin + [
    -max(L_SedDiffuserOutlet/2 - ConRadius(ND_SedManifold) + outerradius(ND_SedManifold), T_ConcreteMin + outerradius(ND_SedDiffuser) + 1 cm);
    0 m;
    0 m
], D_SedManifoldPort/2, ND_SedManifold, [0; 270]*deg)
ArraySedManOrifice := array_all(1, N_SedManifoldPorts, -B_SedManifoldPort)
GroupSedManOrifices := GroupAll("DeleteMe")
CreateOrificeRow := stack(SedManOrifice, ArraySedManOrifice, GroupSedManOrifices)
SubtractSedManOrifices := stack(SubtractF(["SedManPipePlu"], "DeleteMe"), CreateOrificeRow, SubtractF(["SedManCapPlu"], "DeleteMe"))
SedManStopperLayer := layer_new("SedInletStopperPlu", blue)
SedManStopper := PipeF(SedManCoupling_Origin, HW_SedInletChannel + 5 cm + SocketDepth(ND_SedManifold), [0; 90]*deg, ND_SedManifold, PS_Default)
SedManStopperFrz := FreezeLayer("SedInletStopperPlu")
SedManifoldScript := stack(SedManRigCouplingLayer, SedManRigidCoupling, SedManRigCouplingFrz, SedManNippleLayer, SedManNipple, SedManNipFrz, SedManFlexCouplingLayer, SedManFlexCoupling, SedManFlexCouplingFrz, SedManVertLayer, SedManVertPipe, SedManVertFrz, SedManElbowLayer, SedManElbow, SedManElbowFrz, SedManPipeLayer, SedManPipe, SedManPipeFrz, SedManCapLayer, SedManCap, SedManCapFrz, CreateOrificeRow, SubtractSedManOrifices, SedManStopperLayer, SedManStopper, SedManStopperFrz)
# Launder Components
# Launder origins:
SedLaunderCoupling_Origin := [-W_SedExitChannel - SocketDepth(ND_SedLaunder); W_Sed - W_SedBay/2; Z_SedLaunder] + Plant_Origin
SedLaunderNipple_Origin := SedLaunderCoupling_Origin + [-CouplingLength(ND_SedLaunder) + 2*SocketDepth(ND_SedLaunder); 0 m; 0 m]
SedLaunderFlexCoupling_Origin := SedLaunderNipple_Origin - [SocketDepth(ND_SedLaunder) + max(0 m, T_PlantWall - CouplingLength(ND_SedLaunder)); 0 m; 0 m]
SedLaunderPipe_Origin := SedLaunderFlexCoupling_Origin - [SocketDepthFlex(ND_SedLaunder); 0 m; 0 m]
SedLaunderCap_Origin := SedLaunderPipe_Origin - [L_SedLaunder; 0 m; 0 m]
SedLaunderCouplingLayer := layer_new("SedLaunderCouplingPlu", green)
SedLaunderCoupling := CouplingSUBF(SedLaunderCoupling_Origin, [0; 0]*deg, ND_SedLaunder, PS_Default, ["SedChannelsCon"])
SedLaunderCouplingFrz := FreezeLayer("SedLaunderCouplingPlu")
SedLaunderNippleLayer := layer_new("SedLaunderNipplePlu", blue)
SedLaunderNipple := PipeSUBF(SedLaunderNipple_Origin, SocketDepth(ND_SedLaunder) + SocketDepthFlex(ND_SedLaunder) + max(0 m, T_PlantWall - CouplingLength(ND_SedLaunder)), [0; 0]*deg, ND_SedLaunder, PS_Default, ["SedChannelsCon"])
SedLaunderNippleFrz := FreezeLayer("SedLaunderNipplePlu")
SedLaunderFlexLayer := layer_new("SedLaunderFlexCouplingPlu", black)
SedLaunderFlexCoupling := FlexCouplingF(SedLaunderFlexCoupling_Origin, [0; 0]*deg, ND_SedLaunder)
SedLaunderFlexFrz := FreezeLayer("SedLaunderFlexCouplingPlu")
SedLaunderPipeLayer := layer_new("SedLaunderPipePlu", blue)
SedLaunderPipe := PipeF(SedLaunderPipe_Origin, L_SedLaunder, [0; 0]*deg, ND_SedLaunder, PS_Default)
SedLaunderPipeFrz := FreezeLayer("SedLaunderPipePlu")
SedLaunderCapLayer := layer_new("SedLaunderCapPlu", green)
SedLaunderCap := CapF(SedLaunderCap_Origin, [0; 180]*deg, ND_SedLaunder)
SedLaunderCapFrz := FreezeLayer("SedLaunderCapPlu")
SedLaunderOrifice := CylinderF([-CouplingLengthFlex(ND_SedLaunder) - D_SedLaunderOrifice; 0 m; 0 m] + SedLaunderPipe_Origin, D_SedLaunderOrifice/2, ND_SedLaunder, [30; 90]*deg)
ArraySedLaunderOrifices := array_all(1, N_SedLaunderOrifices, -B_SedLaunderOrifices)
MirrorSedLaunderOrifices := Mirror3dAll("zx", [Plant_Origin[0]; SedLaunderPipe_Origin[1]], "n")
GroupLaunderOrifices := GroupAll("DeleteMe")
SubtractLaunderOrifices := SubtractF(["SedLaunderPipePlu"], "DeleteMe")
SedLaunderCouplingCapLayer := layer_new("SedLaunderCouplingCapPlu", blue)
SedLaunderCouplingCap := CapF(SedLaunderCoupling_Origin + [
    SocketDepth(ND_SedLaunder) + CapHeight(ND_SedLaunder) - ConRadius(ND_SedLaunder) + outerradius(ND_SedLaunder);
    0 m;
    0 m
], [0; 0]*deg, ND_SedLaunder)
SedLaunderCouplingCapNipple := PipeF(SedLaunderCoupling_Origin + [
    SocketDepth(ND_SedLaunder) + CapHeight(ND_SedLaunder) - ConRadius(ND_SedLaunder) + outerradius(ND_SedLaunder);
    0 m;
    0 m
], CapHeight(ND_SedLaunder) + L_SedLaunderCapExcess, [0; 0]*deg, ND_SedLaunder, PS_Default)
SedLaunderCouplingCapFrz := FreezeLayer("SedLaunderCouplingCapPlu")
SedLaunderScript := stack(SedLaunderCouplingLayer, SedLaunderCoupling, SedLaunderCouplingFrz, SedLaunderNippleLayer, SedLaunderNipple, SedLaunderNippleFrz, SedLaunderFlexLayer, SedLaunderFlexCoupling, SedLaunderFlexFrz, SedLaunderPipeLayer, SedLaunderPipe, SedLaunderPipeFrz, SedLaunderCapLayer, SedLaunderCap, SedLaunderCapFrz, SedLaunderOrifice, ArraySedLaunderOrifices, MirrorSedLaunderOrifices, GroupLaunderOrifices, SubtractLaunderOrifices, SedLaunderCouplingCapLayer, SedLaunderCouplingCap, SedLaunderCouplingCapNipple, SedLaunderCouplingCapFrz)
# Floc Hopper Drain
SedHopperDrainCoupling_Origin := [
    -SocketDepth(ND_SedHopperDrain) + T_PlantWall;
    W_Sed - W_SedBay/2;
    Z_SedHopperBottom + outerradius(ND_SedHopperDrain)
] + Plant_Origin
SedHopperDrainPipe_Origin := SedHopperDrainCoupling_Origin + [2*SocketDepth(ND_SedHopperDrain) - CouplingLength(ND_SedHopperDrain); 0 m; 0 m]
SedHopperDrainAdapter1_Origin := SedHopperDrainCoupling_Origin + [2*SocketDepth(ND_SedHopperDrain); 0 m; 0 m]
SedHopperDrainValve_Origin := SedHopperDrainAdapter1_Origin + [
    MaleAdapterLength(ND_SedHopperDrain) - SocketDepth(ND_SedHopperDrain) + ValveLength(ND_SedHopperDrain) - ValveSocket(ND_SedHopperDrain);
    0 m;
    0 m
]
SedHopperDrainElbow_Origin := SedHopperDrainValve_Origin + [
    MaleAdapterLength(ND_SedHopperDrain) + SocketDepth(ND_SedHopperDrain) - ValveSocket(ND_SedHopperDrain);
    0 m;
    0 m
]
SedHopperDrainAdapter2_Origin := SedHopperDrainElbow_Origin + [-2*SocketDepth(ND_SedHopperDrain); 0 m; 0 m]
SedHopperDrainPipeLayer := layer_new("SedHopperDrainPipePlu", blue)
SedHopperDrainPipe := PipeSUBF(SedHopperDrainPipe_Origin, L_SedHopperDrainPipe, [0; 0]*deg, ND_SedHopperDrain, PS_Default, ["SedTankCon"])
SedHopperDrainNipple1 := PipeF(SedHopperDrainAdapter1_Origin, 2*SocketDepth(ND_SedHopperDrain), [0; 0]*deg, ND_SedHopperDrain, PS_Default)
SedHopperDrainNipple2 := PipeF(SedHopperDrainElbow_Origin, 2*SocketDepth(ND_SedHopperDrain), [0; 0]*deg, ND_SedHopperDrain, PS_Default)
SedHopperDrainFittingLayer := layer_new("SedHopperDrainFittingPlu", green)
SedHopperDrainCoupling := CouplingSUBF(SedHopperDrainCoupling_Origin, [0; 0]*deg, ND_SedHopperDrain, PS_Default, ["SedTankCon"])
SedHopperDrainElbow := ElbowF(SedHopperDrainElbow_Origin, [270; 0; 225]*deg, ND_SedHopperDrain, PS_Default)
SedHopperDrainAdapterLayer := layer_new("SedHopperDrainAdapterPlu", red)
SedHopperDrainAdapter1 := MaleAdapterF(SedHopperDrainAdapter1_Origin, [180; 0]*deg, ND_SedHopperDrain, PS_Default)
SedHopperDrainAdapter2 := MaleAdapterF(SedHopperDrainAdapter2_Origin, [0; 0]*deg, ND_SedHopperDrain, PS_Default)
SedHopperDrainValveLayer := layer_new("SedHopperDrainValvePlu", blue3)
SedHopperDrainValve := insertdwg("VAL-Scaled-Gate-Valve-Threaded", SedHopperDrainValve_Origin, 2*outerradius(ND_SedHopperDrain)/(1.16 m), 2*outerradius(ND_SedHopperDrain)/(1.16 m), 0 deg)
SedHopperDrainScript := stack(SedHopperDrainPipeLayer, SedHopperDrainPipe, SedHopperDrainNipple1, SedHopperDrainNipple2, FreezeLayer("SedHopperDrainPipePlu"), SedHopperDrainFittingLayer, SedHopperDrainCoupling, SedHopperDrainElbow, FreezeLayer("SedHopperDrainFittingPlu"), SedHopperDrainAdapterLayer, SedHopperDrainAdapter1, SedHopperDrainAdapter2, FreezeLayer("SedHopperDrainAdapterPlu"), SedHopperDrainValveLayer, SedHopperDrainValve, FreezeLayer("SedHopperDrainValvePlu"))
# Sludge Drain Cover
SedDrainCoverLayer := layer_new("SedDrainCoverCon", ltgrey)
SedDrainCoverPline := Pline3D([
    [
        Plant_Origin[0] - L_SedHopper - T_ConcreteMin;
        Plant_Origin[1] + W_Sed - (W_SedBay + W_SedDrainCover)/2;
        Plant_Origin[2] + H_SedSludge
    ];
    [
        Plant_Origin[0] - L_SedHopper - T_ConcreteMin;
        Plant_Origin[1] + W_Sed - (W_SedBay + W_SedDrainCover)/2;
        Plant_Origin[2] + H_SedSludge + H_SedDrainCoverTotal
    ];
    [
        Plant_Origin[0] - L_SedHopper - T_ConcreteMin;
        Plant_Origin[1] + W_Sed - W_SedBay/2 - outerradius(ND_SedJetReverser);
        T_ConcreteMin + outerradius(ND_SedJetReverser) + H_SedSludge
    ];
    [
        Plant_Origin[0] - L_SedHopper - T_ConcreteMin;
        Plant_Origin[1] + W_Sed - W_SedBay/2 + outerradius(ND_SedJetReverser);
        T_ConcreteMin + outerradius(ND_SedJetReverser) + H_SedSludge
    ];
    [
        Plant_Origin[0] - L_SedHopper - T_ConcreteMin;
        Plant_Origin[1] + W_Sed - (W_SedBay - W_SedDrainCover)/2;
        Plant_Origin[2] + H_SedSludge + H_SedDrainCoverTotal
    ];
    [
        Plant_Origin[0] - L_SedHopper - T_ConcreteMin;
        Plant_Origin[1] + W_Sed - (W_SedBay - W_SedDrainCover)/2;
        Plant_Origin[2] + H_SedSludge
    ];
    [
        Plant_Origin[0] - L_SedHopper - T_ConcreteMin;
        Plant_Origin[1] + W_Sed - (W_SedBay + W_SedDrainCover)/2;
        Plant_Origin[2] + H_SedSludge
    ]
])
# viewfront1
ExtrudeSedDrainCover := extrude([
    Plant_Origin[1] + W_Sed - W_SedBay/2 - outerradius(ND_SedJetReverser);
    T_ConcreteMin + outerradius(ND_SedJetReverser) + H_SedSludge
], -L_SedDrainCoverSegment)
# viewtop1
SedDrainCoverBox := BoxF(Plant_Origin + [-L_SedHopper - T_SedWeir; W_Sed - (W_SedBay + W_SedDrainCover)/2; H_SedSludge], Plant_Origin + [-L_SedHopper - T_SedWeir; W_Sed - (W_SedBay + W_SedDrainCover)/2; H_SedSludge] + [-L_SedDrainCoverSegment; W_SedDrainCover; H_SedDrainCoverTotal], [0; 0; 0]*deg)
FreezeSedDrainCover := FreezeLayer("SedDrainCoverCon")
SedJetRedirect := CylinderF([
    -L_SedHopper - T_ConcreteMin + zc/2;
    W_Sed - W_SedBay/2;
    H_SedSludge + T_ConcreteMin + outerradius(ND_SedJetReverser)
] + Plant_Origin, outerradius(ND_SedJetReverser), L_SedDrainCoverSegment + zc, [0; 0]*deg)
N_SedDrainCoverSegmentOrifices
SedDrainCoverOrifices := CylinderF([
    -L_SedHopper - T_ConcreteMin + (-(L_SedDrainCoverSegment - B_SedSludgeOrifices*(N_SedDrainCoverSegmentOrifices - 1))/2);
    W_Sed - W_SedBay/2;
    H_SedSludge + H_SedDrainCoverTotal + zc
] + Plant_Origin, D_SedSludgeOrifice/2, H_SedDrainCoverTotal + 2*zc, [0; 270]*deg)
ArraySedDrainOrifices := ArrayLast(1, N_SedDrainCoverSegmentOrifices, -B_SedSludgeOrifices)
GroupSedDrainCuts := GroupAll("DeleteMe")
SubtractSedDrainCuts := SubtractF(["SedDrainCoverCon"], "DeleteMe")
ThawSedDrainCover := SelectLayer("SedDrainCoverCon")
ArraySedDrainCover := ArrayLast(1, N_SedDrainCover, -L_SedDrainCoverSegment - S_SedDrainCoverSegment)
SedDrainCoverScript :=
    stack(SedDrainCoverLayer, SedDrainCoverBox, FreezeSedDrainCover, SedJetRedirect, SedDrainCoverOrifices, ArraySedDrainOrifices, GroupSedDrainCuts, SubtractSedDrainCuts, ThawSedDrainCover, ArraySedDrainCover, FreezeSedDrainCover) if W_SedDrainCover == outerdiameter(ND_SedJetReverser)
    stack(SedDrainCoverLayer, SedDrainCoverPline, view("r"), ExtrudeSedDrainCover, view("t"), FreezeSedDrainCover, SedJetRedirect, SedDrainCoverOrifices, ArraySedDrainOrifices, GroupSedDrainCuts, SubtractSedDrainCuts, ThawSedDrainCover, ArraySedDrainCover, FreezeSedDrainCover) otherwise
# Lamella Pipe Frame
SedPipeFrame_Origin := [
    Plant_Origin[0] - W_SedExitChannel - T_ChannelWall - L_SedPlate*cos(60 deg) - outerradius(ND_SedFrameStub) + B_SedPlate/sin(AN_SedPlate) - T_SedPlate/sin(AN_SedPlate);
    Plant_Origin[1];
    Z_SedLamellaBottom - outerradius(ND_SedPlateFrame)
]
B_SedPipesX := min(L_SedActive, L_Sed - W_SedExitChannel - T_ChannelWall - cos(AN_SedPlate)*L_SedPlate - 2*S_Fitting - 2*ConRadius(ND_SedManifold) - outerradius(ND_SedPlateFrame))/2
SedPipeFrameLayer := layer_new("SedPF", yellow)
PFPipeLong1 := PipeF([
    SedPipeFrame_Origin[0] - ShortTeeLength(ND_SedPlateFrame);
    Plant_Origin[1] + B_SedPlateFrameVertical;
    SedPipeFrame_Origin[2]
], B_SedPipesX - TeeLength(ND_SedPlateFrame), [0; 0]*deg, ND_SedPlateFrame, PS_Default)
PFPipeLong2 := PipeF([
    SedPipeFrame_Origin[0] - ShortTeeLength(ND_SedPlateFrame);
    Plant_Origin[1] + W_SedBay - B_SedPlateFrameVertical;
    SedPipeFrame_Origin[2]
], B_SedPipesX - TeeLength(ND_SedPlateFrame), [0; 0]*deg, ND_SedPlateFrame, PS_Default)
PFPipeMid1 := PipeF([
    SedPipeFrame_Origin[0] - 3*ShortTeeLength(ND_SedPlateFrame) - B_SedPipesX;
    Plant_Origin[1] + B_SedPlateFrameVertical;
    SedPipeFrame_Origin[2]
], B_SedPipesX - 2*TeeLength(ND_SedPlateFrame), [0; 0]*deg, ND_SedPlateFrame, PS_Default)
PFPipeMid2 := PipeF([
    SedPipeFrame_Origin[0] - 3*ShortTeeLength(ND_SedPlateFrame) - B_SedPipesX;
    Plant_Origin[1] + W_SedBay - B_SedPlateFrameVertical;
    SedPipeFrame_Origin[2]
], B_SedPipesX - 2*TeeLength(ND_SedPlateFrame), [0; 0]*deg, ND_SedPlateFrame, PS_Default)
PFPipeLeft1 := PipeF([
    SedPipeFrame_Origin[0] - 3*ShortTeeLength(ND_SedPlateFrame) - 2*B_SedPipesX;
    Plant_Origin[1] + B_SedPlateFrameVertical;
    SedPipeFrame_Origin[2]
], SedPipeFrame_Origin[0] - ShortTeeLength(ND_SedPlateFrame) - 2*B_SedPipesX - (Plant_Origin[0] - L_Sed) - TeeLength(ND_SedPlateFrame), [0; 0]*deg, ND_SedPlateFrame, PS_Default)
PFPipeLeft2 := PipeF([
    SedPipeFrame_Origin[0] - 3*ShortTeeLength(ND_SedPlateFrame) - 2*B_SedPipesX;
    Plant_Origin[1] + W_SedBay - B_SedPlateFrameVertical;
    SedPipeFrame_Origin[2]
], SedPipeFrame_Origin[0] - ShortTeeLength(ND_SedPlateFrame) - 2*B_SedPipesX - (Plant_Origin[0] - L_Sed) - TeeLength(ND_SedPlateFrame), [0; 0]*deg, ND_SedPlateFrame, PS_Default)
DrawPFStub := PipeF([
    SedPipeFrame_Origin[0];
    Plant_Origin[1] + B_SedPlateFrameVertical;
    SedPipeFrame_Origin[2] + outerradius(ND_SedPlateFrame)
], H_SedFrameStub, [0; 90]*deg, ND_SedFrameStub, 1)
ArrayPFStubRow := ArrayLast(1, N_SedModules + 1, -B_SedFrameStub)
ArrayPFStubColumn := ArrayLast(2, 1, W_SedBay - 2*B_SedPlateFrameVertical)
ArrayPFPieces := array_all(N_SedBays, 1, W_SedBay)
PipeFrameArrayPieces :=
    stack(SedPipeFrameLayer, PFPipeLong1, PFPipeLong2, PFPipeMid1, PFPipeMid2, PFPipeLeft1, PFPipeLeft2, DrawPFStub, ArrayPFStubRow, ArrayPFStubColumn) if N_SedBays == 1
    stack(SedPipeFrameLayer, PFPipeLong1, PFPipeLong2, PFPipeMid1, PFPipeMid2, PFPipeLeft1, PFPipeLeft2, DrawPFStub, ArrayPFStubRow, ArrayPFStubColumn, ArrayPFPieces) otherwise
PFPipePerpendicular := PipeF(SedPipeFrame_Origin + [0; B_SedPlateFrameVertical + ShortTeeLength(ND_SedPlateFrame); 0], W_SedBay - 2*B_SedPlateFrameVertical - TeeLength(ND_SedPlateFrame), [270; 0]*deg, ND_SedPlateFrame, PS_Default)
ArrayPFPerp := ArrayLastGen(N_SedBays, 3, W_SedBay, -B_SedPipesX)
FreezeSedPipeFrame := FreezeLayer("SedPF")
PipeFrameTeeLayer := layer_new("SedPFTee", yellow)
SedPFTee2 := TeeF(SedPipeFrame_Origin + [-B_SedPipesX; B_SedPlateFrameVertical + ShortTeeLength(ND_SedPlateFrame); 0], [0; 0; 0]*deg, ND_SedPlateFrame, PS_Default)
SedPFTee3 := TeeF(SedPipeFrame_Origin + [
    -TeeLength(ND_SedPlateFrame) - B_SedPipesX;
    B_SedPlateFrameVertical - ShortTeeLength(ND_SedPlateFrame);
    0
], [180; 0; 0]*deg, ND_SedPlateFrame, PS_Default)
ArrayPFTees := array_all(1, 2, -B_SedPipesX)
SedPFTee1 := TeeF([
    SedPipeFrame_Origin[0] - ShortTeeLength(ND_SedPlateFrame);
    Plant_Origin[1] + B_SedPlateFrameVertical;
    SedPipeFrame_Origin[2]
], [90; 0; 0]*deg, ND_SedPlateFrame, PS_Default)
MirrorPFTees := Mirror3dAll("zx", [Plant_Origin[0]; Plant_Origin[1] + 0.5*W_SedBay], "n")
ArrayPFTeeBay := array_all(N_SedBays, 1, W_SedBay)
PipeFrameTeeFrz := FreezeLayer("SedPFTee")
SedPFTees := stack(PipeFrameTeeLayer, SedPFTee2, SedPFTee3, ArrayPFTees, SedPFTee1, MirrorPFTees, ArrayPFTeeBay, PipeFrameTeeFrz)
PFSLayer := layer_new("SedPFSupport", yellow)
DrawPFSFlange := CylinderF([
    SedPipeFrame_Origin[0];
    SedPipeFrame_Origin[1] + W_Sed - W_SedBay;
    SedPipeFrame_Origin[2] - outerdiameter(ND_SedPlateFrame)/2
], D_Flange/2, T_Flange, [0; 270]*deg)
DrawPFSPipe := CylinderF([
    SedPipeFrame_Origin[0];
    SedPipeFrame_Origin[1] + W_SedBay;
    SedPipeFrame_Origin[2] - outerdiameter(ND_SedPlateFrame)/2 - T_Flange
], outerradius(ND_SedPlateFrame), SedPipeFrame_Origin[2] - outerradius(ND_SedPlateFrame) - T_Flange - (((W_SedBay - W_SedSludge)/2 - 2*T_ConcreteMin)*tan(AN_SedSlope) + H_SedSludge + H_SedDrainCoverTotal), [0; 270]*deg)
ArrayPFS := array_all(1, 3, -min(L_SedActive, L_Sed - W_SedExitChannel - T_ChannelWall - cos(AN_SedPlate)*L_SedPlate - 2*S_Fitting - 2*ConRadius(ND_SedManifold) - outerradius(ND_SedPlateFrame))/2)
FreezePFS := FreezeLayer("SedPFSupport")
SedPipeFrameScript :=
    stack(SedPFTees, PipeFrameArrayPieces, PFPipePerpendicular, ArrayPFPerp, FreezeSedPipeFrame, PFSLayer, DrawPFSFlange, DrawPFSPipe, ArrayPFS, FreezePFS) if N_SedBays > 1 and Z_SedLamellaBottom - (Plant_Origin[2] + H_SedSideSlopes + 2*ConRadius(ND_SedPlateFrame)) ≠ 0 m
    stack(SedPFTees, PipeFrameArrayPieces, PFPipePerpendicular, ArrayPFPerp, FreezeSedPipeFrame) otherwise
# Lamella
Lamina_Origin := [
    Plant_Origin[0] - W_SedExitChannel - T_PlantWall - cos(AN_SedPlate)*L_SedPlate;
    Plant_Origin[1] + W_Sed - W_SedBay;
    Z_SedLamellaBottom + Plant_Origin[2]
]
SedModCap_Origin := Lamina_Origin + [
    H_SedFrameStub/tan(AN_SedPlate) + cos(AN_SedPlate)^2*outerdiameter(ND_SedFrameStub) + ConRadius(ND_SedModulePipe)*cos(AN_SedPlate) + sin(AN_SedPlate)*(CapHeight(ND_SedModulePipe) - ConRadius(ND_SedModulePipe) + outerradius(ND_SedModulePipe));
    S_Fitting + ConRadius(ND_SedModulePipe);
    H_SedFrameStub + sin(AN_SedPlate)*cos(AN_SedPlate)*outerdiameter(ND_SedFrameStub) + ConRadius(ND_SedModulePipe)*sin(AN_SedPlate) - cos(AN_SedPlate)*(CapHeight(ND_SedModulePipe) - ConRadius(ND_SedModulePipe) + outerradius(ND_SedModulePipe))
]
SedLaminaLayer := layer_new("SedModLamella", purple)
MakeSedLamina := BoxF(Lamina_Origin, Lamina_Origin + [-T_SedPlate; W_SedBay; L_SedPlate], [0; 90 deg - AN_SedPlate; 0])
ArraySedLamina := ArrayLast(1, N_SedModulePlates, -B_SedPlate/sin(AN_SedPlate))
SedLaminaFrz := FreezeLayer("SedModLamella")
SedModCapLayer := layer_new("SedModCapPlu", red)
SedModCapRight := CapF(SedModCap_Origin, [0; 0; 0], ND_SedModulePipe)
SedModCapLeft := CapF(SedModCap_Origin - [
    B_SedPlate*(N_SedModulePlates - 1) + T_SedPlate + 2*(CapHeight(ND_SedModulePipe) - ConRadius(ND_SedModulePipe) + outerradius(ND_SedModulePipe));
    0 m;
    0 m
], [0; 180 deg; 0], ND_SedModulePipe)
SedModCapFrz := FreezeLayer("SedModCapPlu")
SedModPipeLayer := layer_new("SedModPipePlu", blue)
SedModPipe := PipeF(SedModCap_Origin, B_SedPlate*(N_SedModulePlates - 1) + T_SedPlate + 2*(CapHeight(ND_SedModulePipe) - ConRadius(ND_SedModulePipe) + outerradius(ND_SedModulePipe)), [0; 0; 0], ND_SedModulePipe, PS_Modules)
SedModPipeFrz := FreezeLayer("SedModPipePlu")
SedModSpacerLayer := layer_new("SedModSpacerPlu", blue)
SedModSpacers := PipeF(SedModCap_Origin - [CapHeight(ND_SedModulePipe) + T_SedPlate - CapThickness(ND_SedModulePipe); 0; 0], B_SedPlate - T_SedPlate, [0; 0; 0], ND_SedModulePipeSpacer, PS_Modules)
ArraySedModSpacers := ArrayLast(1, N_SedModulePlates - 1, -B_SedPlate)
SedModSpacerFrz := FreezeLayer("SedModSpacerPlu")
ThawSedModPiping := ThawMultiple(["SedMod*Plu"])
RotateSedModPiping := Rotate_All([SedModCap_Origin[0]; SedModCap_Origin[2]; SedModCap_Origin[1]], AN_SedPlate - 90 deg)
MirrorSedModPipingUp := MirrorAll([
    SedModCap_Origin[0] + (B_SedPlate*(N_SedModulePlates - 1) + T_SedPlate + 2*(CapHeight(ND_SedModulePipe) - ConRadius(ND_SedModulePipe) + outerradius(ND_SedModulePipe)))*cos(AN_SedPlate);
    SedModCap_Origin[2] + (B_SedPlate*(N_SedModulePlates - 1) + T_SedPlate + 2*(CapHeight(ND_SedModulePipe) - ConRadius(ND_SedModulePipe) + outerradius(ND_SedModulePipe)))*sin(AN_SedPlate)
], [
    SedModCap_Origin[0] + (B_SedPlate*(N_SedModulePlates - 1) + T_SedPlate + 2*(CapHeight(ND_SedModulePipe) - ConRadius(ND_SedModulePipe) + outerradius(ND_SedModulePipe)))*cos(AN_SedPlate);
    SedModCap_Origin[2] + (B_SedPlate*(N_SedModulePlates - 1) + T_SedPlate + 2*(CapHeight(ND_SedModulePipe) - ConRadius(ND_SedModulePipe) + outerradius(ND_SedModulePipe)))*sin(AN_SedPlate)
] + [zc; -zc/tan(AN_SedPlate)], "n")
DoubleSedModPiping := array_all(2, 1, W_SedPlate - 2*(S_Fitting + ConRadius(ND_SedModulePipe)))
ThawSedModLamella := ThawMultiple(["SedModLamella"])
ArraySedMod := array_all(1, N_SedModules, -B_SedPlate*N_SedModulePlates/sin(AN_SedPlate))
FreezeSedModComponents := FreezeMultiple(["SedMod*"])
SedTankLaminaScript := stack(SedLaminaLayer, MakeSedLamina, ArraySedLamina, SedLaminaFrz, SedModCapLayer, SedModCapRight, SedModCapLeft, SedModCapFrz, SedModPipeLayer, SedModPipe, SedModPipeFrz, SedModSpacerLayer, SedModSpacers, ArraySedModSpacers, SedModSpacerFrz, ThawSedModPiping, view("f"), RotateSedModPiping, MirrorSedModPipingUp, view("t"), DoubleSedModPiping, ThawSedModLamella, ArraySedMod, FreezeSedModComponents)
# Sludge Drain
L_SedSludgeValvePipe := 2*SocketDepth(ND_SedSludgePipe) + 2*MaleAdapterLength(ND_SedHopperDrain) + ValveLength(ND_SedHopperDrain) - 2*ValveSocket(ND_SedHopperDrain) + SocketDepth(ND_SedHopperDrain) + ElbowRadius(ND_SedHopperDrain) + ConRadius(ND_SedHopperDrain)
SedSludgeDrainCoupling_Origin := [
    -SocketDepth(ND_SedSludgePipe) + T_PlantWall;
    W_Sed - W_SedBay/2;
    H_SedSludge - outerradius(ND_SedSludgePipe)
] + Plant_Origin
SedSludgeDrainPipe_Origin := SedSludgeDrainCoupling_Origin + [2*SocketDepth(ND_SedSludgePipe) - CouplingLength(ND_SedSludgePipe); 0 m; 0 m]
SedSludgeDrainAdapter1_Origin := SedSludgeDrainCoupling_Origin + [L_SedSludgeValvePipe; 0 m; 0 m]
SedSludgeDrainValve_Origin := SedSludgeDrainAdapter1_Origin + [
    MaleAdapterLength(ND_SedSludgePipe) - SocketDepth(ND_SedSludgePipe) + ValveLength(ND_SedSludgePipe) - ValveSocket(ND_SedSludgePipe);
    0 m;
    0 m
]
SedSludgeDrainElbow_Origin := SedSludgeDrainValve_Origin + [
    MaleAdapterLength(ND_SedSludgePipe) + SocketDepth(ND_SedSludgePipe) - ValveSocket(ND_SedSludgePipe);
    0 m;
    0 m
]
SedSludgeDrainAdapter2_Origin := SedSludgeDrainElbow_Origin + [-2*SocketDepth(ND_SedSludgePipe); 0 m; 0 m]
SedSludgePipeLayer := layer_new("SedSludgePipePlu", blue)
SedSludgeDrainPipe := PipeSUBF(SedSludgeDrainPipe_Origin, L_SedHopper + T_ConcreteMin + SocketDepth(ND_SedSludgePipe) + max(0 m, T_PlantWall - CouplingLength(ND_SedSludgePipe)), [0; 0]*deg, ND_SedSludgePipe, PS_Default, ["SedTankCon"])
SedSludgeValvePipe := PipeF(SedSludgeDrainAdapter1_Origin, L_SedSludgeValvePipe, [0; 0]*deg, ND_SedSludgePipe, PS_Default)
SedSludgeNipple := PipeF(SedSludgeDrainElbow_Origin, 2*SocketDepth(ND_SedSludgePipe), [0; 0]*deg, ND_SedSludgePipe, PS_Default)
SedSludgeFittingLayer := layer_new("SedSludgeFittingPlu", green)
SedSludgeDrainCoupling := CouplingSUBF(SedSludgeDrainCoupling_Origin, [0; 0]*deg, ND_SedSludgePipe, PS_Default, ["SedTankCon"])
SedSludgeDrainElbow := ElbowF(SedSludgeDrainElbow_Origin, [270; 0; 225]*deg, ND_SedSludgePipe, PS_Default)
SedSludgeAdapterLayer := layer_new("SedSludgeAdapterPlu", red)
SedSludgeDrainAdapter1 := MaleAdapterF(SedSludgeDrainAdapter1_Origin, [180; 0]*deg, ND_SedSludgePipe, PS_Default)
SedSludgeDrainAdapter2 := MaleAdapterF(SedSludgeDrainAdapter2_Origin, [0; 0]*deg, ND_SedSludgePipe, PS_Default)
SedSludgeValveLayer := layer_new("SedSludgeValvePlu", blue3)
SedSludgeDrainValve := insertdwg("VAL-Scaled-Gate-Valve-Threaded", SedSludgeDrainValve_Origin, 2*outerradius(ND_SedSludgePipe)/(1.16 m), 2*outerradius(ND_SedSludgePipe)/(1.16 m), 0 deg)
SedSludgeScript := stack(SedSludgePipeLayer, SedSludgeDrainPipe, SedSludgeValvePipe, SedSludgeNipple, FreezeLayer("SedSludgePipePlu"), SedSludgeFittingLayer, SedSludgeDrainCoupling, SedSludgeDrainElbow, FreezeLayer("SedSludgeFittingPlu"), SedSludgeAdapterLayer, SedSludgeDrainAdapter1, SedSludgeDrainAdapter2, FreezeLayer("SedSludgeAdapterPlu"), SedSludgeValveLayer, SedSludgeDrainValve, FreezeLayer("SedSludgeValvePlu"))
# Diffuser
SedDiffuser_Origin := SedManPipe_Origin + [
    -max(L_SedDiffuserOutlet/2 - ConRadius(ND_SedManifold) + outerradius(ND_SedManifold), T_ConcreteMin + outerradius(ND_SedDiffuser) + 1 cm);
    0 m;
    -outerradius(ND_SedManifold)
]
SedDiffLayer := layer_new("SedManifoldDiffuserPlu", blue)
SedDiffOuterCircleSection := circle([SedDiffuser_Origin[0]; SedDiffuser_Origin[1]; SedDiffuser_Origin[2]], outerradius(ND_SedDiffuser))
SedDiffOuterRectangleSection := Pline3D([
    [
        SedDiffuser_Origin[0] + L_SedDiffuserOutlet/2 + T_SedDiffuserWall/Pi_PvcStretch;
        SedDiffuser_Origin[1] + W_SedDiffuserOutlet/2 + T_SedDiffuserWall/Pi_PvcStretch;
        SedDiffuser_Origin[2] - L_SedManifoldDiffuser
    ];
    [
        SedDiffuser_Origin[0] - L_SedDiffuserOutlet/2 - T_SedDiffuserWall/Pi_PvcStretch;
        SedDiffuser_Origin[1] + W_SedDiffuserOutlet/2 + T_SedDiffuserWall/Pi_PvcStretch;
        SedDiffuser_Origin[2] - L_SedManifoldDiffuser
    ];
    [
        SedDiffuser_Origin[0] - L_SedDiffuserOutlet/2 - T_SedDiffuserWall/Pi_PvcStretch;
        SedDiffuser_Origin[1] - W_SedDiffuserOutlet/2 - T_SedDiffuserWall/Pi_PvcStretch;
        SedDiffuser_Origin[2] - L_SedManifoldDiffuser
    ];
    [
        SedDiffuser_Origin[0] + L_SedDiffuserOutlet/2 + T_SedDiffuserWall/Pi_PvcStretch;
        SedDiffuser_Origin[1] - W_SedDiffuserOutlet/2 - T_SedDiffuserWall/Pi_PvcStretch;
        SedDiffuser_Origin[2] - L_SedManifoldDiffuser
    ];
    [
        SedDiffuser_Origin[0] + L_SedDiffuserOutlet/2 + T_SedDiffuserWall/Pi_PvcStretch;
        SedDiffuser_Origin[1] + W_SedDiffuserOutlet/2 + T_SedDiffuserWall/Pi_PvcStretch;
        SedDiffuser_Origin[2] - L_SedManifoldDiffuser
    ]
])
SedDiffZoomOuter := ZoomWindow([SedDiffuser_Origin[0] - L_SedDiffuserOutlet; SedDiffuser_Origin[1] + W_SedDiffuserOutlet], [SedDiffuser_Origin[0] + L_SedDiffuserOutlet; SedDiffuser_Origin[1] - W_SedDiffuserOutlet])
SedDiffOuterLoft := Loft([SedDiffuser_Origin[0] + outerradius(ND_SedDiffuser); SedDiffuser_Origin[1]; SedDiffuser_Origin[2]], [
    SedDiffuser_Origin[0] + L_SedDiffuserOutlet/2 + T_SedDiffuserWall/Pi_PvcStretch;
    SedDiffuser_Origin[1] + W_SedDiffuserOutlet/2 + T_SedDiffuserWall/Pi_PvcStretch;
    SedDiffuser_Origin[2] - L_SedManifoldDiffuser
])
SedDiffuserFreeze1 := FreezeLayer("SedManifoldDiffuserPlu")
SedDiffInnerCircleSection := circle([SedDiffuser_Origin[0]; SedDiffuser_Origin[1]; SedDiffuser_Origin[2]], innerdiameter(ND_SedDiffuser, PS_Default)/2)
SedDiffInnerRectangleSection := Pline3D([
    [
        SedDiffuser_Origin[0] + L_SedDiffuserOutlet/2;
        SedDiffuser_Origin[1] + W_SedDiffuserOutlet/2;
        SedDiffuser_Origin[2] - L_SedManifoldDiffuser
    ];
    [
        SedDiffuser_Origin[0] - L_SedDiffuserOutlet/2;
        SedDiffuser_Origin[1] + W_SedDiffuserOutlet/2;
        SedDiffuser_Origin[2] - L_SedManifoldDiffuser
    ];
    [
        SedDiffuser_Origin[0] - L_SedDiffuserOutlet/2;
        SedDiffuser_Origin[1] - W_SedDiffuserOutlet/2;
        SedDiffuser_Origin[2] - L_SedManifoldDiffuser
    ];
    [
        SedDiffuser_Origin[0] + L_SedDiffuserOutlet/2;
        SedDiffuser_Origin[1] - W_SedDiffuserOutlet/2;
        SedDiffuser_Origin[2] - L_SedManifoldDiffuser
    ];
    [
        SedDiffuser_Origin[0] + L_SedDiffuserOutlet/2;
        SedDiffuser_Origin[1] + W_SedDiffuserOutlet/2;
        SedDiffuser_Origin[2] - L_SedManifoldDiffuser
    ]
])
SedDiffZoomInner := ZoomWindow([SedDiffuser_Origin[0] - L_SedDiffuserOutlet; SedDiffuser_Origin[1] + W_SedDiffuserOutlet], [SedDiffuser_Origin[0] + L_SedDiffuserOutlet; SedDiffuser_Origin[1] - W_SedDiffuserOutlet])
SedDiffInnerLoft := Loft([
    SedDiffuser_Origin[0] + innerdiameter(ND_SedDiffuser, PS_Default)/2;
    SedDiffuser_Origin[1];
    SedDiffuser_Origin[2]
], [
    SedDiffuser_Origin[0] + L_SedDiffuserOutlet/2;
    SedDiffuser_Origin[1] + W_SedDiffuserOutlet/2;
    SedDiffuser_Origin[2] - L_SedManifoldDiffuser
])
SedDiffGroupInner := GroupAll("DeleteMe")
SedDiffSubtract := SubtractF(["SedManifoldDiffuserPlu"], "DeleteMe")
SedDiffSelect := SelectLayer("SedManifoldDiffuserPlu")
SedDiffArray := Array_All(1, N_SedManifoldPorts, -B_SedManifoldPort)
SedDiffuserFreeze2 := FreezeLayer("SedManifoldDiffuserPlu")
SedDiffuserScript := stack(SedDiffLayer, SedDiffOuterCircleSection, SedDiffOuterRectangleSection, SedDiffZoomOuter, SedDiffOuterLoft, SedDiffuserFreeze1, SedDiffInnerCircleSection, SedDiffInnerRectangleSection, SedDiffZoomInner, SedDiffInnerLoft, SedDiffGroupInner, SedDiffSubtract, SedDiffSelect, SedDiffArray, SedDiffuserFreeze2)
# Pipe Frame Ledges
SelectSedTank := SelectLayer("SedTankCon")
SedLowerLedge := BoxF([
    SedPipeFrame_Origin[0] + ConRadius(ND_SedPlateFrame);
    Plant_Origin[1];
    SedPipeFrame_Origin[2] - ConRadius(ND_SedPlateFrame)
], [
    Plant_Origin[0] - L_Sed;
    Plant_Origin[1] + T_ConcreteMin;
    SedPipeFrame_Origin[2] - ConRadius(ND_SedPlateFrame) - T_ConcreteMin
], [0; 0; 0]*deg)
SedUpperLedge := BoxF([
    SedPipeFrame_Origin[0] + ConRadius(ND_SedPlateFrame);
    Plant_Origin[1] + W_Sed;
    SedPipeFrame_Origin[2] - ConRadius(ND_SedPlateFrame)
], [
    Plant_Origin[0] - L_Sed;
    Plant_Origin[1] + W_Sed - T_ConcreteMin;
    SedPipeFrame_Origin[2] - ConRadius(ND_SedPlateFrame) - T_ConcreteMin
], [0; 0; 0]*deg)
# FreezeSedTank
SedPipeFrameLedges := stack(SelectSedTank, SedLowerLedge, SedUpperLedge, FreezeSedTank)
# Floc Skimmer
# The floc skimmer is a 2 inch nominal diameter pipe that starts at a coupling in the wall of the sedimentation tank under the exit channel, wraps around the exit channel and ends a few centimeters below the surface of the water in the sed tank.Its purpose is to capture any flocs that pass up through the plate settlers when the cap on the top of the pipe is removed.
H_SkimmerToSurface := (HW_Sed - SedLaunderCoupling_Origin[2] - outerradius(ND_SedLaunder))/2 = 2.1358 cm
S_SkimmerToLaunder := 5 cm
ND_SedSkimmer := 2 in
SedSkimmerCoupling_Origin := [
    Plant_Origin[0] + T_PlantWall - SocketDepth(ND_SedSkimmer);
    SedLaunderCoupling_Origin[1] - outerradius(ND_SedLaunder) - S_SkimmerToLaunder;
    Plant_Origin[2] + Z_SedChannelBottom - T_ChannelWall - S_SkimmerToLaunder - outerradius(ND_SedSkimmer)
]
SedSkimmerCap_Origin := [
    Plant_Origin[0] - W_SedExitChannel - T_ChannelWall - CapDiameter(ND_SedSkimmer)/2;
    SedSkimmerCoupling_Origin[1];
    Plant_Origin[2] + HW_Sed - H_SkimmerToSurface
]
SedSkimmerHorizPipe_Origin := [
    SedSkimmerCoupling_Origin[0] - CouplingLength(ND_SedSkimmer) + 2*SocketDepth(ND_SedSkimmer);
    SedSkimmerCoupling_Origin[1];
    SedSkimmerCoupling_Origin[2]
]
SedSkimmerElbow_Origin := [
    SedSkimmerCap_Origin[0] + ElbowRadius(ND_SedSkimmer);
    SedSkimmerHorizPipe_Origin[1];
    SedSkimmerHorizPipe_Origin[2]
]
SedSkimmerVertPipe_Origin := SedSkimmerCap_Origin
SedSkimmerFittingsLayer := layer_new("SedSkimmerFittingsPlu", green)
DrawSedSkimmerCap := CapF(SedSkimmerCap_Origin, [0; -90]*deg, ND_SedSkimmer)
DrawSedSkimmerElbow := ElbowF(SedSkimmerElbow_Origin, [90; 0; -90]*deg, ND_SedSkimmer, PS_Default)
CouplingSUBF(SedSkimmerCoupling_Origin, [0; 0; 90]*deg, ND_SedSkimmer, PS_Default, ["SedTankCon"])
SedSkimmerFittingsFrz := FreezeLayer("SedSkimmerFittingsPlu")
SedSkimmerCouplingLayer := layer_new("SedSkimmerCouplingPlu", green)
DrawSedSkimmerCoupling :=
    Local ← CouplingSUBF(SedSkimmerCoupling_Origin, [0; 0; 90]*deg, ND_SedSkimmer, PS_Default, ["SedTankCon"])
    if N_SedBays > 1
        for i ∈ 1 .. N_SedBays - 1
            Local ← stack(Local, CouplingSUBF(SedSkimmerCoupling_Origin - [0; W_SedBay*i; 0], [0; 0; 90]*deg, ND_SedSkimmer, PS_Default, ["SedTankCon"]))
    return Local
SedSkimmerCouplingFrz := FreezeLayer("SedSkimmerCouplingPlu")
SedSkimmerHPipeLayer := layer_new("SedSkimmerHPipesPlu", blue)
DrawSedSkimmerHorizPipe :=
    Local ← PipeSUBF(SedSkimmerHorizPipe_Origin, SedSkimmerHorizPipe_Origin[0] - SedSkimmerElbow_Origin[0], [0; 0]*deg, ND_SedSkimmer, PS_Default, ["SedTankCon"])
    if N_SedBays > 1
        for i ∈ 1 .. N_SedBays - 1
            Local ← stack(Local, PipeSUBF(SedSkimmerHorizPipe_Origin - [0; W_SedBay*i; 0], SedSkimmerHorizPipe_Origin[0] - SedSkimmerElbow_Origin[0], [0; 0]*deg, ND_SedSkimmer, PS_Default, ["SedTankCon"]))
    return Local
SedSkimmerHPipeFrz := FreezeLayer("SedSkimmerHPipesPlu")
SedSkimmerVPipeLayer := layer_new("SedSkimmerVPipesPlu", blue)
DrawSedSkimmerVertPipe := PipeSUBF(SedSkimmerVertPipe_Origin, SedSkimmerVertPipe_Origin[2] - SedSkimmerElbow_Origin[2] - ElbowRadius(ND_SedSkimmer), [0; -90]*deg, ND_SedSkimmer, PS_Default, ["SedLamina"])
SedSkimmerVPipeFrz := FreezeLayer("SedSkimmerVPipesPlu")
SedSkimmerScript := stack(SedSkimmerFittingsLayer, DrawSedSkimmerCap, DrawSedSkimmerElbow, SedSkimmerFittingsFrz, SedSkimmerCouplingLayer, DrawSedSkimmerCoupling, SedSkimmerCouplingFrz, SedSkimmerHPipeLayer, DrawSedSkimmerHorizPipe, SedSkimmerHPipeFrz, SedSkimmerVPipeLayer, DrawSedSkimmerVertPipe, SedSkimmerVPipeFrz)
# Array Sed Tanks and Bays
ThawAllSed := ThawMultiple(["Sed*"])
FreezeSedPieces := FreezeMultiple(["SedTankCon"; "SedPF*"; "SedMod*"; "SedManifoldDiffuser*"; "SedSkimmerCouplingPlu"; "SedSkimmerHPipesPlu"])
ArraySedBay := Array_All(N_SedBays, 1, -W_SedBay)
ThawSedTank := ThawMultiple(["SedTankCon"; "SedSkimmerCouplingPlu"; "SedSkimmerHPipesPlu"])
ArraySedTank := Array_All(N_SedTanks, 1, W_Sed + T_PlantWall)
FreezeAllSed := FreezeMultiple(["Sed*"])
FreezeSedTankCon := FreezeLayer("SedTankCon")
# Inlet and Exit Channel Weirs
SedIChannelWeirParallel_Origin := [
    Plant_Origin[0] - L_Sed + W_SedInletChannelPreWeir;
    Plant_Origin[1] + L_SedChannel;
    Plant_Origin[2] + Z_SedChannelBottom
]
SedIChannelWeirParallel_Dim := [T_SedWeir; -L_SedChannel + W_SedInletChannelDrainBox; H_SedWeirInlet]
SedIChannelWeirPerp_Origin := [
    Plant_Origin[0] - L_Sed;
    Plant_Origin[1] + W_SedInletChannelDrainBox;
    Plant_Origin[2] + Z_SedChannelBottom
]
SedIChannelWeirPerp_Dim :=
    [W_SedInletChannelPreWeir; T_SedWeir; H_SedWeirInlet] if EN_InletChannelGeom == Parallel_Weir
    [W_SedInletChannel; T_SedWeir; H_SedWeirInlet] otherwise
SelectSedChannelLayer := SelectLayer("SedChannelsCon")
SedInletParallelWeir := BoxF(SedIChannelWeirParallel_Origin, SedIChannelWeirParallel_Origin + SedIChannelWeirParallel_Dim, [0; 0; 0]*deg)
SedInletPerpWeir := BoxF(SedIChannelWeirPerp_Origin, SedIChannelWeirPerp_Origin + SedIChannelWeirPerp_Dim, [0; 0; 0]*deg)
SedEChannelWeirParallel_Origin := [
    Plant_Origin[0] - W_SedExitChannelPostWeir;
    Plant_Origin[1] + L_SedChannel;
    Plant_Origin[2] + Z_SedChannelBottom
]
SedEChannelWeirParallel_Dim := [-T_SedWeir; -L_SedChannel + W_SedExitChannelDrainBox; H_SedWeirExit]
SedEChannelWeirPerp_Origin := [
    Plant_Origin[0];
    Plant_Origin[1] + W_SedExitChannelDrainBox + T_SedWeir;
    Plant_Origin[2] + Z_SedChannelBottom
]
SedEChannelWeirPerp_Dim :=
    [-W_SedExitChannelPostWeir; -T_SedWeir; H_SedWeirExit] if EN_ExitChannelGeom == Parallel_Weir
    [-W_SedExitChannel; -T_SedWeir; H_SedWeirExit] otherwise
SedExitParallelWeir := BoxF(SedEChannelWeirParallel_Origin, SedEChannelWeirParallel_Origin + SedEChannelWeirParallel_Dim, [0; 0; 0]*deg)
SedExitPerpWeir := BoxF(SedEChannelWeirPerp_Origin, SedEChannelWeirPerp_Origin + SedEChannelWeirPerp_Dim, [0; 0; 0]*deg)
SedWeirUnion := Union_All
SedChannelWeirScript :=
    stack(SelectSedChannelLayer, SedInletParallelWeir, SedInletPerpWeir, SedExitParallelWeir, SedExitPerpWeir, SedWeirUnion, FreezeSedChannels) if EN_InletChannelGeom == Parallel_Weir and EN_ExitChannelGeom == Parallel_Weir
    stack(SelectSedChannelLayer, SedInletParallelWeir, SedInletPerpWeir, SedExitPerpWeir, SedWeirUnion, FreezeSedChannels) if EN_InletChannelGeom == Parallel_Weir and EN_ExitChannelGeom == Perpendicular_Weir
    stack(SelectSedChannelLayer, SedInletPerpWeir, SedExitParallelWeir, SedExitPerpWeir, SedWeirUnion, FreezeSedChannels) if EN_InletChannelGeom == Perpendicular_Weir and EN_ExitChannelGeom == Parallel_Weir
    stack(SelectSedChannelLayer, SedInletPerpWeir, SedExitPerpWeir, SedWeirUnion, FreezeSedChannels) if EN_InletChannelGeom == Perpendicular_Weir and EN_ExitChannelGeom == Perpendicular_Weir
# Inlet Channel Drain
SedIChannelDrainVertCoupling_Origin := [
    Plant_Origin[0] - L_Sed + S_Fitting + ConRadius(ND_SedInletChannelDrain);
    Plant_Origin[1] + S_Fitting + ConRadius(ND_SedInletChannelDrain);
    Plant_Origin[2] + Z_SedChannelBottom - CouplingLength(ND_SedInletChannelDrain) + SocketDepth(ND_SedInletChannelDrain)
]
SedIChannelDrainVertCouplingLayer := layer_new("SedIChannelVertCouplingPlu", green)
SedIChannelDrainVerCoupling := CouplingSUBF(SedIChannelDrainVertCoupling_Origin, [0; 90; 0]*deg, ND_SedInletChannelDrain, PS_Default, ["SedChannelsCon"])
SedIChannelVertCouplingFrz := FreezeLayer("SedIChannelVertCouplingPlu")
L_SedIChannelVertPipe := Z_SedChannelBottom - CouplingLength(ND_SedInletChannelDrain) - ElbowRadius(ND_SedInletChannelDrain) - ConRadius(ND_SedInletChannelDrain)
L_SedIChannelHorizPipe := Plant_Origin[0] - W_SedExitChannel + S_Fitting + ConRadius(ND_SedExitChannelDrain) - SedIChannelDrainVertCoupling_Origin[0] - ElbowRadius(ND_SedInletChannelDrain) - ShortTeeLength(ND_SedInletChannelDrain)
SedIChannelDrainPipeLayer := layer_new("SedIChannelPipePlu", blue)
SedIChannelDrainVertPipe := PipeSUBF(SedIChannelDrainVertCoupling_Origin, L_SedIChannelVertPipe, [0; 270; 0]*deg, ND_SedInletChannelDrain, PS_Default, ["SedTankCon"])
SedIChannelDrainHorizPipe := PipeSUBF([
    Plant_Origin[0] - W_SedExitChannel + S_Fitting + ConRadius(ND_SedInletChannelDrain) - ShortTeeLength(ND_SedInletChannelDrain);
    SedIChannelDrainVertCoupling_Origin[1];
    SedIChannelDrainVertCoupling_Origin[2] - L_SedIChannelVertPipe - ElbowRadius(ND_SedInletChannelDrain)
], L_SedIChannelHorizPipe, [0; 0; 0]*deg, ND_SedInletChannelDrain, PS_Default, ["SedTankCon"])
SedIChannelPipeFrz := FreezeLayer("SedIChannelPipePlu")
SedIChannelElbowLayer := layer_new("SedIChannelElbowPlu", green)
SedIChannelDrainElbow := ElbowSUBF(SedIChannelDrainVertCoupling_Origin + [0 m; 0 m; -L_SedIChannelVertPipe], [180; 0; 90]*deg, ND_SedInletChannelDrain, PS_Default, ["SedTankCon"])
SedIChannelElbowFrz := FreezeLayer("SedIChannelElbowPlu")
SedInletDrainScript := stack(SedIChannelDrainVertCouplingLayer, SedIChannelDrainVerCoupling, SedIChannelVertCouplingFrz, SedIChannelDrainPipeLayer, SedIChannelDrainVertPipe, SedIChannelDrainHorizPipe, SedIChannelPipeFrz, SedIChannelElbowLayer, SedIChannelDrainElbow, SedIChannelElbowFrz) = [
    "-layer m SedIChannelVertCouplingPlu";
    "c t 0,255,0";
    "SedIChannelVertCouplingPlu";
    "  ";
    "_zoom w -3.57555,0.04,1.6895 -3.31742,0.18859,1.56091";
    "_cylinder -3.44648,0.11429,1.62521 0.06429 a -3.38948,0.11429,1.62521";
    "_cylinder -3.50855,0.11429,1.62521 0.06429 a -3.45155,0.11429,1.62521";
    "_cylinder -3.45155,0.11429,1.62521 0.05715 a -3.44648,0.11429,1.62521";
    "_union -3.38948,0.05,1.62521 -3.50855,0.05,1.62521 -3.44648,0.05714,1.62521 ";
    "rotate3d l  y -3.44648,0.11429,1.62521 90"
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]
# Exit Channel Drain
SedEChannelDrainVertCoupling_Origin := [
    Plant_Origin[0] - W_SedExitChannel + S_Fitting + ConRadius(ND_SedExitChannelDrain);
    SedIChannelDrainVertCoupling_Origin[1];
    Plant_Origin[2] + Z_SedChannelBottom - CouplingLength(ND_SedInletChannelDrain) + SocketDepth(ND_SedInletChannelDrain)
]
SedEChannelDrainVertCouplingLayer := layer_new("SedEChannelVertCouplingPlu", green)
SedEChannelDrainVerCoupling := CouplingSUBF(SedEChannelDrainVertCoupling_Origin, [0; 90; 0]*deg, ND_SedExitChannelDrain, PS_Default, ["SedChannelsCon"])
SedEChannelVertCouplingFrz := FreezeLayer("SedEChannelVertCouplingPlu")
L_SedEChannelVertPipe := Z_SedChannelBottom - CouplingLength(ND_SedExitChannelDrain) - ShortTeeLength(ND_SedExitChannelDrain) - ConRadius(ND_SedExitChannelDrain)
SedEChannelDrainVertPipeLayer := layer_new("SedEChannelVertPipePlu", blue)
SedEChannelDrainVertPipe := PipeSUBF(SedEChannelDrainVertCoupling_Origin, L_SedEChannelVertPipe, [0; 270; 0]*deg, ND_SedExitChannelDrain, PS_Default, ["SedTankCon"])
SedEChannelVertPipeFrz := FreezeLayer("SedEChannelVertPipePlu")
SedEChannelTeeLayer := layer_new("SedEChannelTeePlu", green)
SedEChannelDrainTee := TeeSUBF(SedEChannelDrainVertCoupling_Origin + [0 m; 0 m; -L_SedEChannelVertPipe], [0; 0; 90]*deg, ND_SedExitChannelDrain, PS_Default, ["SedTankCon"])
SedEChannelTeeFrz := FreezeLayer("SedEChannelTeePlu")
L_SedEChannelHorizPipe := Plant_Origin[0] + T_PlantWall - SedEChannelDrainVertCoupling_Origin[0] - ShortTeeLength(ND_SedExitChannelDrain) - CouplingLength(ND_SedExitChannelDrain) + SocketDepth(ND_SedExitChannelDrain)
SedEChannelHorizPipeLayer := layer_new("SedEChannelHorizPipePlu", blue)
SedEChannelHorizPipe := PipeSUBF([
    Plant_Origin[0] + T_PlantWall - CouplingLength(ND_SedExitChannelDrain) + SocketDepth(ND_SedExitChannelDrain);
    SedEChannelDrainVertCoupling_Origin[1];
    -L_SedEChannelVertPipe - ElbowRadius(ND_SedExitChannelDrain) + SedEChannelDrainVertCoupling_Origin[2]
], L_SedEChannelHorizPipe, [0; 0; 0]*deg, ND_SedExitChannelDrain, PS_Default, ["SedTankCon"])
SedEChannelHorizPipeFrz := FreezeLayer("SedEChannelHorizPipePlu")
SedEChannelHorizCouplingLayer := layer_new("SedEChannelHorizCouplingPlu", green)
SedEChannelHorizCoupling := CouplingSUBF([
    Plant_Origin[0] + T_PlantWall - SocketDepth(ND_SedExitChannelDrain);
    SedEChannelDrainVertCoupling_Origin[1];
    SedEChannelDrainVertCoupling_Origin[2] - L_SedEChannelVertPipe - ElbowRadius(ND_SedExitChannelDrain)
], [0; 0; 0]*deg, ND_SedExitChannelDrain, PS_Default, ["SedTankCon"])
SedEChannelHorizCouplingFrz := FreezeLayer("SedEChannelHorizCouplingPlu")
SedEChannelDrainStopperLayer := layer_new("SedEChannelDrainStopperPlu", blue)
SedEChannelDrainStopper := PipeF(SedEChannelDrainVertCoupling_Origin + [0 m; 0 m; CouplingLength(ND_SedExitChannelDrain) - 2*SocketDepth(ND_SedExitChannelDrain)], HW_SedExitChannel + SocketDepth(ND_SedExitChannelDrain) + 5 cm, [0; 90; 0]*deg, ND_SedExitChannelDrain, PS_Default)
SedEChannelDrainStopperFrz := FreezeLayer("SedEChannelDrainStopperPlu")
SedExitDrainScript :=
    stack(SedEChannelDrainVertCouplingLayer, SedEChannelDrainVerCoupling, SedEChannelVertCouplingFrz, SedEChannelDrainVertPipeLayer, SedEChannelDrainVertPipe, SedEChannelVertPipeFrz, SedEChannelTeeLayer, SedEChannelDrainTee, SedEChannelTeeFrz, SedEChannelDrainStopperLayer, SedEChannelDrainStopper, SedEChannelDrainStopperFrz) if L_SedEChannelHorizPipe ≤ SocketDepth(ND_SedExitChannelDrain)
    stack(SedEChannelDrainVertCouplingLayer, SedEChannelDrainVerCoupling, SedEChannelVertCouplingFrz, SedEChannelDrainVertPipeLayer, SedEChannelDrainVertPipe, SedEChannelVertPipeFrz, SedEChannelTeeLayer, SedEChannelDrainTee, SedEChannelTeeFrz, SedEChannelHorizPipeLayer, SedEChannelHorizPipe, SedEChannelHorizPipeFrz, SedEChannelHorizCouplingLayer, SedEChannelHorizCoupling, SedEChannelHorizCouplingFrz, SedEChannelDrainStopperLayer, SedEChannelDrainStopper, SedEChannelDrainStopperFrz) if -SedEChannelDrainVertCoupling_Origin[0] - ElbowRadius(ND_SedExitChannelDrain) + T_PlantWall ≥ CouplingLength(ND_SedExitChannelDrain)
    stack(SedEChannelDrainVertCouplingLayer, SedEChannelDrainVerCoupling, SedEChannelVertCouplingFrz, SedEChannelDrainVertPipeLayer, SedEChannelDrainVertPipe, SedEChannelDrainVertPipeLayer, SedEChannelDrainVertPipe, SedEChannelVertPipeFrz, SedEChannelTeeLayer, SedEChannelDrainTee, SedEChannelTeeFrz, SedEChannelHorizPipeLayer, SedEChannelHorizPipe, SedEChannelHorizPipeFrz, SedEChannelDrainStopperLayer, SedEChannelDrainStopper, SedEChannelDrainStopperFrz) otherwise
# Fill in Holes at Channel Ends
SelectSedTankLayer := SelectLayer("SedTankCon")
SedIChannelFlocEnd := BoxF([
    Plant_Origin[0] - L_Sed + W_SedInletChannelPreWeir;
    Plant_Origin[1] + L_SedChannel;
    Plant_Origin[2] + Z_SedChannelBottom
], [
    Plant_Origin[0] - L_Sed + W_SedInletChannelPreWeir;
    Plant_Origin[1] + L_SedChannel;
    Plant_Origin[2] + Z_SedChannelBottom
] + [W_SedInletChannel - W_SedInletChannelPreWeir; T_PlantWall; H_SedInletChannel], [0; 0; 0]*deg)
SedIChannelFiltEnd := BoxF([Plant_Origin[0] - L_Sed; Plant_Origin[1] - T_PlantWall; Plant_Origin[2] + Z_SedChannelBottom], [Plant_Origin[0] - L_Sed; Plant_Origin[1] - T_PlantWall; Plant_Origin[2] + Z_SedChannelBottom] + [W_SedInletChannel; T_PlantWall; H_SedInletChannel], [0; 0; 0]*deg)
SedEChannelFlocEnd := BoxF([
    Plant_Origin[0] - W_SedExitChannel;
    Plant_Origin[1] + L_SedChannel;
    Plant_Origin[2] + Z_SedChannelBottom
], [
    Plant_Origin[0] - W_SedExitChannel;
    Plant_Origin[1] + L_SedChannel;
    Plant_Origin[2] + Z_SedChannelBottom
] + [W_SedExitChannel; T_PlantWall; H_SedExitChannel], [0; 0; 0]*deg)
SedEChannelFiltEnd := BoxF([Plant_Origin[0]; Plant_Origin[1] - T_PlantWall; Plant_Origin[2] + Z_SedChannelBottom], [Plant_Origin[0]; Plant_Origin[1] - T_PlantWall; Plant_Origin[2] + Z_SedChannelBottom] + [-W_SedExitChannel; T_PlantWall; H_SedExitChannel], [0; 0; 0]*deg)
UnionSedChannelEnds := Union_All
SedChannelEndScript := stack(SelectSedTankLayer, SedIChannelFlocEnd, SedIChannelFiltEnd, SedEChannelFlocEnd, SedEChannelFiltEnd, UnionSedChannelEnds, FreezeSedTank)
# Outlet box to filter
SedOutletBox_Dim := [
    2*ConRadius(ND_FiEntrancePipe) + 2*S_Fitting;
    2*ConRadius(ND_FiEntrancePipe) + 2*S_Fitting;
    Plant_Origin[2] + H_Sed - Z_SedChannelBottom
]
SedOutletBox_Origin := [
    Plant_Origin[0];
    Plant_Origin[1] + W_SedBay*N_SedBays*N_SedTanks + T_PlantWall*(N_SedTanks - 1) - 0.5*W_SedBay + ConRadius(ND_SedManifold) + S_Fitting + T_PlantWall;
    Z_SedChannelBottom
]
SelectSedTank := SelectLayer("SedTankCon")
SedOutletBox := BoxF(SedOutletBox_Origin + [0; -T_PlantWall; -T_PlantWall], SedOutletBox_Dim + [2*T_PlantWall; T_PlantWall; 0] + SedOutletBox_Origin, [0; 0; 0]*deg)
# unionall
# FreezeSedTank
SedOutletSubtractBox := BoxF(SedOutletBox_Origin - [zc; 0; 0], [
    SedOutletBox_Origin[0] + T_PlantWall + zc;
    Plant_Origin[1] + W_SedBay*N_SedBays*N_SedTanks + T_PlantWall*(N_SedTanks - 1);
    SedOutletBox_Dim[2] + SedOutletBox_Origin[2]
], [0; 0; 0]*deg)
SedOutletSubtractBox2 := BoxF(SedOutletBox_Origin + [T_PlantWall; 0; 0], SedOutletBox_Dim + SedOutletBox_Origin + [T_PlantWall; 0; 0], [0; 0; 0]*deg)
GroupSedOutletBox := GroupAll("DeleteMe")
SubtractSedOutletBox := SubtractF(["SedTankCon"], "DeleteMe")
SedOutletCoupling_Origin := [
    SedOutletBox_Origin[0] + T_PlantWall + S_Fitting + ConRadius(ND_FiEntrancePipe);
    SedOutletBox_Origin[1] + S_Fitting + ConRadius(ND_FiEntrancePipe);
    Z_SedChannelBottom - SocketDepth(ND_FiEntrancePipe)
]
SedOutletVertPipe_Origin := SedOutletCoupling_Origin + [0; 0; 2*SocketDepth(ND_FiEntrancePipe) - CouplingLength(ND_FiEntrancePipe)]
L_SedOutletVertPipe := 2*SocketDepth(ND_FiEntrancePipe) + max(0, T_PlantWall - CouplingLength(ND_FiEntrancePipe))
SedOutletElbow1_Origin := SedOutletVertPipe_Origin - [0; 0; L_SedOutletVertPipe]
SedOutletFittingsLayer := layer_new("SedOutletFittings", green)
SedOutletCoupling := CouplingSUBF(SedOutletCoupling_Origin, [0; 270]*deg, ND_FiEntrancePipe, PS_Default, ["SedTankCon"])
SedOutletElbow1 := ElbowF(SedOutletElbow1_Origin, [180; 0; 90]*deg, ND_FiEntrancePipe, PS_Default)
SedOutletFittingsFrz := FreezeLayer("SedOutletFittings")
SedOutletPipesLayer := layer_new("SedOutletPipes", blue)
SedOutletVertPipe := PipeSUBF(SedOutletVertPipe_Origin, L_SedOutletVertPipe, [0; 270]*deg, ND_FiEntrancePipe, PS_Default, ["SedTankCon"])
SedOutletPipesFrz := FreezeLayer("SedOutletPipes")
SedBoxToFilter := stack(SelectSedTank, SedOutletBox, Union_All, FreezeSedTank, SedOutletSubtractBox, SedOutletSubtractBox2, GroupSedOutletBox, SubtractSedOutletBox, SedOutletFittingsLayer, SedOutletCoupling, SedOutletElbow1, SedOutletFittingsFrz, SedOutletPipesLayer, SedOutletVertPipe, SedOutletPipesFrz)
AC_SedTank :=
    stack(SedTankScript, SedChannelScript, SedDrainCoverScript, SedManifoldScript, SedLaunderScript, SedHopperDrainScript, SedSludgeScript, SedPipeFrameScript, SedTankLaminaScript, SedDiffuserScript, SedSkimmerScript, SedChannelWeirScript, SedInletDrainScript, SedExitDrainScript, SedChannelEndScript, SedPipeFrameLedges, SedBoxToFilter) if N_SedBays == 1 and N_SedTanks == 1
    stack(SedTankScript, SedChannelScript, SedDrainCoverScript, SedManifoldScript, SedLaunderScript, SedHopperDrainScript, SedSludgeScript, SedPipeFrameScript, SedTankLaminaScript, SedDiffuserScript, SedSkimmerScript, ThawAllSed, FreezeSedPieces, ArraySedBay, FreezeAllSed, SedChannelWeirScript, SedInletDrainScript, SedExitDrainScript, SedChannelEndScript, SedPipeFrameLedges, SedBoxToFilter) if N_SedBays > 1 and N_SedTanks == 1
    stack(SedTankScript, SedChannelScript, SedDrainCoverScript, SedManifoldScript, SedLaunderScript, SedHopperDrainScript, SedSludgeScript, SedPipeFrameScript, SedTankLaminaScript, SedDiffuserScript, SedSkimmerScript, ThawAllSed, FreezeSedPieces, SedPipeFrameLedges, ThawSedTank, ArraySedTank, FreezeAllSed, ThawSedTank, FreezeSedTankCon, SedChannelWeirScript, SedInletDrainScript, SedExitDrainScript, SedChannelEndScript, SedBoxToFilter) if N_SedTanks > 1 and N_SedBays == 1
    stack(SedTankScript, SedChannelScript, SedDrainCoverScript, SedManifoldScript, SedLaunderScript, SedHopperDrainScript, SedSludgeScript, SedPipeFrameScript, SedTankLaminaScript, SedDiffuserScript, SedSkimmerScript, ThawAllSed, FreezeSedPieces, ArraySedBay, SedPipeFrameLedges, ThawSedTank, ArraySedTank, FreezeAllSed, SedChannelWeirScript, SedInletDrainScript, SedExitDrainScript, SedChannelEndScript, SedPipeFrameLedges, SedBoxToFilter) otherwise
