# [reference: MasterProgram.xmcd]
# [reference: SRSF jcw57.xmcd]
N_Fi := 2
FilterInletTank_origin := [
    Plant_Origin[0];
    Plant_Origin[1] - T_PlantWall - W_ExitChannel;
    Plant_Origin[2] + H_Sed - H_ExitChannel
] = [0; -0.523167; 1.38183] m
FiEntranceBox_dim := [L_FiEntrance; W_FiEntrance; H_FiEntrance]
FiEntranceBox_origin := [
    Plant_Origin[0] - W_ExitChannel - T_PlantWall;
    Plant_Origin[1] - W_FiEntrance - T_PlantWall;
    Z_FiEntranceBottom
]
FiExitBox_dim := [L_FiExit; W_FiExit; H_FiExit]
FiExitBox_origin := [
    Plant_Origin[0] - W_ExitChannel - 2*T_PlantWall - L_FiEntrance;
    Plant_Origin[1] - W_FiExit - T_PlantWall;
    Z_FiExitBottom
]
Fi_origin := [
    Plant_Origin[0] - W_ExitChannel - 6*T_PlantWall - L_FiEntrance - L_FiExit - S_Walkway;
    Plant_Origin[1] - W_Fi - T_PlantWall - OuterDiameterFittingPVC(ND_FiBwTrunk);
    Z_FiBottom
]
Fi_dim := [L_Fi; W_Fi + OuterDiameterFittingPVC(ND_FiBwTrunk) + T_ConcreteMin; H_Fi] = [1.4; 1.26056; 4.35014] m
FiEnclosureTank_origin := [Plant_Origin[0] - W_ExitChannel - 2*T_PlantWall; Plant_Origin[1] - 2*W_Fi; 0]
FiBwInletCoupling_origin := [
    Plant_Origin[0] - W_ExitChannel - T_PlantWall - 0.5*ND_FiBwTrunk - T_ConcreteMin;
    Plant_Origin[1] - T_PlantWall - 0.5*ND_FiBwTrunk - T_ConcreteMin;
    Z_FiEntranceBottom - 2*T_PlantWall/3
]
FiInletCoupling1_origin := [
    Plant_Origin[0] - W_ExitChannel - T_PlantWall - L_FiEntrance + (0.5*ND_FiTrunk) + T_ConcreteMin;
    Plant_Origin[1] - T_PlantWall - 0.5*ND_FiTrunk - T_ConcreteMin;
    Z_FiEntranceBottom - 2*T_PlantWall/3
]
FiInletCoupling2_origin := [
    Plant_Origin[0] - W_ExitChannel - T_PlantWall - 0.5*ND_FiBwTrunk - T_ConcreteMin;
    Plant_Origin[1] - T_PlantWall - 2.5*ND_FiBwTrunk - T_ConcreteMin;
    Z_FiEntranceBottom - 2*T_PlantWall/3
]
FiInletCoupling3_origin := [
    Plant_Origin[0] - W_ExitChannel - T_PlantWall - L_FiEntrance + (0.5*ND_FiTrunk) + T_ConcreteMin;
    Plant_Origin[1] - T_PlantWall - 2.5*ND_FiBwTrunk - T_ConcreteMin;
    Z_FiEntranceBottom - 2*T_PlantWall/3
]
FiExitCoupling0_origin := [
    Plant_Origin[0] - W_ExitChannel - 2*T_PlantWall - 0.5*ND_FiTrunk - T_ConcreteMin - L_FiEntrance;
    Plant_Origin[1] - T_PlantWall - 0.5*ND_FiTrunk - T_ConcreteMin;
    Z_FiEntranceBottom - 2*T_PlantWall/3
]
FiExitCoupling1_origin := [
    Plant_Origin[0] - W_ExitChannel - 2*T_PlantWall - 2*L_FiEntrance + (0.5*ND_FiTrunk) + T_ConcreteMin;
    Plant_Origin[1] - T_PlantWall - 0.5*ND_FiTrunk - T_ConcreteMin;
    Z_FiEntranceBottom - 2*T_PlantWall/3
]
FiExitCoupling2_origin := [
    Plant_Origin[0] - W_ExitChannel - 2*T_PlantWall - 0.5*ND_FiBwTrunk - T_ConcreteMin - L_FiEntrance;
    Plant_Origin[1] - T_PlantWall - W_FiExit + T_ConcreteMin + 0.5*ND_FiTrunk;
    Z_FiEntranceBottom - 2*T_PlantWall/3
]
FiExitCoupling3_origin := [
    Plant_Origin[0] - W_ExitChannel - 2*T_PlantWall - 2*L_FiEntrance + (0.5*ND_FiTrunk) + T_ConcreteMin;
    Plant_Origin[1] - T_PlantWall - W_FiExit + T_ConcreteMin + 0.5*ND_FiTrunk;
    Z_FiEntranceBottom - 2*T_PlantWall/3
]
FiEntranceWeir_origin := [Plant_Origin[0] - W_ExitChannel; Plant_Origin[1] - W_FiEntrance - T_PlantWall; Z_FiEntranceWeir]
FiEntranceWeir_dim := [T_PlantWall; L_FiWeir; HL_FiWeir]
Dist_Fi := 2*T_ConcreteMin + OuterDiameterFittingPVC(ND_DistPipe) = 0.28415 m  # Distance between inlet and outlet boxes
T_ConcreteMin = 0.05 m
Filterinletchannelscript :=
    layer2 ← layer_new("Filter Inlet Channel", ltgrey)
    channel1 ← ChannelDrawing([Plant_Origin[0] - W_ExitChannel; 0; Plant_Origin[2] + H_Sed - H_ExitChannel], [W_FiEntrance + W_FiExit + Dist_Fi + 4*T_PlantWall; W_ExitChannel; H_ExitChannel], T_ChannelWall)
    rotate1 ← rotate([Plant_Origin[0] - W_ExitChannel; 0; Plant_Origin[2] + H_Sed - H_ExitChannel], 270)
    box ← BoxF([
        Plant_Origin[0];
        Plant_Origin[1] - W_FiEntrance - W_FiExit - Dist_Fi - 4*T_PlantWall;
        Plant_Origin[2] + H_Sed - H_ExitChannel
    ], [
        Plant_Origin[0] - W_ExitChannel;
        Plant_Origin[1] - W_FiEntrance - W_FiExit - Dist_Fi - 3*T_PlantWall;
        Plant_Origin[2] + H_Sed
    ], [0; 0; 0]*deg)
    group ← FreezeLayer("Filter Inlet Channel")
    layerweirs ← layer_new("entweirs", ltgrey)
    entweir ← BoxSUBF(FiEntranceWeir_origin, [
        FiEntranceWeir_origin[0] - T_PlantWall;
        FiEntranceWeir_origin[1] + L_FiWeir;
        FiEntranceWeir_origin[2] + HL_FiWeir
    ], [0; 0; 0]*deg, ["Filter Inlet Channel"])
    entweir2 ← BoxSUBF([
        FiEntranceWeir_origin[0];
        FiEntranceWeir_origin[1] - Dist_Fi - 2*T_PlantWall - W_FiEntrance;
        FiEntranceWeir_origin[2]
    ], [
        FiEntranceWeir_origin[0] - T_PlantWall;
        FiEntranceWeir_origin[1] - Dist_Fi - 2*T_PlantWall - W_FiEntrance + L_FiWeir;
        FiEntranceWeir_origin[2] + HL_FiWeir
    ], [0; 0; 0]*deg, ["Filter Inlet Channel"])
    layerset ← layer_set("0")
    layerfreezeweirs ← layer_freeze("entweirs")
    bigunion ← union_allA
    layerfreeze2 ← layer_freeze("Filter Inlet Channel")
    one ← stack(layer2, channel1, rotate1, box, group, layerweirs, entweir, entweir2, layerset, layerfreezeweirs, bigunion, layerfreeze2)
    return ← one
Fibwdrainchannelscript :=
    layer2 ← layer_new("Filter BW Drain Channel", ltgrey)
    bwbox ← Tank([Fi_origin[0] + T_PlantWall + L_FiBw; FiExitBox_origin[1] - 2*T_PlantWall - W_FiBw/2; Z_FiBwBottom], [L_FiBw; W_FiBw; H_FiBw], T_PlantWall)
    bwdrainbox ← Tank([
        Fi_origin[0] + 2*T_PlantWall + L_FiBw + L_FiBwWeirDrain;
        FiExitBox_origin[1] - 2*T_PlantWall - W_FiBwWeirDrain/2;
        Z_FiBwWeirDrainBottom
    ], [L_FiBwWeirDrain; W_FiBwWeirDrain; H_FiBwWeirDrain], T_PlantWall)
    ioverflowtank ← Tank([FiEntranceBox_origin[0]; FiEntranceBox_origin[1] - T_PlantWall - Dist_Fi; Z_FioverflowBottom], [L_FiOverflow; W_FiOverflow; H_FiOverflow], T_PlantWall)
    eoverflowtank ← Tank([FiExitBox_origin[0]; FiEntranceBox_origin[1] - T_PlantWall - Dist_Fi; Z_FioverflowBottom], [L_FiOverflow; W_FiOverflow; H_FiOverflow], T_PlantWall)
    channel1 ← ChannelDrawing([Fi_origin[0] + 2*T_PlantWall + L_FiBw; FiExitBox_origin[1] - 2*T_PlantWall; Z_FiBwBottom], [
        L_FiBwDrain + L_FiBwWeirDrain + L_FiEntrance + W_ExitChannel + 3*T_PlantWall;
        W_FiBwDrain;
        H_FiBwDrain
    ], T_ChannelWall)
    group ← FreezeLayer("Filter BW Drain Channel")
    layernewcouplings ← layer_new("couplings", green)
    overflowcoupling ← CouplingSUBF([
        FiExitBox_origin[0] + 2*T_PlantWall/3;
        FiExitBox_origin[1] - T_PlantWall - Dist_Fi/2;
        Z_FioverflowBottom + T_ConcreteMin + 0.5*ND_DistPipe
    ], [0; 0]*deg, ND_DistPipe, EN_PipeSpec, ["Filter BW Drain Channel"])
    eoverflowcoupling ← CouplingSUBF([
        FiExitBox_origin[0] - L_FiExit + T_ConcreteMin + 0.5*ND_DistPipe;
        FiExitBox_origin[1] - T_PlantWall - Dist_Fi/2;
        Z_FioverflowBottom - 2*T_PlantWall/3
    ], [0; 90]*deg, ND_DistPipe, EN_PipeSpec, ["Filter BW Drain Channel"])
    ioverflowcoupling ← CouplingSUBF([
        FiEntranceBox_origin[0] - T_ConcreteMin - 0.5*ND_DistPipe;
        FiExitBox_origin[1] - T_PlantWall - Dist_Fi/2;
        Z_FioverflowBottom - 2*T_PlantWall/3
    ], [0; 90]*deg, ND_DistPipe, EN_PipeSpec, ["Filter BW Drain Channel"])
    bwdraincoupling ← CouplingSUBF([
        Fi_origin[0] + 2*T_PlantWall + L_FiBw + L_FiBwWeirDrain/2;
        FiExitBox_origin[1] - 2*T_PlantWall;
        Z_FiBwWeirDrainBottom - 2*T_PlantWall/3
    ], [0; 90]*deg, ND_DistPipe, EN_PipeSpec, ["Filter BW Drain Channel"])
    bwcoupling ← CouplingSUBF([
        Fi_origin[0] + T_PlantWall + L_FiBw/2;
        FiExitBox_origin[1] - 2*T_PlantWall;
        Z_FiBwBottom - 2*T_PlantWall/3
    ], [0; 90]*deg, ND_DistPipe, EN_PipeSpec, ["Filter BW Drain Channel"])
    layerset ← layer_set("0")
    layerfreezecoup ← layer_freeze("couplings")
    bigunion ← union_allA
    layerfreeze2 ← layer_freeze("Filter BW Drain Channel")
    one ← stack(layer2, bwbox, bwdrainbox, ioverflowtank, eoverflowtank, channel1, group, layernewcouplings, overflowcoupling, eoverflowcoupling, ioverflowcoupling, bwdraincoupling, bwcoupling, layerset, layerfreezecoup, bigunion, layerfreeze2)
    return ← one
Fiscript :=
    layernewfilt ← layer_new("SRSF filters", ltgrey)
    tankfilt ← Tank(Fi_origin, Fi_dim, T_PlantWall)
    tankfilt2 ← Tank([Fi_origin[0]; FiEntranceBox_origin[1] - W_FiEntrance - 2*T_PlantWall - Dist_Fi; Fi_origin[2]], Fi_dim, T_PlantWall)
    addbox ← BoxF([
        Fi_origin[0] + T_PlantWall;
        FiEntranceBox_origin[1] - W_FiEntrance - 3*T_PlantWall - Dist_Fi;
        Fi_origin[2] - T_PlantWall
    ], [Fi_origin[0] - Fi_dim[0] - T_PlantWall; Fi_origin[1] + Fi_dim[1] + T_PlantWall; Fi_origin[2]], [0; 0; 0]*deg)
    group ← FreezeLayer("SRSF filters")
    layernewcouplings ← layer_new("filtcouplings", green)
    bwcoupling1 ← CouplingSUBF([
        Fi_origin[0] + 2*T_PlantWall/3;
        FiBwInletCoupling_origin[1];
        Fi_origin[2] + outerdiameter(ND_FiBwManBranch)/2
    ], [0; 0]*deg, ND_FiBwTrunk, EN_PipeSpec, ["SRSF filters"])
    coupling12 ← CouplingSUBF([
        Fi_origin[0] + 2*T_PlantWall/3;
        FiBwInletCoupling_origin[1];
        Fi_origin[2] + outerdiameter(ND_FiBwManBranch)/2 + 20 cm
    ], [0; 0]*deg, ND_FiTrunk, EN_PipeSpec, ["SRSF filters"])
    coupling13 ← CouplingSUBF([
        Fi_origin[0] + 2*T_PlantWall/3;
        FiBwInletCoupling_origin[1];
        Fi_origin[2] + outerdiameter(ND_FiBwManBranch)/2 + 40 cm
    ], [0; 0]*deg, ND_FiTrunk, EN_PipeSpec, ["SRSF filters"])
    coupling14 ← CouplingSUBF([
        Fi_origin[0] + 2*T_PlantWall/3;
        FiBwInletCoupling_origin[1];
        Fi_origin[2] + outerdiameter(ND_FiBwManBranch)/2 + 60 cm
    ], [0; 0]*deg, ND_FiTrunk, EN_PipeSpec, ["SRSF filters"])
    coupling15 ← CouplingSUBF([
        Fi_origin[0] + 2*T_PlantWall/3;
        FiBwInletCoupling_origin[1];
        Fi_origin[2] + outerdiameter(ND_FiBwManBranch)/2 + 80 cm
    ], [0; 0]*deg, ND_FiTrunk, EN_PipeSpec, ["SRSF filters"])
    coupling16 ← CouplingSUBF([
        Fi_origin[0] + 2*T_PlantWall/3;
        FiBwInletCoupling_origin[1];
        Fi_origin[2] + outerdiameter(ND_FiBwManBranch)/2 + 100 cm
    ], [0; 0]*deg, ND_FiTrunk, EN_PipeSpec, ["SRSF filters"])
    coupling17 ← CouplingSUBF([
        Fi_origin[0] + 2*T_PlantWall/3;
        FiBwInletCoupling_origin[1];
        Fi_origin[2] + outerdiameter(ND_FiBwManBranch)/2 + 120 cm
    ], [0; 0]*deg, ND_FiTrunk, EN_PipeSpec, ["SRSF filters"])
    bwcoupling2 ← CouplingSUBF([
        Fi_origin[0] + 2*T_PlantWall/3;
        FiEntranceBox_origin[1] - W_FiEntrance - 2*T_PlantWall - Dist_Fi + (0.5*ND_FiBwTrunk) + T_ConcreteMin;
        Fi_origin[2] + outerdiameter(ND_FiBwManBranch)/2
    ], [0; 0]*deg, ND_FiBwTrunk, EN_PipeSpec, ["SRSF filters"])
    coupling22 ← CouplingSUBF([
        Fi_origin[0] + 2*T_PlantWall/3;
        FiEntranceBox_origin[1] - W_FiEntrance - 2*T_PlantWall - Dist_Fi + (0.5*ND_FiBwTrunk) + T_ConcreteMin;
        Fi_origin[2] + outerdiameter(ND_FiBwManBranch)/2 + 20 cm
    ], [0; 0]*deg, ND_FiTrunk, EN_PipeSpec, ["SRSF filters"])
    coupling23 ← CouplingSUBF([
        Fi_origin[0] + 2*T_PlantWall/3;
        FiEntranceBox_origin[1] - W_FiEntrance - 2*T_PlantWall - Dist_Fi + (0.5*ND_FiBwTrunk) + T_ConcreteMin;
        Fi_origin[2] + outerdiameter(ND_FiBwManBranch)/2 + 40 cm
    ], [0; 0]*deg, ND_FiTrunk, EN_PipeSpec, ["SRSF filters"])
    coupling24 ← CouplingSUBF([
        Fi_origin[0] + 2*T_PlantWall/3;
        FiEntranceBox_origin[1] - W_FiEntrance - 2*T_PlantWall - Dist_Fi + (0.5*ND_FiBwTrunk) + T_ConcreteMin;
        Fi_origin[2] + outerdiameter(ND_FiBwManBranch)/2 + 60 cm
    ], [0; 0]*deg, ND_FiTrunk, EN_PipeSpec, ["SRSF filters"])
    coupling25 ← CouplingSUBF([
        Fi_origin[0] + 2*T_PlantWall/3;
        FiEntranceBox_origin[1] - W_FiEntrance - 2*T_PlantWall - Dist_Fi + (0.5*ND_FiBwTrunk) + T_ConcreteMin;
        Fi_origin[2] + outerdiameter(ND_FiBwManBranch)/2 + 80 cm
    ], [0; 0]*deg, ND_FiTrunk, EN_PipeSpec, ["SRSF filters"])
    coupling26 ← CouplingSUBF([
        Fi_origin[0] + 2*T_PlantWall/3;
        FiEntranceBox_origin[1] - W_FiEntrance - 2*T_PlantWall - Dist_Fi + (0.5*ND_FiBwTrunk) + T_ConcreteMin;
        Fi_origin[2] + outerdiameter(ND_FiBwManBranch)/2 + 100 cm
    ], [0; 0]*deg, ND_FiTrunk, EN_PipeSpec, ["SRSF filters"])
    coupling27 ← CouplingSUBF([
        Fi_origin[0] + 2*T_PlantWall/3;
        FiEntranceBox_origin[1] - W_FiEntrance - 2*T_PlantWall - Dist_Fi + (0.5*ND_FiBwTrunk) + T_ConcreteMin;
        Fi_origin[2] + outerdiameter(ND_FiBwManBranch)/2 + 120 cm
    ], [0; 0]*deg, ND_FiTrunk, EN_PipeSpec, ["SRSF filters"])
    layerset ← layer_set("0")
    layerfreezeco ← layer_freeze("filtcouplings")
    bigunion ← union_allA
    layerfreezefilt ← layer_freeze("SRSF filters")
    one ← stack(layernewfilt, tankfilt, tankfilt2, addbox, group, layernewcouplings, bwcoupling1, coupling12, coupling13, coupling14, coupling15, coupling16, coupling17, bwcoupling2, coupling22, coupling23, coupling24, coupling25, coupling26, coupling27, layerset, layerfreezeco, bigunion, layerfreezefilt)
    return one
Ficontrolboxscript :=
    layernewfilt ← layer_new("SRSFcontrolboxes", ltgrey)
    tankbw ← Tank(FiExitBox_origin, FiExitBox_dim, T_PlantWall)
    tankbw2 ← Tank([FiExitBox_origin[0]; FiExitBox_origin[1] - W_FiExit - 2*T_PlantWall - Dist_Fi; FiExitBox_origin[2]], FiExitBox_dim, T_PlantWall)
    tankfilt ← Tank(FiEntranceBox_origin, FiEntranceBox_dim, T_PlantWall)
    tankfilt2 ← Tank([
        FiEntranceBox_origin[0];
        FiEntranceBox_origin[1] - W_FiEntrance - 2*T_PlantWall - Dist_Fi;
        FiEntranceBox_origin[2]
    ], FiEntranceBox_dim, T_PlantWall)
    group ← FreezeLayer("SRSFcontrolboxes")
    layernewcouplings ← layer_new("controlcouplings", green)
    entweir ← BoxSUBF([FiEntranceBox_origin[0]; FiEntranceBox_origin[1] - T_PlantWall; FiEntranceWeir_origin[2]], [FiEntranceBox_origin[0] - L_FiWeir; FiEntranceBox_origin[1]; FiEntranceWeir_origin[2] + HL_FiWeir], [0; 0; 0]*deg, ["SRSFcontrolboxes"])
    entweir2 ← BoxSUBF([
        FiEntranceBox_origin[0];
        FiEntranceBox_origin[1] - (2*T_PlantWall) - Dist_Fi;
        FiEntranceWeir_origin[2]
    ], [
        FiEntranceBox_origin[0] - L_FiWeir;
        FiEntranceBox_origin[1] - T_PlantWall - Dist_Fi;
        FiEntranceWeir_origin[2] + HL_FiWeir
    ], [0; 0; 0]*deg, ["SRSFcontrolboxes"])
    ecoupling0 ← CouplingSUBF([FiExitCoupling0_origin[0]; FiBwInletCoupling_origin[1]; FiExitCoupling0_origin[2]], [0; 90]*deg, ND_FiTrunk, EN_PipeSpec, ["SRSFcontrolboxes"])
    ecoupling02 ← CouplingSUBF([
        FiExitCoupling0_origin[0];
        FiEntranceBox_origin[1] - W_FiEntrance - 2*T_PlantWall - Dist_Fi + (0.5*ND_FiBwTrunk) + T_ConcreteMin;
        FiExitCoupling0_origin[2]
    ], [0; 90]*deg, ND_FiTrunk, EN_PipeSpec, ["SRSFcontrolboxes"])
    ecoupling1 ← CouplingSUBF([FiExitCoupling1_origin[0]; FiBwInletCoupling_origin[1]; FiExitCoupling1_origin[2]], [0; 90]*deg, ND_FiTrunk, EN_PipeSpec, ["SRSFcontrolboxes"])
    ecoupling12 ← CouplingSUBF([
        FiExitCoupling1_origin[0];
        FiEntranceBox_origin[1] - W_FiEntrance - 2*T_PlantWall - Dist_Fi + (0.5*ND_FiBwTrunk) + T_ConcreteMin;
        FiExitCoupling1_origin[2]
    ], [0; 90]*deg, ND_FiTrunk, EN_PipeSpec, ["SRSFcontrolboxes"])
    ecoupling2 ← CouplingSUBF([FiExitCoupling0_origin[0]; FiExitCoupling2_origin[1]; FiExitCoupling2_origin[2]], [0; 90]*deg, ND_FiTrunk, EN_PipeSpec, ["SRSFcontrolboxes"])
    ecoupling22 ← CouplingSUBF([
        FiExitCoupling0_origin[0];
        FiExitBox_origin[1] - 2*T_PlantWall - Dist_Fi - T_ConcreteMin - (0.5*ND_FiTrunk);
        FiExitCoupling2_origin[2]
    ], [0; 90]*deg, ND_FiTrunk, EN_PipeSpec, ["SRSFcontrolboxes"])
    ecoupling3 ← CouplingSUBF([FiExitCoupling3_origin[0]; FiExitCoupling3_origin[1]; FiExitCoupling3_origin[2]], [0; 90]*deg, ND_FiTrunk, EN_PipeSpec, ["SRSFcontrolboxes"])
    ecoupling32 ← CouplingSUBF([
        FiExitCoupling3_origin[0];
        FiExitBox_origin[1] - 2*T_PlantWall - Dist_Fi - T_ConcreteMin - (0.5*ND_FiTrunk);
        FiExitCoupling3_origin[2]
    ], [0; 90]*deg, ND_FiTrunk, EN_PipeSpec, ["SRSFcontrolboxes"])
    bwcoupling1 ← CouplingSUBF([FiBwInletCoupling_origin[0]; FiBwInletCoupling_origin[1]; FiBwInletCoupling_origin[2]], [0; 90]*deg, ND_FiBwTrunk, EN_PipeSpec, ["SRSFcontrolboxes"])
    bwcoupling2 ← CouplingSUBF([
        FiBwInletCoupling_origin[0];
        FiEntranceBox_origin[1] - W_FiEntrance - 2*T_PlantWall - Dist_Fi + (0.5*ND_FiBwTrunk) + T_ConcreteMin;
        FiBwInletCoupling_origin[2]
    ], [0; 90]*deg, ND_FiBwTrunk, EN_PipeSpec, ["SRSFcontrolboxes"])
    icoupling1 ← CouplingSUBF([FiInletCoupling1_origin[0]; FiBwInletCoupling_origin[1]; FiInletCoupling1_origin[2]], [0; 90]*deg, ND_FiTrunk, EN_PipeSpec, ["SRSFcontrolboxes"])
    icoupling12 ← CouplingSUBF([
        FiInletCoupling1_origin[0];
        FiEntranceBox_origin[1] - W_FiEntrance - 2*T_PlantWall - Dist_Fi + (0.5*ND_FiBwTrunk) + T_ConcreteMin;
        FiInletCoupling1_origin[2]
    ], [0; 90]*deg, ND_FiTrunk, EN_PipeSpec, ["SRSFcontrolboxes"])
    icoupling2 ← CouplingSUBF([
        FiInletCoupling2_origin[0];
        FiEntranceBox_origin[1] + 2*T_ConcreteMin + 1.5*ND_FiTrunk;
        FiInletCoupling2_origin[2]
    ], [0; 90]*deg, ND_FiTrunk, EN_PipeSpec, ["SRSFcontrolboxes"])
    icoupling22 ← CouplingSUBF([
        FiInletCoupling2_origin[0];
        FiExitBox_origin[1] - 2*T_PlantWall - Dist_Fi - 2*T_ConcreteMin - (1.5*ND_FiTrunk);
        FiInletCoupling2_origin[2]
    ], [0; 90]*deg, ND_FiTrunk, EN_PipeSpec, ["SRSFcontrolboxes"])
    icoupling3 ← CouplingSUBF([
        FiInletCoupling3_origin[0];
        FiEntranceBox_origin[1] + 2*T_ConcreteMin + 1.5*ND_FiTrunk;
        FiInletCoupling3_origin[2]
    ], [0; 90]*deg, ND_FiTrunk, EN_PipeSpec, ["SRSFcontrolboxes"])
    icoupling32 ← CouplingSUBF([
        FiInletCoupling3_origin[0];
        FiExitBox_origin[1] - 2*T_PlantWall - Dist_Fi - 2*T_ConcreteMin - (1.5*ND_FiTrunk);
        FiInletCoupling3_origin[2]
    ], [0; 90]*deg, ND_FiTrunk, EN_PipeSpec, ["SRSFcontrolboxes"])
    layerset ← layer_set("0")
    layerfreezec ← layer_freeze("controlcouplings")
    bigunion ← union_allA
    layerfreezefilt ← layer_freeze("SRSFcontrolboxes")
    one ← stack(layernewfilt, tankbw, tankbw2, tankfilt, tankfilt2, group, layernewcouplings, entweir, entweir2, ecoupling0, ecoupling02, ecoupling1, ecoupling12, ecoupling2, ecoupling22, ecoupling3, ecoupling32, bwcoupling1, bwcoupling2, icoupling1, icoupling12, icoupling2, icoupling22, icoupling3, icoupling32, layerset, layerfreezec, layerset, bigunion, layerfreezefilt)
    return one
AC_Filter := stack(Filterinletchannelscript, Fibwdrainchannelscript, Fiscript, Ficontrolboxscript)
# [component: inputs AC_Filter]
