Q_Plant := 30*L/s
# [reference: ExpertInputs.xmcd]
# [reference: MathFunctions.xmcd]
# [reference: PipeDatabase.xmcd]
# [reference: MaterialsDatabase.xmcd]
# [reference: FluidsFunctions.xmcd]
# [reference: SedTankFunctions.xmcd]
# [reference: CdcFunctions.xmcd]
# [reference: LfomFunctions.xmcd]
# [reference: SedimentationTank.xmcd]
# [reference: Flocculator.xmcd]
# [reference: LFOM.xmcd]
# [reference: EntranceTankapb224_st587.xmcd]
# [reference: StackedRapidSandFilter.xmcd]
# [reference: LinearCdc.xmcd]
# [reference: ChemStorageTanks.xmcd]
# These are the codes that take MathCAD outputs and create AutoCAD scripts that are used to draw the plant (formerly Basics)
# [reference: MtoATranslators.xmcd]
# The wrapped MtoA translator contains the functions that the user will want to access. These functions will draw pieces with full functionality - specifying the location, dimension, and orientation of the object. Also, it contains layer control and subtraction capabilities for grouped objects.
# [reference: MtoATranslatorsWrapped.xmcd]
# [reference: ChannelF.xmcd]
# [reference: PlumbingF_ST587final.xmcd]
# [reference: TankF.xmcd]
# [reference: StairsF.xmcd]
# [reference: DrainChannelF.xmcd]
# [reference: FlocculatorAC.xmcd]
# [reference: SedimentationTankAC.xmcd]
# [reference: MaterialsListEntranceTankBlocks__evp6ss2938.xmcd]
# [reference: ChemStockTanksAC_tl428.xmcd]
# Stacked Rapid Sand Filter
FiGateValveURL := "https://confluence.cornell.edu/download/attachments/173604905/Fi-Scaled-Gate-Valve-Threaded.dwg"
AN_FiTrunkValves := 25 deg
Z_FiExitDrainOutlet := Z_FiExitBottom - H_FiExitWasteDrop
# Layers
# Filter Masonry
FiTankLayer := layer_new("FiTankCon", grey)
SelectFiTank := SelectLayer("FiTankCon")
FiTankFrz := FreezeLayer("FiTankCon")
SubtractFromFiTank := SubtractF(["FiTankCon"], "DeleteMe")
FiInletChannelLayer := layer_new("FiInletChannelCon", grey)
SelectFiInletChannel := SelectLayer("FiInletChannelCon")
FiInletChannelFrz := FreezeLayer("FiInletChannelCon")
SubtractFromFiInletChannel := SubtractF(["FiInletChannelCon"], "DeleteMe")
FiEntExitBoxLayer := layer_new("FiEntExitBoxCon", grey)
SelectFiEntExitBox := SelectLayer("FiEntExitBoxCon")
FiEntExitBoxFrz := FreezeLayer("FiEntExitBoxCon")
SubtractFromFiEntExitBox := SubtractF(["FiEntExitBoxCon"], "DeleteMe")
FiOFDistBoxLayer := layer_new("FiOverflowDistBoxCon", grey)
SelectFiOFDistBox := SelectLayer("FiOverflowDistBoxCon")
FiOFDistBoxFrz := FreezeLayer("FiOverflowDistBoxCon")
SubtractFromFiOFDistBox := SubtractF(["FiOverflowDistBoxCon"], "DeleteMe")
# Filter Plumbing
FiInletPipeLayer := layer_new("FiInletPipePlu", blue)
SelectFiInletPipe := SelectLayer("FiInletPipePlu")
FiInletPipeFrz := FreezeLayer("FiInletPipePlu")
FiEntExitPipeLayer := layer_new("FiEntExitPipesPlu", blue)
SelectFiEntExitPipes := SelectLayer("FiEntExitPipesPlu")
FiEntExitPipeFrz := FreezeLayer("FiEntExitPipesPlu")
FiEntExitFittingLayer := layer_new("FiEntExitFittingsPlu", green)
SelectFiEntExitFittings := SelectLayer("FiEntExitFittingsPlu")
FiEntExitFittingFrz := FreezeLayer("FiEntExitFittingsPlu")
FiValveLayer := layer_new("FiValvePlu", blue3)
SelectFiValve := SelectLayer("FiValvePlu")
FiValveFrz := FreezeLayer("FiValvePlu")
FiRemovableLayer := layer_new("FiRemovablePlu", red)
SelectFiRemovable := SelectLayer("FiRemovablePlu")
FiRemovableFrz := FreezeLayer("FiRemovablePlu")
FiFlexCouplingLayer := layer_new("FiFlexCouplingPlu", purple)
SelectFiFlexCoupling := SelectLayer("FiFlexCouplingPlu")
FiFlexCouplingFrz := FreezeLayer("FiFlexCouplingPlu")
FiManPipeLayer := layer_new("FiManPipePlu", blue)
SelectFiManPipe := SelectLayer("FiManPipePlu")
FiManPipeFrz := FreezeLayer("FiManPipePlu")
SubtractFromFiManPipe := SubtractF(["FiManPipePlu"], "DeleteMe")
FiManCapLayer := layer_new("FiManCapPlu", green)
SelectFiManCap := SelectLayer("FiManCapPlu")
FiManCapFrz := FreezeLayer("FiManCapPlu")
SubtractFromFiManCap := SubtractF(["FiManCapPlu"], "DeleteMe")
FiManBranchLayer := layer_new("FiManBranchPlu", blue3)
SelectFiManBranch := SelectLayer("FiManBranchPlu")
FiManBranchFrz := FreezeLayer("FiManBranchPlu")
SubtractFromFiManBranch := SubtractF(["FiManBranchPlu"], "DeleteMe")
FiReducerLayer := layer_new("FiReducerPlu", blue2)
SelectFiReducer := SelectLayer("FiReducerPlu")
FiReducerFrz := FreezeLayer("FiReducerPlu")
FiSiphonFittingLayer := layer_new("FiSiphonFittingPlu", green)
SelectFiSiphonFitting := SelectLayer("FiSiphonFittingPlu")
FiSiphonFittingFrz := FreezeLayer("FiSiphonFittingPlu")
SubtractFromFiSiphonFitting := SubtractF(["FiSiphonFittingPlu"], "DeleteMe")
FiSiphonPipeLayer := layer_new("FiSiphonPipePlu", blue)
SelectFiSiphonPipe := SelectLayer("FiSiphonPipePlu")
FiSiphonPipeFrz := FreezeLayer("FiSiphonPipePlu")
SubtractFromFiSiphonPipe := SubtractF(["FiSiphonPipePlu"], "DeleteMe")
FiSiphonValveLayer := layer_new("FiSiphonAirValvePlu", blue3)
SelectFiSiphonValve := SelectLayer("FiSiphonAirValvePlu")
FiSiphonValveFrz := FreezeLayer("FiSiphonAirValvePlu")
# Filter Removable Baffles and Weirs
FiInletWeirLayer := layer_new("FiInletControlWeir", purple)
SelectFiIneltWeir := SelectLayer("FiInletControlWeir")
FiInletWeirFrz := FreezeLayer("FiInletControlWeir")
FiBaffleLayer := layer_new("FiBaffles", purple)
SelectFiBaffle := SelectLayer("FiBaffles")
FiBaffleLayerFrz := FreezeLayer("FiBaffles")
# Drain Channels
MainDCLayer := layer_new("DrainChannelCon", grey)
SelectMainDC := SelectLayer("DrainChannelCon")
MainDCFrz := FreezeLayer("DrainChannelCon")
SideDCLayer := layer_new("DrainChannelSideCon", grey)
SelectSideDC := SelectLayer("DrainChannelSideCon")
SideDCFrz := FreezeLayer("DrainChannelSideCon")
# Masonry box and plant drain channel origin points
# The Y position is set so that the northern wall of the filter inlet channel aligns with the northern wall of the sed tanks (we want the inlet pipes to fit along the length of the inlet channel)
Fi_origin := [
    Plant_Origin[0] - W_FiInletChannel - 5*T_PlantWall - T_FiWall - L_FiEntrance - L_FiExit - W_MpWalkway - L_Sed - W_PlantDC;
    Plant_Origin[1] - T_PlantWall + T_FiWall;
    Z_FiBottom
]
FiEntranceBox_origin := [
    Plant_Origin[0] - W_FiInletChannel - 2*T_PlantWall - L_Sed - W_PlantDC - T_ChannelWall;
    Fi_origin[1] + W_Fi/2 - W_FiEntrance + S_Fitting + ConRadius(ND_FiBwTrunk);
    Z_FiEntranceBottom
]
FiExitBox_origin := FiEntranceBox_origin + [-L_FiEntrance - T_ChannelWall; 0; 0]
FiInletChannel_Origin := [
    Plant_Origin[0] - L_Sed - 2*T_PlantWall - W_PlantDC;
    FiEntranceBox_origin[1];
    Z_FiInletChannelBottom
]
FiOverflowBox_Origin := [FiEntranceBox_origin[0]; FiEntranceBox_origin[1] + W_FiEntrance + T_PlantWall; Z_FiOverflowBottom]
FiDistBox_Origin := [
    FiOverflowBox_Origin[0] - L_FiOverflow - T_ChannelWall;
    FiOverflowBox_Origin[1];
    FiExitBox_origin[2]
]
PlantDC_Origin := [
    Plant_Origin[0] - L_Sed - T_PlantWall - W_PlantDC;
    Plant_Origin[1] - T_PlantWall;
    Z_PlantUpperDCBottom + H_PlantDC
]
PlantLowerDC_Origin := [
    Plant_Origin[0] - L_Sed - T_PlantWall - W_PlantDC;
    Plant_Origin[1] - T_PlantWall;
    Z_PlantLowerDCBottom + H_PlantDC
]
PlantUpperDC_Origin := [
    Plant_Origin[0] - L_Sed - T_PlantWall - W_PlantDC;
    Fi_origin[1] + W_Fi;
    Z_PlantUpperDCBottom + H_PlantDC
]
PlantSideDC_Origin := [
    Plant_Origin[0] - L_Sed - T_PlantWall;
    Plant_Origin[1] - 2*T_PlantWall - W_FiInletChannel;
    Z_PlantLowerDCBottom + H_PlantDC
]
# Masonry box dimensions
FiEntranceBox_dim := [L_FiEntrance; W_FiEntrance; H_FiEntrance]
FiExitBox_dim := [L_FiExit; W_FiEntrance; H_FiEntrance]
Fi_dim := [L_Fi; W_Fi; H_Fi]
FiOverflowBox_Dim := [L_FiOverflow; W_FiOverflow; H_FiOverflow]
FiDistBox_Dim := [L_FiExit; W_FiOverflow; H_FiEntrance]
# Inlet channel
FiInletChannel := Tank(FiInletChannel_Origin, [W_FiInletChannel; L_FiInletChannel; H_FiInletChannel], T_PlantWall)
FiInletChannelConScript := stack(FiInletChannelLayer, FiInletChannel, FiInletChannelFrz)
FiInletCutout_Origin(N) := [
    FiInletChannel_Origin[0] + T_PlantWall;
    SedOutletHorizPipe_Origin(N)[1];
    SedOutletHorizPipe_Origin(N)[2]
]
FiInletPipeCutouts :=
    Local ← view("t")
    for i ∈ 1 .. N_FiEntrancePipes
        Cylinder ← CylinderF(FiInletCutout_Origin(i), outerradius(ND_FiEntrancePipe), T_PlantWall, [0; 0]*deg)
        Local ← stack(Local, Cylinder)
    return Local
SubtractFromSedInletChannel := SubtractF(["FiInletChannelCon"], "DeleteMe")
FiInletChannelScript := stack(FiInletChannelConScript, FiInletPipeCutouts, GroupDelete, SubtractFromSedInletChannel)
# Filter box masonry
FiTank := Tank(Fi_origin, Fi_dim, T_FiWall)
FiSiphonManLedgeL :=
    if EN_DoubleTrain == 0
        BoxF([
            Fi_origin[0];
            Fi_origin[1] + T_ConcreteMin + ConRadius(ND_FiSiphon) - 2*S_Fitting;
            Z_FiSiphonInlet - ConRadius(ND_FiSiphon) - outerradius(ND_FiSiphon)
        ], [
            Fi_origin[0] - T_ConcreteMin;
            Fi_origin[1] + T_ConcreteMin + ConRadius(ND_FiSiphon) + 2*S_Fitting;
            Z_FiSiphonInlet - ConRadius(ND_FiSiphon) - outerradius(ND_FiSiphon) - T_ConcreteMin
        ], [0; 0; 0]*deg)
    otherwise
        BoxF([
            Fi_origin[0] - T_ConcreteMin - ConRadius(ND_FiSiphon) + 2*S_Fitting;
            Fi_origin[1];
            Z_FiSiphonInlet - ConRadius(ND_FiSiphon) - outerradius(ND_FiSiphon)
        ], [
            Fi_origin[0] - T_ConcreteMin - ConRadius(ND_FiSiphon) - 2*S_Fitting;
            Fi_origin[1] + T_ConcreteMin;
            Z_FiSiphonInlet - ConRadius(ND_FiSiphon) - outerradius(ND_FiSiphon) - T_ConcreteMin
        ], [0; 0; 0]*deg)
FiSiphonManLedgeR :=
    if EN_DoubleTrain == 0
        BoxF([
            Fi_origin[0] - L_Fi;
            Fi_origin[1] + T_ConcreteMin + ConRadius(ND_FiSiphon) - 2*S_Fitting;
            Z_FiSiphonInlet - ConRadius(ND_FiSiphon) - outerradius(ND_FiSiphon)
        ], [
            Fi_origin[0] - L_Fi + T_ConcreteMin;
            Fi_origin[1] + T_ConcreteMin + ConRadius(ND_FiSiphon) + 2*S_Fitting;
            Z_FiSiphonInlet - ConRadius(ND_FiSiphon) - outerradius(ND_FiSiphon) - T_ConcreteMin
        ], [0; 0; 0]*deg)
    otherwise
        BoxF([
            Fi_origin[0] - T_ConcreteMin - ConRadius(ND_FiSiphon) + 2*S_Fitting;
            Fi_origin[1] + L_Fi;
            Z_FiSiphonInlet - ConRadius(ND_FiSiphon) - outerradius(ND_FiSiphon)
        ], [
            Fi_origin[0] - T_ConcreteMin - ConRadius(ND_FiSiphon) - 2*S_Fitting;
            Fi_origin[1] + L_Fi - T_ConcreteMin;
            Z_FiSiphonInlet - ConRadius(ND_FiSiphon) - outerradius(ND_FiSiphon) - T_ConcreteMin
        ], [0; 0; 0]*deg)
FiTankScript := stack(FiTankLayer, FiTank, FiSiphonManLedgeL, FiSiphonManLedgeR, Union_All, FiTankFrz)
# Plant drain channel
L_PlantLowerDC :=
    (Fi_origin[1] + W_Fi - Plant_Origin[1] - T_ChannelWall + T_PlantWall) if EN_DoubleTrain == 0
    (T_PlantWall + W_FiInletChannel + W_PlantDC + T_ChannelWall) otherwise
    = 1.38243
L_PlantUpperDC :=
    (Et_Origin[1] + W_Et - Fi_origin[1] - W_Fi - T_ChannelWall + T_PlantWall) if EN_DoubleTrain == 0
    (Et_Origin[1] + L_EtHopperFront/2 - (Plant_Origin[1] - T_PlantWall) + W_EtDC) otherwise
    = 8.96213
L_PlantSideDC := L_FiInletChannel + W_SedInletChannel + 2*T_PlantWall - T_ChannelWall + T_SedWeir
MainDCLower := DrainChannelF(PlantLowerDC_Origin, [270; 0; 0]*deg, Q_PlantDCMax, W_PlantDC, H_PlantDC, L_PlantLowerDC, Slope_PlantDC, Nu_Water, E_Concrete, 1)
MainDCUpper := DrainChannelF(PlantUpperDC_Origin, [270; 0; 0]*deg, Q_PlantDCMax, W_PlantDC, H_PlantDC, L_PlantUpperDC, Slope_PlantDC, Nu_Water, E_Concrete, 1)
SideLowerDC := DrainChannelF(PlantSideDC_Origin, [180; 0; 0]*deg, Q_PlantDCMax, W_PlantDC, H_PlantDC + (L_PlantLowerDC - L_PlantSideDC)*.02, L_PlantSideDC, .02, Nu_Water, E_Concrete, 1)
MainDC := DrainChannelF(PlantDC_Origin, [270; 0; 0]*deg, Q_PlantDCMax, W_PlantDC, H_PlantDC, L_PlantDC, Slope_PlantDC, Nu_Water, E_Concrete, 1)
MainDCScript :=
    stack(MainDCLayer, MainDC) if Z_PlantLowerDCBottom > Z_PlantUpperDCBottom - Slope_PlantDC*L_PlantUpperDC - 10 cm
    stack(MainDCLayer, MainDCLower, MainDCUpper) otherwise
SideDCScript := stack(SideDCLayer, SideLowerDC)
DCWestWallLower :=
    if EN_DoubleTrain == 0
        BoxF([
            Plant_Origin[0] - L_Sed - T_PlantWall - W_PlantDC;
            Plant_Origin[1] - T_PlantWall;
            PlantLowerDC_Origin[2]
        ], [
            Plant_Origin[0] - L_Sed - W_PlantDC - T_PlantWall - T_ChannelWall;
            PlantLowerDC_Origin[1] + L_PlantLowerDC + T_ChannelWall;
            Z_Walkway - T_Floor
        ], [0; 0; 0]*deg)
    otherwise
        BoxF([
            Plant_Origin[0] - L_Sed - T_PlantWall - W_PlantDC;
            Plant_Origin[1] - 2*T_PlantWall - W_FiInletChannel;
            PlantLowerDC_Origin[2]
        ], [
            Plant_Origin[0] - L_Sed - W_PlantDC - T_PlantWall - T_ChannelWall;
            PlantLowerDC_Origin[1] + L_PlantLowerDC + T_ChannelWall;
            Z_Walkway - T_Floor
        ], [0; 0; 0]*deg)
DCWestWallUpper :=
    if EN_DoubleTrain == 0
        BoxF([Plant_Origin[0] - L_Sed - T_PlantWall - W_PlantDC; PlantUpperDC_Origin[1]; PlantUpperDC_Origin[2]], [
            Plant_Origin[0] - L_Sed - W_PlantDC - T_PlantWall - T_ChannelWall;
            Plant_Origin[1] - T_PlantWall + L_PlantDC + T_ChannelWall;
            Z_Walkway - T_Floor
        ], [0; 0; 0]*deg)
    otherwise
        BoxF([Plant_Origin[0] - L_Sed - T_PlantWall - W_PlantDC; PlantUpperDC_Origin[1]; PlantUpperDC_Origin[2]], [
            Plant_Origin[0] - L_Sed - W_PlantDC - T_PlantWall - T_ChannelWall;
            PlantUpperDC_Origin[1] + L_PlantUpperDC;
            Z_Walkway - T_Floor
        ], [0; 0; 0]*deg)
DCEastWallLower :=
    if EN_DoubleTrain == 0
        BoxF([Plant_Origin[0] - L_Sed - T_PlantWall; Plant_Origin[1] - T_PlantWall; PlantLowerDC_Origin[2]], [
            Plant_Origin[0] - L_Sed + T_ChannelWall - T_PlantWall;
            PlantLowerDC_Origin[1] + L_PlantLowerDC + T_ChannelWall;
            Z_Walkway - T_Floor
        ], [0; 0; 0]*deg)
    otherwise
        BoxF([
            Plant_Origin[0] - L_Sed - T_PlantWall;
            Plant_Origin[1] - 2*T_PlantWall - W_FiInletChannel;
            PlantLowerDC_Origin[2]
        ], [
            Plant_Origin[0] - L_Sed + T_ChannelWall - T_PlantWall;
            PlantLowerDC_Origin[1] + L_PlantLowerDC + T_ChannelWall;
            Z_Walkway - T_Floor
        ], [0; 0; 0]*deg)
DCEastWallUpper :=
    if EN_DoubleTrain == 0
        BoxF([Plant_Origin[0] - L_Sed - T_PlantWall; PlantUpperDC_Origin[1]; PlantUpperDC_Origin[2]], [
            Plant_Origin[0] - L_Sed + T_ChannelWall - T_PlantWall;
            Plant_Origin[1] - T_PlantWall + L_PlantDC + T_ChannelWall;
            Z_Walkway - T_Floor
        ], [0; 0; 0]*deg)
    otherwise
        BoxF([Plant_Origin[0] - L_Sed - T_PlantWall; PlantUpperDC_Origin[1]; PlantUpperDC_Origin[2]], [
            Plant_Origin[0] - L_Sed + T_ChannelWall - T_PlantWall;
            PlantUpperDC_Origin[1] + L_PlantUpperDC;
            Z_Walkway - T_Floor
        ], [0; 0; 0]*deg)
DCNorthWall :=
    if EN_DoubleTrain == 0
        BoxF([Plant_Origin[0] - L_Sed; Plant_Origin[1] - T_ChannelWall + L_PlantDC; PlantUpperDC_Origin[2]], [
            Plant_Origin[0] - L_Sed - T_ChannelWall - W_PlantDC - T_PlantWall;
            Plant_Origin[1] + L_PlantDC;
            Z_Walkway - T_Floor
        ], [0; 0; 0]*deg)
    otherwise
        BoxF([
            Plant_Origin[0] - L_Sed - T_PlantWall + T_ChannelWall;
            (PlantUpperDC_Origin[1] + L_PlantUpperDC) + T_ChannelWall;
            PlantUpperDC_Origin[2]
        ], [
            Plant_Origin[0] - L_Sed - T_ChannelWall - W_PlantDC - T_PlantWall;
            PlantUpperDC_Origin[1] + L_PlantUpperDC;
            Z_Walkway - T_Floor
        ], [0; 0; 0]*deg)
DCSideNorthWall := BoxF([
    Plant_Origin[0] - L_Sed - T_PlantWall;
    Plant_Origin[1] - 2*T_PlantWall - W_FiInletChannel + T_ChannelWall;
    Z_PlantLowerDCBottom + H_PlantDC
], [
    Plant_Origin[0] - L_Sed - T_PlantWall + L_PlantSideDC + T_ChannelWall;
    Plant_Origin[1] - 2*T_PlantWall - W_FiInletChannel;
    Z_Walkway - T_Floor
], [0; 0; 0]*deg)
DCSideSouthWall := BoxF([
    Plant_Origin[0] - L_Sed - T_PlantWall;
    Plant_Origin[1] - 2*T_PlantWall - W_FiInletChannel - W_PlantDC;
    Z_PlantLowerDCBottom + H_PlantDC
], [
    Plant_Origin[0] - L_Sed - T_PlantWall + L_PlantSideDC + T_ChannelWall;
    Plant_Origin[1] - 2*T_PlantWall - W_FiInletChannel - T_ChannelWall - W_PlantDC;
    Z_Walkway - T_Floor
], [0; 0; 0]*deg)
DCSideOuterWall := BoxF([
    Plant_Origin[0] - L_Sed - T_PlantWall + L_PlantSideDC + T_ChannelWall;
    Plant_Origin[1] - 2*T_PlantWall - W_FiInletChannel;
    Z_PlantLowerDCBottom + H_PlantDC
], [
    Plant_Origin[0] - L_Sed - T_PlantWall + L_PlantSideDC;
    Plant_Origin[1] - 2*T_PlantWall - W_FiInletChannel - T_ChannelWall - W_PlantDC;
    Z_Walkway - T_Floor
], [0; 0; 0]*deg)
DCDropoffWall := BoxF([
    Plant_Origin[0] - L_Sed - T_PlantWall + T_ChannelWall;
    PlantLowerDC_Origin[1] + L_PlantLowerDC;
    PlantLowerDC_Origin[2]
], [
    Plant_Origin[0] - L_Sed - T_PlantWall - W_PlantDC - T_ChannelWall;
    PlantLowerDC_Origin[1] + L_PlantLowerDC + T_ChannelWall;
    PlantUpperDC_Origin[2] - H_PlantDC - Slope_PlantDC*L_PlantUpperDC
], [0; 0; 0]*deg)
DrainChannelRMRecessWalls := BoxF([
    Plant_Origin[0] - L_Sed - T_PlantWall;
    Et_Origin[1] + W_Et + T_PlantWall;
    PlantUpperDC_Origin[2] - T_ChannelWall - H_PlantDC
], [
    FlocCoupling_Origin[0] + ConRadius(ND_RMPipe) + S_Fitting + T_ChannelWall;
    Floc_Origin[1] + N_FlocChannels*(W_FlocChannel + T_FlocChannelWall) - T_FlocChannelWall + T_PlantWall - T_ChannelWall;
    Z_Walkway - T_Floor
], [0; 0; 0]*deg)
FiInletChannelDCCutout := BoxF([
    Plant_Origin[0] - L_Sed - T_PlantWall - W_PlantDC;
    FiInletChannel_Origin[1] - T_PlantWall;
    FiInletChannel_Origin[2] - T_PlantWall
], [
    Plant_Origin[0] - L_Sed - W_PlantDC - 2*T_PlantWall;
    FiInletChannel_Origin[1] + T_PlantWall + L_FiInletChannel;
    Z_Walkway - T_Floor
], [0; 0; 0]*deg)
SedDCCutout := BoxF([Plant_Origin[0] - L_Sed; Plant_Origin[1] - T_PlantWall; Plant_Origin[2] - T_PlantWall], [
    Plant_Origin[0] - L_Sed - T_PlantWall;
    Plant_Origin[1] + W_Sed*N_SedTanks + T_SedWallDivider*N_SedTanks - T_SedWallDivider + T_PlantWall;
    Z_Walkway - T_Floor
], [0; 0; 0]*deg)
MirrorSedDCCutout := Mirror3dLast("yz", [Floc_Origin[0] - L_Floc - W_PlantDC/2 - T_PlantWall; 0 m], "n")
DrainChannelRMRecessCutout1 := BoxF([
    Plant_Origin[0] - L_Sed - T_PlantWall;
    Et_Origin[1] + W_Et + T_PlantWall - T_ChannelWall;
    PlantUpperDC_Origin[2] - H_PlantDC
], [
    FlocCoupling_Origin[0] + ConRadius(ND_RMPipe) + S_Fitting;
    Floc_Origin[1] + N_FlocChannels*(W_FlocChannel + T_FlocChannelWall) - T_FlocChannelWall + T_PlantWall;
    Z_Walkway - T_Floor + zc
], [0; 0; 0]*deg)
EtDrainChannelCutout := BoxF([
    FlocCoupling_Origin[0] + ConRadius(ND_RMPipe) + S_Fitting;
    EtDC_Origin[1] + W_EtDC;
    Et_Origin[2] - T_PlantWall
], [
    FlocCoupling_Origin[0] + ConRadius(ND_RMPipe) + S_Fitting + T_ChannelWall;
    EtDC_Origin[1];
    EtDC_Origin[2] - H_EtDC - Slope_EtDC*L_EtDC
], [0; 0; 0]*deg)
DrainChannelBoxCutout := BoxF([
    Plant_Origin[0] - L_Sed - T_PlantWall - W_PlantDC;
    PlantUpperDC_Origin[1];
    Z_PlantUpperDCBottom - Slope_PlantDC*L_PlantUpperDC
], [Plant_Origin[0] - L_Sed - T_PlantWall; PlantUpperDC_Origin[1] - T_PlantWall; Plant_Origin[2]], [0; 0; 0]*deg)
DrainChannelWedgeCutout := WedgeF([
    Plant_Origin[0] - L_Sed - T_PlantWall;
    PlantUpperDC_Origin[1] - T_ChannelWall;
    Z_PlantUpperDCBottom - Slope_PlantDC*L_PlantUpperDC
], [
    Plant_Origin[0] - L_Sed - T_PlantWall - T_ChannelWall;
    PlantUpperDC_Origin[1] - T_ChannelWall - W_PlantDC;
    Z_PlantUpperDCBottom - Slope_PlantDC*(L_PlantUpperDC + T_ChannelWall)
], [270; 0; 0]*deg)
FiDrainChannelCutout := BoxF([
    Plant_Origin[0] - L_Sed - T_PlantWall - W_PlantDC - T_PlantWall;
    Plant_Origin[1] - 2*T_PlantWall - W_FiInletChannel - W_PlantDC - T_ChannelWall;
    Z_PlantLowerDCBottom + H_PlantDC
], [
    Plant_Origin[0] - L_Sed;
    Plant_Origin[1] - 2*T_PlantWall - W_FiInletChannel;
    Z_PlantLowerDCBottom - (L_PlantLowerDC - T_PlantWall - W_PlantDC)*Slope_PlantDC
], [0; 0; 0]*deg)
FiInletChannelCutout := BoxF([
    Plant_Origin[0] - L_Sed - T_PlantWall + L_PlantSideDC + T_ChannelWall;
    Plant_Origin[1] - 2*T_PlantWall - W_FiInletChannel - T_ChannelWall - W_PlantDC;
    Z_Walkway - T_Floor
], [
    Plant_Origin[0] - L_Sed - T_PlantWall;
    Plant_Origin[1] - 2*T_PlantWall - W_FiInletChannel - W_PlantDC;
    Z_FiInletChannelBottom - T_PlantWall
], [0; 0; 0]*deg)
MirrorFiInletChannelCutout := Mirror3dLast("yz", [Floc_Origin[0] - L_Floc - W_PlantDC/2 - T_PlantWall; 0 m], "n")
EtRMDCCutout := CylinderF(FlocCoupling_Origin + [0; -SocketDepth(ND_RMPipe); 0], outerradius(ND_RMPipe), 2*T_ChannelWall, [270; 0]*deg)
SubtractDCCutouts := SubtractF(["DrainChannelCon"], "DeleteMe")
SubtractDCSideCutouts := SubtractF(["DrainChannelSideCon"], "DeleteMe")
DCUpperWallsHigh := stack(DCWestWallLower, DCWestWallUpper, DCEastWallLower, DCEastWallUpper, DCNorthWall, Union_All, DrainChannelFrz)
DCUpperWalls :=
    stack(DCWestWallLower, DCWestWallUpper, DCEastWallLower, DCEastWallUpper, DCNorthWall, DrainChannelRMRecessWalls, Union_All, MainDCFrz) if Z_PlantLowerDCBottom > Z_PlantUpperDCBottom - Slope_PlantDC*L_PlantUpperDC - 10 cm
    stack(DCWestWallLower, DCWestWallUpper, DCEastWallLower, DCEastWallUpper, DCNorthWall, DCDropoffWall, DrainChannelRMRecessWalls, Union_All, MainDCFrz) otherwise
DCUpperSideWalls := stack(DCSideNorthWall, DCSideSouthWall, DCSideOuterWall, Union_All, SideDCFrz)
DCWallCutouts := stack(FiInletChannelDCCutout, SedDCCutout, DrainChannelRMRecessCutout1, DrainChannelBoxCutout, DrainChannelWedgeCutout, EtDrainChannelCutout, EtRMDCCutout, GroupDelete, SubtractDCCutouts)
DCWallCutoutsHigh := stack(SedDCCutout, MirrorSedDCCutout, DrainChannelBoxCutout, DrainChannelWedgeCutout, EtDrainChannelCutout, FiDrainChannelCutout, GroupDelete, SubtractDCCutouts)
DCSideWallCutouts := stack(FiInletChannelCutout, GroupDelete, SubtractDCSideCutouts)
PlantDrainChannelScript :=
    stack(MainDCScript, DCUpperWalls, DCWallCutouts) if EN_DoubleTrain == 0
    stack(MainDCScript, DCUpperWallsHigh, DCWallCutoutsHigh, SideDCScript, DCUpperSideWalls, DCSideWallCutouts, ThawMultiple(["DrainChannelCon"; "DrainChannelSideCon"]), Union_All, FreezeMultiple(["DrainChannelCon"; "DrainChannelSideCon"])) otherwise
# Auxiliary box masonry
# Entrance and Exit Boxes
FiEntBox := Tank(FiEntranceBox_origin, FiEntranceBox_dim, T_PlantWall)
FiExitBox := Tank(FiExitBox_origin, FiExitBox_dim, T_PlantWall)
# Overflow and Distribution Boxes
FiDistBox := Tank(FiDistBox_Origin, FiDistBox_Dim, T_PlantWall)
FiOverflowBox := Tank(FiOverflowBox_Origin, FiOverflowBox_Dim, T_PlantWall)
FiOverflowBoxBase := BoxF(FiOverflowBox_Origin + [T_PlantWall; -T_PlantWall; -T_PlantWall], [
    FiOverflowBox_Origin[0] - FiOverflowBox_Dim[0];
    FiOverflowBox_Origin[1] + FiOverflowBox_Dim[1] + T_PlantWall;
    FiEntranceBox_origin[2] - T_PlantWall
], [0; 0; 0]*deg)
FiAuxBoxScript := stack(FiEntExitBoxLayer, FiEntBox, FiExitBox, Union_All, FiEntExitBoxFrz, FiOFDistBoxLayer, FiDistBox, FiOverflowBox, FiOverflowBoxBase, Union_All, FiOFDistBoxFrz)
# Entrance and exit fittings to filter wall
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# This will be the pipe layout in the entrance and exit boxes to allow for 2 90 degree elbows in  Pipes 2 and 3 coming from the entrance box (on the right)
# Entrance 0 Fittings
FiBwInletCoupling_origin := [
    FiEntranceBox_origin[0] - L_FiEntrance + L_FiOverflowWeir - ConRadius(ND_FiBwTrunk);
    FiEntranceBox_origin[1] + W_FiEntrance - ConRadius(ND_FiBwTrunk) - S_Fitting;
    FiEntranceBox_origin[2] - CouplingLength(ND_FiBwTrunk) + SocketDepth(ND_FiBwTrunk)
]
FiBwInletTee_origin := [
    FiBwInletCoupling_origin[0];
    FiBwInletCoupling_origin[1];
    Fi_origin[2] + outerradius(ND_FiBwManBranch) + ShortTeeLength(ND_FiBwTrunk)
]
FiWallBwCoupling_origin := [
    Fi_origin[0] + T_FiWall + CouplingLength(ND_FiBwTrunk) - SocketDepth(ND_FiBwTrunk);
    FiBwInletCoupling_origin[1];
    Fi_origin[2] + outerradius(ND_FiBwManBranch)
]
FiEntBoxCoupling0 := CouplingSUBF(FiBwInletCoupling_origin, [0; 90]*deg, ND_FiBwTrunk, PS_Default, ["FiEntExitBoxCon"])
FiInTee0a := TeeF(FiBwInletTee_origin, [0; 0; 90]*deg, ND_FiBwTrunk, PS_Default)
FiIn0ReducerLarge := CylinderF(FiBwInletTee_origin + [TeeLength(ND_FiBwTrunk)/2 + SocketDepth(ND_FiBwTrunk); 0 m; -ShortTeeLength(ND_FiBwTrunk)], outerdiameter(ND_FiBwTrunk)/2, SocketDepth(ND_FiBwTrunk), [0; 0]*deg)
FiIn0ReducerSmall := CylinderF(FiBwInletTee_origin + [
    TeeLength(ND_FiBwTrunk)/2 + SocketDepth(ND_FiBwTrunk) + ValveSocket(ND_FiBwTrunkFlushValve);
    0 m;
    -ShortTeeLength(ND_FiBwTrunk)
], outerdiameter(ND_FiBwTrunkFlushValve)/2, ValveSocket(ND_FiBwTrunkFlushValve), [0; 0]*deg)
FiInWallCoupling0 := CouplingF(FiWallBwCoupling_origin, [0; 0]*deg, ND_FiBwTrunk, PS_Default)
FiIn0FittingScript := stack(FiEntBoxCoupling0, FiInTee0a, FiInWallCoupling0)
FiIn0ReducerScript := stack(FiIn0ReducerLarge, FiIn0ReducerSmall)
# Outlet 0 Fittings
FiExitCoupling0_origin := [
    FiExitBox_origin[0] - T_ConcreteMin - ConRadius(ND_FiTrunk);
    FiBwInletCoupling_origin[1];
    FiExitBox_origin[2] - CouplingLength(ND_FiTrunk) + SocketDepth(ND_FiTrunk)
]
FiOutElbow0a_origin := [
    FiExitCoupling0_origin[0];
    FiExitCoupling0_origin[1];
    Fi_origin[2] + outerradius(ND_FiBwManBranch) + H_FiBottomLayer + 2*H_FiLayer + ElbowRadius(ND_FiTrunk)
]
FiExChanCoupling0 := CouplingSUBF(FiExitCoupling0_origin, [0; 90]*deg, ND_FiTrunk, PS_Default, ["FiEntExitBoxCon"])
FiOutElbow0a := ElbowF(FiOutElbow0a_origin, [0; 0; -90]*deg, ND_FiTrunk, PS_Default)
FiOut0FittingScript := stack(SelectFiEntExitFittings, FiExChanCoupling0, FiOutElbow0a)
# Entrance 1 Fittings
FiInletCoupling1_origin := [
    FiEntranceBox_origin[0] - L_FiEntrance + T_ConcreteMin + ConRadius(ND_FiTrunk);
    FiEntranceBox_origin[1] + W_FiEntrance - ConRadius(ND_FiBwTrunk) - S_Fitting;
    FiEntranceBox_origin[2] - CouplingLength(ND_FiTrunk) + SocketDepth(ND_FiTrunk)
]
FiInletElbow1_origin := [
    FiInletCoupling1_origin[0];
    FiInletCoupling1_origin[1];
    Fi_origin[2] + outerradius(ND_FiBwManBranch) + H_FiBottomLayer + H_FiLayer + ElbowRadius(ND_FiTrunk)
]
FiEntBoxCoupling1 := CouplingSUBF(FiInletCoupling1_origin, [0; 90]*deg, ND_FiTrunk, PS_Default, ["FiEntExitBoxCon"])
FiInElbow1a := ElbowF(FiInletElbow1_origin, [0; 0; -90]*deg, ND_FiTrunk, PS_Default)
FiIn1FittingScript := stack(FiEntBoxCoupling1, FiInElbow1a)
# Outlet 1 Fittings
FiExitCoupling1_origin := [
    FiExitBox_origin[0] - L_FiExit + T_ConcreteMin + ConRadius(ND_FiTrunk);
    FiInletCoupling1_origin[1];
    FiExitBox_origin[2] - CouplingLength(ND_FiTrunk) + SocketDepth(ND_FiTrunk)
]
FiOutElbow1a_origin := [
    FiExitCoupling1_origin[0];
    FiExitCoupling1_origin[1];
    Fi_origin[2] + outerradius(ND_FiBwManBranch) + H_FiBottomLayer + 4*H_FiLayer + ElbowRadius(ND_FiTrunk)
]
FiExBoxCoupling1 := CouplingSUBF(FiExitCoupling1_origin, [0; 90]*deg, ND_FiTrunk, PS_Default, ["FiEntExitBoxCon"])
FiOutElbow1a := ElbowF(FiOutElbow1a_origin, [0; 0; -90]*deg, ND_FiTrunk, PS_Default)
FiOut1FittingScript := stack(FiExBoxCoupling1, FiOutElbow1a)
# Inlet 2 Fittings
FiInletCoupling2_origin := [
    FiEntranceBox_origin[0] - L_FiEntrance + L_FiOverflowWeir - (ConRadius(ND_FiTrunk) + S_Fitting);
    FiEntranceBox_origin[1] + 2*T_ConcreteMin + 3*ConRadius(ND_FiTrunk);
    FiInletCoupling1_origin[2]
]
FiInElbow2a_origin := [
    FiInletCoupling2_origin[0];
    FiInletCoupling2_origin[1];
    Fi_origin[2] + outerradius(ND_FiBwManBranch) + H_FiBottomLayer + 3*H_FiLayer + ElbowRadius(ND_FiTrunk)
]
FiInElbow2b_origin := [
    FiExitCoupling1_origin[0] - 2*ConRadius(ND_FiTrunk) - S_Fitting;
    FiInletCoupling2_origin[1] + ElbowRadius(ND_FiTrunk);
    Fi_origin[2] + outerradius(ND_FiBwManBranch) + H_FiBottomLayer + 3*H_FiLayer
]
FiInElbow2c_origin := FiInElbow2b_origin + [0 m; 2*SocketDepth(ND_FiTrunk); 0 m]
FiEntBoxCoupling2 := CouplingSUBF(FiInletCoupling2_origin, [0; 90]*deg, ND_FiTrunk, PS_Default, ["FiEntExitBoxCon"])
FiInElbow2a := ElbowF(FiInElbow2a_origin, [0; 0; -90]*deg, ND_FiTrunk, PS_Default)
FiInElbow2b := ElbowF(FiInElbow2b_origin, [180; 0; 0]*deg, ND_FiTrunk, PS_Default)
FiInElbow2c := ElbowF(FiInElbow2c_origin, [0; 0; 0]*deg, ND_FiTrunk, PS_Default)
FiIn2FittingScript := stack(FiEntBoxCoupling2, FiInElbow2a, FiInElbow2b, FiInElbow2c)
# Oulet 2 Fittings (exit box drain)
FiExitCoupling2_origin := [
    FiExitBox_origin[0] - T_ConcreteMin - ConRadius(ND_FiTrunk);
    FiExitBox_origin[1] + T_ConcreteMin + ConRadius(ND_FiTrunk);
    FiExitBox_origin[2] - CouplingLength(ND_FiExitWaste) + SocketDepth(ND_FiExitWaste)
]
FiOutElbow2a_origin := [
    FiExitCoupling2_origin[0] + ElbowRadius(ND_FiExitWaste);
    FiExitCoupling2_origin[1];
    Z_FiExitDrainOutlet
]
FiExChanCoupling2 := CouplingSUBF(FiExitCoupling2_origin, [0; 90]*deg, ND_FiExitWaste, PS_Default, ["FiEntExitBoxCon"])
FiOutElbow2a := ElbowF(FiOutElbow2a_origin, [90; 0; 270]*deg, ND_FiExitWaste, PS_Default)
FiOut2FittingScript := stack(FiExChanCoupling2, FiOutElbow2a)
# Inlet 3 Fittings
FiInletCoupling3_origin := [
    FiEntranceBox_origin[0] - L_FiEntrance + T_ConcreteMin + ConRadius(ND_FiTrunk);
    FiEntranceBox_origin[1] + 2*T_ConcreteMin + 3*ConRadius(ND_FiTrunk);
    FiEntranceBox_origin[2] - CouplingLength(ND_FiTrunk) + SocketDepth(ND_FiTrunk)
]
FiInElbow3a_origin := [
    FiInletCoupling3_origin[0];
    FiInletCoupling3_origin[1];
    Fi_origin[2] + outerradius(ND_FiBwManBranch) + H_FiBottomLayer + 5*H_FiLayer + ElbowRadius(ND_FiTrunk)
]
FiInElbow3b_origin := [
    FiExitCoupling1_origin[0] - 2*ConRadius(ND_FiTrunk) - S_Fitting;
    FiInletCoupling3_origin[1] + ElbowRadius(ND_FiTrunk);
    Fi_origin[2] + outerradius(ND_FiBwManBranch) + H_FiBottomLayer + 5*H_FiLayer
]
FiInElbow3c_origin := FiInElbow3b_origin + [0 m; 2*SocketDepth(ND_FiTrunk); 0 m]
FiEntBoxCoupling3 := CouplingSUBF(FiInletCoupling3_origin, [0; 90]*deg, ND_FiTrunk, PS_Default, ["FiEntExitBoxCon"])
FiInElbow3a := ElbowF(FiInElbow3a_origin, [0; 0; -90]*deg, ND_FiTrunk, PS_Default)
FiInElbow3b := ElbowF(FiInElbow3b_origin, [180; 0; 0]*deg, ND_FiTrunk, PS_Default)
FiInElbow3c := ElbowF(FiInElbow3c_origin, [0; 0; 0]*deg, ND_FiTrunk, PS_Default)
FiIn3FittingScript := stack(FiEntBoxCoupling3, FiInElbow3a, FiInElbow3b, FiInElbow3c, FiEntExitFittingFrz)
# Outlet 3 Fittings
FiExitCoupling3_origin := [
    FiExitBox_origin[0] - L_FiExit + T_ConcreteMin + ConRadius(ND_FiExitWaste);
    FiExitBox_origin[1] + T_ConcreteMin + ConRadius(ND_FiTrunk);
    FiExitBox_origin[2] - CouplingLength(ND_FiTrunk) + SocketDepth(ND_FiTrunk)
]
FiOut3ElbowA_origin := [
    FiExitCoupling3_origin[0];
    FiExitCoupling3_origin[1] + ElbowRadius(ND_FiTrunk);
    Fi_origin[2] + outerradius(ND_FiBwManBranch) + H_FiBottomLayer
]
FiOut3ElbowB_origin := [
    FiOut3ElbowA_origin[0] - ElbowRadius(ND_FiTrunk);
    FiExitCoupling0_origin[1];
    Fi_origin[2] + outerradius(ND_FiBwManBranch) + H_FiBottomLayer
]
FiWallOutTee3_origin := [
    Fi_origin[0] + T_FiWall + SocketDepth(ND_FiTrunk) + TeeLength(ND_FiTrunk)/2;
    FiExitCoupling0_origin[1] + ShortTeeLength(ND_FiTrunk)*cos(AN_FiTrunkValves);
    Fi_origin[2] + outerradius(ND_FiBwManBranch) + H_FiBottomLayer - ShortTeeLength(ND_FiTrunk)*sin(AN_FiTrunkValves)
]
FiExChanCoupling3 := CouplingSUBF(FiExitCoupling3_origin, [0; 90]*deg, ND_FiTrunk, PS_Default, ["FiEntExitBoxCon"])
FiOut3ElbowA := ElbowF(FiOut3ElbowA_origin, [180; 270; 0]*deg, ND_FiTrunk, PS_Default)
FiOut3ElbowB := ElbowF(FiOut3ElbowB_origin, [-90; 0; 180]*deg, ND_FiTrunk, PS_Default)
FiWallOutTee3 := TeeF(FiWallOutTee3_origin, [0 deg; 0 deg; -AN_FiTrunkValves], ND_FiTrunk, PS_Default)
FiOut3ReducerLarge := CylinderF(FiWallOutTee3_origin, outerradius(ND_FiTrunk), SocketDepth(ND_FiTrunk) + zc, [-90; 0]*deg)
FiOut3ReducerSmall := CylinderF(FiWallOutTee3_origin, outerradius(ND_FiTrunkFlushValve), ValveSocket(ND_FiTrunkFlushValve) + SocketDepth(ND_FiTrunk) + zc, [-90; 0]*deg)
RotateFiTrunkReducer := Rotate3DLast(FiWallOutTee3_origin, "x", -AN_FiTrunkValves)
ArrayFiTrunkValve := stack(view("f"), ArrayLast(N_FiLayer, 1, H_FiLayer), view("t"))
FiOut3FittingScript := stack(FiExChanCoupling3, FiOut3ElbowA, FiOut3ElbowB, FiWallOutTee3, ArrayFiTrunkValve)
FiOut3ReducerScript := stack(FiOut3ReducerLarge, RotateFiTrunkReducer, ArrayFiTrunkValve, FiOut3ReducerSmall, RotateFiTrunkReducer, ArrayFiTrunkValve)
FiEntExitFittingScript := stack(FiEntExitFittingLayer, FiIn0FittingScript, FiIn1FittingScript, FiIn2FittingScript, FiIn3FittingScript, FiOut0FittingScript, FiOut1FittingScript, FiOut2FittingScript, FiOut3FittingScript, FiEntExitFittingFrz, FiReducerLayer, FiOut3ReducerScript, FiIn0ReducerScript, FiReducerFrz)
# Entrance and exit pipes to filter wall
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# This is all of the piping between filter box, entrance and exit
# In means the pipe goes IN TO THE FILTER
# Out means it comes OUT OF THE FILTER
# Inlet 0 Pipes (backwash)
L_FiInPipe0a := FiBwInletCoupling_origin[2] - FiBwInletTee_origin[2]
L_FiInPipe0b := FiBwInletTee_origin[0] - FiWallBwCoupling_origin[0]
FiInPipe0a := PipeSUBF(FiBwInletCoupling_origin, L_FiInPipe0a, [0; 270]*deg, ND_FiBwTrunk, PS_Default, ["FiEntExitBoxCon"])
FiInPipe0b := PipeF(FiBwInletTee_origin + [-TeeLength(ND_FiBwTrunk)/2; 0 m; -ShortTeeLength(ND_FiBwTrunk)], L_FiInPipe0b, [0; 0]*deg, ND_FiBwTrunk, PS_Default)
FiIn0WallPipe := PipeSUBF(FiWallBwCoupling_origin - [CouplingLength(ND_FiBwTrunk) - 2*SocketDepth(ND_FiBwTrunk); 0 m; 0 m], L_FiManFerncoCoupling/2 + T_FiWall + SocketDepth(ND_FiBwTrunk), [0; 0; 0]*deg, ND_FiBwTrunk, PS_Default, ["FiTankCon"])
FiIn0PipeScript := stack(FiInPipe0a, FiInPipe0b, FiIn0WallPipe)
# Inlet 1 Pipes
L_FiInPipe1a := FiInletCoupling1_origin[2] - FiInletElbow1_origin[2]
L_FiInPipe1b := FiInletCoupling1_origin[0] - ElbowRadius(ND_FiTrunk) - FiWallOutTee3_origin[0] - TeeLength(ND_FiTrunk)/2 = 1.42539 m
FiInPipe1a := PipeSUBF(FiInletCoupling1_origin, L_FiInPipe1a, [0; 270]*deg, ND_FiTrunk, PS_Default, ["FiEntExitBoxCon"])
FiInPipe1b := PipeF(FiInletElbow1_origin + [-ElbowRadius(ND_FiTrunk); 0 m; -ElbowRadius(ND_FiTrunk)], L_FiInPipe1b, [0; 0]*deg, ND_FiTrunk, PS_Default)
FiIn1WallPipe := PipeSUBF(FiWallOutTee3_origin + [
    -TeeLength(ND_FiTrunk)/2;
    -ShortTeeLength(ND_FiTrunk)*cos(AN_FiTrunkValves);
    ShortTeeLength(ND_FiTrunk)*sin(AN_FiTrunkValves) + H_FiLayer
], L_FiManFerncoCoupling/2 + T_FiWall + SocketDepth(ND_FiTrunk), [0; 0; 0]*deg, ND_FiTrunk, PS_Default, ["FiTankCon"])
FiIn1PipeScript := stack(FiInPipe1a, FiInPipe1b, FiIn1WallPipe)
# Inlet 2 Pipes
L_FiInPipe2a := FiInletCoupling2_origin[2] - FiInElbow2a_origin[2]
L_FiInPipe2b := FiInletCoupling2_origin[0] - FiInElbow2b_origin[0] - 2*ElbowRadius(ND_FiTrunk)
L_FiInPipe2c := 2*SocketDepth(ND_FiTrunk)
L_FiInPipe2d := FiInElbow2c_origin[0] - FiWallOutTee3_origin[0] - ElbowRadius(ND_FiTrunk) - TeeLength(ND_FiTrunk)/2
FiInPipe2a := PipeSUBF(FiInletCoupling2_origin, L_FiInPipe2a, [0; 270]*deg, ND_FiTrunk, PS_Default, ["FiEntExitBoxCon"])
FiInPipe2b := PipeF(FiInElbow2a_origin + [-ElbowRadius(ND_FiTrunk); 0 m; -ElbowRadius(ND_FiTrunk)], L_FiInPipe2b, [0; 0]*deg, ND_FiTrunk, PS_Default)
FiInPipe2c := PipeF(FiInElbow2b_origin, L_FiInPipe2c, [-90; 0]*deg, ND_FiTrunk, PS_Default)
FiInPipe2d := PipeF(FiInElbow2c_origin + [-ElbowRadius(ND_FiTrunk); ElbowRadius(ND_FiTrunk); 0 m], L_FiInPipe2d, [0; 0]*deg, ND_FiTrunk, PS_Default)
FiIn2WallPipe := PipeSUBF(FiWallOutTee3_origin + [
    -TeeLength(ND_FiTrunk)/2;
    -ShortTeeLength(ND_FiTrunk)*cos(AN_FiTrunkValves);
    ShortTeeLength(ND_FiTrunk)*sin(AN_FiTrunkValves) + 3*H_FiLayer
], L_FiManFerncoCoupling/2 + T_FiWall + SocketDepth(ND_FiTrunk), [0; 0; 0]*deg, ND_FiTrunk, PS_Default, ["FiTankCon"])
FiIn2PipeScript := stack(FiInPipe2a, FiInPipe2b, FiInPipe2c, FiInPipe2d, FiIn2WallPipe)
# Inlet 3 Pipes
L_FiInPipe3a := FiInletCoupling3_origin[2] - FiInElbow3a_origin[2]
L_FiInPipe3b := FiInElbow3a_origin[0] - FiInElbow3b_origin[0] - 2*ElbowRadius(ND_FiTrunk)
L_FiInPipe3c := 2*SocketDepth(ND_FiTrunk)
L_FiInPipe3d := FiInElbow3c_origin[0] - FiWallOutTee3_origin[0] - ElbowRadius(ND_FiTrunk) - TeeLength(ND_FiTrunk)/2
FiInPipe3a := PipeSUBF(FiInletCoupling3_origin, L_FiInPipe3a, [0; 270]*deg, ND_FiTrunk, PS_Default, ["FiEntExitBoxCon"])
FiInPipe3b := PipeF(FiInElbow3a_origin + [-ElbowRadius(ND_FiTrunk); 0 m; -ElbowRadius(ND_FiTrunk)], L_FiInPipe3b, [0; 0]*deg, ND_FiTrunk, PS_Default)
FiInPipe3c := PipeF(FiInElbow3b_origin, L_FiInPipe3c, [-90; 0]*deg, ND_FiTrunk, PS_Default)
FiInPipe3d := PipeF(FiInElbow3c_origin + [-ElbowRadius(ND_FiTrunk); ElbowRadius(ND_FiTrunk); 0 m], L_FiInPipe3d, [0; 0]*deg, ND_FiTrunk, PS_Default)
FiIn3WallPipe := PipeSUBF(FiWallOutTee3_origin + [
    -TeeLength(ND_FiTrunk)/2;
    -ShortTeeLength(ND_FiTrunk)*cos(AN_FiTrunkValves);
    ShortTeeLength(ND_FiTrunk)*sin(AN_FiTrunkValves) + 5*H_FiLayer
], L_FiManFerncoCoupling/2 + T_FiWall + SocketDepth(ND_FiTrunk), [0; 0; 0]*deg, ND_FiTrunk, PS_Default, ["FiTankCon"])
FiIn3PipeScript := stack(FiInPipe3a, FiInPipe3b, FiInPipe3c, FiInPipe3d, FiIn3WallPipe)
# Outlet 0 Pipes
L_FiOutPipe0a := FiExitCoupling0_origin[2] - FiOutElbow0a_origin[2]
L_FiOutPipe0b := FiOutElbow0a_origin[0] - FiWallOutTee3_origin[0] - ElbowRadius(ND_FiTrunk) - TeeLength(ND_FiTrunk)/2
FiOutPipe0a := PipeSUBF(FiExitCoupling0_origin, L_FiOutPipe0a, [0; -90]*deg, ND_FiTrunk, PS_Default, ["FiEntExitBoxCon"])
FiOutPipe0b := PipeF(FiOutElbow0a_origin + [-ElbowRadius(ND_FiTrunk); 0 m; -ElbowRadius(ND_FiTrunk)], L_FiOutPipe0b, [0; 0]*deg, ND_FiTrunk, PS_Default)
FiOut0WallPipe := PipeSUBF(FiWallOutTee3_origin + [-TeeLength(ND_FiTrunk); 0 m; ShortTeeLength(ND_FiTrunk)*sin(AN_FiTrunkValves) + 2*H_FiLayer], L_FiManFerncoCoupling/2 + T_FiWall + SocketDepth(ND_FiTrunk), [0; 0; 0]*deg, ND_FiTrunk, PS_Default, ["FiTankCon"])
FiOut0PipeScript := stack(FiOutPipe0a, FiOutPipe0b, FiOut0WallPipe)
# Outlet 1 Pipes
L_FiOutPipe1a := FiExitCoupling1_origin[2] - FiOutElbow1a_origin[2]
L_FiOutPipe1b := FiOutElbow1a_origin[0] - FiWallOutTee3_origin[0] - ElbowRadius(ND_FiTrunk) - TeeLength(ND_FiTrunk)/2
FiOutPipe1a := PipeSUBF(FiExitCoupling1_origin, L_FiOutPipe1a, [0; -90]*deg, ND_FiTrunk, PS_Default, ["FiEntExitBoxCon"])
FiOutPipe1b := PipeF(FiOutElbow1a_origin + [-ElbowRadius(ND_FiTrunk); 0 m; -ElbowRadius(ND_FiTrunk)], L_FiOutPipe1b, [0; 0]*deg, ND_FiTrunk, PS_Default)
FiOut1WallPipe := PipeSUBF(FiWallOutTee3_origin + [
    -TeeLength(ND_FiTrunk)/2;
    -ShortTeeLength(ND_FiTrunk)*cos(AN_FiTrunkValves);
    ShortTeeLength(ND_FiTrunk)*sin(AN_FiTrunkValves) + 4*H_FiLayer
], L_FiManFerncoCoupling/2 + T_FiWall + SocketDepth(ND_FiTrunk), [0; 0; 0]*deg, ND_FiTrunk, PS_Default, ["FiTankCon"])
FiOut1PipeScript := stack(FiOutPipe1a, FiOutPipe1b, FiOut1WallPipe)
# Outlet 2 Pipes (exit box drain)
L_FiOutPipe2a := FiExitCoupling2_origin[2] - FiOutElbow2a_origin[2] - ElbowRadius(ND_FiExitWaste)
FiOutPipe2a := PipeSUBF(FiExitCoupling2_origin, L_FiOutPipe2a, [0; -90]*deg, ND_FiExitWaste, PS_Default, ["FiEntExitBoxCon"])
FiOut2PipeScript := FiOutPipe2a
# Outlet 3 Pipes
L_FiOut3PipeZ := FiExitCoupling3_origin[2] - (Fi_origin[2] + outerradius(ND_FiBwManBranch) + H_FiBottomLayer + ElbowRadius(ND_FiTrunk))
L_FiOut3PipeX := FiExitCoupling3_origin[0] - Fi_origin[0] - T_FiWall - ElbowRadius(ND_FiTrunk) - TeeLength(ND_FiTrunk) - SocketDepth(ND_FiTrunk)
L_FiOut3PipeY := FiExitCoupling0_origin[1] - FiExitCoupling3_origin[1] - 2*ElbowRadius(ND_FiTrunk)
FiOut3PipeZ := PipeSUBF([
    FiExitCoupling3_origin[0];
    FiExitCoupling3_origin[1];
    Fi_origin[2] + outerradius(ND_FiBwManBranch) + H_FiBottomLayer + ElbowRadius(ND_FiTrunk)
], L_FiOut3PipeZ, [0; 90]*deg, ND_FiTrunk, PS_Default, ["FiEntExitBoxCon"])
FiOut3PipeX := PipeF([
    FiExitCoupling3_origin[0] - ElbowRadius(ND_FiTrunk);
    FiExitCoupling0_origin[1];
    Fi_origin[2] + outerradius(ND_FiBwManBranch) + H_FiBottomLayer
], L_FiOut3PipeX, [0; 0]*deg, ND_FiTrunk, PS_Default)
FiOut3PipeY := PipeF([
    FiExitCoupling3_origin[0];
    FiExitCoupling3_origin[1] + ElbowRadius(ND_FiTrunk);
    Fi_origin[2] + outerradius(ND_FiBwManBranch) + H_FiBottomLayer
], L_FiOut3PipeY, [270; 0]*deg, ND_FiTrunk, PS_Default)
FiOut3WallPipe := PipeSUBF(FiWallOutTee3_origin + [
    -TeeLength(ND_FiTrunk)/2;
    -ShortTeeLength(ND_FiTrunk)*cos(AN_FiTrunkValves);
    ShortTeeLength(ND_FiTrunk)*sin(AN_FiTrunkValves)
], L_FiManFerncoCoupling/2 + T_FiWall + SocketDepth(ND_FiTrunk), [0; 0; 0]*deg, ND_FiTrunk, PS_Default, ["FiTankCon"])
FiOut3PipeScript := stack(FiOut3PipeZ, FiOut3PipeX, FiOut3PipeY, FiOut3WallPipe)
FiEntExitPipeScript := stack(FiEntExitPipeLayer, FiIn0PipeScript, FiIn1PipeScript, FiIn2PipeScript, FiIn3PipeScript, FiOut0PipeScript, FiOut1PipeScript, FiOut2PipeScript, FiOut3PipeScript, FiEntExitPipeFrz)
# Inlet and outlet pipe valves
FiInValve0 := insertdwg(FiGateValveURL, [
    FiBwInletCoupling_origin[0] + TeeLength(ND_FiBwTrunk)/2 + SocketDepth(ND_FiBwTrunk) + ValveLength(ND_FiBwTrunkFlushValve);
    FiBwInletCoupling_origin[1];
    Fi_origin[2] + outerradius(ND_FiBwManBranch)
], outerdiameter(ND_FiBwTrunkFlushValve)/(1.16 m), outerdiameter(ND_FiBwTrunkFlushValve)/(1.16 m), 0 deg)
FiInValve1 := insertdwg(FiGateValveURL, FiWallOutTee3_origin + [
    0 m;
    (SocketDepth(ND_FiTrunk) + zc)*cos(AN_FiTrunkValves);
    -(SocketDepth(ND_FiTrunk) + zc)*sin(AN_FiTrunkValves) + H_FiLayer
], 2*outerradius(ND_FiTrunkFlushValve)/(1.16 m), 2*outerradius(ND_FiTrunkFlushValve)/(1.16 m), -90 deg)
FiIn1ValveRotate := Rotate3DLast(FiWallOutTee3_origin + [
    0 m;
    (SocketDepth(ND_FiTrunk) + zc)*cos(AN_FiTrunkValves);
    -(SocketDepth(ND_FiTrunk) + zc)*sin(AN_FiTrunkValves) + H_FiLayer
], "x", -AN_FiTrunkValves)
FiInValve2 := insertdwg(FiGateValveURL, FiWallOutTee3_origin + [
    0 m;
    (SocketDepth(ND_FiTrunk) + zc)*cos(AN_FiTrunkValves);
    -(SocketDepth(ND_FiTrunk) + zc)*sin(AN_FiTrunkValves) + 3*H_FiLayer
], 2*outerradius(ND_FiTrunkFlushValve)/(1.16 m), 2*outerradius(ND_FiTrunkFlushValve)/(1.16 m), -90 deg)
FiIn2ValveRotate := Rotate3DLast(FiWallOutTee3_origin + [
    0 m;
    (SocketDepth(ND_FiTrunk) + zc)*cos(AN_FiTrunkValves);
    -(SocketDepth(ND_FiTrunk) + zc)*sin(AN_FiTrunkValves) + 3*H_FiLayer
], "x", -AN_FiTrunkValves)
FiInValve3 := insertdwg(FiGateValveURL, FiWallOutTee3_origin + [
    0 m;
    (SocketDepth(ND_FiTrunk) + zc)*cos(AN_FiTrunkValves);
    -(SocketDepth(ND_FiTrunk) + zc)*sin(AN_FiTrunkValves) + 5*H_FiLayer
], 2*outerradius(ND_FiTrunkFlushValve)/(1.16 m), 2*outerradius(ND_FiTrunkFlushValve)/(1.16 m), -90 deg)
FiIn3ValveRotate := Rotate3DLast(FiWallOutTee3_origin + [
    0 m;
    (SocketDepth(ND_FiTrunk) + zc)*cos(AN_FiTrunkValves);
    -(SocketDepth(ND_FiTrunk) + zc)*sin(AN_FiTrunkValves) + 5*H_FiLayer
], "x", -AN_FiTrunkValves)
FiOutValve0 := insertdwg(FiGateValveURL, FiWallOutTee3_origin + [
    0 m;
    (SocketDepth(ND_FiTrunk) + zc)*cos(AN_FiTrunkValves);
    -(SocketDepth(ND_FiTrunk) + zc)*sin(AN_FiTrunkValves) + 2*H_FiLayer
], 2*outerradius(ND_FiTrunkFlushValve)/(1.16 m), 2*outerradius(ND_FiTrunkFlushValve)/(1.16 m), -90 deg)
FiOut0ValveRotate := Rotate3DLast(FiWallOutTee3_origin + [
    0 m;
    (SocketDepth(ND_FiTrunk) + zc)*cos(AN_FiTrunkValves);
    -(SocketDepth(ND_FiTrunk) + zc)*sin(AN_FiTrunkValves) + 2*H_FiLayer
], "x", -AN_FiTrunkValves)
FiOutValve1 := insertdwg(FiGateValveURL, FiWallOutTee3_origin + [
    0 m;
    (SocketDepth(ND_FiTrunk) + zc)*cos(AN_FiTrunkValves);
    -(SocketDepth(ND_FiTrunk) + zc)*sin(AN_FiTrunkValves) + 4*H_FiLayer
], 2*outerradius(ND_FiTrunkFlushValve)/(1.16 m), 2*outerradius(ND_FiTrunkFlushValve)/(1.16 m), -90 deg)
FiOut1ValveRotate := Rotate3DLast(FiWallOutTee3_origin + [
    0 m;
    (SocketDepth(ND_FiTrunk) + zc)*cos(AN_FiTrunkValves);
    -(SocketDepth(ND_FiTrunk) + zc)*sin(AN_FiTrunkValves) + 4*H_FiLayer
], "x", -AN_FiTrunkValves)
FiOutValve3 := insertdwg(FiGateValveURL, FiWallOutTee3_origin + [
    0 m;
    (SocketDepth(ND_FiTrunk) + zc)*cos(AN_FiTrunkValves);
    -(SocketDepth(ND_FiTrunk) + zc)*sin(AN_FiTrunkValves)
], 2*outerradius(ND_FiTrunkFlushValve)/(1.16 m), 2*outerradius(ND_FiTrunkFlushValve)/(1.16 m), -90 deg)
FiOut3ValveRotate := Rotate3DLast(FiWallOutTee3_origin + [
    0 m;
    (SocketDepth(ND_FiTrunk) + zc)*cos(AN_FiTrunkValves);
    -(SocketDepth(ND_FiTrunk) + zc)*sin(AN_FiTrunkValves)
], "x", -AN_FiTrunkValves)
FiValveScript := stack(FiValveLayer, FiInValve0, FiInValve1, FiIn1ValveRotate, FiInValve2, FiIn2ValveRotate, FiInValve3, FiIn3ValveRotate, FiOutValve0, FiOut0ValveRotate, FiOutValve1, FiOut1ValveRotate, FiOutValve3, FiOut3ValveRotate, FiValveFrz)
# Inlet and outlet box pipe stubs
L_FiEntPipeStub := Z_FiEntranceStub - Z_FiEntranceBottom + SocketDepth(ND_FiTrunk)
L_FiExitPipeStub := Z_FiExitStub - Z_FiExitBottom + SocketDepth(ND_FiTrunk)
L_ExitBoxDrainStub := H_FiExit + SocketDepth(ND_FiExitWaste)
FiEnt1PipeStub := PipeF(FiInletCoupling1_origin + [0 m; 0 m; CouplingLength(ND_FiTrunk) - 2*SocketDepth(ND_FiTrunk)], L_FiEntPipeStub, [0; 90]*deg, ND_FiTrunk, PS_Default)
FiEnt2PipeStub := PipeF(FiInletCoupling2_origin + [0 m; 0 m; CouplingLength(ND_FiTrunk) - 2*SocketDepth(ND_FiTrunk)], L_FiEntPipeStub, [0; 90]*deg, ND_FiTrunk, PS_Default)
FiEnt3PipeStub := PipeF(FiInletCoupling3_origin + [0 m; 0 m; CouplingLength(ND_FiTrunk) - 2*SocketDepth(ND_FiTrunk)], L_FiEntPipeStub, [0; 90]*deg, ND_FiTrunk, PS_Default)
FiExit0PipeStub := PipeF(FiExitCoupling0_origin + [0 m; 0 m; CouplingLength(ND_FiTrunk) - 2*SocketDepth(ND_FiTrunk)], L_FiExitPipeStub, [0; 90]*deg, ND_FiTrunk, PS_Default)
FiExit1PipeStub := PipeF(FiExitCoupling1_origin + [0 m; 0 m; CouplingLength(ND_FiTrunk) - 2*SocketDepth(ND_FiTrunk)], L_FiExitPipeStub, [0; 90]*deg, ND_FiTrunk, PS_Default)
FiExit2PipeStub := PipeF(FiExitCoupling2_origin + [0 m; 0 m; CouplingLength(ND_FiExitWaste) - 2*SocketDepth(ND_FiExitWaste)], L_ExitBoxDrainStub, [0; 90]*deg, ND_FiExitWaste, PS_Default)
FiOut3PipeStub := PipeF([
    FiExitCoupling3_origin[0];
    FiExitCoupling3_origin[1];
    FiExitCoupling3_origin[2] + CouplingLength(ND_FiTrunk) - 2*SocketDepth(ND_FiTrunk)
], L_FiExitPipeStub, [0; 90]*deg, ND_FiTrunk, PS_Default)
FiEntExitStubs := stack(FiRemovableLayer, FiEnt1PipeStub, FiEnt2PipeStub, FiEnt3PipeStub, FiExit0PipeStub, FiExit1PipeStub, FiExit2PipeStub, FiOut3PipeStub, FiRemovableFrz)
FiEntExitPlumbingScript := stack(FiEntExitPipeScript, FiEntExitFittingScript, FiEntExitStubs)
# Auxiliary box plumbing (not filter entrance or exit)
Z_FiOverflowVertDrainPipeStart := Z_FiOverflowBottom - CouplingLength(ND_FiEntOverflow) + SocketDepth(ND_FiEntOverflow) = 1.05634 m
Z_FiOverflowVertDrainPipeEnd := Z_FiOverflowBottom - H_FiEntOverflowDrop + ElbowRadius(ND_FiEntOverflow) = 0.191275 m
X_FiOverflowHorizDrainPipeStart := FiInletChannel_Origin[0] + T_PlantWall - CouplingLength(ND_FiEntOverflow) + SocketDepth(ND_FiEntOverflow)
X_FiOverflowHorizDrainPipeEnd := FiEntranceBox_origin[0] - L_FiEntrance/2 + ElbowRadius(ND_FiEntOverflow)
Y_FiOverflowHorizDrainPipeStart := FiInletChannel_Origin[1] + W_FiInletChannel + T_PlantWall - CouplingLength(ND_FiEntOverflow) + SocketDepth(ND_FiEntOverflow)
Y_FiOverflowHorizDrainPipeEnd := FiEntranceBox_origin[1] + L_FiEntrance/2 + ElbowRadius(ND_FiEntOverflow)
# Auxiliary Fittings
FiAuxFittingLayer := layer_new("FiAuxFittingPlu", green)
FiAuxRemovableLayer := layer_new("FiAuxRemovablePlu", red)
SelectFiAuxRemovables := SelectLayer("FiAuxRemovablePlu")
FiBypassCoupling :=
    if EN_DoubleTrain == 0
        CouplingSUBF([
            FiExitBox_origin[0] + CouplingLength(ND_FiBypass) - SocketDepth(ND_FiBypass);
            FiEntranceBox_origin[1] - T_ChannelWall - W_FiOverflow/2;
            Z_FiTop - S_Fitting - ConRadius(ND_FiBypass)
        ], [0; 0]*deg, ND_FiBypass, PS_Default, ["FiOverflowDistBoxCon"])
    otherwise
        CouplingSUBF([
            FiEntranceBox_origin[0] + T_ChannelWall + W_FiOverflow/2;
            FiExitBox_origin[1] + CouplingLength(ND_FiBypass) - SocketDepth(ND_FiBypass) + L_FiExit;
            Z_FiTop - S_Fitting - ConRadius(ND_FiBypass)
        ], [90; 0]*deg, ND_FiBypass, PS_Default, ["FiOverflowDistBoxCon"])
FiBypassCap :=
    if EN_DoubleTrain == 0
        CapF([
            FiExitBox_origin[0] + CouplingLength(ND_FiBypass) + CapHeight(ND_FiBypass) - CapThickness(ND_FiBypass);
            FiEntranceBox_origin[1] - T_ChannelWall - W_FiOverflow/2;
            Z_FiTop - S_Fitting - ConRadius(ND_FiBypass)
        ], [0; 0; 0]*deg, ND_FiBypass)
    otherwise
        CapF([
            FiEntranceBox_origin[0] + T_ChannelWall + W_FiOverflow/2;
            FiExitBox_origin[1] + CouplingLength(ND_FiBypass) + CapHeight(ND_FiBypass) - CapThickness(ND_FiBypass) + L_FiExit;
            Z_FiTop - S_Fitting - ConRadius(ND_FiBypass)
        ], [90; 0; 0]*deg, ND_FiBypass)
FiOverflowBoxCoupling :=
    if EN_DoubleTrain == 0
        CouplingSUBF([
            FiEntranceBox_origin[0] - L_FiEntrance/2;
            FiEntranceBox_origin[1] - T_ChannelWall - W_FiOverflow/2;
            Z_FiOverflowVertDrainPipeStart
        ], [0; 90]*deg, ND_FiEntOverflow, PS_Default, ["FiOverflowDistBoxCon"])
    otherwise
        CouplingSUBF([
            FiEntranceBox_origin[0] + T_ChannelWall + W_FiOverflow/2;
            FiEntranceBox_origin[1] + L_FiEntrance/2;
            Z_FiOverflowVertDrainPipeStart
        ], [0; 90]*deg, ND_FiEntOverflow, PS_Default, ["FiOverflowDistBoxCon"])
FiAuxFittingFrz := FreezeLayer("FiAuxFittingPlu")
FiAuxRemovableFrz := FreezeLayer("FiAuxRemovablePlu")
FiAuxFittingScript := stack(FiAuxFittingLayer, FiBypassCoupling, FiOverflowBoxCoupling, FiAuxFittingFrz, FiAuxRemovableLayer, FiBypassCap, FiAuxRemovableFrz)
# Distribution Plumbing Start
FiDistFittingLayer := layer_new("FiDistFittingPlu", green)
FiDistCoupling :=
    if EN_DoubleTrain == 0
        CouplingSUBF([
            FiExitBox_origin[0] - L_FiExit/2;
            FiEntranceBox_origin[1] - T_ChannelWall - W_FiOverflow/2;
            Z_FiExitBottom - SocketDepth(ND_DistPipe)
        ], [0; 270]*deg, ND_DistPipe, PS_Default, ["FiOverflowDistBoxCon"])
    otherwise
        CouplingSUBF([
            FiEntranceBox_origin[0] + T_ChannelWall + W_FiOverflow/2;
            FiExitBox_origin[1] + L_FiExit/2;
            Z_FiExitBottom - SocketDepth(ND_DistPipe)
        ], [0; 270]*deg, ND_DistPipe, PS_Default, ["FiOverflowDistBoxCon"])
FiDistElbow1 :=
    if EN_DoubleTrain == 0
        ElbowF([
            FiExitBox_origin[0] - L_FiExit/2;
            FiEntranceBox_origin[1] - T_ChannelWall - W_FiOverflow/2;
            Z_FiDistPipe + ElbowRadius(ND_DistPipe)
        ], [0; 0; 270]*deg, ND_DistPipe, PS_Default)
    otherwise
        ElbowF([
            FiEntranceBox_origin[0] + T_ChannelWall + W_FiOverflow/2;
            FiExitBox_origin[1] + L_FiExit/2;
            Z_FiDistPipe + ElbowRadius(ND_DistPipe)
        ], [0; -90; 270]*deg, ND_DistPipe, PS_Default)
FiDistFittingFrz := FreezeLayer("FiDistFittingPlu")
FiDistPipeLayer := layer_new("FiDistPipePlu", blue)
L_FiDistPipe1 := Z_FiExitBottom - CouplingLength(ND_DistPipe) + SocketDepth(ND_DistPipe) - (Z_FiDistPipe + ElbowRadius(ND_DistPipe))
FiDistPipe1 :=
    if EN_DoubleTrain == 0
        PipeSUBF([
            FiExitBox_origin[0] - L_FiExit/2;
            FiEntranceBox_origin[1] - T_ChannelWall - W_FiOverflow/2;
            Z_FiExitBottom - CouplingLength(ND_DistPipe) + SocketDepth(ND_DistPipe)
        ], L_FiDistPipe1, [0; 270; 0]*deg, ND_DistPipe, PS_Default, ["FiOverflowDistBoxCon"])
    otherwise
        PipeSUBF([
            FiEntranceBox_origin[0] + T_ChannelWall + W_FiOverflow/2;
            FiExitBox_origin[1] + L_FiExit/2;
            Z_FiExitBottom - CouplingLength(ND_DistPipe) + SocketDepth(ND_DistPipe)
        ], L_FiDistPipe1, [0; 270; 0]*deg, ND_DistPipe, PS_Default, ["FiOverflowDistBoxCon"])
FiDistPipeFrz := FreezeLayer("FiDistPipePlu")
FiDistStartScript := stack(FiDistFittingLayer, FiDistCoupling, FiDistElbow1, FiDistFittingFrz, FiDistPipeLayer, FiDistPipe1, FiDistPipeFrz)
# Auxiliary Pipes
FiAuxPipeLayer := layer_new("FiAuxPipePlu", blue)
FiBypassPipe1Horiz :=
    if EN_DoubleTrain == 0
        PipeF([
            FiExitBox_origin[0] + CouplingLength(ND_FiBypass) + CapHeight(ND_FiBypass) - CapThickness(ND_FiBypass);
            FiEntranceBox_origin[1] - T_ChannelWall - W_FiOverflow/2;
            Z_FiTop - S_Fitting - ConRadius(ND_FiBypass)
        ], CapHeight(ND_FiBypass) - CapThickness(ND_FiBypass) + SocketDepth(ND_FiBypass), [0; 0; 0]*deg, ND_FiBypass, PS_Default)
    otherwise
        PipeF([
            FiEntranceBox_origin[0] + T_ChannelWall + W_FiOverflow/2;
            FiExitBox_origin[1] + CouplingLength(ND_FiBypass) + CapHeight(ND_FiBypass) - CapThickness(ND_FiBypass) + L_FiExit;
            Z_FiTop - S_Fitting - ConRadius(ND_FiBypass)
        ], CapHeight(ND_FiBypass) - CapThickness(ND_FiBypass) + SocketDepth(ND_FiBypass), [90; 0; 0]*deg, ND_FiBypass, PS_Default)
FiOverflowDrainPipeVert :=
    if EN_DoubleTrain == 0
        PipeSUBF([
            FiEntranceBox_origin[0] - L_FiEntrance/2;
            FiEntranceBox_origin[1] - T_ChannelWall - W_FiOverflow/2;
            Z_FiOverflowVertDrainPipeStart
        ], Z_FiOverflowVertDrainPipeStart - Z_FiOverflowVertDrainPipeEnd, [0; 270]*deg, ND_FiEntOverflow, PS_Default, ["FiOverflowDistBoxCon"])
    otherwise
        PipeSUBF([
            FiEntranceBox_origin[0] + T_ChannelWall + W_FiOverflow/2;
            FiEntranceBox_origin[1] + L_FiEntrance/2;
            Z_FiOverflowVertDrainPipeStart
        ], Z_FiOverflowVertDrainPipeStart - Z_FiOverflowVertDrainPipeEnd, [0; 270]*deg, ND_FiEntOverflow, PS_Default, ["FiOverflowDistBoxCon"])
LayerFiAuxPipeFrz := FreezeLayer("FiAuxPipePlu")
FiAuxPipeScript := stack(FiAuxPipeLayer, FiOverflowDrainPipeVert, LayerFiAuxPipeFrz, SelectFiAuxRemovables, FiBypassPipe1Horiz, FiAuxRemovableFrz)
FiAuxPlumbingScript := stack(FiAuxFittingScript, FiDistStartScript, FiAuxPipeScript)
# Manifold trunks and branch receivers
# Branch Receivers
FiBranchHolder := PipeF([
    Fi_origin[0] - CapThickness(ND_FiBranchHolder) - S_FiManAssembly;
    Fi_origin[1] + ConRadius(ND_FiBwBranchHolder) + S_FiManAssembly;
    Fi_origin[2] + H_FiBottomLayer + outerradius(ND_FiBwManBranch)
], L_Fi - 2*CapThickness(ND_FiBranchHolder) - 2*S_FiManAssembly, [0; 0]*deg, ND_FiBranchHolder, PS_Default)
FiBranchHolderCapRight := CapF([
    Fi_origin[0] - CapThickness(ND_FiBranchHolder) - S_FiManAssembly;
    Fi_origin[1] + ConRadius(ND_FiBwBranchHolder) + S_FiManAssembly;
    Fi_origin[2] + H_FiBottomLayer + outerradius(ND_FiBwManBranch)
], [0; 0]*deg, ND_FiBranchHolder)
FiBranchHolderCapLeft := CapF([
    Fi_origin[0] - L_Fi + S_FiManAssembly + CapThickness(ND_FiBranchHolder);
    Fi_origin[1] + ConRadius(ND_FiBwBranchHolder) + S_FiManAssembly;
    Fi_origin[2] + H_FiBottomLayer + outerradius(ND_FiBwManBranch)
], [180; 0]*deg, ND_FiBranchHolder)
ArrayFiBranchHolder := Array_All(2, 1, W_Fi - 2*ConRadius(ND_FiBwBranchHolder) - 2*S_FiManAssembly)
FiManBranchRecThaw := ThawMultiple(["FiManPipePlu"; "FiManCapPlu"])
FiManBranchRecFrz := FreezeMultiple(["FiManPipePlu"; "FiManCapPlu"])
FiBranchHolderScript := stack(FiManPipeLayer, FiBranchHolder, FiManPipeFrz, FiManCapLayer, FiBranchHolderCapRight, FiBranchHolderCapLeft, FiManCapFrz, FiManBranchRecThaw, ArrayFiBranchHolder, FiManBranchRecFrz)
# Manifold Trunks
FiTrunk := PipeF([
    Fi_origin[0] - L_FiManFerncoCoupling/2;
    FiBwInletCoupling_origin[1];
    Fi_origin[2] + H_FiBottomLayer + outerradius(ND_FiBwManBranch)
], L_FiTrunk, [0; 0]*deg, ND_FiTrunk, PS_Default)
FiTrunkCap := CapF([
    Fi_origin[0] - L_FiManFerncoCoupling/2 - L_FiTrunk;
    FiBwInletCoupling_origin[1];
    Fi_origin[2] + H_FiBottomLayer + outerradius(ND_FiBwManBranch)
], [180; 0]*deg, ND_FiTrunk)
FiTrunkScript := stack(SelectFiManPipe, FiTrunk, FiManPipeFrz, SelectFiManCap, FiTrunkCap, FiManCapFrz)
# Trunk and Branch Receiver Holes and Array
FiTrunkOrifice := CylinderF([
    Fi_origin[0] - L_FiManFerncoCoupling - B_FiManifoldBranch/2;
    Fi_origin[1] + S_FiManAssembly + ConRadius(ND_FiBwBranchHolder);
    Fi_origin[2] + H_FiBottomLayer + outerradius(ND_FiBwManBranch)
], outerradius(ND_FiManBranch), W_Fi - 2*ConRadius(ND_FiBwBranchHolder) - 2*S_FiManAssembly, [-90; 0]*deg)
ArrayFiTrunkOrifice := ArrayLast(1, N_FiManBranch/2, -B_FiManifoldBranch)
ArrayFiTrunks := array_all(N_FiLayer, 1, H_FiLayer)
FiManTrunkOrificeScript := stack(FiTrunkOrifice, ArrayFiTrunkOrifice, GroupDelete, SubtractFromFiManPipe, FiTrunkOrifice, ArrayFiTrunkOrifice, GroupDelete, SubtractFromFiManCap, SelectFiManPipe, SelectFiManCap, view("f"), ArrayFiTrunks, view("t"), FiManPipeFrz, FiManCapFrz)
# Backwash Trunk
FiBwTrunk := PipeF([
    Fi_origin[0] - L_FiManFerncoCoupling/2;
    FiBwInletCoupling_origin[1];
    Fi_origin[2] + outerradius(ND_FiBwManBranch)
], L_FiBwTrunk, [0; 0]*deg, ND_FiBwTrunk, PS_Default)
FiBwTrunkCap := CapF([
    Fi_origin[0] - L_FiManFerncoCoupling/2 - L_FiBwTrunk;
    FiBwInletCoupling_origin[1];
    Fi_origin[2] + outerradius(ND_FiBwManBranch)
], [180; 0; 0]*deg, ND_FiBwTrunk)
FiBwManTrunkScript := stack(SelectFiManPipe, FiBwTrunk, FiManPipeFrz, SelectFiManCap, FiBwTrunkCap, FiManCapFrz)
# Backwash Branch Receivers
FiBwBranchReceiver := PipeF([
    Fi_origin[0] - CapThickness(ND_FiBwBranchHolder) - S_FiManAssembly;
    Fi_origin[1] + ConRadius(ND_FiBwBranchHolder) + S_FiManAssembly;
    Fi_origin[2] + outerradius(ND_FiBwManBranch)
], L_Fi - 2*CapThickness(ND_FiBranchHolder) - 2*S_FiManAssembly, [0; 0]*deg, ND_FiBwBranchHolder, PS_Default)
FiBwBranchReceiverCapR := CapF([
    Fi_origin[0] - CapThickness(ND_FiBwBranchHolder) - S_FiManAssembly;
    Fi_origin[1] + ConRadius(ND_FiBwBranchHolder) + S_FiManAssembly;
    Fi_origin[2] + outerradius(ND_FiBwManBranch)
], [0; 0; 0]*deg, ND_FiBwBranchHolder)
FiBwBranchReceiverCapL := CapF([
    Fi_origin[0] - L_Fi + S_FiManAssembly + CapThickness(ND_FiBwBranchHolder);
    Fi_origin[1] + ConRadius(ND_FiBwBranchHolder) + S_FiManAssembly;
    Fi_origin[2] + outerradius(ND_FiBwManBranch)
], [180; 0; 0]*deg, ND_FiBwBranchHolder)
ArrayFiBwBranchHolder := ArrayLast(2, 1, W_Fi - 2*ConRadius(ND_FiBwBranchHolder) - 2*S_FiManAssembly)
FiBwBranchReceiverScript := stack(SelectFiManPipe, FiBwBranchReceiver, ArrayFiBwBranchHolder, FiManPipeFrz, SelectFiManCap, FiBwBranchReceiverCapR, ArrayFiBwBranchHolder, FiBwBranchReceiverCapL, ArrayFiBwBranchHolder, FiManCapFrz)
# Backwash Trunk and Branch Receiver Orifices
FiBwTrunkOrifice := CylinderF([
    Fi_origin[0] - L_FiManFerncoCoupling - B_FiManifoldBranch/2;
    Fi_origin[1] + ConRadius(ND_FiBwBranchHolder) + S_FiManAssembly;
    Fi_origin[2] + outerradius(ND_FiBwManBranch)
], outerradius(ND_FiBwManBranch), W_Fi - 2*ConRadius(ND_FiBwBranchHolder) - 2*S_FiManAssembly, [-90; 0]*deg)
FiBwTrunkOrificeScript := stack(FiBwTrunkOrifice, ArrayFiTrunkOrifice, GroupDelete, SubtractFromFiManPipe, FiBwTrunkOrifice, ArrayFiTrunkOrifice, GroupDelete, SubtractFromFiManCap)
# Filter Box Floor Cutouts
FiBwTrunkCutout := BoxF([
    Fi_origin[0];
    Fi_origin[1] + W_Fi/2 - ConRadius(ND_FiBwTrunk);
    Fi_origin[2] - max(ConRadius(ND_FiBwTrunk), FerncoOuterDiameter(ND_FiBwTrunk)/2) + outerradius(ND_FiBwManBranch)
], [Fi_origin[0] - L_Fi; Fi_origin[1] + W_Fi/2 + ConRadius(ND_FiBwTrunk); Fi_origin[2]], [0; 0; 0]*deg)
FiBwBranchHolderCutout1 := BoxF([
    Fi_origin[0];
    Fi_origin[1];
    Fi_origin[2] - ConRadius(ND_FiBwBranchHolder) + outerradius(ND_FiBwManBranch)
], [
    Fi_origin[0] - L_Fi;
    Fi_origin[1] + S_FiManAssembly + 2*ConRadius(ND_FiBwBranchHolder);
    Fi_origin[2]
], [0; 0; 0]*deg)
FiBwBranchHolderCutout2 := BoxF([
    Fi_origin[0];
    Fi_origin[1] + W_Fi;
    Fi_origin[2] - ConRadius(ND_FiBwBranchHolder) + outerradius(ND_FiBwManBranch)
], [
    Fi_origin[0] - L_Fi;
    Fi_origin[1] + W_Fi - 2*ConRadius(ND_FiBwBranchHolder) - S_FiManAssembly;
    Fi_origin[2]
], [0; 0; 0]*deg)
FiBoxFloorCutoutScript := stack(FiBwTrunkCutout, FiBwBranchHolderCutout1, FiBwBranchHolderCutout2, GroupDelete, SubtractFromFiTank)
FiTrunkReceiverScript := stack(FiBranchHolderScript, FiTrunkScript, FiManTrunkOrificeScript, FiBwManTrunkScript, FiBwBranchReceiverScript, FiBwTrunkOrificeScript, FiBoxFloorCutoutScript)
# Flexible Couplings
FiFerncoBwCoupling_origin := [Fi_origin[0]; FiBwInletCoupling_origin[1]; Fi_origin[2] + outerradius(ND_FiBwManBranch)]
FiFerncoCouplings_origin := [
    Fi_origin[0];
    FiBwInletCoupling_origin[1];
    Fi_origin[2] + outerradius(ND_FiBwManBranch) + H_FiBottomLayer
]
FiFlexBwCoupling := FerncoCouplingF(FiFerncoBwCoupling_origin, [0; 0; 0]*deg, ND_FiBwTrunk, L_FiManFerncoCoupling)
FiFlexCoupling := FerncoCouplingF(FiFerncoCouplings_origin, [0; 0; 0], ND_FiTrunk, L_FiManFerncoCoupling)
ArrayFiManifoldLast := ArrayLast(N_FiLayer, 1, H_FiLayer)
FiFlexCouplingScript := stack(FiFlexCouplingLayer, FiFlexBwCoupling, FiFlexCoupling, view("f"), ArrayFiManifoldLast, view("t"), FiFlexCouplingFrz)
# Manifold branches
FiManBranch := PipeF(Fi_origin + [
    -L_FiManFerncoCoupling - B_FiManifoldBranch/2;
    S_FiManAssembly + ConRadius(ND_FiBwBranchHolder) + outerradius(ND_FiBranchHolder) - L_FiManBranchExt;
    outerradius(ND_FiBwManBranch) + H_FiBottomLayer
], L_FiManBranch, [-90; 0]*deg, ND_FiManBranch, PS_FiBranch)
FiManBranchSlot := BoxF(Fi_origin + [
    -L_FiManFerncoCoupling - B_FiManifoldBranch/2 - outerradius(ND_FiManBranch);
    S_FiManAssembly + ConRadius(ND_FiBwBranchHolder) + outerradius(ND_FiBranchHolder) + B_FiManSlot/2;
    outerradius(ND_FiBwManBranch) + H_FiBottomLayer + H_FiManCenterToSlot
], Fi_origin + [
    -L_FiManFerncoCoupling - B_FiManifoldBranch/2 + outerradius(ND_FiManBranch);
    S_FiManAssembly + ConRadius(ND_FiBwBranchHolder) + outerradius(ND_FiBranchHolder) + B_FiManSlot/2 + W_FiManSlots;
    outerradius(ND_FiBwManBranch) + H_FiBottomLayer + outerradius(ND_FiManBranch)
], [0; 0; 0]*deg)
MirrorFiManBranchSlot := MirrorLast([Fi_origin[1] + 0 m; Fi_origin[2] + outerradius(ND_FiBwManBranch) + H_FiBottomLayer], [Fi_origin[1] + zc; Fi_origin[2] + outerradius(ND_FiBwManBranch) + H_FiBottomLayer], "N")
ArrayFiManBranchSlot := array_all(N_FiManSlotsPerRow, 1, B_FiManSlot)
SelectFiManBranch := SelectLayer("FiManBranchPlu")
ArrayFiMan := array_all(N_FiLayer, 1, H_FiLayer)
# Do not stack unless you are drawing only the slotted pipes. The slots make the 3D model unmanagable.
FiBranchScriptSlots := stack(FiManBranchLayer, FiManBranch, FiManBranchFrz, FiManBranchSlot, view("r"), MirrorFiManBranchSlot, view("t"), ArrayFiManBranchSlot, GroupDelete, SubtractFromFiManBranch, SelectFiManBranch, BrepAll, view("f"), ArrayFiMan, view("t"))
FiBranchScript := stack(FiManBranchLayer, FiManBranch, view("f"), ArrayFiMan, view("t"))
BwManBranch := PipeF(Fi_origin + [
    -L_FiManFerncoCoupling - B_FiManifoldBranch/2;
    S_FiManAssembly + ConRadius(ND_FiBwBranchHolder) + outerradius(ND_FiBwBranchHolder) - L_FiManBranchExt;
    outerradius(ND_FiBwManBranch)
], L_FiBwManBranch, [-90; 0]*deg, ND_FiBwManBranch, PS_FiBranch)
FiBwManBranchSlot := BoxF(Fi_origin + [
    -L_FiManFerncoCoupling - B_FiManifoldBranch/2 - outerradius(ND_FiBwManBranch);
    S_FiManAssembly + ConRadius(ND_FiBwBranchHolder) + outerradius(ND_FiBwBranchHolder) + B_FiBwManSlot/2;
    outerradius(ND_FiBwManBranch) + H_FiBwManCenterToSlot
], Fi_origin + [
    -L_FiManFerncoCoupling - B_FiManifoldBranch/2 + outerradius(ND_FiBwManBranch);
    S_FiManAssembly + ConRadius(ND_FiBwBranchHolder) + outerradius(ND_FiBwBranchHolder) + B_FiBwManSlot/2 + W_FiManSlots;
    outerdiameter(ND_FiBwManBranch)
], [0; 0; 0]*deg)
ArrayFiBwManBranchSlot := ArrayLast(N_FiBwManSlotsPerRow, 1, B_FiBwManSlot)
MirrorFiManBranches := Mirror3dAll("zx", [Fi_origin[0]; Fi_origin[1] + W_Fi/2], "n")
ArrayManBranches := array_all(1, N_FiManBranch/2, -B_FiManifoldBranch)
# Do not stack unless you are drawing only the slotted pipes. The slots make the 3D model unmanagable.
FiBwBranchScriptSlots := stack(BwManBranch, FiManBranchFrz, FiBwManBranchSlot, ArrayFiBwManBranchSlot, GroupDelete, SubtractFromFiManBranch, SelectFiManBranch, BrepAll, ArrayManBranches, MirrorFiManBranches, FiManBranchFrz)
FiBwBranchScript := stack(BwManBranch, ArrayManBranches, MirrorFiManBranches, FiManBranchFrz)
FiManBranchScript := stack(FiBranchScript, FiBwBranchScript)
FiManifoldScript := stack(FiTrunkReceiverScript, FiFlexCouplingScript, FiManBranchScript)
FiAuxScript := stack(FiAuxBoxScript, FiAuxPlumbingScript, FiEntExitPlumbingScript)
# Sand drain
FiSandDrainPipe_Origin := Fi_origin + {
    if EN_DoubleTrain == 0
        [
            -ConRadius(ND_FiSandOutlet);
            W_Fi - S_FiManAssembly - 2*ConRadius(ND_FiBranchHolder) - S_Fitting - ConRadius(ND_FiSandOutlet);
            2*ConRadius(ND_FiBwManBranch) + 5.5*H_FiLayer - H_FiSandOutlet
        ]
    otherwise
        [
            -W_Fi + S_FiManAssembly + 2*ConRadius(ND_FiBranchHolder) + S_Fitting + ConRadius(ND_FiSandOutlet);
            -ConRadius(ND_FiSandOutlet);
            2*ConRadius(ND_FiBwManBranch) + 5.5*H_FiLayer - H_FiSandOutlet
        ]
}
# Currently exits between the 6th and 7th sand layers, but it probably does not extend far enough down! See design code for calculations of headloss.
L_FiSandDrainPipeVert := H_FiSandOutlet - ElbowRadius(ND_FiSandOutlet)
FiSandDrainElbow1_Origin := FiSandDrainPipe_Origin + {
    [ElbowRadius(ND_FiSandOutlet); 0 m; ElbowRadius(ND_FiSandOutlet) + L_FiSandDrainPipeVert] if EN_DoubleTrain == 0
    otherwise
        [
            -W_Fi/2 - ConRadius(ND_FiBwTrunk) - S_Fitting;
            0 m;
            ElbowRadius(ND_FiSandOutlet) + L_FiSandDrainPipeVert
        ]
}
L_FiSandDrainHorizPipe := T_FiWall + 2*SocketDepth(ND_FiSandOutlet)
FiSandDrainHorizPipe_Origin := FiSandDrainElbow1_Origin
L_FiSandDrainShortPipe := 2*SocketDepth(ND_FiSandOutlet)
FiSandDrainElbow_Origin := FiSandDrainHorizPipe_Origin + {
    [L_FiSandDrainHorizPipe; 0 m; 0 m] if EN_DoubleTrain == 0
    [0 m; L_FiSandDrainHorizPipe; 0 m] otherwise
}
FiSandDrainShortPipe2_Origin := FiSandDrainElbow_Origin + {
    [ElbowRadius(ND_FiSandOutlet); 0 m; -ElbowRadius(ND_FiSandOutlet)] if EN_DoubleTrain == 0
    [0 m; ElbowRadius(ND_FiSandOutlet); -ElbowRadius(ND_FiSandOutlet)] otherwise
}
DrawFiSandDrainPipeVert := PipeF(FiSandDrainPipe_Origin, L_FiSandDrainPipeVert, [0; 90]*deg, ND_FiSandOutlet, PS_Default)
DrawFiSandDrainHorizPipe :=
    PipeSUBF(FiSandDrainHorizPipe_Origin, L_FiSandDrainHorizPipe, [180; 0; 0]*deg, ND_FiSandOutlet, PS_Default, ["FiTankCon"]) if EN_DoubleTrain == 0
    PipeSUBF(FiSandDrainHorizPipe_Origin, L_FiSandDrainHorizPipe, [90; -90; 0]*deg, ND_FiSandOutlet, PS_Default, ["FiTankCon"]) otherwise
# unsure of angle for the double train case!
DrawFiSandDrainPipeShort2 := PipeF(FiSandDrainShortPipe2_Origin, L_FiSandDrainShortPipe, [0; -90]*deg, ND_FiSandOutlet, PS_Default)
DrawFiSandOutletValve := insertdwg("https://confluence.cornell.edu/download/attachments/173604905/Fi-Scaled-Gate-Valve-Threaded.dwg", FiSandDrainShortPipe2_Origin - [0; 0; L_FiSandDrainShortPipe], 2*outerradius(ND_FiSandOutlet)/(1.16 m), 2*outerradius(ND_FiSandOutlet)/(1.16 m), 180 deg)
FiSandOutletValveRotate := Rotate3DLast(FiSandDrainShortPipe2_Origin - [0; 0; L_FiSandDrainShortPipe], "y", -90)
FiSandDrainOutletValveLayer := layer_new("FiSandDrainOutletValve", black)
FiSandDrainOutletValveFreeze := FreezeLayer("FiSandDrainOutletValve")
FiSandDrainOutletValveScript := stack(FiSandDrainOutletValveLayer, DrawFiSandOutletValve, FiSandOutletValveRotate, FiSandDrainOutletValveFreeze)
DrawFiSandDrainElbow1 :=
    ElbowSUBF(FiSandDrainElbow1_Origin, [90; 0; 90]*deg, ND_FiSandOutlet, PS_Default, ["FiTankCon"]) if EN_DoubleTrain == 0
    ElbowSUBF(FiSandDrainElbow1_Origin, [180; 90; 90]*deg, ND_FiSandOutlet, PS_Default, ["FiTankCon"]) otherwise
DrawFiSandDrainElbow :=
    ElbowSUBF(FiSandDrainElbow_Origin, [-90; 0; -90]*deg, ND_FiSandOutlet, PS_Default, ["FiTankCon"]) if EN_DoubleTrain == 0
    ElbowSUBF(FiSandDrainElbow_Origin, [180; 90; -90]*deg, ND_FiSandOutlet, PS_Default, ["FiTankCon"]) otherwise  # unsure of angle in double train case!
FiSandDrainPipeLayer := layer_new("FiSandDrainPlu", blue)
FiSandDrainFrz := FreezeLayer("FiSandDrainPlu")
FiSandDrainFittingLayer := layer_new("FiSandDrainFittings", green)
FiSandDrainFittingsFrz := FreezeLayer("FiSandDrainFittings")
FiSandDrainFittingScript := stack(FiSandDrainFittingLayer, DrawFiSandDrainElbow1, DrawFiSandDrainElbow, FiSandDrainFittingsFrz)
FiSandDrainScript := stack(FiSandDrainPipeLayer, DrawFiSandDrainPipeVert, DrawFiSandDrainHorizPipe, DrawFiSandDrainPipeShort2, FiSandDrainFrz, FiSandDrainFittingScript, FiSandDrainOutletValveScript)
help := stack(FiSandDrainFittingScript, FiSandDrainScript)
# Backwash siphon
L_FiSiphonPipeBottom := W_PlantDC/2 + FiInletChannel_Origin[0] - (Fi_origin[0] + T_FiWall + SocketDepth(ND_FiSiphon) + ShortTeeLength(ND_FiSiphon) + ElbowRadius(ND_FiSiphon)) - ElbowRadius(ND_FiSiphon) = 3.02792 m
X_FiSiphonPipe1End := Fi_origin[0] + T_FiWall - CouplingLength(ND_FiSiphon) + SocketDepth(ND_FiSiphon) - max((T_FiWall - CouplingLength(ND_FiSiphon)) + 2*SocketDepth(ND_FiSiphon), 2*SocketDepth(ND_FiSiphon))
X_FiSiphonManifoldStart := X_FiSiphonPipe1End - ElbowRadius(ND_FiSiphon) - ShortTeeLength(ND_FiSiphon)
X_FiSiphonManifoldEnd := Fi_origin[0] - L_Fi
Y_FiSiphonPipe1End := Fi_origin[1] + L_Fi + T_FiWall - CouplingLength(ND_FiSiphon) + SocketDepth(ND_FiSiphon) - max((T_FiWall - CouplingLength(ND_FiSiphon)) + 2*SocketDepth(ND_FiSiphon), 2*SocketDepth(ND_FiSiphon))
Y_FiSiphonManifoldStart := Y_FiSiphonPipe1End - ElbowRadius(ND_FiSiphon) - ShortTeeLength(ND_FiSiphon)
Y_FiSiphonManifoldEnd := Fi_origin[1]
# Siphon Fittings Other than Drain Channel Coupling
FiSiphonTee2_Origin := [
    Fi_origin[0] + T_FiWall + SocketDepth(ND_FiSiphon);
    Fi_origin[1] + S_Fitting + ConRadius(ND_FiSiphon);
    Z_FiSiphonCoupling
]
FiSiphonTee1 := TeeF([
    Fi_origin[0] - L_Fi/2;
    Fi_origin[1] + S_Fitting + ConRadius(ND_FiSiphon);
    Z_FiSiphonInlet - outerradius(ND_FiSiphon) + ShortTeeLength(ND_FiSiphon)
], [0; 0; 90]*deg, ND_FiSiphon, PS_Default)
FiSiphonElbow1 := ElbowF([
    Fi_origin[0] - L_Fi/2 + ElbowRadius(ND_FiSiphon);
    Fi_origin[1] + S_Fitting + ConRadius(ND_FiSiphon);
    Z_FiSiphonCoupling
], [90; 0; 90]*deg, ND_FiSiphon, PS_Default)
FiSiphonManifoldCap1 := CapF([
    X_FiSiphonManifoldEnd + ConRadius(ND_FiSiphon) - outerradius(ND_FiSiphon);
    Fi_origin[1] + S_Fitting + ConRadius(ND_FiSiphon);
    Z_FiSiphonInlet - outerradius(ND_FiSiphon)
], [180; 0]*deg, ND_FiSiphon)
FiSiphonManifoldCap2 := CapF([
    Fi_origin[0] - ConRadius(ND_FiSiphon) + outerradius(ND_FiSiphon);
    Fi_origin[1] + S_Fitting + ConRadius(ND_FiSiphon);
    Z_FiSiphonInlet - outerradius(ND_FiSiphon)
], [0; 0]*deg, ND_FiSiphon)
FiSiphonTee2 := TeeF(FiSiphonTee2_Origin, [90; 0; 90]*deg, ND_FiSiphon, PS_Default)
FiSiphonElbow0 := ElbowF([
    Fi_origin[0] + T_FiWall + SocketDepth(ND_FiSiphon) + ShortTeeLength(ND_FiSiphon) + ElbowRadius(ND_FiSiphon);
    Fi_origin[1] + S_Fitting + ConRadius(ND_FiSiphon);
    Fi_origin[2]
], [90; 0; 270]*deg, ND_FiSiphon, PS_Default)
FiSiphonElbow01 := ElbowF([
    Fi_origin[0] + T_FiWall + SocketDepth(ND_FiSiphon) + ShortTeeLength(ND_FiSiphon) + ElbowRadius(ND_FiSiphon) + L_FiSiphonPipeBottom;
    Fi_origin[1] + S_Fitting + ConRadius(ND_FiSiphon);
    Fi_origin[2]
], [270; 0; 90]*deg, ND_FiSiphon, PS_Default)
FiSiphonFernco := FerncoCouplingF([Fi_origin[0]; Fi_origin[1] + S_Fitting + ConRadius(ND_FiSiphon); Z_FiSiphonCoupling], [0; 0; 0]*deg, ND_FiSiphon, L_FiManFerncoCoupling)
FiSiphonFittingScript := stack(FiSiphonFittingLayer, FiSiphonTee, FiSiphonElbow1, FiSiphonManifoldCap1, FiSiphonManifoldCap2, FiSiphonTee2, FiSiphonElbow0, FiSiphonElbow01, FiSiphonFittingFrz, SelectFiFlexCoupling, FiSiphonFernco, FiFlexCouplingFrz)
# Siphon Pipes Up Until Drain Channel
# [component: inputs FiSiphonCoupling]
L_FiSiphonManifold := L_Fi/2 - ShortTeeLength(ND_FiSiphon) - ConRadius(ND_FiSiphon) + outerradius(ND_FiSiphon) = 0.403865 m
L_FiSiphonPipe1a := T_FiWall - CouplingLength(ND_FiSiphon) + SocketDepth(ND_FiSiphon) + L_FiManFerncoCoupling/2 = 0.15824 m
L_FiSiphonPipe1b := L_Fi/2 - ElbowRadius(ND_FiSiphon) - L_FiManFerncoCoupling/2 = 0.492609 m
L_FiSiphonPipe2 := Z_FiSiphonCoupling - ElbowRadius(ND_FiSiphon) - (Z_FiSiphonInlet - outerradius(ND_FiSiphon) + ShortTeeLength(ND_FiSiphon)) = 1.57094 m
L_FiSiphonPipe3 := 2*SocketDepth(ND_FiSiphon)
L_FiSiphonPipe4 := Z_FiSiphonCoupling - ElbowRadius(ND_FiSiphon) - ShortTeeLength(ND_FiSiphon) - Fi_origin[2]
FiSiphonPipe2 := PipeF([
    Fi_origin[0] - L_Fi/2;
    Fi_origin[1] + S_Fitting + ConRadius(ND_FiSiphon);
    Z_FiSiphonCoupling - ElbowRadius(ND_FiSiphon)
], L_FiSiphonPipe2, [0; -90]*deg, ND_FiSiphon, PS_Default)
FiSiphonManifold1 := PipeF([
    Fi_origin[0] - L_Fi/2 - ShortTeeLength(ND_FiSiphon);
    Fi_origin[1] + S_Fitting + ConRadius(ND_FiSiphon);
    Z_FiSiphonInlet - outerradius(ND_FiSiphon)
], L_Fi/2 - ShortTeeLength(ND_FiSiphon) - ConRadius(ND_FiSiphon) + outerradius(ND_FiSiphon), [0; 0]*deg, ND_FiSiphon, PS_Default)
FiSiphonManifold2 := PipeF([
    Fi_origin[0] - ConRadius(ND_FiSiphon) + outerradius(ND_FiSiphon);
    Fi_origin[1] + S_Fitting + ConRadius(ND_FiSiphon);
    Z_FiSiphonInlet - outerradius(ND_FiSiphon)
], L_Fi/2 - ShortTeeLength(ND_FiSiphon) - ConRadius(ND_FiSiphon) + outerradius(ND_FiSiphon), [0; 0]*deg, ND_FiSiphon, PS_Default)
FiSiphonPipe3 := PipeF([
    Fi_origin[0] + T_FiWall - SocketDepth(ND_FiSiphon);
    Fi_origin[1] + S_Fitting + ConRadius(ND_FiSiphon);
    Z_FiSiphonCoupling
], L_FiSiphonPipe3, [180; 0]*deg, ND_FiSiphon, PS_Default)
FiSiphonPipe4 := PipeF([
    Fi_origin[0] + T_FiWall + SocketDepth(ND_FiSiphon) + ShortTeeLength(ND_FiSiphon);
    Fi_origin[1] + S_Fitting + ConRadius(ND_FiSiphon);
    Z_FiSiphonCoupling - ShortTeeLength(ND_FiSiphon)
], L_FiSiphonPipe4, [0; -90]*deg, ND_FiSiphon, PS_Default)
FiSiphonPipe5 := PipeF([
    Fi_origin[0] + T_FiWall + SocketDepth(ND_FiSiphon) + ShortTeeLength(ND_FiSiphon) + ElbowRadius(ND_FiSiphon) + L_FiSiphonPipeBottom;
    Fi_origin[1] + S_Fitting + ConRadius(ND_FiSiphon);
    Fi_origin[2]
], L_FiSiphonPipeBottom, [0; 0], ND_FiSiphon, PS_Default)
FiSiphonPipeScript := stack(FiSiphonPipeLayer, FiSiphonPipe2, FiSiphonManifold1, FiSiphonManifold2, FiSiphonPipe3, FiSiphonPipe4, FiSiphonPipe5, FiSiphonPipeFrz)
# Siphon Manifold Orifices
FirstFiSiphonManOrifice := CylinderF([
    Fi_origin[0] - B_FiSiphonManOrifices/2 - ConRadius(ND_FiSiphon) + outerradius(ND_FiSiphon);
    Fi_origin[1] + S_Fitting + ConRadius(ND_FiSiphon);
    Z_FiSiphonInlet - outerradius(ND_FiSiphon)
], D_FiSiphonManOrifices/2, 1.2*ConRadius(ND_FiSiphon), [0; 90]*deg)
ArrayFiSiphonManOrifices := array_all(1, N_FiSiphonManOrifices/2, -B_FiSiphonManOrifices)
MirrorFiSiphonManOrifices := Mirror3dAll("yz", [Fi_origin[0] - L_Fi/2; 0 m], "n")
FiSiphonOrifices := stack(FirstFiSiphonManOrifice, ArrayFiSiphonManOrifices, MirrorFiSiphonManOrifices)
FiSiphonPipe1a := PipeSUBF([
    Fi_origin[0] + T_FiWall - CouplingLength(ND_FiSiphon) + SocketDepth(ND_FiSiphon);
    Fi_origin[1] + S_Fitting + ConRadius(ND_FiSiphon);
    Z_FiSiphonCoupling
], L_FiSiphonPipe1a, [0; 0]*deg, ND_FiSiphon, PS_Default, ["FiTankCon"])
# these need to be stacked after the orifices, otherwise the pipes effectively union after the subtraction
FiSiphonPipe1b := PipeF([
    Fi_origin[0] - L_FiManFerncoCoupling/2;
    Fi_origin[1] + S_Fitting + ConRadius(ND_FiSiphon);
    Z_FiSiphonCoupling
], L_FiSiphonPipe1b, [0; 0]*deg, ND_FiSiphon, PS_Default)
FiSiphonManOrificeScript := stack(FiSiphonOrifices, GroupDelete, SubtractFromFiSiphonPipe, FiSiphonOrifices, GroupDelete, SubtractFromFiSiphonFitting, SelectFiSiphonPipe, FiSiphonPipe1a, FiSiphonPipe1b, FiSiphonPipeFrz)
# Siphon air valve plumbing
FiSiphonAirReleaseReducer0_Origin := FiSiphonTee2_Origin + [ShortTeeLength(ND_FiSiphon); 0 m; TeeLength(ND_FiSiphon)/2]
L_FiSiphonAirReleaseReducer0 := SocketDepth(ND_FiSiphon)
L_FiSiphonAirReleaseShortPipe := L_FiSiphonAirReleaseReducer0 + SocketDepth(ND_FiAirReleaseMid)
FiSiphonAirReleaseShortPipe_Origin := FiSiphonAirReleaseReducer0_Origin
FiSiphonAirReleaseElbow1_Origin := FiSiphonAirReleaseReducer0_Origin + [
    -ElbowRadius(ND_FiAirReleaseMid);
    0 m;
    L_FiSiphonAirReleaseReducer0 + ElbowRadius(ND_FiAirReleaseMid) + SocketDepth(ND_FiAirReleaseMid)
]
FiSiphonAirReleaseHorizPipe_Origin := FiSiphonAirReleaseElbow1_Origin
FiSiphonAirReleaseElbow2_Origin := [
    Fi_origin[0] + T_FiWall + ConRadius(ND_FiAirReleaseMid);
    FiSiphonAirReleaseElbow1_Origin[1];
    FiSiphonAirReleaseElbow1_Origin[2] + ElbowRadius(ND_FiAirReleaseMid)
]
L_FiSiphonAirReleaseHorizPipe := FiSiphonAirReleaseElbow1_Origin[0] - FiSiphonAirReleaseElbow2_Origin[0] - ElbowRadius(ND_FiAirReleaseMid)
FiSiphonAirReleaseVertPipe_Origin := FiSiphonAirReleaseElbow2_Origin
FiSiphonAirReleaseReducer1_Origin := [FiSiphonAirReleaseElbow2_Origin[0]; FiSiphonAirReleaseElbow2_Origin[1]; Z_Walkway]
L_FiSiphonAirReleaseVertPipe := FiSiphonAirReleaseReducer1_Origin[2] - FiSiphonAirReleaseElbow2_Origin[2] + SocketDepth(ND_FiSiphonAirValve)
# Make the first reducer:
FiSiphonReducerCyl1 := CylinderF(FiSiphonAirReleaseReducer0_Origin, outerradius(ND_FiSiphon), SocketDepth(ND_FiSiphon), [0; 90]*deg)
FiSiphonReducerCyl3 := CylinderF(FiSiphonAirReleaseReducer1_Origin, InnerRadiusFlex(ND_FiSiphonAirValve), SocketDepth(ND_FiAirReleaseMid), [0; 90]*deg)
FiReducerLayerNot1 := layer_new("FiRedNot1", purple)
FiSiphonReducerCyl2 := CylinderF(FiSiphonAirReleaseReducer0_Origin, outerradius(ND_FiAirReleaseMid), SocketDepth(ND_FiSiphon), [0; 90]*deg)
FiReducerLayerNot2 := layer_new("FiRedNot2", purple)
FiSiphonReducerCyl4 := CylinderF(FiSiphonAirReleaseReducer1_Origin, outerradius(ND_FiSiphonAirValve), SocketDepth(ND_FiAirReleaseMid), [0; 90]*deg)
FiSiphonReducerSubtract := SubtractF(["FiSiphonFitting"], "DeleteMe")
FiReducerNotFrz1 := FreezeLayer("FiRedNot1")
FiReducerNotFrz2 := FreezeLayer("FiRedNot2")
FiSiphonAirValveReducers := stack(SelectFiSiphonFitting, FiSiphonReducerCyl1, FiSiphonReducerCyl3, FiSiphonFittingFrz, FiReducerLayerNot1, FiSiphonReducerCyl2, GroupDelete, FiSiphonReducerSubtract, FiReducerNotFrz1, FiReducerLayerNot2, FiSiphonReducerCyl4, GroupDelete, FiSiphonReducerSubtract, FiReducerNotFrz2)
DrawFiSiphonAirReleaseElbow1 :=
    ElbowF(FiSiphonAirReleaseElbow1_Origin, [-90; 0; -90]*deg, ND_FiAirReleaseMid, PS_Default) if EN_DoubleTrain == 0
    ElbowF(FiSiphonAirReleaseElbow1_Origin, [0; -90; -90]*deg, ND_FiAirReleaseMid, PS_Default) otherwise
DrawFiSiphonAirReleaseElbow2 :=
    ElbowF(FiSiphonAirReleaseElbow2_Origin, [180; 0; 90]*deg, ND_FiAirReleaseMid, PS_Default) if EN_DoubleTrain == 0
    ElbowF(FiSiphonAirReleaseElbow2_Origin, [0; 180; 90]*deg, ND_FiAirReleaseMid, PS_Default) otherwise
FiSiphonAirReleaseFittingsScript := stack(FiSiphonAirValveReducers, SelectFiSiphonFitting, DrawFiSiphonAirReleaseElbow1, DrawFiSiphonAirReleaseElbow2, FiSiphonFittingFrz)
DrawFiSiphonAirReleaseShortPipe := PipeF(FiSiphonAirReleaseShortPipe_Origin, L_FiSiphonAirReleaseShortPipe, [0; 90; 0]*deg, ND_FiAirReleaseMid, PS_Default)
DrawFiSiphonAirReleaseHorizPipe := PipeF(FiSiphonAirReleaseHorizPipe_Origin, L_FiSiphonAirReleaseHorizPipe, [0; 0; 0]*deg, ND_FiAirReleaseMid, PS_Default)
DrawFiSiphonAirReleaseVertPipe := PipeF(FiSiphonAirReleaseVertPipe_Origin, L_FiSiphonAirReleaseVertPipe, [0; 90; 0]*deg, ND_FiAirReleaseMid, PS_Default)
FiSiphonAirReleasePlumbingScript := stack(SelectFiSiphonPipe, DrawFiSiphonAirReleaseShortPipe, DrawFiSiphonAirReleaseHorizPipe, DrawFiSiphonAirReleaseVertPipe, FiSiphonPipeFrz)
FiSiphonAirValve := insertdwg("https://confluence.cornell.edu/download/attachments/173604905/FiMetalBallValve.dwg", FiSiphonAirReleaseReducer1_Origin, 2*outerradius(ND_FiSiphonAirValve)*1/(125 in), 2*outerradius(ND_FiSiphonAirValve)*1/(125 in), 0 deg)
FiSiphonAirValveScript := stack(FiSiphonValveLayer, FiSiphonAirValve, FiSiphonValveFrz)
FiSiphonAirReleaseScript := stack(FiSiphonAirValveReducers, FiSiphonAirReleaseFittingsScript, FiSiphonAirReleasePlumbingScript, FiSiphonAirValveScript)
FiSiphonScript := stack(FiSiphonFittingScript, FiSiphonPipeScript, FiSiphonManOrificeScript, FiSiphonAirReleaseScript)
# Array the Filter and Union Masonry
ThawFilter := ThawMultiple(["Fi*"])
FiArray1Frz := ["FiAuxPipePlu"; "FiAuxFittingPlu"; "FiAuxRemovablePlu"; "FiDistPipePlu"; "FiDistFittingPlu"; "FiOverflowDistBoxCon"; "FiInletChannelCon"; "FiInletFittingsPlu"; "FiInletPipePlu"]
FreezeFiPieces := FreezeMultiple(FiArray1Frz)
ArrayFi1 :=
    Array_All(N_Fi, 1, W_Fi + T_FiWall) if EN_DoubleTrain == 0
    Array_All(1, N_Fi, W_Fi + T_FiWall) otherwise
FreezeFi := FreezeMultiple(["Fi*"])
FiArray2Thw := ["FiAuxPipePlu"; "FiAuxFittingPlu"; "FiAuxRemovablePlu"; "FiDistPipePlu"; "FiDistFittingPlu"; "FiOverflowDistBoxCon"]
ThawFiPieces := ThawMultiple(FiArray2Thw)
# How many dist/overflow boxes: N.Fi/2 round up
# How many walkways: N.Fi/2 round up -1
N_distOverflow := ceil(N_Fi/2)
N_Peninsulas := ceil(N_Fi/2) - 1
ArraydistOverflow :=
    Array_All(N_distOverflow, 1, 2*(W_FiEntrance + 2*T_PlantWall + W_FiOverflow)) if EN_DoubleTrain == 0
    Array_All(1, N_distOverflow, 2*(W_FiEntrance + 2*T_PlantWall + W_FiOverflow)) otherwise
ArrayFi2 :=
    if N_Fi < 3
        Array_All(N_Fi - (N_Fi > 1), 1, W_FiEntrance + 2*T_PlantWall + W_FiOverflow) if EN_DoubleTrain == 0
        Array_All(1, N_Fi - (N_Fi > 1), W_FiEntrance + 2*T_PlantWall + W_FiOverflow) otherwise
    ArraydistOverflow otherwise
# Do not array the distribution and overflow box between PAIRS of fiters. It needs to be arrayed after individual filters, though. So, there should be a dist/overflow set after every ODD filter ONLY.
# mrf222
ThawFilterConcrete := ThawMultiple(["Fi*Con"])
RenameFilterConcrete :=
    RenameLayer("FiEntExitBoxCon", "FiCon") if N_Fi == 2
    RenameLayer("FiOverflowDistBoxCon", "FiCon") otherwise
GroupFilterConcrete := GroupAll("FiCon")
FiArrayScript :=
    stack(ThawFilterConcrete, Union_All, RenameFilterConcrete, GroupFilterConcrete, FreezeFi) if N_Fi == 1
    stack(ThawFilter, FreezeFiPieces, ArrayFi1, FreezeFi, ThawFiPieces, ArrayFi2, FreezeFi, ThawFilterConcrete, Union_All, RenameFilterConcrete, GroupFilterConcrete, FreezeFi) otherwise
# Overflow, inlet and distribution weirs, and adjust wall thickness
FiAuxCutoutLayer := layer_new("FiAuxCutout", grey)
FiEntranceCutout := BoxF(FiEntranceBox_origin, FiEntranceBox_origin + {
    [-L_FiEntrance; W_FiEntrance; H_FiEntrance] if EN_DoubleTrain == 0
    [-W_FiEntrance; L_FiEntrance; H_FiEntrance] otherwise
}, [0; 0; 0]*deg)
ArrayFiEntranceCutout := ArrayLast(1, N_Fi, W_FiEntrance + 2*T_FiWall + W_FiOverflow)
FiExitCutout := BoxF(FiExitBox_origin, FiExitBox_origin + {
    [-L_FiExit; W_FiEntrance; H_FiEntrance] if EN_DoubleTrain == 0
    [-W_FiEntrance; L_FiExit; H_FiEntrance] otherwise
}, [0; 0; 0]*deg)
ArrayFiExitCutout := ArrayLast(1, N_Fi, W_FiEntrance + 2*T_FiWall + W_FiOverflow)
FiOverflowCutout := BoxF(FiOverflowBox_Origin, FiOverflowBox_Origin + {
    [-L_FiEntrance; W_FiOverflow; H_FiEntrance] if EN_DoubleTrain == 0
    [-W_FiOverflow; L_FiEntrance; H_FiEntrance] otherwise
}, [0; 0; 0]*deg)
ArrayFiOverflowCutout :=
    ArrayLast(1, N_Fi - 1, W_FiEntrance + 2*T_FiWall + W_FiOverflow) if N_Fi ≠ 4
    ArrayLast(1, N_Fi - 2, 2*(W_FiEntrance + 2*T_FiWall + W_FiOverflow)) otherwise
FiDistCutout := BoxF(FiDistBox_Origin, FiDistBox_Origin + {
    [-L_FiExit; W_FiOverflow; H_FiEntrance] if EN_DoubleTrain == 0
    [-W_FiOverflow; L_FiExit; H_FiEntrance] otherwise
}, [0; 0; 0]*deg)
ArrayFiDistCutout :=
    ArrayLast(1, N_Fi - 1, W_FiEntrance + 2*T_FiWall + W_FiOverflow) if N_Fi ≠ 4
    ArrayLast(1, N_Fi - 2, 2*(W_FiEntrance + 2*T_FiWall + W_FiOverflow)) otherwise
FiIChannelCutout := BoxF(FiInletChannel_Origin, FiInletChannel_Origin + {
    [-L_FiInletChannel; T_PlantWall; H_FiInletChannel] if EN_DoubleTrain == 0
    [-T_PlantWall; L_FiInletChannel; H_FiInletChannel] otherwise
}, [0; 0; 0]*deg)
FiArrayWallAdjust :=
    if EN_DoubleTrain == 0
        BoxF(FiOverflowBox_Origin + [T_PlantWall + L_FiOverflow; T_ChannelWall; -T_PlantWall], FiOverflowBox_Origin + [
            -W_FiEntrance - T_ChannelWall - W_FiEntrance - T_PlantWall + L_FiOverflow;
            T_PlantWall;
            H_FiEntrance
        ], [0; 0; 0]*deg)
    otherwise
        BoxF(FiOverflowBox_Origin + [T_ChannelWall; T_PlantWall + L_FiOverflow; -T_PlantWall], FiOverflowBox_Origin + [
            T_PlantWall;
            -W_FiEntrance - T_ChannelWall - W_FiEntrance - T_PlantWall + L_FiOverflow;
            H_FiEntrance
        ], [0; 0; 0]*deg)
FiAuxCutoutFrz := FreezeLayer("FiAuxCutout")
# The wall thickness cutouts are only needed if for some reason the plant wall thickness has to be adjusted! NOT currently used or needed!
FiWallThicknessCutouts == {
    stack(FiAuxCutoutLayer, FiEntranceCutout, ArrayFiEntranceCutout, FiExitCutout, ArrayFiExitCutout, FiOverflowCutout, ArrayFiOverflowCutout, FiDistCutout, ArrayFiDistCutout, FiIChannelCutout, FiAuxCutoutFrz) if N_Fi < 2
    stack(FiAuxCutoutLayer, FiEntranceCutout, ArrayFiEntranceCutout, FiExitCutout, ArrayFiExitCutout, FiOverflowCutout, ArrayFiOverflowCutout, FiDistCutout, ArrayFiDistCutout, FiIChannelCutout, FiArrayWallAdjust, ArrayFiDistCutout, FiAuxCutoutFrz) otherwise
}
# Distribution Barrier:
FiDistBarrierLayer := layer_new("FiDistBarrier", grey)
# Dimensions of the Distrubution Barrier:
SD_OutPipe3 := SocketDepth(ND_FiBwTrunk) = 0.1016 m
HDif_OutPipeTopDB := L_FiOut3PipeZ - SD_OutPipe3 - H_FiDistBarrier = 2.7851 m
SF_FiOutletWeir := 1.001
OutPipeFountain := S_PipeStubWeir(Q_Plant/(3*N_Fi), ND_FiTrunk, SD_OutPipe3, SF_FiOutletWeir, PS_Default) = 0.15036 m
W_Weir := (FiExitCoupling2_origin[1] - OutPipeFountain - S_Fitting) - (FiEntranceBox_origin[1] - T_ChannelWall - W_FiOverflow/2) - outerradius(ND_DistPipe) = 0.159463 m
WeirWidth(W_Weir) :=
    W_Barrier ← 0.15 m if W_Weir ≥ 0.15 m
    W_Barrier ← 0.05 m if W_Weir ≤ 0.05 m
    W_Barrier ← W_Weir otherwise
    return W_Barrier  # function used to calculate the weir width
W_FiDistBarrier := WeirWidth(W_Weir) = 0.15 m
dx_FiExitPipe := FiExitBox_origin[0] - T_ConcreteMin - ConRadius(ND_FiTrunk) - (Plant_Origin[0] - W_FiInletChannel - 2*T_PlantWall - L_Sed - W_PlantDC - T_ChannelWall + (-L_FiEntrance - T_ChannelWall)) = -0.142075 m
PipeDepth := Z_FiEntranceBottom - (FiExitBox_origin[2] - CouplingLength(ND_FiExitWaste) + SocketDepth(ND_FiExitWaste)) = 0.0700786 m
FiDistBarrier_Origin := FiExitCoupling3_origin - [dx_FiExitPipe; OutPipeFountain; -PipeDepth] = [-9.732; 0.0233416; 0.364896] m
FiDistBarrier_FarCorner := FiExitCoupling3_origin - [dx_FiExitPipe; OutPipeFountain; -PipeDepth] + [-L_FiExit; -W_FiDistBarrier; H_FiDistBarrier]
FiDistBarrier := BoxF(FiDistBarrier_Origin, FiDistBarrier_FarCorner, [0; 0; 0]*deg)
MirrorBarrier := Mirror3dAll("zx", [
    FiExitBox_origin[0] - L_FiExit/2;
    FiEntranceBox_origin[1] - T_ChannelWall - W_FiOverflow/2;
    Z_FiExitBottom - SocketDepth(ND_DistPipe)
], "N")
ArrayFiDistBarrier :=
    if N_Fi ≠ 4
        Array_All(N_Fi - 1, 1, -(W_Fi + T_FiWall)) if EN_DoubleTrain == 0
        Array_All(1, N_Fi - 1, W_Fi + T_FiWall) otherwise
    otherwise
        Array_All(N_Fi - 2, 1, -2*(W_Fi + T_FiWall)) if EN_DoubleTrain == 0
        Array_All(1, N_Fi - 2, 2*(W_Fi + T_FiWall)) otherwise
MirrorArrayDistBarrier :=
    MirrorBarrier if N_Fi < 3
    stack(MirrorBarrier, ArrayFiDistBarrier) otherwise
FreezeFiDistBarrier := FreezeLayer("FiDistBarrier")
FiBarrier :=
    stack(FiDistBarrierLayer, FiDistBarrier, MirrorArrayDistBarrier, FreezeFiDistBarrier) if N_Fi ≥ 2
    stack(FiDistBarrierLayer, FiDistBarrier, FreezeFiDistBarrier) otherwise
FiOverflowWeirs :=
    if EN_DoubleTrain == 0
        BoxF([FiEntranceBox_origin[0] - L_FiEntrance; FiEntranceBox_origin[1]; Z_FiOverflowWeir], [
            FiEntranceBox_origin[0] - L_FiEntrance + L_FiOverflowWeir;
            FiEntranceBox_origin[1] - T_ChannelWall - (N_Fi > 1)*(N_Fi - 1)*(W_FiOverflow + T_PlantWall) - (N_Fi > 2)*(N_Fi - 1)*(W_FiEntrance + T_PlantWall);
            Z_FiTop
        ], [0; 0; 0]*deg)
    otherwise
        BoxF([FiEntranceBox_origin[0]; FiEntranceBox_origin[1]; Z_FiOverflowWeir], [
            FiEntranceBox_origin[0] + T_ChannelWall + (N_Fi > 1)*(N_Fi - 1)*(W_FiOverflow + T_ChannelWall) + (N_Fi > 2)*(N_Fi - 1)*(W_FiEntrance + T_ChannelWall);
            FiEntranceBox_origin[1] + L_FiOverflowWeir;
            Z_FiTop
        ], [0; 0; 0]*deg)
FiDistBarrierCut :=
    if EN_DoubleTrain == 0
        BoxF(FiExitBox_origin, FiExitBox_origin + [
            -L_FiExit;
            -T_PlantWall - (N_Fi > 1)*(N_Fi - 1)*(W_FiOverflow + T_PlantWall) - (N_Fi > 2)*(N_Fi - 1)*(W_FiEntrance + T_PlantWall);
            H_FiEntrance
        ], [0; 0; 0]*deg)
    otherwise
        BoxF(FiExitBox_origin + [0 m; L_FiExit; H_FiExit], FiExitBox_origin + [
            T_ChannelWall + (N_Fi > 1)*(N_Fi - 1)*(W_FiOverflow + T_FiWall) + (N_Fi > 2)*(N_Fi - 1)*(W_FiEntrance + T_FiWall);
            0 m;
            H_FiEntrance
        ], [0; 0; 0]*deg)
FiSubtractWeirs := SubtractF(["Fi*Con"], "DeleteMe")
# Removing a wedge from the Distribution Barrier:
WedgeLayer := layer_new("FiWedgeLayer", purple)
Wedge_Origin := FiDistBarrier_Origin + [0 m; 0 m; H_FiDistBarrier]
Wedge_FarCorner := Wedge_Origin + [W_FiDistBarrier; -L_FiExit; -H_FiDistBarrier + 0.03 m]
BuildWedge := WedgeF(Wedge_Origin, Wedge_FarCorner, [-90; 0; 0]*deg)
# Added arrays for the barrier and wedge
MirrorWedge := Mirror3dAll("zx", [
    FiExitBox_origin[0] - L_FiExit/2;
    FiEntranceBox_origin[1] - T_ChannelWall - W_FiOverflow/2;
    Z_FiExitBottom - SocketDepth(ND_DistPipe)
], "N")
ArrayFiWedge :=
    if N_Fi ≠ 4
        Array_All(N_Fi - 1, 1, -(W_Fi + T_FiWall)) if EN_DoubleTrain == 0
        Array_All(1, N_Fi - 1, W_Fi + T_FiWall) otherwise
    otherwise
        Array_All(N_Fi - 2, 1, -2*(W_Fi + T_FiWall)) if EN_DoubleTrain == 0
        Array_All(1, N_Fi - 2, 2*(W_Fi + T_FiWall)) otherwise
MirrorArrayWedge :=
    MirrorWedge if N_Fi < 3
    stack(MirrorWedge, ArrayFiWedge) otherwise
FiSubtractWedge := SubtractF(["FiDistBarrier"], "DeleteMe")
FreezeWedge := FreezeLayer("FiWedgeLayer")
FiWedge :=
    stack(WedgeLayer, BuildWedge, MirrorArrayWedge, GroupDelete, FiSubtractWedge, FreezeWedge) if N_Fi ≥ 2
    stack(WedgeLayer, BuildWedge, GroupDelete, FiSubtractWedge, FreezeWedge) otherwise
FiWeirScript := stack(FiAuxCutoutLayer, FiOverflowWeirs, FiDistBarrierCut, GroupDelete, FiSubtractWeirs, FiAuxCutoutFrz, FiBarrier, FiWedge)
# Finish distribution plumbing
SelectDistFittingLayer := SelectLayer("FiDistFittingPlu")
FiDistElbow2 :=
    if EN_DoubleTrain == 0
        ElbowF([
            min(FiExitBox_origin[0] - L_FiExit/2 - ElbowRadius(ND_DistPipe) - 2*SocketDepth(ND_DistPipe), FiExitBox_origin[0] - L_FiExit - T_PlantWall);
            FiEntranceBox_origin[1] - T_ChannelWall - W_FiOverflow/2;
            Z_FiDistPipe
        ], [90; 0; 0]*deg, ND_DistPipe, PS_Default)
    otherwise
        ElbowF([
            FiEntranceBox_origin[0] + T_ChannelWall + W_FiOverflow/2;
            FiExitBox_origin[1] + L_FiExit/2 - ElbowRadius(ND_DistPipe) - 2*SocketDepth(ND_DistPipe);
            Z_FiDistPipe + ElbowRadius(ND_DistPipe)
        ], [180; 0; 0]*deg, ND_DistPipe, PS_Default)
SlideDownPeninsula :=
    W_FiEntrance + W_FiOverflow + 2*T_PlantWall if N_Fi ≥ 4
    0 otherwise
FiDistTee :=
    if EN_DoubleTrain == 0
        TeeF([
            min(FiExitBox_origin[0] - L_FiExit/2 - ElbowRadius(ND_DistPipe) - 2*SocketDepth(ND_DistPipe), FiExitBox_origin[0] - L_FiExit - T_PlantWall) - ElbowRadius(ND_DistPipe) + ShortTeeLength(ND_DistPipe);
            FiEntranceBox_origin[1] - W_FiEntrance - 2*T_PlantWall - 3/2*W_FiOverflow - T_ChannelWall - SlideDownPeninsula;
            Z_FiDistPipe
        ], [270; 0; 0]*deg, ND_DistPipe, PS_Default)
    otherwise
        TeeF([
            FiEntranceBox_origin[0] + 3*T_ChannelWall + 3*W_FiOverflow/2 + W_FiEntrance + SlideDownPeninsula;
            min(FiExitBox_origin[1] + L_FiExit/2 - ElbowRadius(ND_DistPipe) - 2*SocketDepth(ND_DistPipe), FiExitBox_origin[1] - T_PlantWall) - ElbowRadius(ND_DistPipe) + ShortTeeLength(ND_DistPipe);
            Z_FiDistPipe
        ], [0; 0; 0]*deg, ND_DistPipe, PS_Default)
ArrayFiDist :=
    if N_Fi < 3
        ArrayLast(N_Fi - 2, 1, -(W_FiEntrance + W_FiOverflow + 2*T_PlantWall)) if EN_DoubleTrain == 0
        ArrayLast(1, N_Fi - 2, W_FiEntrance + W_FiOverflow + 2*T_PlantWall) otherwise
    otherwise
        ArrayLast(N_distOverflow - 1, 1, -2*(W_FiEntrance + 2*T_PlantWall + W_FiOverflow)) if EN_DoubleTrain == 0
        ArrayLast(1, N_distOverflow - 1, 2*(W_FiEntrance + 2*T_PlantWall + W_FiOverflow)) otherwise
# Here the dist tee and pipe is arrayed some number of times...
# The length of the pipe still must be adjusted
ArrayFiDist == {
    ArrayLast(N_Fi - 2, 1, -(W_FiEntrance + W_FiOverflow + 2*T_PlantWall)) if EN_DoubleTrain == 0
    ArrayLast(1, N_Fi - 2, W_FiEntrance + W_FiOverflow + 2*T_PlantWall) otherwise
}
FiDistFinishFittingScript :=
    stack(SelectDistFittingLayer, FiDistElbow2, FiDistFittingFrz) if N_Fi ≤ 2
    stack(SelectDistFittingLayer, FiDistElbow2, FiDistTee, ArrayFiDist, FiDistFittingFrz) otherwise
SelectDistPipeLayer := SelectLayer("FiDistPipePlu")
L_FiDistPipe2 := max(L_FiExit/2 - ElbowRadius(ND_DistPipe) + T_PlantWall, 2*SocketDepth(ND_DistPipe))
L_FiDistPipe3 := W_FiOverflow + W_FiEntrance + 2*T_PlantWall - ElbowRadius(ND_DistPipe) - TeeLength(ND_DistPipe)/2
L_FiDistPipe4 := max(L_FiExit/2 - ElbowRadius(ND_DistPipe) + T_PlantWall, 2*SocketDepth(ND_DistPipe)) + ElbowRadius(ND_DistPipe) - ShortTeeLength(ND_DistPipe)
L_FiDistPipe5 := W_FiOverflow + W_FiEntrance + 2*T_PlantWall - TeeLength(ND_DistPipe)
FiDistPipe2 :=
    if EN_DoubleTrain == 0
        PipeF([
            FiExitBox_origin[0] - L_FiExit/2 - ElbowRadius(ND_DistPipe);
            FiEntranceBox_origin[1] - T_ChannelWall - W_FiOverflow/2;
            Z_FiDistPipe
        ], L_FiDistPipe2, [0; 0; 0]*deg, ND_DistPipe, PS_Default)
    otherwise
        PipeF([
            FiEntranceBox_origin[0] + T_ChannelWall + W_FiOverflow/2;
            FiExitBox_origin[1] + L_FiExit/2 - ElbowRadius(ND_DistPipe);
            Z_FiDistPipe
        ], L_FiDistPipe2, [90; 0; 0]*deg, ND_DistPipe, PS_Default)
FiDistPipe3 :=
    if EN_DoubleTrain == 0
        PipeF([
            min(FiExitBox_origin[0] - L_FiExit/2 - ElbowRadius(ND_DistPipe) - 2*SocketDepth(ND_DistPipe), FiExitBox_origin[0] - L_FiExit - T_PlantWall) - ElbowRadius(ND_DistPipe);
            FiEntranceBox_origin[1] - T_ChannelWall - W_FiOverflow/2 - ElbowRadius(ND_DistPipe);
            Z_FiDistPipe
        ], L_FiDistPipe3, [90; 0; 0]*deg, ND_DistPipe, PS_Default)
    otherwise
        PipeF([
            FiEntranceBox_origin[0] + T_ChannelWall + W_FiOverflow/2 + ElbowRadius(ND_DistPipe) + L_FiDistPipe3;
            min(FiExitBox_origin[1] + L_FiExit/2 - ElbowRadius(ND_DistPipe) - 2*SocketDepth(ND_DistPipe), FiExitBox_origin[1] - T_PlantWall) - ElbowRadius(ND_DistPipe);
            Z_FiDistPipe
        ], L_FiDistPipe3, [0; 0; 0]*deg, ND_DistPipe, PS_Default)
FiDistPipe4 :=
    if EN_DoubleTrain == 0
        PipeF([
            FiExitBox_origin[0] - L_FiExit/2 - ElbowRadius(ND_DistPipe);
            FiEntranceBox_origin[1] - W_FiEntrance - 2*T_PlantWall - 3/2*W_FiOverflow - T_ChannelWall - SlideDownPeninsula;
            Z_FiDistPipe
        ], L_FiDistPipe4, [0; 0; 0]*deg, ND_DistPipe, PS_Default)
    otherwise
        PipeF([
            FiEntranceBox_origin[0] + W_FiEntrance + 2*T_PlantWall + 3/2*W_FiOverflow + T_ChannelWall + SlideDownPeninsula;
            FiExitBox_origin[1] + L_FiExit/2 - ElbowRadius(ND_DistPipe);
            Z_FiDistPipe
        ], L_FiDistPipe4, [90; 0; 0]*deg, ND_DistPipe, PS_Default)
FiDistPipe5 :=
    if EN_DoubleTrain == 0
        PipeF([
            min(FiExitBox_origin[0] - L_FiExit/2 - ElbowRadius(ND_DistPipe) - 2*SocketDepth(ND_DistPipe), FiExitBox_origin[0] - L_FiExit - T_PlantWall) - ElbowRadius(ND_DistPipe);
            FiEntranceBox_origin[1] - W_FiEntrance - 2*T_PlantWall - 3/2*W_FiOverflow - TeeLength(ND_DistPipe)/2 - T_ChannelWall;
            Z_FiDistPipe
        ], L_FiDistPipe5, [90; 0; 0]*deg, ND_DistPipe, PS_Default)
    otherwise
        PipeF([
            FiEntranceBox_origin[0] + W_FiEntrance + 2*T_PlantWall + 3/2*W_FiOverflow + TeeLength(ND_DistPipe)/2 + T_ChannelWall;
            min(FiExitBox_origin[1] + L_FiExit/2 - ElbowRadius(ND_DistPipe) - 2*SocketDepth(ND_DistPipe), FiExitBox_origin[1] - T_PlantWall) - ElbowRadius(ND_DistPipe);
            Z_FiDistPipe
        ], L_FiDistPipe5, [0; 180; 0]*deg, ND_DistPipe, PS_Default)
FiDistPipePeninsula :=
    if EN_DoubleTrain == 0
        PipeF([
            min(FiExitBox_origin[0] - L_FiExit/2 - ElbowRadius(ND_DistPipe) - 2*SocketDepth(ND_DistPipe), FiExitBox_origin[0] - L_FiExit - T_PlantWall) - ElbowRadius(ND_DistPipe);
            FiEntranceBox_origin[1] - T_ChannelWall - W_FiOverflow/2 - ElbowRadius(ND_DistPipe);
            Z_FiDistPipe
        ], 2*L_FiDistPipe3 + TeeLength(ND_DistPipe), [90; 0; 0]*deg, ND_DistPipe, PS_Default)
    otherwise
        PipeF([
            FiEntranceBox_origin[0] + T_ChannelWall + W_FiOverflow/2 + ElbowRadius(ND_DistPipe) + L_FiDistPipe3;
            min(FiExitBox_origin[1] + L_FiExit/2 - ElbowRadius(ND_DistPipe) - 2*SocketDepth(ND_DistPipe), FiExitBox_origin[1] - T_PlantWall) - ElbowRadius(ND_DistPipe);
            Z_FiDistPipe
        ], 2*L_FiDistPipe3 + TeeLength(ND_DistPipe), [0; 0; 0]*deg, ND_DistPipe, PS_Default)
FiDistFinishPipeScript :=
    stack(SelectDistPipeLayer, FiDistPipe2, FiDistPipe3, FiDistPipeFrz) if N_Fi ≤ 2
    stack(SelectDistPipeLayer, FiDistPipe2, ArrayFiDist, FiDistPipe3, ArrayFiDist, FiDistPipePeninsula, ArrayFiDist, FiDistPipe5, FiDistPipeFrz) otherwise
# NEEDS WORK!! where should pipe 5 be drawn?
FiDistFinishScript := stack(FiDistFinishFittingScript, FiDistFinishPipeScript)
# Finish siphon plumbing
# Channel Coupling
FiSiphonChannelCoupling_Origin :=
    if EN_DoubleTrain == 0
        [
            Fi_origin[0] + T_FiWall + SocketDepth(ND_FiSiphon) + ShortTeeLength(ND_FiSiphon) + 2*ElbowRadius(ND_FiSiphon) + L_FiSiphonPipeBottom;
            Fi_origin[1] + S_Fitting + ConRadius(ND_FiSiphon);
            PlantLowerDC_Origin[2] - H_PlantDC - Slope_PlantDC*(L_PlantLowerDC - (T_PlantWall + Fi_origin[1] + S_Fitting + 2*ConRadius(ND_FiSiphon))) - SocketDepth(ND_FiSiphon)
        ]
    otherwise
        [
            Fi_origin[0] - S_Fitting - ConRadius(ND_FiSiphon);
            Fi_origin[1] + L_Fi + T_FiWall + SocketDepth(ND_FiSiphon) + ShortTeeLength(ND_FiSiphon) + 2*ElbowRadius(ND_FiSiphon) + L_FiSiphonPipeBottom;
            PlantSideDC_Origin[2] - H_PlantDC + Slope_PlantDC*((Plant_Origin[0] - L_Sed - T_PlantWall) - (Fi_origin[0] - S_Fitting - ConRadius(ND_FiSiphon))) - CouplingLength(ND_FiSiphon)
        ]
FiSiphonChannelCoupling(N) := CouplingSUBF(FiSiphonChannelCoupling_Origin + {
    ((N - 1)*[0 m; -W_Fi - T_FiWall; -Slope_PlantDC*(W_Fi + T_FiWall)]) if EN_DoubleTrain == 0
    ((N - 1)*[W_Fi + T_FiWall; 0 m; Slope_PlantDC*(W_Fi + T_FiWall)]) otherwise
}, [0; 270]*deg, ND_FiSiphon, PS_Default, ["DrainChannelCon"])
FiSiphonChannelCouplingScript :=
    N ← 1
    Local ← stack(FiSiphonFittingSelect, FiSiphonChannelCoupling(N))
    while N_Fi > N
        N ← N + 1
        Local ← stack(Local, FiSiphonChannelCoupling(N))
    Local ← stack(Local, FiSiphonFittingFrz)
    return Local
# Pipe Beneath Drain Channel
FiSiphonChannelPipe_Origin :=
    if EN_DoubleTrain == 0
        [
            Fi_origin[0] + T_FiWall + SocketDepth(ND_FiSiphon) + ShortTeeLength(ND_FiSiphon) + 2*ElbowRadius(ND_FiSiphon) + L_FiSiphonPipeBottom;
            Fi_origin[1] + S_Fitting + ConRadius(ND_FiSiphon);
            Fi_origin[2] + ElbowRadius(ND_FiSiphon)
        ]
    otherwise
        [
            Fi_origin[0] - S_Fitting - ConRadius(ND_FiSiphon);
            Fi_origin[1] + L_Fi + T_FiWall + SocketDepth(ND_FiSiphon) + ShortTeeLength(ND_FiSiphon) + 2*ElbowRadius(ND_FiSiphon) + L_FiSiphonPipeBottom;
            Fi_origin[2] + ElbowRadius(ND_FiSiphon)
        ]
L_FiSiphonChannelPipe1 := FiSiphonChannelCoupling_Origin[2] - CouplingLength(ND_FiSiphon) + 2*SocketDepth(ND_FiSiphon) - (Z_FiBottom + ElbowRadius(ND_FiSiphon))
FiSiphonChannelPipe(N) := PipeSUBF(FiSiphonChannelPipe_Origin + {
    ((N - 1)*[0 m; -W_Fi - T_FiWall; 0 m]) if EN_DoubleTrain == 0
    ((N - 1)*[W_Fi + T_FiWall; 0 m; 0 m]) otherwise
}, L_FiSiphonChannelPipe1 - (N - 1)*Slope_PlantDC*(W_Fi + T_FiWall), [0; 90]*deg, ND_FiSiphon, PS_Default, ["DrainChannelCon"])
FiSiphonChannelPipeScript :=
    N ← 1
    Local ← stack(FiSiphonPipeSelect, FiSiphonChannelPipe(N))
    while N_Fi > N
        N ← N + 1
        Local ← stack(Local, FiSiphonChannelPipe(N))
    return Local
# Drain Channel Stub
L_FiSiphonChannelStub := Z_FiSiphonOutlet - FiSiphonChannelCoupling_Origin[2]
FiSiphonChannelStub(N) := PipeF(FiSiphonChannelCoupling_Origin + {
    ((N - 1)*[0 m; -W_Fi - T_FiWall; -Slope_PlantDC*(W_Fi + T_FiWall)]) if EN_DoubleTrain == 0
    ((N - 1)*[W_Fi + T_FiWall; 0 m; -Slope_PlantDC*(W_Fi + T_FiWall)]) otherwise
}, L_FiSiphonChannelStub + (N - 1)*Slope_PlantDC*(W_Fi + T_FiWall), [0; 90; 0]*deg, ND_FiSiphon, PS_Default)
FiSiphonChannelStubScript :=
    N ← 1
    Local ← FiSiphonChannelStub(N)
    while N_Fi > N
        N ← N + 1
        Local ← stack(Local, FiSiphonChannelStub(N))
    Local ← stack(Local, FiSiphonPipeFrz)
    return Local
FiSiphonFinishScript := stack(FiSiphonChannelCouplingScript, FiSiphonChannelPipeScript, FiSiphonChannelStubScript)
# Finish box drain plumbing
# These aren't arrayed, but looped instead!
# Overflow Box Drain Couplings and Elbow
FiOverflowDrainElbow(N) :=
    if EN_DoubleTrain == 0
        ElbowSUBF([
            X_FiOverflowHorizDrainPipeEnd - ElbowRadius(ND_FiEntOverflow);
            FiEntranceBox_origin[1] - T_ChannelWall - W_FiOverflow/2 - (N - 1)*(W_Fi + T_FiWall);
            Z_FiOverflowVertDrainPipeEnd
        ], [180; 0; 90]*deg, ND_FiEntOverflow, PS_Default, ["FiCon"])
    otherwise
        ElbowSUBF([
            FiEntranceBox_origin[0] + T_ChannelWall + W_FiOverflow/2 + (N - 1)*(W_Fi + T_FiWall);
            Y_FiOverflowHorizDrainPipeEnd - ElbowRadius(ND_FiEntOverflow);
            Z_FiOverflowVertDrainPipeEnd
        ], [0; 90; -90]*deg, ND_FiEntOverflow, PS_Default, ["FiCon"])
FiDrainFittingLayer := layer_new("FiDrainFitting", green)
FiDrainFittingFrz := FreezeLayer("FiDrainFitting")
FiOverflowDrainElbowScript :=
    N ← 1
    space ←
        1 if N_Fi ≠ 4
        2 otherwise
    Local ← stack(FiDrainFittingLayer, FiOverflowDrainElbow(N))
    while N_Fi - space > N
        N ← N + space
        Local ← stack(Local, FiOverflowDrainElbow(N))
    return Local
# the elbow is stacked within the coupling!!!
FiOverflowDrainCouplingHoriz(N) :=
    if EN_DoubleTrain == 0
        CouplingSUBF([
            FiInletChannel_Origin[0] + T_PlantWall - SocketDepth(ND_FiEntOverflow);
            FiEntranceBox_origin[1] - T_ChannelWall - W_FiOverflow/2 - (N - 1)*(W_Fi + T_FiWall);
            Z_FiOverflowVertDrainPipeEnd - ElbowRadius(ND_FiEntOverflow)
        ], [0; 0], ND_FiEntOverflow, PS_Default, ["DrainChannelCon"])
    otherwise
        CouplingSUBF([
            FiEntranceBox_origin[0] + T_ChannelWall + W_FiOverflow/2 + (N - 1)*(W_Fi + T_FiWall);
            FiInletChannel_Origin[1] + W_FiInletChannel + T_PlantWall - SocketDepth(ND_FiEntOverflow);
            Z_FiOverflowVertDrainPipeEnd - ElbowRadius(ND_FiEntOverflow)
        ], [90; 0]*deg, ND_FiEntOverflow, PS_Default, ["DrainChannelCon"])
FiOverflowCouplingFinishScript :=
    N ← 1
    space ←
        1 if N_Fi ≠ 4
        2 otherwise
    Local ← stack(FiOverflowDrainElbowScript, FiOverflowDrainCouplingHoriz(N))
    while N_Fi - space > N
        N ← N + space
        Local ← stack(Local, FiOverflowDrainCouplingHoriz(N))
    Local ← stack(Local, FiDrainFittingFrz)
    return Local
# Overflow Box Drain Horizontal Pipes
FiOverflowDrainPipeHoriz(N) :=
    if EN_DoubleTrain == 0
        PipeSUBF([
            X_FiOverflowHorizDrainPipeStart;
            FiEntranceBox_origin[1] - T_ChannelWall - W_FiOverflow/2 - (N - 1)*(W_Fi + T_FiWall);
            Z_FiOverflowVertDrainPipeEnd - ElbowRadius(ND_FiEntOverflow)
        ], X_FiOverflowHorizDrainPipeStart - X_FiOverflowHorizDrainPipeEnd, [0; 0], ND_FiEntOverflow, PS_Default, ["DrainChannelCon"])
    otherwise
        PipeSUBF([
            FiEntranceBox_origin[0] + T_ChannelWall + W_FiOverflow/2 + (N - 1)*(W_Fi + T_FiWall);
            Y_FiOverflowHorizDrainPipeStart;
            Z_FiOverflowVertDrainPipeEnd - ElbowRadius(ND_FiEntOverflow)
        ], Y_FiOverflowHorizDrainPipeStart - Y_FiOverflowHorizDrainPipeEnd, [90; 0]*deg, ND_FiEntOverflow, PS_Default, ["DrainChannelCon"])
FiDrainPipeLayer := layer_new("FiDrainPipe", blue)
FiDrainPipeFrz := FreezeLayer("FiDrainPipe")
FiOverflowPipeFinishScript :=
    N ← 1
    space ←
        1 if N_Fi ≠ 4
        2 otherwise
    Local ← stack(FiDrainPipeLayer, FiOverflowDrainPipeHoriz(N))
    while N_Fi - space > N
        N ← N + space
        Local ← stack(Local, FiOverflowDrainPipeHoriz(N))
    Local ← stack(Local, FiDrainPipeFrz)
    return Local
# Exit Box Drain Couplings
FiExitDrainChanCoupling(N) :=
    if EN_DoubleTrain == 0
        CouplingSUBF([
            FiInletChannel_Origin[0] + T_PlantWall - SocketDepth(ND_FiExitWaste);
            FiExitCoupling3_origin[1] - (N - 1)*(W_Fi + T_FiWall);
            Z_FiExitDrainOutlet
        ], [0; 0], ND_FiExitWaste, PS_Default, ["DrainChannelCon"])
    otherwise
        CouplingSUBF([
            FiExitCoupling3_origin[0] + (N - 1)*(W_Fi + T_FiWall);
            FiInletChannel_Origin[1] + W_FiInletChannel + T_PlantWall - SocketDepth(ND_FiExitWaste);
            Z_FiExitDrainOutlet
        ], [90; 0]*deg, ND_FiExitWaste, PS_Default, ["DrainChannelCon"])
FiDrainFittingSelect := SelectLayer("FiDrainFitting")
# check for layer name
FiExitHorizDrainCouplingScript :=
    N ← 1
    space ←
        1 if N_Fi ≠ 4
        2 otherwise
    Local ← stack(FiDrainFittingSelect, FiExitDrainChanCoupling(N))
    while N_Fi - space > N
        N ← N + space
        Local ← stack(Local, FiExitDrainChanCoupling(N))
    Local ← stack(Local, FiDrainFittingFrz)
    return Local
# Exit Box Drain Horizontal Pipes
L_FiExitDrainPipeHoriz := FiExitCoupling2_origin[0] - FiInletChannel_Origin[0] - ElbowRadius(ND_FiExitWaste) + T_PlantWall
FiExitDrainPipeHoriz(N) := PipeSUBF([
    FiExitCoupling2_origin[0] - ElbowRadius(ND_FiExitWaste);
    FiExitCoupling3_origin[1] - (N - 1)*(W_Fi + T_FiWall);
    Z_FiExitDrainOutlet
], L_FiExitDrainPipeHoriz, [0; 0], ND_FiExitWaste, PS_Default, ["DrainChannelCon"])
FiDrainPipeSelect := SelectLayer("FiDrainPipe")
FiExitHorizDrainPipeScript :=
    N ← 1
    space ←
        1 if N_Fi ≠ 4
        2 otherwise
    Local ← stack(FiDrainPipeSelect, FiExitDrainPipeHoriz(N))
    while N_Fi - space > N
        N ← N + space
        Local ← stack(Local, FiExitDrainPipeHoriz(N))
    Local ← stack(Local, FiDrainPipeFrz)
    return Local
FiBoxDrainFinishScript := stack(FiOverflowCouplingFinishScript, FiOverflowPipeFinishScript, FiExitHorizDrainCouplingScript, FiExitHorizDrainPipeScript)
# Finish Entrance and Exit Valves, add removable stop gate and walkway peninsula
ThawAirReleasePieces := SelectLayer("FiEntExitValve")
ArrayFiEntExitValves :=
    Array_All(N_Fi, 1, W_Fi + T_FiWall) if EN_DoubleTrain == 0
    Array_All(1, N_Fi, W_Fi + T_FiWall) otherwise
FreezeEntExitValves := FreezeLayer("FiEntExitValve")
FiEntExitValves := stack(FiValveScript, ThawAirReleasePieces, ArrayFiEntExitValves, FreezeEntExitValves)
FiStopGateLayer := layer_new("FiRemovableStopGate", yellow)
RemovableStopGate := BoxF([
    FiEntranceBox_origin[0] + T_PlantWall - T_ConcreteMin - T_RemovableWeir;
    FiEntranceBox_origin[1] + FiEntranceBox_dim[1]/2 - L_FiEntranceWeir/2 - T_ConcreteMin;
    Z_FiBwFlowControlWide
], [
    FiEntranceBox_origin[0] + T_PlantWall - T_ConcreteMin;
    FiEntranceBox_origin[1] + FiEntranceBox_dim[1]/2 + L_FiEntranceWeir/2 + T_ConcreteMin;
    Z_FiEntranceWeir
], [0; 0; 0]*deg)
ArrayStopGate :=
    Array_All(N_Fi, 1, -(W_Fi + T_FiWall)) if EN_DoubleTrain == 0
    Array_All(1, N_Fi, W_Fi + T_FiWall) otherwise
FiStopGateFrz := FreezeLayer("FiRemovableStopGate")
FistopGateScript := stack(FiStopGateLayer, RemovableStopGate, ArrayStopGate, FiStopGateFrz)
FiWalkway_Dim := [-FiOverflowBox_Dim[0]; FiOverflowBox_Dim[1]; 0] + {
    [-FiDistBox_Dim[0] - 2*T_PlantWall; 0; -T_PlantWall] if EN_DoubleTrain == 0
    [0; FiDistBox_Dim[1] - 2*T_PlantWall; -T_PlantWall] otherwise
}
FiWalkway_Origin := [FiOverflowBox_Origin[0]; FiOverflowBox_Origin[1]; Z_Walkway] + {
    [0; -(W_FiEntrance + 2*T_PlantWall + W_FiOverflow); 0] if EN_DoubleTrain == 0
    [W_FiEntrance + 2*T_PlantWall + W_FiOverflow; 0; 0] otherwise
}
FiPeninsulaWalls_Origin := FiExitBox_origin - {
    [L_FiExit; W_Fi + T_PlantWall + T_FiWall; 0] if EN_DoubleTrain == 0
    [W_Fi + T_PlantWall + T_FiWall; L_FiExit; 0] otherwise
}
FiPeninsulaWalls_Dim :=
    [L_FiExit + L_FiOverflow + 2*T_PlantWall; T_PlantWall; H_FiEntrance] if EN_DoubleTrain == 0
    [T_PlantWall; L_FiExit + L_FiOverflow + 2*T_PlantWall; H_FiEntrance] otherwise
OtherWall :=
    [0; W_FiOverflow + T_PlantWall; 0] if EN_DoubleTrain == 0
    [W_FiOverflow + T_PlantWall; 0; 0] otherwise
ArrayPeninsula :=
    Array_All(N_Peninsulas, 1, -2*(W_FiEntrance + 2*T_PlantWall + W_FiOverflow)) if EN_DoubleTrain == 0
    Array_All(1, N_Peninsulas, 2*(W_FiEntrance + 2*T_PlantWall + W_FiOverflow)) otherwise
PeninsulaWalls :=
    Peninsula ← layer_new("PeninsulaWalls", grey)
    Peninsula ← stack(Peninsula, BoxF(FiPeninsulaWalls_Origin, FiPeninsulaWalls_Origin + FiPeninsulaWalls_Dim, [0; 0; 0]*deg))
    Peninsula ← stack(Peninsula, BoxF(FiPeninsulaWalls_Origin - OtherWall, FiPeninsulaWalls_Origin - OtherWall + FiPeninsulaWalls_Dim, [0; 0; 0]*deg))
    return stack(Peninsula, ArrayPeninsula, FreezeLayer("PeninsulaWalls"))
# only draw AT ALL if N.Fi > 3
WalkwayBlock :=
    Peninsula ← layer_new("WalkwayPeninsula", grey)
    Peninsula ← stack(Peninsula, BoxF(FiWalkway_Origin, FiWalkway_Origin + FiWalkway_Dim, [0; 0; 0]*deg))
    return stack(Peninsula, ArrayPeninsula, FreezeLayer("WalkwayPeninsula"))
FiEntExitValvesPlus :=
    FiEntExitValves if N_Fi == 1
    stack(FiEntExitValves, FistopGateScript) if N_Fi > 1 and N_Fi < 3
    stack(FiEntExitValves, FistopGateScript, WalkwayBlock, PeninsulaWalls) otherwise
# Add Boxes to Show Heights of Water and Sand
FiWaterLayer := layer_new("FiWater", blue2)
Water_FiInletChannel := BoxF(FiInletChannel_Origin, FiInletChannel_Origin + [-W_FiInletChannel; L_FiInletChannel; ZW_FiInletChannel - FiInletChannel_Origin[2]], [0; 0; 0]*deg)
Water_FiEntranceBoxTerminal := BoxF(FiEntranceBox_origin, FiEntranceBox_origin + [-L_FiEntrance; W_FiEntrance; ZW_FiEntranceTerminal - FiEntranceBox_origin[2]], [0; 0; 0]*deg)
Water_FiBoxTerminal := BoxF(Fi_origin, Fi_origin + [-L_Fi; W_Fi; ZW_FiMax - Z_FiBottom], [0; 0; 0]*deg)
Water_FiEntranceBoxClean := BoxF(FiEntranceBox_origin, FiEntranceBox_origin + [-L_FiEntrance; W_FiEntrance; ZW_FiEntranceCleanForward - FiEntranceBox_origin[2]], [0; 0; 0]*deg)
Water_FiBoxClean := BoxF(Fi_origin, Fi_origin + [-L_Fi; W_Fi; ZW_FiClean - Z_FiBottom], [0; 0; 0]*deg)
Water_FiEntranceBoxBw := BoxF(FiEntranceBox_origin, FiEntranceBox_origin + [-L_FiEntrance; W_FiEntrance; ZW_FiEntranceBwSS - FiEntranceBox_origin[2]], [0; 0; 0]*deg)
Water_FiBoxBw := BoxF(Fi_origin, Fi_origin + [-L_Fi; W_Fi; ZW_FiBwSS - Z_FiBottom], [0; 0; 0]*deg)
FreezeFiWater := FreezeLayer("FiWater")
FiWaterTerminalScript := stack(FiWaterLayer, Water_FiInletChannel, Water_FiEntranceBoxTerminal, Water_FiBoxTerminal, FreezeFiWater)
FiWaterCleanScript := stack(FiWaterLayer, Water_FiInletChannel, Water_FiEntranceBoxClean, Water_FiBoxClean, FreezeFiWater)
FiWaterBwScript := stack(FiWaterLayer, Water_FiInletChannel, Water_FiEntranceBoxBw, Water_FiBoxBw, FreezeFiWater)
FiSandLayer := layer_new("FiSand", yellow)
Sand_FiBoxForward := BoxF(Fi_origin, Fi_origin + [-L_Fi; W_Fi; H_FiSand], [0; 0; 0]*deg)
Sand_FiBoxBw := BoxF(Fi_origin, Fi_origin + [-L_Fi; W_Fi; H_FiFluidizedBed], [0; 0; 0]*deg)
FreezeFiSand := FreezeLayer("FiSand")
FiSandForwardScript := stack(FiSandLayer, Sand_FiBoxForward, FreezeFiSand)
FiSandBwScript := stack(FiSandLayer, Sand_FiBoxBw, FreezeFiSand)
ThawAll := ThawMultiple(["Fi*Con"; "DrainChannelSideCon"])
MirrorFilters := Mirror3dAll("yz", [Floc_Origin[0] - L_Floc - W_PlantDC/2 - T_PlantWall; 0 m], "n")
FreezeAll := FreezeMultiple(["Fi*Con"; "DrainChannelSideCon"])
AC_FilterWaterTerminal := stack(FiInletChannelScript, FiTankScript, PlantDrainChannelScript, FiManifoldScript, FiAuxScript, FiSandDrainScript, FiSiphonScript, FiArrayScript, FiWeirScript, FiDistFinishScript, FiSiphonFinishScript, FiBoxDrainFinishScript, FiWaterTerminalScript, FiSandForwardScript)
AC_FilterWaterClean := stack(FiInletChannelScript, FiTankScript, PlantDrainChannelScript, FiManifoldScript, FiAuxScript, FiSandDrainScript, FiSiphonScript, FiArrayScript, FiWeirScript, FiDistFinishScript, FiSiphonFinishScript, FiBoxDrainFinishScript, FiWaterCleanScript, FiSandForwardScript)
AC_FilterWaterBw := stack(FiInletChannelScript, FiTankScript, PlantDrainChannelScript, FiManifoldScript, FiAuxScript, FiSandDrainScript, FiSiphonScript, FiArrayScript, FiWeirScript, FiDistFinishScript, FiSiphonFinishScript, FiBoxDrainFinishScript, FiWaterBwScript, FiSandBwScript)
AC_FilterWater :=
    AC_FilterWaterTerminal if EN_FilterWater == 0
    AC_FilterWaterClean if EN_FilterWater == 1
    AC_FilterWaterBw if EN_FilterWater == 2
AC_Filter :=
    stack(FiInletChannelConScript, FiTankScript, PlantDrainChannelScript, FiManifoldScript, FiAuxScript, FiSandDrainScript, FiSiphonScript, FiArrayScript, FiWeirScript, FiDistFinishScript, FiSiphonFinishScript, FiBoxDrainFinishScript, FiEntExitValvesPlus) if EN_DoubleTrain == 0
    stack(FiInletChannelScript, FiTankScript, PlantDrainChannelScript, FiManifoldScript, FiAuxScript, FiSandDrainScript, FiSiphonScript, FiArrayScript, FiWeirScript, FiDistFinishScript, FiSiphonFinishScript, FiBoxDrainFinishScript, FiEntExitValvesPlus, ThawAll, MirrorFilters, FreezeAll) otherwise
AC_Filter :=
    AC_Filter if EN_Water == 0
    AC_FilterWater otherwise
AC_Filter :=
    stack(FiInletChannelConScript, FiTankScript, FiManifoldScript, FiAuxScript, FiSandDrainScript, FiSiphonScript, FiArrayScript, FiWeirScript, FiDistFinishScript, FiBoxDrainFinishScript, FiEntExitValvesPlus) if EN_DoubleTrain == 0
    stack(FiInletChannelConScript, FiTankScript, FiManifoldScript, FiAuxScript, FiSandDrainScript, FiSiphonScript, FiArrayScript, FiWeirScript, FiDistFinishScript, FiBoxDrainFinishScript, FiEntExitValvesPlus, ThawAll, MirrorFilters, FreezeAll) otherwise
AC_Filter := stack(FiInletChannelScript, FiTankScript, FiManifoldScript, FiValveScript, FiAuxScript, FiSandDrainScript, FiSiphonScript, FiArrayScript, FiWeirScript, FiDistFinishScript, FiBoxDrainFinishScript)
# [component: inputs AC_Filter]
