# [reference: ChemStorageTanks.xmcd]
Tankscript(p1, p2, p3, tank_origin, win1, win2) :=
    zoom_win ← zoom_wina(win1, win2)
    box1 ← boxA(tank_origin, p1)
    box2 ← boxA(p2, p3)
    subtract ← subtractD(p2, tank_origin)
    return concat(viewtop, zoom_win, box1, box2, subtract)  # Dimensions are the inside dimensions of the tank.
# the origin is the bottom right corner of the inside of the tank if looked at from top view
Tank(tank_origin, tank_dim, thick) := Tankscript([tank_origin[0] - tank_dim[0]; tank_origin[1] + tank_dim[1]; tank_origin[2] + tank_dim[2]], [tank_origin[0] + thick; tank_origin[1] - thick; tank_origin[2] - thick], [
    tank_origin[0] - tank_dim[0] - thick;
    tank_origin[1] + tank_dim[1] + thick;
    tank_origin[2] + tank_dim[2]
], tank_origin, [tank_origin[0] + thick + zc; tank_origin[1] - thick - zc; tank_origin[2]], [
    tank_origin[0] - tank_dim[0] - thick - zc;
    tank_origin[1] + tank_dim[1] + thick + zc;
    tank_origin[2] + tank_dim[2]
])
tank_origin := [0 m; 0 m; 0 m]
tank_dim := [W_AlumTank; W_AlumTank; H_AlumTank]  # error: This variable is undefined.
Tank1 := Tank(tank_origin, tank_dim, T_PlantWall)  # error: This variable is undefined.
# [component: inputs Tank1]
