# [reference: MasterProgram.xmcd]
# Automated Design: AutoCAD: Flocculation Tank
# Dimensions
totalfloc_dim := [
    L_FlocTank/N_FlocChannels;
    (N_FlocChannels*W_FlocChannel) + ((N_FlocChannels - 1)*T_PlantWall);
    H_Floc
]
wall_dim := [totalfloc_dim[0] + (2*T_PlantWall); T_PlantWall; totalfloc_dim[2]]
flocport_dim :=
    for i ∈ 0 .. (N_FlocChannels - 2)
        flocport_dim[0, i] ← [W_FlocPort[N_FlocChannels - 2 - i]; T_PlantWall; (-H_FlocPort)[i]]
    return flocport_dim
# Floc ports connect the channels.
channelopening_dim := [W_InletChannel; T_PlantWall; H_InletChannel]
# Origin Points
floc_origin := [Plant_Origin[0]; Plant_Origin[1] + N_SedTanks*(W_Sed + T_PlantWall); Plant_Origin[2]]
floc_origin[2] :=
    (Plant_Origin[2] + (HW_Sed - P_FlocChannel)) if Horiz == 1
    floc_origin[2] otherwise
wall_origin :=
    for i ∈ 0 .. (N_FlocChannels - 2)
        wall_origin[0, i] ← [
            Plant_Origin[0] - totalfloc_dim[0] - T_PlantWall;
            floc_origin[1] + (W_FlocChannel*(1 + i)) + (T_PlantWall*i);
            Plant_Origin[2]
        ]
    return wall_origin
flocport_origin :=
    for i ∈ 0 .. (N_FlocChannels - 2)
        if mod(i, 2) == 0
            flocport_origin[0, i] ← [
                Plant_Origin[0] - W_FlocPort[N_FlocChannels - 2 - i];
                floc_origin[1] + (W_FlocChannel*(1 + i)) + (T_PlantWall*i);
                floc_origin[2] + H_FlocPort[i]
            ]
        otherwise
            flocport_origin[0, i] ← [
                Plant_Origin[0] - totalfloc_dim[0];
                floc_origin[1] + (W_FlocChannel*(1 + i)) + (T_PlantWall*i);
                floc_origin[2] + H_FlocPort[i]
            ]
    return flocport_origin
# The flocport origins were set to start at the top height of the ports themselves (added to the origin otherwise it disappears).  This changes the flocports to be at the bottom of the channel dividing walls instead of at the top (more structurally sound).
flocport_origin = [[-0.682143; 13.3255; 0.778629], [-5.14286; 14.2009; 0.778629], [-0.682143; 15.0764; 0.778629], [-5.14286; 15.9518; 0.778629], [-0.682143; 16.8273; 0.778629], [-5.14286; 17.7027; 0.778629], [-0.682143; 18.5782; 0.778629]] m
# The x values were negative. I don't understand how the change in the floc code caused this problem.
# The Channel Opening was changed in the z-direction so that the bottom opening aligned with the bottom of the tank (for the same reason as the flocports).
channelopening_origin := [
    floc_origin[0] - totalfloc_dim[0];
    floc_origin[1] - T_PlantWall;
    floc_origin[2] + totalfloc_dim[2] - channelopening_dim[2]
]
# Flocculation Tank Script
Floctanktankscript :=
    local ← layer_new("floctank", dkgrey)
    local ← stack(local, Tank(floc_origin, totalfloc_dim, T_PlantWall))
    for i ∈ 0 .. (N_FlocChannels - 2)
        local ← stack(local, box(wall_origin[0, i], wall_origin[0, i] + wall_dim), box(flocport_origin[0, i], flocport_origin[0, i] + flocport_dim[0, i]), subtractD(wall_origin[0, i], flocport_origin[0, i]))
        local
    bigunion1 ← union_allA
    layerset1 ← layer_set("0")
    layerfreeze1 ← layer_freeze("floctank")
    one ← stack(local, bigunion1, layerset1, layerfreeze1)
    return one  # The floc tank and dividing walls are now a single object
Floctankchannelopeningscript :=
    layer3 ← layer_new("flocchannelhole", dkgrey)
    box3 ← box(channelopening_origin, channelopening_origin + channelopening_dim)
    layerset3 ← layer_set("0")
    layerthaw3 ← layer_thaw("floctank")
    viewtop ← viewtop1
    subtract3 ← subtractD(floc_origin, [
        floc_origin[0] - totalfloc_dim[0];
        floc_origin[1] - T_PlantWall;
        floc_origin[2] + totalfloc_dim[2] - H_InletChannel
    ])
    bigunion ← union_allA
    layerfreeze3 ← layer_freeze("floctank")
    layerfreeze4 ← layer_freeze("flocchannelhole")
    one ← stack(layer3, box3, layerset3, layerthaw3, viewtop, subtract3, bigunion, layerfreeze3, layerfreeze4)
    return ← one
L_slot :=
    L_slot ← 0 m if BaffleType == "Concrete"
    L_slot ← T_ConcreteMin otherwise  # If the baffles are concrete, they won't need slots to fit in like the plastic ones do.
Flocchannelslotscript :=
    if L_slot ≠ 0 m
        local ← layer_new("flocchannelslot", blue)
        for j ∈ 0 .. (N_FlocChannels - 1)
            for i ∈ 0 .. (N_FlocChannelBaffles[j] - 1)
                slot_origin[i] ← [Plant_Origin[0] - L_Sed; -L_slot; Plant_Origin[2]] + [X_FlocBaffles[i, j]; Y_FlocBaffles[0, j]; Z_FlocBaffles[i, j]]
                slot_dim[i] ← [T_FlocBaffle; W_FlocChannel + 2*L_slot; H_Floc - Z_FlocBaffles[i, j]]
                boxslots ← box(slot_origin[i], slot_origin[i] + slot_dim[i])
                local ← stack(local, boxslots)
                local
            local
        layerthaw4 ← layer_thaw("floctank")
        view1 ← viewtop1
        subtract4 ← subtractDall(floc_origin)
        layerset1 ← layer_set("0")
        layerfreeze5 ← layer_freeze("floctank")
        layerfreeze6 ← layer_freeze("flocchannelslot")
        local ← stack(local, layerthaw4, view1, subtract4, layerset1, layerfreeze5, layerfreeze6)
    return local
# This script will not execute if the user choses not to draw slots.
# The slots are drawn and then subtracted all at once
FloctankbafflescriptV :=
    if Horiz == 0
        local ← layer_new("baffle", ltpurple)
        for j ∈ 0 .. (N_FlocChannels - 1)
            for i ∈ 0 .. (N_FlocChannelBaffles[j] - 1)
                baffle_origin[i] ← [Plant_Origin[0] - L_Sed; -L_slot; Plant_Origin[2]] + [X_FlocBaffles[i, j]; Y_FlocBaffles[0, j]; Z_FlocBaffles[i, j]]
                baffle_dim[i] ← [T_FlocBaffle; W_FlocChannel + 2*L_slot; L_FlocBaffles[i, j]]
                bafflebox ← box(baffle_origin[i], baffle_origin[i] + baffle_dim[i])
                local ← stack(local, bafflebox)
                local
            local
        view1 ← viewtop1
        union1 ← union_allA
        layerset1 ← layer_set("0")
        layerfreeze1 ← layer_freeze("baffle")
        local ← stack(local, view1, union1, layerset1, layerfreeze1)
    return local
FloctankbafflescriptH :=
    if Horiz == 1
        local ← layer_new("baffle", ltpurple)
        for j ∈ 0 .. (N_FlocChannels - 1)
            for i ∈ 0 .. (N_FlocChannelBaffles[j] - 1)
                baffle_origin[i] ← [Plant_Origin[0] - L_Sed; -L_slot; Plant_Origin[2]] + [X_FlocBaffles[i, j]; Y_FlocBaffles[i, j]; Z_FlocBaffles[i, j]]
                baffle_dim[i] ← [T_FlocBaffle; L_FlocBaffles[i, j]; H_Floc]
                bafflebox ← box(baffle_origin[i], baffle_origin[i] + baffle_dim[i])
                local ← stack(local, bafflebox)
                local
            local
        view1 ← viewtop1
        union1 ← union_allA
        layerset1 ← layer_set("0")
        layerfreeze1 ← layer_freeze("baffle")
        local ← stack(local, view1, union1, layerset1, layerfreeze1)
    return local
# Baffles are drawn as rectangles, not lamina.
# The baffles are unioned so as to subtract the ports (see following script) in a single command
Floctankbafflescript :=
    Floctankbafflescript ← FloctankbafflescriptH if Horiz == 1
    Floctankbafflescript ← FloctankbafflescriptV otherwise
Floctankbaffleportscript :=
    if Horiz == 0
        local ← layer_new("baffleport", ltpurple)
        port_dim ← [T_FlocBaffle + 2*zc; L_BafflePort + L_slot; L_BafflePort]
        for j ∈ 0 .. (N_FlocChannels - 1)
            for i ∈ 0 .. N_FlocChannelBaffles[j] - 1
                if (mod(i, 2) == 1 and j == N_FlocChannels - 1) or (mod(i, 2) == 0 and j ≠ N_FlocChannels - 1)
                    port_origin[i] ← [Plant_Origin[0] - L_Sed - zc; W_FlocChannel - L_BafflePort; Plant_Origin[2]] + [X_FlocBaffles[i, j]; Y_FlocBaffles[0, j]; Z_FlocBaffles[i, j]] if (mod(i, 4) == 0 and j ≠ (N_FlocChannels - 1)) or (mod(i - 1, 4) == 0 and j == (N_FlocChannels - 1))
                    port_origin[i] ← [Plant_Origin[0] - L_Sed - zc; -L_slot; Plant_Origin[2]] + [X_FlocBaffles[i, j]; Y_FlocBaffles[0, j]; Z_FlocBaffles[i, j]] otherwise
                    portbox ← box(port_origin[i], port_origin[i] + port_dim)
                    local ← stack(local, portbox)
                    local
            local
        view ← viewtop1
        union1 ← union_allA
        layerthaw1 ← layer_thaw("baffle")
        subtract1 ← subtractD([Plant_Origin[0] - L_Sed; -L_slot; Plant_Origin[2]] + [
            X_FlocBaffles[0, N_FlocChannels - 1];
            Y_FlocBaffles[0, N_FlocChannels - 1];
            Z_FlocBaffles[0, N_FlocChannels - 1]
        ], [T_FlocBaffle + 2*zc; W_FlocChannel; L_BafflePort] + [Plant_Origin[0] - L_Sed - zc; 0; Plant_Origin[2]] + [X_FlocBaffles[0, 0]; Y_FlocBaffles[0, 0]; Z_FlocBaffles[0, 0]])
        layerset1 ← layer_set("0")
        layerfreeze1 ← layer_freeze("baffle")
        layerfreeze2 ← layer_freeze("baffleport")
        local ← stack(local, view, union1, layerthaw1, subtract1, layerset1, layerfreeze1, layerfreeze2)
    return local
# Adds the dimension of the slot in the y-direction for ease of construction
# This is only for vertical
# Currently selecting the left side of the port, the upper corner of the port inside the slot.
# This selects the first baffle to subtract from and the first port in the last channel
Floctankdrainvalvescript :=
    local ← layer_new("valves", blue3)
    for i ∈ 0 .. last(Y_FlocDrainValves)
        insert1 ← insertdwg([floc_origin[0] + T_PlantWall; Y_FlocDrainValves[i]; floc_origin[2]], D_Scale, 0)
        local ← stack(local, insert1)
    local ← stack(local, layer_freeze("valves"))
    return local
insertdwg = ƒ([Length], Unitless, Unitless) → [any1]
Floctankdrainslopescript :=
    local ← layer_new("drainslopes", blue3)
    if mod(N_FlocChannels, 2) == 0
        for i ∈ 0 .. last(Y_FlocDrainValves)
            wedge1 ← wedge3d([floc_origin[0]; Y_FlocDrainValves[i - 1] - 0.5*W_FlocChannel; floc_origin[2]], [-20 cm; W_FlocChannel; -0.5*D_port] + [floc_origin[0]; Y_FlocDrainValves[i] - 0.5*W_FlocChannel; floc_origin[2]]) if i == last(Y_FlocDrainValves)
            wedge1 ← wedge3d([floc_origin[0]; Y_FlocDrainValves[i] - 0.5*W_FlocChannel; floc_origin[2]], [-20 cm; W_FlocChannel; -0.5*D_port] + [floc_origin[0]; Y_FlocDrainValves[i] - 0.5*W_FlocChannel; floc_origin[2]]) otherwise
            local ← stack(local, wedge1)
    otherwise
        for i ∈ 0 .. last(Y_FlocDrainValves)
            wedge1 ← wedge3d([floc_origin[0]; Y_FlocDrainValves[i] - 0.5*W_FlocChannel; floc_origin[2]], [-20 cm; W_FlocChannel; -0.5*D_port] + [floc_origin[0]; Y_FlocDrainValves[i] - 0.5*W_FlocChannel; floc_origin[2]])
            local ← stack(local, wedge1)
    local ← stack(local, union_allA, layer_thaw("floctank"))
    subtract1 ← subtractD(floc_origin + [T_PlantWall; 0; 0], [floc_origin[0] - 20 cm; Y_FlocDrainValves[0]; floc_origin[2]])
    local ← stack(local, subtract1, layer_freeze("floctank"), layer_freeze("valves"))
    local
# assuming the valve is selected from its center
# always set the slopes at 20cm into the floc tank
Floctankendscript :=
    layerset ← layer_set("0")
    return layerset
AC_FlocTank :=
    stack(Floctanktankscript, Floctankchannelopeningscript, Flocchannelslotscript, Floctankbafflescript, Floctankdrainvalvescript, Floctankdrainslopescript, Floctankendscript) if Horiz == 1
    stack(Floctanktankscript, Floctankchannelopeningscript, Flocchannelslotscript, Floctankbafflescript, Floctankbaffleportscript, Floctankdrainvalvescript, Floctankdrainslopescript, Floctankendscript) otherwise
# [component: inputs AC_FlocTank]
