# [reference: MasterProgram.xmcd]
# Automated Design: AutoCAD: Flocculation Tank
L_Sed = 9.52822 m
# Dimensions
totalfloc_dim := [
    L_FlocTank/N_FlocChannels;
    (N_FlocChannels*W_FlocChannel) + ((N_FlocChannels - 1)*T_PlantWall);
    H_Floc
]
wall_dim := [totalfloc_dim[0] + (2*T_PlantWall); T_PlantWall; totalfloc_dim[2]]
flocport_dim :=
    for i ∈ 0 .. (N_FlocChannels - 2)
        flocport_dim[0, i] ← [W_FlocPort; T_PlantWall; -H_FlocPort]
    return flocport_dim
channelopening_dim := [W_InletChannel; T_PlantWall; H_InletChannel]
Plant_Origin[0] = 0
# Origin Points
floc_origin := [Plant_Origin[0]; Plant_Origin[1] + N_SedTanks*(W_Sed + T_PlantWall); Plant_Origin[2]]
totalfloc_dim[0] = 9.52822 m
W_FlocChannel = 0.719212 m
W_Sed = 2.159 m
wall_origin :=
    for i ∈ 0 .. (N_FlocChannels - 2)
        wall_origin[0, i] ← [
            Plant_Origin[0] - totalfloc_dim[0] - T_PlantWall;
            floc_origin[1] + (W_FlocChannel*(1 + i)) + (T_PlantWall*i);
            Plant_Origin[2]
        ]
    return wall_origin
wall_origin = [[-9.67822; 7.64621; 0], [-9.67822; 8.51542; 0], [-9.67822; 9.38464; 0], [-9.67822; 10.2538; 0]] m
H_Floc = 2.30429 m
flocport_origin :=
    for i ∈ 0 .. (N_FlocChannels - 2)
        flocport_origin[0, i] ← [Plant_Origin[0] - W_FlocPort; floc_origin[1] + (W_FlocChannel*(1 + i)) + (T_PlantWall*i); H_Floc] if round(round(i/2) - (i/2)) == 0
        if round(round(i/2) - (i/2)) == 1
            flocport_origin[0, i] ← [
                Plant_Origin[0] - totalfloc_dim[0];
                floc_origin[1] + (W_FlocChannel*(1 + i)) + (T_PlantWall*i);
                H_Floc
            ]
    return flocport_origin
channelopening_origin := [
    floc_origin[0] - totalfloc_dim[0];
    floc_origin[1] - T_PlantWall;
    floc_origin[2] + totalfloc_dim[2] - H_InletChannel
]
Y_FlocBaffles :=
    for j ∈ 0 .. (N_FlocChannels - 1)
        Y_FlocBaffles[0, j] ← Plant_Origin[1] + (N_SedTanks*(W_Sed + T_PlantWall)) + ((N_FlocChannels - j - 1)*(W_FlocChannel + T_PlantWall))
    return Y_FlocBaffles
wall_origin[0, 1] = [-9.67822; 8.51542; 0] m
wall_origin[0, 2] = [-9.67822; 9.38464; 0] m
# Flocculation Tank Script
flocport_origin[0, 1] = [-9.52822; 8.51542; 2.30429] m
Floctanktankscript :=
    layer1 ← layer_new("floctank", dkgrey)
    tank1 ← Tank(floc_origin, totalfloc_dim, T_PlantWall)
    layerset1 ← layer_set("0")
    layerfreeze1 ← layer_freeze("floctank")
    one ← stack(layer1, tank1, layerset1, layerfreeze1)
    return one
wall_dim = [9.82822; 0.15; 2.30429] m
box(wall_origin[0, 1], wall_origin[0, 1] + wall_dim) = "_box -9.67822,8.51542,0 0.15,8.66542,2.30429"
# Problem!! Flocktankwallscript is creating boxes to subtract from the walls, but not aligning them with the walls.  When AutoCAD subtracts the boxes, nothing happens to the wall and the boxes disappear
Floctankwallscript :=
    local ← layer_new("floctankwall", dkgrey)
    for i ∈ 0 .. (N_FlocChannels - 2)
        local ← stack(local, box(wall_origin[0, i], wall_origin[0, i] + wall_dim), box(flocport_origin[0, i], flocport_origin[0, i] + flocport_dim[0, i]), subtractD(wall_origin[0, i], flocport_origin[0, i]))
        local
    layerset2 ← layer_set("0")
    layerthaw2 ← layer_thaw("floctank")
    bigunion1 ← union_allA
    layerfreeze2 ← layer_freeze("floctankwall")
    local ← stack(local, layerset2, layerthaw2, bigunion1, layerset2, layerfreeze2)
    return local
Floctankchannelopeningscript :=
    layer3 ← layer_new("flocchannelhole", dkgrey)
    box3 ← box(channelopening_origin, channelopening_origin + channelopening_dim)
    layerset3 ← layer_set("0")
    layerthaw3 ← layer_thaw("floctankwall")
    viewtop ← viewtop1
    subtract3 ← subtractD(floc_origin, [
        floc_origin[0] - totalfloc_dim[0];
        floc_origin[1] - T_PlantWall;
        floc_origin[2] + totalfloc_dim[2] - H_InletChannel
    ])
    bigunion ← union_allA
    layerfreeze3 ← layer_freeze("floctankwall")
    one ← stack(layer3, box3, layerset3, layerthaw3, viewtop, subtract3, bigunion, layerfreeze3)
    return ← one
Floctankbafflescript :=
    local ← layer_new("baffle", ltpurple)
    x(j) ←
        a ← 0
        for t ∈ 0 .. (rows(X_FlocBaffles) - 1)
            a ← a + 1 if X_FlocBaffles[t, j] ≠ 0
        return a
    for j ∈ 0 .. (N_FlocChannels - 1)
        for i ∈ 0 .. (x(j) - 1)
            baffle_origin[i] ← [Plant_Origin[0] - L_Sed; 0; Plant_Origin[2]] + [X_FlocBaffles[i, j]; Y_FlocBaffles[0, j]; Z_FlocBaffles[i, j]]
            baffle_length[i] ← L_FlocBaffles[i, j]
            local ← stack(local, lamina(baffle_origin[i], Amp_FlocBaffle, W_FlocChannel, baffle_length[i], T_FlocBaffle, Per_FlocBaffle, AN_FlocBaffle, N_Baffle, N_FlocBaffleCol, X_FlocBaffle, Y_FlocBaffle)) if Baffle_complex == 1
            local ← stack(local, laminaplain1(baffle_origin[i], W_FlocChannel, baffle_length[i], T_FlocBaffle, AN_FlocBaffle, N_Baffle, N_FlocBaffleCol, X_FlocBaffle)) otherwise
            local
        local
    return local
Floctankendscript :=
    layerset ← layer_set("0")
    layerfreeze1 ← layer_freeze("baffle")
    one ← stack(layerset, layerfreeze1)
    return one
FlocTank := stack(Floctanktankscript, Floctankwallscript, Floctankchannelopeningscript, Floctankbafflescript, Floctankendscript)
# [component: inputs FlocTank]
FlocTank = [
    "-layer m floctank"; "c t 91,91,91"; "floctank"; "  "; "_-view o t _zoom w 0.16,6.767,0 -9.68822,11.28306,2.30429 _box 0,6.927,0 -9.52822,11.12306,2.30429 _box 0.15,6.777,-0.15 -9.67822,11.27306,2.30429 _subtract 0.15,6.777,-0.15  0,6.927,0 "; "-layer s 0"; "  "; "-layer f floctank"; "  "; "-layer m floctankwall"
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]
