# [reference: MasterProgram.xmcd]
lamina1(origin, amp, w, l, t, periods, angle, n_modules, n_moduleplates, ND_pipe, ND_Space, h_pipeorigin, l_pipe, s_pipes, num_bafflecols, xspace, yspace) :=
    origin_pipe1 ← [origin[1] + w/6; origin[2] + h_pipeorigin; origin[0]]
    origin_pipe2 ← [origin_pipe1[0]; origin_pipe1[1] + s_pipes; origin_pipe1[2]]
    lamina[0] ← concat(zoom_wina([origin[0] - w - zc; origin[1]; origin[2]], [origin[0] + w + zc; origin[1] + l + zc; origin[2]]), "spline")
    for i ∈ 0 .. periods*4
        lamina_last ← origin + [sin(π/2*i)*amp; i*w/(periods*4); 0]
        lamina[i + 1] ← point(lamina_last)
    lamina[i + 2] ← concat(sp, point(origin - zc_point))
    lamina[i + 3] ← point(lamina_last + zc_point)
    lamina[i + 4] ← "offset"
    lamina[i + 5] ← stringit(t)
    lamina[i + 6] ← point(origin)
    lamina[i + 7] ← point(origin + [t; 0; 0])
    line[0] ← concat(point(origin), sp, point(origin + [t; 0; 0]))
    line[1] ← concat(point(lamina_last), sp, point(lamina_last + [t; 0; 0]))
    lamina[i + 8] ← concat(sp, "line", sp, line[0], sp)
    lamina[i + 9] ← concat("line", sp, line[1], sp)
    lamina[i + 10] ← concat("z e region w", sp, point(origin - [amp; 0; 0]), sp, point(lamina_last + [t + amp; 0; 0]), sp)
    lamina[i + 11] ← concat("extrude", sp, point(origin), sp, sp, stringit(l), sp, "0")
    lamina[i + 12] ← viewrightside1
    lamina[i + 13] ← Pipe(origin_pipe1, ND_pipe, l_pipe, EN_PipeSpec)
    lamina[i + 14] ← Pipe(origin_pipe2, ND_pipe, l_pipe, EN_PipeSpec)
    lamina[i + 15] ← viewrightside1
    lamina[i + 16] ← concat("-array", sp, point([origin_pipe1[0]; origin_pipe1[1] + innerdiameter(ND_pipe, EN_PipeSpec)/2; origin_pipe1[2]]), sp, point([origin_pipe2[0]; origin_pipe2[1] + innerdiameter(ND_pipe, EN_PipeSpec)/2; origin_pipe1[2]]), sp, sp, "R", sp, "1", sp, "3", sp, num2str(w/(3 m)))
    s_plates ← xspace*sin(angle) - t
    lamina[i + 17] ← Pipe([origin[1] + w/6; origin[2] + h_pipeorigin; origin[0] + t], ND_Space, s_plates, EN_PipeSpec)
    lamina[i + 18] ← Pipe([origin_pipe1[0]; origin_pipe1[1] + s_pipes; origin_pipe1[2] + t], ND_Space, s_plates, EN_PipeSpec)
    lamina[i + 19] ← viewfront1
    lamina[i + 20] ← concat("-array", sp, point([origin_pipe1[2]; origin_pipe1[1] + innerdiameter(ND_Space, EN_PipeSpec)/2; origin_pipe1[0]]), sp, point([origin_pipe2[2]; origin_pipe2[1]; origin_pipe2[0] + innerdiameter(ND_Space, EN_PipeSpec)/2]), sp, sp, "R", sp, "1", sp, num2str(n_moduleplates), sp, num2str(xspace*sin(angle)/m))
    lamina[i + 21] ← concat("rotate3d", sp, "all", sp, sp, "z", sp, point([origin[0]; origin[2]; origin[1]]), sp, num2str(90 - angle/deg)) if angle ≠ 90 deg
    lamina[i + 22] ← concat("-array", sp, point([origin[0] - l*cos(angle); origin[2] + l*sin(angle); origin[1]]), sp, sp, "R", sp, num2str(num_bafflecols), sp, num2str(n_moduleplates), sp)
    lamina[i + 23] ← concat(stringit(xspace)) if n_moduleplates > 1
    lamina[i + 23] ← "" otherwise
    lamina[i + 24] ← concat(stringit(yspace)) if num_bafflecols > 1
    lamina[i + 24] ← "" otherwise
    lamina[i + 25] ← viewtop
    lamina[i + 26] ← block("module", origin, origin)
    lamina[i + 27] ← " z e"
    lamina
laminar := lamina1(lamina_origin, Amp_SedPlate, W_Sed, L_SedPlate, T_SedPlate, Per_SedPlate, AN_SedPlate, N_Modules, N_SedModulePlates, ND_SedModulePipe, ND_SedModulePipeSpace, S_SedPlateModuleMin, L_SedModulePipe, S_SedModulePipes, N_SedPlateCol, B_SedPlateHorizontal, Y_SedPlate)
# [component: inputs laminar]
innerdiameter(ND_SedModulePipe, EN_PipeSpec) = 0.0171196 m
