# [reference: MasterProgram.xmcd]
T_LaunderCap := outerradius(ND_SedLaunder) - innerdiameter(ND_SedLaunder, EN_PipeSpec)/2
L_SedLaunder :=
    (L_Sed - W_InletChannel - W_ExitChannel - T_ChannelWall - CouplingLength(ND_SedLaunder) - CouplingLengthFlex(ND_SedLaunder) + SocketDepthFlex(ND_SedLaunder)) - T_LaunderCap if CouplingLength(ND_SedLaunder) ≥ T_ChannelWall
    (L_Sed - W_InletChannel - W_ExitChannel - 2*T_ChannelWall - CouplingLengthFlex(ND_SedLaunder) + SocketDepthFlex(ND_SedLaunder)) - T_LaunderCap otherwise
# [component: inputs SedLaunderscript]
PVCCouplingNew_origin := [
    Plant_Origin[0] - W_ExitChannel - SocketDepth(ND_SedLaunder);
    Plant_Origin[1] + W_Sed/(N_SedLaunders*N_SedBays*2);
    Plant_Origin[2] + HW_Sed - H_SedAbove + outerradius(ND_SedLaunder)
]
FlexCouplingNew_origin := [
    {
        (Plant_Origin[0] - W_ExitChannel - CouplingLength(ND_SedLaunder)) if CouplingLength(ND_SedLaunder) ≥ T_PlantWall
        Plant_Origin[0] otherwise
    };
    Plant_Origin[1] + W_Sed/(N_SedLaunders*N_SedBays*2);
    Plant_Origin[2] + HW_Sed - H_SedAbove + outerradius(ND_SedLaunder)
]
SedLaunderNippleNew_origin := [
    PVCCouplingNew_origin[0] - CouplingLength(ND_SedLaunder) + SocketDepth(ND_SedLaunder);
    Plant_Origin[1] + W_Sed/(N_SedLaunders*N_SedBays*2);
    Plant_Origin[2] + HW_Sed - H_SedAbove + outerradius(ND_SedLaunder)
]
SedLaunderNew_origin := [
    FlexCouplingNew_origin[0] - SocketDepthFlex(ND_SedLaunder);
    Plant_Origin[1] + W_Sed/(N_SedLaunders*N_SedBays*2);
    Plant_Origin[2] + HW_Sed - H_SedAbove + outerradius(ND_SedLaunder)
]
LaunderCapNew_origin := [
    SedLaunderNew_origin[0] - L_SedLaunder;
    Plant_Origin[1] + W_Sed/(N_SedLaunders*N_SedBays*2);
    Plant_Origin[2] + HW_Sed - H_SedAbove + outerradius(ND_SedLaunder)
]
LengthSedLaunderNipple :=
    (SocketDepth(ND_SedLaunder) + SocketDepthFlex(ND_SedLaunder)) if CouplingLength(ND_SedLaunder) ≥ T_PlantWall
    (SocketDepth(ND_SedLaunder) + SocketDepthFlex(ND_SedLaunder) + (T_PlantWall - CouplingLength(ND_SedLaunder))) otherwise
T_PVCCoupling := T_LaunderCap
array_all(nrow, ncol, dist) := concat("-array", sp, "all", sp, sp, "R", sp, stringit_nounits(nrow), sp, stringit_nounits(ncol), sp, stringit(dist))
SubtractF(GroupsToSubtractFrom, GroupToSubtract)  # cylinderF
# Length between two orifices is defined somewhere
# make two orifices, one at each angle, and THEN array everything and it will subtract them both
SedLaunderScriptNEW :=
    LayerNew1 ← layer_new("launder", pastelgreen)
    LaunderPipe ← PipeF(SedLaunderNew_origin, L_SedLaunder, [0 deg; 0 deg], ND_SedLaunder, EN_PipeSpec)
    FreezeLaunder ← FreezeLayer("launder")
    Orifice1 ← cylinderD([
        SedLaunderNew_origin[0];
        SedLaunderNew_origin[1];
        SedLaunderNew_origin[2] + L_SedActive - B_SedLaunderOrifices/2
    ], D_SedLaunderOrifice/2, [
        SedLaunderNew_origin[0];
        SedLaunderNew_origin[1] + outerradius(ND_SedLaunder) + zc;
        SedLaunderNew_origin[2] + L_SedActive - B_SedLaunderOrifices/2
    ])
    OrificeArray ← array_all(2, N_SedLaunderOrificesEst, L_SedLaunder)
    GroupOrifice ← GroupAll("DeleteMe")
    SubtractOrifices ← SubtractF(["launder"], "DeleteMe")
    ThawLaunder ← SelectLayer("launder")
    FreezeLaunderAgain ← FreezeLayer("launder")
    SubtractOrifice ← subtractH([SedLaunderNew_origin[0]; SedLaunderNew_origin[1] - outerradius(ND_SedLaunder)], [
        SedLaunderNew_origin[0] + D_SedLaunderOrifice + zc;
        SedLaunderNew_origin[1] + outerradius(ND_SedLaunder) + 2*zc
    ], [SedLaunderNew_origin[0] - D_SedLaunderOrifice - zc; SedLaunderNew_origin[1] - zc])
    LayerNew2 ← layer_new("PVCCoupling", turquoise)
    PVCCoupling ← CouplingSUBF(PVCCouplingNew_origin, [0 deg; 0 deg], ND_SedLaunder, EN_PipeSpec, ["tank"])
    FreezePVCCoupling ← FreezeLayer("PVCCoupling")
    LayerNew3 ← layer_new("SedLaunderNipple", red)
    SedLaunderNipple ←
        PipeF(SedLaunderNippleNew_origin, LengthSedLaunderNipple, [0 deg; 0 deg], ND_SedLaunder, EN_PipeSpec) if CouplingLength(ND_SedLaunder) ≥ T_ChannelWall
        PipeSUBF(SedLaunderNippleNew_origin, LengthSedLaunderNipple, [0 deg; 0 deg], ND_SedLaunder, EN_PipeSpec, ["tank"]) otherwise
    FreezeSedLaunderNipple ← FreezeLayer("SedLaunderNipple")
    LayerNew4 ← layer_new("FlexCoupling", pastelyellow)
    FlexCoupling ← FlexCouplingF(FlexCouplingNew_origin, [0 deg; 0 deg], ND_SedLaunder)
    FreezeFlexCoupling ← FreezeLayer("FlexCoupling")
    LayerNew5 ← layer_new("LaunderCap", yellow)
    LaunderCap ← CapF(LaunderCapNew_origin, [0 deg; 180 deg], ND_SedLaunder)
    FreezeLaunderCap ← FreezeLayer("LaunderCap")
    StackEverything ← stack(LayerNew1, LaunderPipe, FreezeLaunder, Orifice, OrificeArray, GroupOrifice, SubtractOrifices, ThawLaunder, FreezeLaunderAgain, SubtractOrifice, LayerNew2, PVCCoupling, FreezePVCCoupling, LayerNew3, SedLaunderNipple, FreezeSedLaunderNipple, LayerNew4, FlexCoupling, FreezeFlexCoupling, LayerNew5, LaunderCap, FreezeLaunderCap)
    return StackEverything  # error: This variable is undefined.
PipeSUBF(OriginPoint, Length, AngleVector, ND, EN, SubtractionLayers)
# Change to cylindferF
# Make second orifices
# Make new origin points
# x direction will be
# sedlaunder-distance be
# tween orifices
# y will be same as launder
# z will be launder- length of
# orifice
# [component: inputs SedLaunderScriptNEW]
SedLaunderScriptNEW =  # error: This variable is undefined.
