# Overall Plant Inputs
# Only parameters with units need to be entered in this file. The units must be attached as SI (meters, kg, s)
Q_Plant := 10*L/s
acad_version := 2008
H_PlantFreeboard := .1*m
T_PlantWall := .15*m
EN_PipeSpec := 4
EN_DrillSeries := 1
EN_FcmTube := 0
V_Scour := .1*m/s
# Chemical Storage Tanks, Entrance Tank
# and Rapid Mixer Inputs
C_FcmDoseMax := 90*mg/L
C_FcmAlum := 120*gm/L
Ti_StockMin := 30 hr
# Flocculator Inputs
T_FlocBaffle := 4 cm
# Should this be equal to the t.sedplate becuase the same material is used?  and if cement baffles are used should they just be a standard thickness?
Ti_FlocDrain := 45 hr
W_FlocChannelMin := .5*m
H_FlocOption := 1  # H.FlocOption = -1 if same as sed; 0 is optimal or a positive number is user specified
# Sedimentation Inputs
N_SedTanks := 2
W_SedBay := 1*m
L_SedPlateSheet := 12 ft
T_SedPlate := 3 mm
ND_SedPlateFrame := round(1.5*in/in)*in  # This needs to be an exact inch otherwise the outerdiameter function call to the pipe database won't work
Ti_SludgeDrain := 10 min
ND_SedManifoldMax := 12 in
B_SedManifoldPort := 10 cm
HL_SedWeirMax := 10 cm
T_SedWeir := 4 cm
W_SedFrameWall := 4 cm
H_SedFrameWall := 7 cm
# Expert Inputs
W_MpWalkway := 1*m
B_SedManifoldOrifices := 10 cm
N_SedBaysEst := 2
L_FlocBaffleSlot := .05*m
S_FlocChannel := 5 cm
B_SedPlateFramePipes := 30 cm
CP_Floc := CP_Floc*m^(2/3)  # error: This variable is undefined.
Pi_FlocDissipation := 2
S_FlocPort := 1.5 cm
Pi_FlocBaffle := 1
ED_Floc := [6; 6]*W/kg
HW_SedEst := 2 m
ED_SedInlet := 5*W/kg
Pi_FlowManifold := .8
V_SedUpBod := 70*m/day
V_SedCBod := 10*m/day
W_SedSludgeOverlap := 2.5 cm
AN_SedPlate := 60 deg
B_SedPlateMin := 2 cm + T_SedPlate
N_SedLaunders := 2
Pi_Launder := .95
HL_SedLaunderBod := 5 cm
Pi_QLaunderOrifices := 10 cm
B_SedLaunderOrifices := 10 cm
Pi_QSludgeOrifices := .85
HW_InletChannelMax := .5*m
V_UpFlocHopper := 30*m/day
V_EtUp := 700*m/day
ED_DiffusionMin := 0.733*W/kg
ED_FlocEntryOrifice := .8*W/kg
HW_EtMax := 20 cm
