# Atima inputs entered 8/16/2011
# Basic Inputs
Language := 0  # Only parameters with units need to be entered in this file. The units must be attached as SI (meters, kg, s)
# Overall Plant Inputs
Q_Plant := 15*L/s
T_PlantWall := 15 cm
T_ConcreteMin := 5 cm
EN_DrillSeries := 1
# Chemical Storage Tanks, Entrance Tank and Rapid Mixer Inputs
C_CoagDoseMax := 80*mg/L
C_ChlorineStock := 50*gm/L
C_CoagStock := 120*gm/L
C_ChlorineDoseMax := 2*mg/L
Ti_CoagStock := 30 hr
Ti_ChlorineStock := 30 hr
Ti_StockMin := Ti_AlumStock  # error: This variable is undefined.
# Flocculator Inputs
T_FlocBaffleRigidH := 15 cm
T_FlocBaffleRigidV := 5 cm
H_FlocOption := 0
# Sedimentation Inputs
N_SedTanks := 5
N_SedBaysEst := 1
W_SedPlate := 92*cm
L_SedPlateSheet := 365.8 cm
T_SedPlate := 0.2 cm
T_SedWeir := 4 cm
W_SedBay := W_SedPlate
W_Plastic := W_SedPlate
# Pipe availability will depend on the following country variable. As a default is 0, corresponding to Honduras.
Country := 0
