# Stand alone chemical dosers for India
# MathCAD References
Q_Plant := 3*L/s
# [reference: ExpertInputs.xmcd]
HL_LfomMin := 10 cm
HL_LfomMax := 10 cm
HL_CdcCoag := HL_LfomMin
HL_CdcChlorine := HL_LfomMin
EN_Chlorine := 2
# Note that the ratio of stock to max dose is the same for chlorine and coagulant and that gives the same design for each doser (given that the viscosity is almost the same for both stocks).
C_ChlorineDoseMax := 2*mg/L
# [reference: MathFunctions.xmcd]
# [reference: PipeDatabase May 2.xmcd]
# [reference: MaterialsDatabase.xmcd]
# [reference: FluidsFunctions.xmcd]
# [reference: CdcFunctions.xmcd]
# Assumptions
T_TankWall := 25 cm
L_Wall := 3 m
T_Et := 0.5 cm
T_MS := 4 mm
T_Separator := 15 cm
W_Wall := 3 m
T_FiLayer := 20 cm
PS_Fi := 2
L_TankOffset := 1.2 m
H_Wall := 3 m
S_Walkway := 75 cm
Vol_OverheadTank := L_Wall*W_Wall*H_Wall
H_Freeboard := 3 cm
T_Platform := 15 cm
# This is actual ID for 2.5 kg/cm^2 pipe
# all z's with reference to treatment room floor
H_RoomShort := 2.8 m
L_RoofOverhang := 5 cm
H_CHTAboveEt := 10 cm
H_DrumOutlet := 10 cm
ND_Transmission := 3 in
ND_ChemDrain := 1/2*in
ND_ChemPlu := 1/2*in
# LFOM
Π_LfomSafety := 1.03
# There isn't much cushion for the LFOM, but assume it doesn't ever run at max flow anyway
# [reference: LFOM.xmcd]
H_LfomOrifices = [0.635; 2.06357; 3.49214; 4.92071; 6.34929; 7.77786; 9.20643] cm
D_LfomOrifices = 8 in/16
ND_RMPipe = 3 in
N_LfomOrifices = [11; 9; 2; 4; 3; 3; 2]
# DOUBLE CHECK LFOM ALGORITHM!!!!
# Entrance Tank
# Assume:
H_LeverFulcrumAboveEtTop := 5 cm
T_MountingPlate := 5 mm
W_MountingPlate := 4 cm
H_MountingOverlap := 5 cm
W_MountingBox := 1.5 cm
H_MountingPlate := H_LeverFulcrumAboveEtTop + W_MountingBox/2 + H_MountingOverlap
D_TubeAvailable := [2]*in/16
ND_RMPipe = 3 in
ND_EtFloat := 6 in
ND_EtDrain := 1.5 in
ND_Inlet := 3 in  # Assume Square
H_EtFloat := 5 cm
# line up inlet, lfom on left; float, drain on right
L_CdcLeverArm := 36 cm  # redefine so that lever arm sits within the stand
HL_EtDrainPipe := h_l(Q_Plant, ND_EtDrain, 4 m, K_PipeEnt + K_PipeExit + 2*K_El90, Nu_Water, E_Pvc) = 2.2041 m
# there should be at least 2m of available head if the drain pipe drops to the bottom
HL_EtDrainPipeOneInch := h_l(Q_Plant, 1 in, 4 m, K_PipeEnt + K_PipeExit + 2*K_El90, Nu_Water, E_Pvc) = 14.5419 m  # not feasible to reduce drain pipe below 1.5"
L_EtMin := max(ElbowRadius(ND_Inlet) + SocketDepth(ND_Inlet) + OD_Fitting(ND_Inlet), OD_Fitting(ND_RMPipe)) + 2*S_Fitting + L_CdcLeverArm + OR_Fitting(ND_EtFloat) - T_Et - W_MountingBox - T_MountingPlate/2 = 0.724006 m
W_EtMin := max(OD_Fitting(ND_Inlet) + OD_Fitting(ND_RMPipe), OD_Fitting(ND_EtFloat) + OD_Fitting(ND_EtDrain)) + 3*S_Fitting = 0.3913 m
HL_EtOverflow := Headloss_weir(Q_Plant/2, OD(ND_EtDrain)*π) = 0.030471 m  # assume you would never drain more than half of the plant flow through overflow
H_Et := max(H_EtFloat/2, SocketDepth(ND_RMPipe)) + 2 cm + HL_LfomMin + H_Freeboard + HL_EtOverflow = 0.226471 m
# Chem Doser, Storage, Calibration Columns, Orifice Plate
C_ChlorineDoseAvg := 1*mg/L
HL_CdcChlorine = 0.1 m
C_ChlorineStockMax := 1*gm/L
Ti_ChlorineEst := 1 day
D_ChlorineTank := 12 in
# 10 gallon bucket
H_ChlorineTank := 20 in
W_ChemPlatform := 4*S_Fitting + 2*D_ChlorineTank = 0.8096 m
L_ChemPlatform := max(D_ChlorineTank + 2*S_Fitting + S_Walkway, L_EtMin + L_CdcLeverArm + 2*T_Et + 3*S_Fitting) = 1.24401 m
L_ChlorineTube := 0.5 m
D_ChlorineTube := 1/8*in
Q_ChlorineTube := Q_pipetotal(D_ChlorineTube, HL_CdcChlorine, L_ChlorineTube, Nu_Water, E_Pvc, K_CdcTube) = 3.76722 mL/s
Re_Pipe(Q_ChlorineTube, D_ChlorineTube, Nu_Water) = 1510.73  # laminar
C_ChlorineDoseMax = 0.002 kg/m^3
C_ChlorineStock := Q_Plant*C_ChlorineDoseMax/Q_ChlorineTube = 1.59268 gm/L
V_Solution := 27000*L/day*Ti_ChlorineEst*C_ChlorineDoseAvg/C_ChlorineStock = 16.9525 L
V_Tank := 10 gal
Ti_Chlorine := C_ChlorineStock*V_Tank/(C_ChlorineDoseAvg*27000*L/day) = 2.23295 day
# Calibration Column
Ti_Res := 0.5 min
H_CalColSF := 1.3
Vol_ChlorCalCol := H_CalColSF*Ti_Res*Q_ChlorineTube
ND_ChlorCalCol := 1 in
H_ChlorCalCol := round(H_CalColSF*Vol_ChlorCalCol/(IR(ND_ChlorCalCol, PS_Fi)^2*π)/(10 cm))*10*cm = 0.3 m
H_mL := cm^3/(IR(ND_ChlorCalCol, PS_Fi)^2*π) = 1.79346 mm  # don't want the height of a mL to be too small, makes readings hard to take
Z_LowerPlatform := H_Wall + T_TankWall + sin(45 deg)*(L_ChlorineTube + 2*CouplingLength(ND_ChemPlu) + DiagWyeLength(ND_ChemPlu) + ElbowRadius(ND_ChemPlu)) + ShortTeeLength(ND_ChemPlu) + MaleAdapterLength(ND_ChemPlu) + 3*SocketDepth(ND_ChemPlu) + BallValveLength(ND_ChemPlu) + 10 cm = 3.94609 m
Z_EtBottom := Z_LowerPlatform + T_MS + T_Et
Z_LeverArmFulcrum := Z_EtBottom + H_Et + H_LeverFulcrumAboveEtTop
Z_UpperPlatform := Z_LeverArmFulcrum + 35 cm
H_RoomTall := Z_UpperPlatform + 1.8 m - T_TankWall - H_Wall
H_DrumOutletAboveCHT := Z_UpperPlatform - Z_EtBottom - H_CHTAboveEt - H_Et + H_DrumOutlet = 0.4 m
D_LargeChlorineTubes := 3/8*in  # make all non-design tubes double the size of the design tube
L_TubeDrumToCHT := 2*H_DrumOutletAboveCHT
HL_TubeDrumToCHT := h_l(Q_ChlorineTube, D_LargeChlorineTubes, L_TubeDrumToCHT, K_PipeEnt + K_PipeExit, Nu_Water, E_Pvc) = 0.00173498 m
D_ChlorineFloatValveOrifice :=
    i ← 0
    while h_orifice(D_FltVlvOrificesAvail[i], Pi_VCOrifice, Q_ChlorineTube) ≥ H_DrumOutletAboveCHT - HL_TubeDrumToCHT - 5 cm
        i ← i + 1
    return max(D_FltVlvOrificesAvail[i], D_FltVlvOrificesAvail[1])
D_ChlorineFloatValveOrifice = 2.992 in/16  # use at least the second smallest orifice to prevent clogging
HL_ChlorineFloatValveOrifice := h_orifice(D_ChlorineFloatValveOrifice, Pi_VCOrifice, Q_ChlorineTube) = 0.580671 cm
T_LfomOrificePlate := 3 mm
HL_LfomOrificePlate := 0.9*(Z_LowerPlatform - (H_Wall + T_TankWall) + SocketDepth(ND_RMPipe)) = 0.667884 m
A_LfomOrificePlate := A_orifice(HL_LfomOrificePlate, Pi_VCOrifice, Q_Plant)
D_LfomOrificePlate := D_circle(A_LfomOrificePlate) = 0.0409291 m
Q_MinSubmergedInjection := Q_orifice(D_LfomOrificePlate, S_Fitting + 2*SocketDepth(ND_RMPipe) - T_LfomOrificePlate + ElbowRadius(ND_ChemPlu), Pi_VCOrifice) = 1.43939 L/s
# AutoCAD References
# AutoCAD drawing programs:
# Translators:
# These are the codes that take MathCAD outputs and create AutoCAD scripts that are used to draw the plant (formerly Basics)
# [reference: MtoATranslators.xmcd]
# The wrapped MtoA translator contains the functions that the user will want to access. These functions will draw pieces with full functionality - specifying the location, dimension, and orientation of the object. Also, it contains layer control and subtraction capabilities for grouped objects.
# [reference: MtoATranslatorsWrapped.xmcd]
# Drawing functions:
# [reference: ChannelF.xmcd]
# [reference: PlumbingF May.xmcd]
# [reference: TankF.xmcd]
# [reference: StairsF.xmcd]
# Chemical Dose Controller For Overhead Tanks
# Origin points
# Tank, Room and Platform Origins
Tank_Origin := [0; 0; 0]*m
W_SquarePipe := 2 cm
Room_Origin := Tank_Origin + [0; 0; H_Wall + T_TankWall]
Origin_UpperPlatform := [Room_Origin[0] - 4*S_Fitting; Room_Origin[1] + S_Fitting; Z_UpperPlatform]
Origin_LowerPlatform := [Origin_UpperPlatform[0]; Origin_UpperPlatform[1]; Z_LowerPlatform]
FlowMeteringTank_Origin := [-S_Fitting; W_ChemPlatform - S_Fitting - W_EtMin; T_MS + T_Et] + Origin_LowerPlatform
ChlorTank_Origin := [
    -2*S_Fitting - OR_Fitting(ND_Inlet) - ElbowRadius(ND_Inlet) + FlowMeteringTank_Origin[0];
    -(S_Fitting + D_ChlorineTank/2) + W_ChemPlatform - 2*MaleAdapterLength(ND_ChemPlu) - BallValveLength(ND_ChemPlu) + 2*BallValveSocket(ND_ChemPlu) + Origin_UpperPlatform[1];
    T_MS + Origin_UpperPlatform[2]
]
# Chlorine Drum Delivery Plumbing
ChlorDeliveryBulkhead_Origin := [ChlorTank_Origin[0]; ChlorTank_Origin[1] + D_ChlorineTank/2; ChlorTank_Origin[2] + B_StockOutlet]
ChlorDeliveryFTA_Origin := ChlorDeliveryBulkhead_Origin + [0; BulkheadThreadLength(ND_ChemPlu); 0]
ChlorDeliveryPreValveMTA_Origin := ChlorDeliveryFTA_Origin + [0; CouplingLength(ND_ChemPlu); 0]
ChlorDeliveryValve_Origin := ChlorDeliveryPreValveMTA_Origin + [0; -SocketDepth(ND_ChemPlu) + MaleAdapterLength(ND_ChemPlu); 0]
ChlorDeliveryPostValveMTA_Origin := ChlorDeliveryValve_Origin + [
    0;
    -2*BallValveSocket(ND_ChemPlu) + BallValveLength(ND_ChemPlu) + MaleAdapterLength(ND_ChemPlu) - SocketDepth(ND_ChemPlu);
    0
]
ChlorDeliveryElbow_Origin := ChlorDeliveryPostValveMTA_Origin + [0; 2*SocketDepth(ND_ChemPlu); 0]
ChlorDeliveryUnion_Origin := ChlorDeliveryElbow_Origin + [0; ElbowRadius(ND_ChemPlu); -ElbowRadius(ND_ChemPlu) - UnionLength(ND_ChemPlu)] = [-0.447631; 0.894685; 4.62398] m
ChlorDeliveryElbowToSedTrap_Origin := ChlorDeliveryUnion_Origin + [
    ElbowRadius(ND_ChemPlu);
    0;
    -SocketDepth(ND_ChemPlu) - ElbowRadius(ND_ChemPlu) - SocketDepth(ND_ChemPlu)
] = [-0.432881; 0.894685; 4.57523] m
ChlorDeliveryAirReleaseTee_Origin := [
    Origin_UpperPlatform[0] - W_SquarePipe/2 - ShortTeeLength(ND_ChemPlu);
    ChlorDeliveryElbowToSedTrap_Origin[1];
    ChlorDeliveryElbowToSedTrap_Origin[2]
] = [-0.22475; 0.894685; 4.57523] m
ChlorAirReleasePipe_Origin := ChlorDeliveryAirReleaseTee_Origin + [ShortTeeLength(ND_ChemPlu); 0; ShortTeeLength(ND_ChemPlu)]
L_ChlorAirRelease := UnionLength(ND_ChemPlu) + 2*SocketDepth(ND_ChemPlu) + ElbowRadius(ND_ChemPlu) + OR_Fitting(ND_ChemPlu)
ChlorAirReleaseValve_Origin := ChlorAirReleasePipe_Origin + [0; 0; L_ChlorAirRelease]
ChlorSedTrapTee_Origin := ChlorDeliveryAirReleaseTee_Origin + [-2*SocketDepth(ND_ChemPlu) - ShortTeeLength(ND_ChemPlu); 0; -ShortTeeLength(ND_ChemPlu)]
L_DeliveryElbowToSedTrap := ChlorSedTrapTee_Origin[0] - ShortTeeLength(ND_ChemPlu) - ChlorDeliveryElbowToSedTrap_Origin[0]
ChlorFlowSwapMTA_Origin := ChlorDeliveryAirReleaseTee_Origin + [ShortTeeLength(ND_ChemPlu); 0; -ShortTeeLength(ND_ChemPlu) - 2*SocketDepth(ND_ChemPlu)]
# this is the valve that will switch from stock flow to cal col flow
ChlorFlowSwapValve_Origin := ChlorFlowSwapMTA_Origin + [0; 0; -MaleAdapterLength(ND_ChemPlu) + SocketDepth(ND_ChemPlu)]
ChlorDeliveryBarb_Origin := ChlorFlowSwapValve_Origin + [0; 0; -BallValveLength(ND_ChemPlu) + 2*BallValveSocket(ND_ChemPlu) - TBarbTLength(ND_ChemPlu)] = [-0.21; 0.894685; 4.46769] m
# Chlorine Drum Delivery to Drain Plumbing | starts with the upper MTA of the sed trap
L_SedTrapPipeWOFittings := BulkheadThreadLength(ND_ChemDrain) - SocketDepth(ND_ChemDrain) - T_ChemTankWall + CouplingLength(ND_ChemDrain) + UnionLength(ND_ChemDrain) + 2*MaleAdapterLength(ND_ChemDrain) + BallValveLength(ND_ChemDrain) - 2*BallValveSocket(ND_ChemDrain) + SocketDepth(ND_ChemDrain) + ShortTeeLength(ND_ChemDrain)
L_SedTrapFittingsSubtract := ChlorTank_Origin[2] - ChlorSedTrapTee_Origin[2] + 2*MaleAdapterLength(ND_ChemDrain) + BallValveLength(ND_ChemDrain) - 2*BallValveSocket(ND_ChemDrain) + ElbowRadius(ND_ChemDrain)
L_SedTrapPipe := L_SedTrapPipeWOFittings - L_SedTrapFittingsSubtract = 0.0870849 m
ChlorSedTrapMTAUp_Origin := ChlorSedTrapTee_Origin + [0; 0; -L_SedTrapPipe]
ChlorSedTrapDrainValve_Origin := ChlorSedTrapMTAUp_Origin + [0; 0; SocketDepth(ND_ChemPlu) - MaleAdapterLength(ND_ChemPlu)]
ChlorSedTrapMTALow_Origin := ChlorSedTrapDrainValve_Origin + [
    0;
    0;
    2*BallValveSocket(ND_ChemPlu) - BallValveLength(ND_ChemPlu) - MaleAdapterLength(ND_ChemPlu) + SocketDepth(ND_ChemPlu)
] = [-0.2735; 0.894685; 4.40495] m
ChlorSedTrapElbowBelowValve_Origin := [0; 0; -2*SocketDepth(ND_ChemPlu)] + ChlorSedTrapMTALow_Origin
ChlorSedTrapElbowtoDrain_Origin := [
    ChlorTank_Origin[0];
    ChlorSedTrapElbowBelowValve_Origin[1] - ElbowRadius(ND_ChemDrain);
    ChlorSedTrapElbowBelowValve_Origin[2] - ElbowRadius(ND_ChemDrain)
]
# Chlorine Drum Drain Plumbing
L_SedTrapToDrainX := ChlorSedTrapElbowBelowValve_Origin[0] - ChlorSedTrapElbowtoDrain_Origin[0] - 2*ElbowRadius(ND_ChemPlu)
ChlorDrainBulkhead_Origin := ChlorTank_Origin + [0; D_ChlorineTank/6; T_ChemTankWall]  # keep this in top view
ChlorDrainFTA_Origin := ChlorDrainBulkhead_Origin + [0; 0; -BulkheadThreadLength(ND_ChemDrain)]
ChlorDrainUnion_Origin := ChlorDrainFTA_Origin + [0; 0; 2*SocketDepth(ND_ChemDrain) - CouplingLength(ND_ChemDrain) - UnionLength(ND_ChemDrain)]
ChlorDrainMTAUp_Origin := ChlorDrainUnion_Origin + [0; 0; -2*SocketDepth(ND_ChemDrain)]
ChlorDrainValve_Origin := ChlorDrainMTAUp_Origin + [0; 0; SocketDepth(ND_ChemDrain) - MaleAdapterLength(ND_ChemDrain)]
ChlorDrainMTALow_Origin := ChlorDrainValve_Origin + [
    0;
    0;
    -BallValveLength(ND_ChemDrain) + 2*BallValveSocket(ND_ChemDrain) - MaleAdapterLength(ND_ChemDrain) + SocketDepth(ND_ChemDrain)
]
ChlorDrainTee_Origin := [0; 0; -2*SocketDepth(ND_ChemDrain)] + ChlorDrainMTALow_Origin
L_SedTrapToDrainY := ChlorSedTrapElbowtoDrain_Origin[1] - ShortTeeLength(ND_ChemPlu) - ChlorDrainTee_Origin[1]
ChlorDrainElbowToEtDrain_Origin := [
    ChlorDrainTee_Origin[0];
    Room_Origin[1] + OR_Fitting(ND_EtDrain) + ElbowRadius(ND_ChemDrain);
    ChlorDrainTee_Origin[2] - ShortTeeLength(ND_ChemDrain)
]
ChlorEtDrainElbow_Origin := [
    ChlorDrainTee_Origin[0];
    -T_TankWall + Tank_Origin[1] - OR_Fitting(ND_EtDrain) + ElbowRadius(ND_EtDrain);
    FlowMeteringTank_Origin[2] - T_Et - CouplingLength(ND_EtDrain) - SocketDepth(ND_EtDrain) - ElbowRadius(ND_EtDrain)
] = [-0.447631; -0.251588; 3.81887] m
ChlorEtDrainTee_Origin := [
    ChlorDrainTee_Origin[0];
    Tank_Origin[1] + OR_Fitting(ND_EtDrain);
    ChlorEtDrainElbow_Origin[2] + ShortTeeLength(ND_EtDrain)
]
L_ChlorDrainToEtDrainY := ChlorDrainTee_Origin[1] - ChlorDrainElbowToEtDrain_Origin[1] - ShortTeeLength(ND_ChemDrain)
ReducerLengthDrain := CouplingLength(ND_EtDrain) - SocketDepth(ND_EtDrain) - SocketDepth(ND_ChemDrain)
ChlorEtDrainReducer_Origin := ChlorEtDrainTee_Origin + [0; 0; 2*SocketDepth(ND_EtDrain)] = [-0.447631; 0.028575; 3.94002] m
L_ChlorDrainToEtDrainZ := ChlorDrainElbowToEtDrain_Origin[2] - ElbowRadius(ND_ChemDrain) - ChlorEtDrainReducer_Origin[2] - ReducerLengthDrain
ChlorRoomDrainTee_Origin := [
    ChlorEtDrainReducer_Origin[0];
    Tank_Origin[1] - OR_Fitting(ND_EtDrain) + ShortTeeLength(ND_EtDrain) - T_TankWall;
    Room_Origin[2]
] = [-0.447631; -0.221425; 3.25] m
ChlorDrainToGround_Origin := ChlorRoomDrainTee_Origin + [0; -ShortTeeLength(ND_EtDrain); -ShortTeeLength(ND_EtDrain)]
L_ChlorLargeDrainVertUp := ChlorSedTrapElbowtoDrain_Origin[2] - ChlorEtDrainElbow_Origin[2] - ShortTeeLength(ND_EtDrain) - ReducerLengthDrain - 2*SocketDepth(ND_EtDrain) = 0.392944 m
L_ChlorLargeDrainVertLow := ChlorEtDrainElbow_Origin[2] - ChlorRoomDrainTee_Origin[2] - ShortTeeLength(ND_EtDrain) - ElbowRadius(ND_EtDrain) = 0.484735 m
L_ChlorLargeDrainLast := H_Wall + 2*T_TankWall
RoomDrainWedge_Origin := [ChlorRoomDrainTee_Origin[0] - OR(ND_EtDrain); Room_Origin[1]; Room_Origin[2]]
RoomDrainWedge_Dim := [7 cm; OD(ND_EtDrain); OR(ND_EtDrain)]
L_RoomDrainPipe := T_TankWall - (ShortTeeLength(ND_EtDrain) - OR_Fitting(ND_EtDrain))
# Storage Tank, Room and Details
TankLyr := layer_new("Tank", grey)
TankBox := Tank(Tank_Origin, [L_Wall; W_Wall; H_Wall], T_TankWall)
TankFrz := FreezeLayer("Tank")
TankScript := stack(TankLyr, TankBox, TankFrz)
RoomLyr := layer_new("Room", grey)
RoomBox := Tank(Room_Origin, [L_Wall; W_Wall; H_RoomTall], T_TankWall)
HatchLedge := BoxF([-(W_ChemPlatform*3/4); W_Wall - 1.05*OD_Fitting(ND_RMPipe) - S_Fitting; H_Wall] + Tank_Origin, [
    -(W_ChemPlatform*3/4) - 71.35 cm;
    W_Wall - 1.05*OD_Fitting(ND_RMPipe) - S_Fitting - S_Walkway;
    H_Wall + T_TankWall + S_Fitting
] + Tank_Origin, [0; 0; 0]*deg)
# make a drain ledge
# 22.75 in dia for 55 gal drum
RoomFrz := FreezeLayer("Room")
HatchLedgeCut := BoxF([-(W_ChemPlatform*3/4) - 10 cm; W_Wall - 1.05*OD_Fitting(ND_RMPipe) - 3*S_Fitting; H_Wall] + Tank_Origin, [
    -(W_ChemPlatform*3/4) - 61.35 cm;
    W_Wall - 1.05*OD_Fitting(ND_RMPipe) - S_Walkway + S_Fitting;
    H_Wall + T_TankWall + S_Fitting
] + Tank_Origin, [0; 0; 0]*deg)
WindowLower := BoxF([-zc - L_Wall - T_TankWall; W_Wall/2 - 0.25*W_Wall; H_RoomShort*0.5] + Room_Origin, [zc - L_Wall; W_Wall/2 + 0.25*W_Wall; H_RoomShort*0.5 + 75 cm] + Room_Origin, [0; 0; 0]*deg)
WindowUpper := BoxF([-zc; W_Wall/2 - 0.25*W_Wall; H_RoomTall*0.60] + Room_Origin, [zc + T_TankWall; W_Wall/2 + 0.25*W_Wall; H_RoomTall*0.60 + 75 cm] + Room_Origin, [0; 0; 0]*deg)
RoomSlope := WedgeF(Room_Origin + [-L_Wall - T_TankWall; W_Wall + T_TankWall; H_RoomTall], Room_Origin + [T_TankWall; -T_TankWall; H_RoomShort], [0; 0; 0]*deg)
SubtractAccessories := SubtractF(["Room"], "DeleteMe")
Room := stack(RoomLyr, RoomBox, HatchLedge, RoomFrz, HatchLedgeCut, WindowLower, WindowUpper, RoomSlope, GroupDelete, SubtractAccessories)
DoorLyr := layer_new("Door", red)
DoorBox := BoxSUBF([-W_ChemPlatform; W_Wall; H_Wall + T_TankWall + 6 cm] + Tank_Origin, [-W_ChemPlatform + 50 cm; T_TankWall + W_Wall; H_Wall + T_TankWall + 6.5 ft] + Tank_Origin, [0; 0; 0]*deg, ["Room"])
DoorFrz := FreezeLayer("Door")
Door := stack(DoorLyr, DoorBox, DoorFrz)
RoofLyr := layer_new("Roof", purple)
AN_Roof := atan((H_RoomTall - H_RoomShort)/(L_Wall + 2*T_TankWall))
L_RoofLong := 2*L_RoofOverhang + (H_RoomTall - H_RoomShort)/sin(AN_Roof)
RoofBox := BoxF(Tank_Origin + [
    T_TankWall + L_RoofOverhang*cos(AN_Roof);
    W_Wall + T_TankWall + L_RoofOverhang;
    H_RoomTall + H_Wall + T_TankWall + L_RoofOverhang*sin(AN_Roof)
], Tank_Origin + [
    T_TankWall + L_RoofOverhang*cos(AN_Roof) - L_RoofLong;
    -T_TankWall - L_RoofOverhang;
    H_RoomTall + H_Wall + T_TankWall + L_RoofOverhang*sin(AN_Roof) + zc
], [0; -AN_Roof; 0])
FrzRoof := FreezeLayer("Roof")
Roof := stack(RoofLyr, RoofBox, FrzRoof)
Facility := stack(Room, Door, Roof)
# Modular Stand
StandLyr := layer_new("Stand", red)
Stand_UpperPlatform := BoxF(Origin_UpperPlatform, Origin_UpperPlatform + [-L_ChemPlatform; W_ChemPlatform; T_MS], [0; 0; 0])
Stand_LowerPlatform := BoxF(Origin_LowerPlatform, Origin_LowerPlatform + [-L_ChemPlatform; W_ChemPlatform; T_MS], [0; 0; 0])
StandBottomRightLeg := BoxF(Origin_UpperPlatform, [Origin_UpperPlatform[0] - W_SquarePipe; Origin_UpperPlatform[1] + W_SquarePipe; Room_Origin[2]], [0; 0; 0])
ArrayStandLeg := ArrayLastGen(2, 2, -(-W_ChemPlatform + W_SquarePipe), -(L_ChemPlatform - W_SquarePipe))
StandFrz := FreezeLayer("Stand")
StandScript := stack(StandLyr, Stand_UpperPlatform, Stand_LowerPlatform, StandBottomRightLeg, ArrayStandLeg, StandFrz)
# Entrance Tank and Details
# Required entrance tank offset ensures that the drop tube does not bump into the stand
FlowMeteringTankLyr := layer_new("FlowMeteringTank", grey)
FlowMeteringTank := Tank(FlowMeteringTank_Origin, [L_EtMin; W_EtMin; H_Et], T_Et)
FlowMeteringTankFrz := FreezeLayer("FlowMeteringTank")
FlowMetering := stack(FlowMeteringTankLyr, FlowMeteringTank, FlowMeteringTankFrz)
LFOMmta_Origin := [
    -S_Fitting - OR_Fitting(ND_RMPipe);
    W_EtMin - (W_EtMin - 2*S_Fitting - OD_Fitting(ND_Transmission))/2;
    0
] + FlowMeteringTank_Origin
LFOMfta_Origin := [LFOMmta_Origin[0]; LFOMmta_Origin[1]; FlowMeteringTank_Origin[2] - T_Et - SocketDepth(ND_RMPipe)] = [-0.3508; 0.71475; 3.90409] m
LFOMTankCoupling_Origin := [LFOMmta_Origin[0]; LFOMmta_Origin[1]; Room_Origin[2] - SocketDepth(ND_RMPipe)]
LFOMBarb_Origin := [LFOMfta_Origin[0] - OR(ND_RMPipe); LFOMfta_Origin[1]; Room_Origin[2] + S_Fitting]
LFOMBarbElbow_Origin := [OR(ND_RMPipe) - IR(ND_RMPipe, PS_Fi) + SocketDepth(ND_ChemPlu); 0; 0] + LFOMBarb_Origin
LFOMFitLyr := layer_new("LFOMFittings", green)
LFOMmta := MaleAdapterSUBF(LFOMmta_Origin, [0; 270]*deg, ND_RMPipe, PS_Fi, ["FlowMeteringTank"])
LFOMfta := CouplingF(LFOMfta_Origin, [0; 270]*deg, ND_RMPipe, PS_Fi)
LFOMCoupling := CouplingSUBF(LFOMTankCoupling_Origin, [0; 270]*deg, ND_RMPipe, PS_Fi, ["Room"])
LFOMBarb := TBarbF(LFOMBarb_Origin, [180; 0; 0]*deg, ND_ChemPlu, D_LargeChlorineTubes, PS_Fi)
LFOMBarbElbow := ElbowF(LFOMBarbElbow_Origin, [270; 0; 90]*deg, ND_ChemPlu, PS_Fi)
LFOMFitLyrFrz := FreezeLayer("LFOMFittings")
LFOMOrificePlateLyr := layer_new("LfomOrificePlate", red)
OrificePlate := CylinderF(LFOMTankCoupling_Origin, OR(ND_RMPipe), T_LfomOrificePlate, [0; 90; 0]*deg)
LFOMOrificePlateFrz := FreezeLayer("LfomOrificePlate")
OrificePlateOrifice := CylinderF(LFOMTankCoupling_Origin, D_LfomOrificePlate/2, T_LfomOrificePlate, [0; 90; 0]*deg)
SubtractOrificePlateOrifice := SubtractF(["LfomOrificePlate"], "DeleteMe")
LfomOrificePlate := stack(LFOMOrificePlateLyr, OrificePlate, LFOMOrificePlateFrz, OrificePlateOrifice, GroupDelete, SubtractOrificePlateOrifice)
LFOMFit := stack(LFOMFitLyr, LFOMmta, LFOMfta, LFOMCoupling, LFOMBarb, LFOMBarbElbow, LFOMFitLyrFrz)
L_LFOMPipe := H_Et - H_Freeboard
L_LFOMtoTank := LFOMfta_Origin[2] - LFOMTankCoupling_Origin[2] - (CouplingLength(ND_RMPipe) - 2*SocketDepth(ND_RMPipe)) - T_LfomOrificePlate
L_LFOMthroughWall := T_TankWall - CouplingLength(ND_RMPipe) + SocketDepth(ND_RMPipe)
LFOMthroughWall_Origin := LFOMTankCoupling_Origin + [0; 0; 2*SocketDepth(ND_RMPipe) - CouplingLength(ND_RMPipe)]
LFOMPipeLyr := layer_new("LFOMPlu", blue)
LFOMPipe := PipeF(LFOMmta_Origin, L_LFOMPipe, [0; 90]*deg, ND_RMPipe, PS_Fi)
LFOMPluFrz := FreezeLayer("LFOMPlu")
# subtracting HL.EtOverflow is like adding freeboard more than anything since it's unlikely that the weir would be draining anything other than very small amounts
LFOMorifices :=
    Local ← stack(LFOMPipeLyr, LFOMPipe, LFOMPluFrz)
    for h ∈ 0 .. last(H_LfomOrifices)
        if N_LfomOrifices[h] ≠ 0
            Local ← stack(Local, CylinderF([
                LFOMmta_Origin[0];
                LFOMmta_Origin[1];
                FlowMeteringTank_Origin[2] + H_Et - H_Freeboard + H_LfomOrifices[h] - HL_Lfom - HL_EtOverflow
            ], D_LfomOrifices/2, OR(ND_RMPipe) + zc, [
                (asin(0.5*S_LfomOrificesMin/OD(ND_RMPipe)) + asin(D_LfomOrifices/OD(ND_RMPipe)))*(mod(h, 2) == 0);
                0 deg
            ]))
        if N_LfomOrifices[h] > 1
            Local ← stack(Local, ArrayLastPolar([
                LFOMmta_Origin[0];
                LFOMmta_Origin[1];
                FlowMeteringTank_Origin[2] + H_Et - H_Freeboard - HL_Lfom - HL_EtOverflow + H_LfomOrifices[h]
            ], N_LfomOrifices[h], (N_LfomOrifices[h] - 1)*(2*asin(D_LfomOrifices/OD(ND_RMPipe)) + 2*asin(S_LfomOrificesMin/OD(ND_RMPipe)))))
    return Local
SubtractLFOMorifices := SubtractF(["LFOMPlu"], "DeleteMe")
LFOMPipeThaw := SelectLayer("LFOMPlu")
LFOMtoTank := PipeF(LFOMTankCoupling_Origin, L_LFOMtoTank, [0; 90]*deg, ND_RMPipe, PS_Fi)
LFOMthroughWall := PipeSUBF(LFOMthroughWall_Origin, L_LFOMthroughWall, [0; 270]*deg, ND_RMPipe, PS_Fi, ["Room"])
LFOMPipes := stack(LFOMorifices, GroupDelete, SubtractLFOMorifices, LFOMPipeThaw, LFOMtoTank, LFOMthroughWall, LFOMPluFrz, LfomOrificePlate)
LFOMPlu := stack(LFOMFit, LFOMPipes)
EtDrainMTA_Origin := [-L_EtMin + S_Fitting + OR(ND_EtDrain); -(S_Fitting + OR(ND_EtDrain)) + W_EtMin; 0] + FlowMeteringTank_Origin
EtDrainFTA_Origin := [
    EtDrainMTA_Origin[0];
    EtDrainMTA_Origin[1];
    FlowMeteringTank_Origin[2] - T_Et - SocketDepth(ND_EtDrain)
]
EtDrainElbow1_Origin := EtDrainFTA_Origin + [0; 0; -CouplingLength(ND_EtDrain)]
EtDrainElbow2_Origin := [
    ChlorTank_Origin[0];
    -ElbowRadius(ND_EtDrain) + EtDrainElbow1_Origin[1];
    -ElbowRadius(ND_EtDrain) + EtDrainElbow1_Origin[2]
]
EtDrainFittingLyr := layer_new("EtDrainFittings", green)
EtDrainMTA := MaleAdapterSUBF(EtDrainMTA_Origin, [0; 270; 0]*deg, ND_EtDrain, PS_Fi, ["FlowMeteringTank"])
EtDrainFTA := CouplingF(EtDrainFTA_Origin, [0; 270; 0]*deg, ND_EtDrain, PS_Fi)
EtDrainElbow1 := ElbowF(EtDrainElbow1_Origin, [180; 0; 90]*deg, ND_EtDrain, PS_Fi)
EtDrainElbow2 := ElbowF(EtDrainElbow2_Origin, [0; 0; 0]*deg, ND_EtDrain, PS_Fi)
EtDrainFitFrz := FreezeLayer("EtDrainFittings")
EtDrainFit := stack(EtDrainFittingLyr, EtDrainMTA, EtDrainFTA, EtDrainElbow1, EtDrainElbow2, EtDrainFitFrz)
EtDrainPipesLyr := layer_new("EtDrainPipes", blue)
L_EtOverflowPipe := H_Et - H_Freeboard - HL_EtOverflow
L_EtXPipe := EtDrainElbow2_Origin[0] - EtDrainElbow1_Origin[0] - 2*ElbowRadius(ND_EtDrain)
EtOverflowPipe := PipeF(EtDrainMTA_Origin, L_EtOverflowPipe, [0; 90; 0]*deg, ND_EtDrain, PS_Fi)
EtXPipe := PipeF(EtDrainElbow2_Origin + [-ElbowRadius(ND_EtDrain); ElbowRadius(ND_EtDrain); 0], L_EtXPipe, [0; 0; 0]*deg, ND_EtDrain, PS_Fi)
EtDrainPipesFrz := FreezeLayer("EtDrainPipes")
EtDrainPipes := stack(EtDrainPipesLyr, EtOverflowPipe, EtXPipe, EtDrainPipesFrz)
EtDrainPlumbing := stack(EtDrainFit, EtDrainPipes)
RawWaterInletCoupling_Origin := [
    Room_Origin[0] + CouplingLength(ND_Transmission) - SocketDepth(ND_Transmission);
    FlowMeteringTank_Origin[1] + S_Fitting + OR_Fitting(ND_Transmission);
    FlowMeteringTank_Origin[2] + H_Et + S_Fitting + OR_Fitting(ND_Transmission)
]
RawWaterInletElbow_Origin := [
    FlowMeteringTank_Origin[0] - S_Fitting - OR_Fitting(ND_Transmission) + ElbowRadius(ND_Transmission);
    RawWaterInletCoupling_Origin[1];
    RawWaterInletCoupling_Origin[2]
]
RawWaterInletNipple_Origin := [SocketDepth(ND_Transmission) - CouplingLength(ND_Transmission); 0; 0] + RawWaterInletCoupling_Origin
RawWaterInletPipeVert_Origin := [-ElbowRadius(ND_Transmission); 0; -ElbowRadius(ND_Transmission)] + RawWaterInletElbow_Origin
L_RawWaterInletNipple := RawWaterInletNipple_Origin[0] - RawWaterInletElbow_Origin[0]
RawWaterInletFitLyr := layer_new("RawWaterInletFitPlu", green)
RawWaterInletCoupling := CouplingSUBF(RawWaterInletCoupling_Origin, [0; 0]*deg, ND_Transmission, PS_Fi, ["Room"])
RawWaterInletElbow := ElbowF(RawWaterInletElbow_Origin, [90; 0; 90]*deg, ND_Transmission, PS_Fi)
RawWaterInletFitFrz := FreezeLayer("RawWaterInletFitPlu")
RawWaterInletFit := stack(RawWaterInletFitLyr, RawWaterInletCoupling, RawWaterInletElbow, RawWaterInletFitFrz)
RawWaterInletPipeLyr := layer_new("RawWaterInletPlu", blue)
L_RawWaterInletPipe := T_TankWall*2
L_RawWaterInletPipeVert := RawWaterInletElbow_Origin[2] - FlowMeteringTank_Origin[2] - ElbowRadius(ND_Inlet) - S_Fitting - SocketDepth(ND_Inlet) = 0.18444 m
RawWaterInletPipe := PipeSUBF(RawWaterInletCoupling_Origin + [L_RawWaterInletPipe; 0; 0], L_RawWaterInletPipe, [0; 0]*deg, ND_Transmission, PS_Fi, ["Room"])
RawWaterInletNipple := PipeF(RawWaterInletNipple_Origin, L_RawWaterInletNipple, [0; 0]*deg, ND_Transmission, PS_Fi)
RawWaterInletVert := PipeF(RawWaterInletPipeVert_Origin, L_RawWaterInletPipeVert, [0; 270]*deg, ND_Transmission, PS_Fi)
RawWaterInletPipeFrz := FreezeLayer("RawWaterInletPlu")
RawWaterInletPipes := stack(RawWaterInletPipeLyr, RawWaterInletPipe, RawWaterInletNipple, RawWaterInletVert, RawWaterInletPipeFrz)
RawWaterInlet := stack(RawWaterInletFit, RawWaterInletPipes)
EntranceDetails := stack(FlowMetering, RawWaterInlet, LFOMPlu, EtDrainPlumbing)
# Chemical Tank
# Constant Head Tank and calibration column
ND_CHT := 3 in
H_CHTFreeboard := 2 cm
H_InletToOutlet := 6 cm
L_CHTClearPipe := H_InletToOutlet + S_Fitting + H_CHTFreeboard = 0.13 m
L_CHTSlider := L_CHTClearPipe*2.2
L_CalColPipe := H_ChlorCalCol + SocketDepth(ND_ChlorCalCol) + CapHeight(ND_ChlorCalCol)
CHTPipe_Origin := [
    Origin_LowerPlatform[0] - W_SquarePipe/2;
    Origin_LowerPlatform[1] + W_ChemPlatform + OR_Fitting(ND_CHT) + 2*OR(ND_ChemPlu);
    Z_LeverArmFulcrum + H_CHTFreeboard
]
CHTInletBulkhead_Origin := CHTPipe_Origin + [IR(ND_CHT, PS_Fi); 0; -H_CHTFreeboard]
CalColThreadedTee_Origin := CHTInletBulkhead_Origin + [BulkheadThreadLength(ND_ChemPlu); 0; 0]
CalColMTALow_Origin := CalColThreadedTee_Origin + [ShortTeeLength(ND_ChemPlu); 0; ShortTeeLength(ND_ChemPlu) + 2*SocketDepth(ND_ChemPlu)]
CalColValve_Origin := CalColMTALow_Origin + [0; 0; -SocketDepth(ND_ChemPlu) + MaleAdapterLength(ND_ChemPlu)]
CalColMTAUp_Origin := CalColValve_Origin + [
    0;
    0;
    BallValveLength(ND_ChemPlu) - 2*BallValveSocket(ND_ChemPlu) + MaleAdapterLength(ND_ChemPlu) - SocketDepth(ND_ChemPlu)
]
CalColReducer_Origin := CalColMTAUp_Origin + [0; 0; 2*SocketDepth(ND_ChemPlu)] = [-0.132784; 0.931736; 4.38276] m
CalColCap_Origin := CalColReducer_Origin + [0; 0; L_CalColPipe + SocketDepth(ND_ChlorCalCol)]  # socket depth here is the length of the reducer minus the sockets
CalColFTA_Origin := CalColThreadedTee_Origin + [ShortTeeLength(ND_ChemPlu); 0; -ShortTeeLength(ND_ChemPlu) - 2*SocketDepth(ND_ChemPlu)]
CalColBarb_Origin := CalColFTA_Origin + [0; 0; SocketDepth(ND_ChemPlu) - CouplingLength(ND_ChemPlu)]
CHTFloatValve_Origin := CHTPipe_Origin + [IR(ND_CHT, PS_Fi); 0; -H_CHTFreeboard]
CHTOutletBarb_Origin := CHTPipe_Origin + [-OR(ND_CHT); 0; -H_InletToOutlet]
CHTSlider_Origin := [0; -OR(ND_ChemPlu) - OR_Fitting(ND_CHT); -0.5*L_CHTClearPipe + 0.5*L_CHTSlider] + CHTPipe_Origin
CHTCap_Origin := [0; 0; -L_CHTClearPipe] + CHTPipe_Origin
CHTfta_Origin := CHTCap_Origin + [0; 0; -BulkheadThreadLength(ND_ChemPlu)]
CHTmta_Origin := CHTfta_Origin + [0; 0; -CouplingLength(ND_ChemPlu)]
CHTDrainValve_Origin := CHTmta_Origin + [
    0;
    0;
    -(MaleAdapterLength(ND_ChemPlu) - SocketDepth(ND_ChemPlu)) - BallValveLength(ND_ChemPlu) + 2*BallValveSocket(ND_ChemPlu)
]
CalColPipeLyr := layer_new("ChlorCalCol", blue)
CalColPipe := PipeF(CalColCap_Origin, L_CalColPipe, [0; 270; 0]*deg, ND_ChlorCalCol, PS_Fi)
CalColPipeFrz := FreezeLayer("ChlorCalCol")
CalColPipeScript := stack(CalColPipeLyr, CalColPipe, CalColPipeFrz)
CHTClearPipeLyr := layer_new("CHTClearPipe", blue)
CHTClearPipe := PipeF(CHTPipe_Origin, L_CHTClearPipe, [0; 270; 0]*deg, ND_CHT, PS_Fi)
CHTClearPipeFrz := FreezeLayer("CHTClearPipe")
CHTSliderLyr := layer_new("CHTSlider", blue)
CHTSlider := PipeF(CHTSlider_Origin, L_CHTSlider, [0; 270; 0]*deg, ND_ChemPlu, PS_Fi)
CHTSliderFrz := FreezeLayer("CHTSlider")
CHTCapLyr := layer_new("CHTCap", green)
CHTCap := CapF(CHTCap_Origin, [0; 90; 0]*deg, ND_CHT)
CHTCapFrz := FreezeLayer("CHTCap")
# need to look from back to insert bulkhead
CHTFittingsLyr := layer_new("CHTFittings", green)
CHTInletBulkhead := InsertDwg(BulkheadDwg, CHTInletBulkhead_Origin, ND_ChemPlu, 0 deg)
CHTFloatValveInsert := InsertDwg(FloatValveDwg, CHTFloatValve_Origin, ND_ChemPlu, 0 deg)
CalColThreadedTee := TeeF(CalColThreadedTee_Origin, [90; 0; 90]*deg, ND_ChemPlu, PS_Fi)
CalColFTA := CouplingF(CalColFTA_Origin, [0; 270; 0]*deg, ND_ChemPlu, PS_Fi)
CalColBarb := TBarbF(CalColBarb_Origin, [0; 90; 0]*deg, D_LargeChlorineTubes, D_LargeChlorineTubes, PS_Fi)
CalColMTALow := MaleAdapterF(CalColMTALow_Origin, [0; 90; 0]*deg, ND_ChemPlu, PS_Fi)
CalColMTAUp := MaleAdapterF(CalColMTAUp_Origin, [0; 270; 0]*deg, ND_ChemPlu, PS_Fi)
CalColReducer := reducerF(CalColReducer_Origin, [0; 90; 0]*deg, ND_ChemPlu, ND_ChlorCalCol, SocketDepth(ND_ChlorCalCol), PS_Fi)
CalColCap := CapF(CalColCap_Origin, [0; 270; 0]*deg, ND_ChlorCalCol)
CHTOutletBarb := TBarbF(CHTOutletBarb_Origin, [180; 0; 0]*deg, D_LargeChlorineTubes, D_LargeChlorineTubes, PS_Fi)
CHTDrainFTA := CouplingF(CHTfta_Origin, [0; 270; 0]*deg, ND_ChemPlu, PS_Fi)
CHTDrainMTA := MaleAdapterF(CHTmta_Origin, [0; 270; 0]*deg, ND_ChemPlu, PS_Fi)
CHTDrainBulkhead := InsertDwg(BulkheadDwg, [-CHTCap_Origin[0]; CHTCap_Origin[2]; CHTCap_Origin[1]], ND_ChemPlu, 270 deg)
CHTDrainValve := InsertDwg(BallValveDwg, [-CHTDrainValve_Origin[0]; CHTDrainValve_Origin[2]; CHTDrainValve_Origin[1]], ND_ChemPlu, 270 deg)
CalColValve := InsertDwg(BallValveDwg, [-CalColValve_Origin[0]; CalColValve_Origin[2]; CalColValve_Origin[1]], ND_ChemPlu, 270 deg)
CHTFittingsFrz := FreezeLayer("CHTFittings")
CHTScript := stack(CalColPipeScript, CHTClearPipeLyr, CHTClearPipe, CHTClearPipeFrz, CHTCapLyr, CHTCap, CHTCapFrz, CHTSliderLyr, CHTSlider, CHTSliderFrz, CHTFittingsLyr, CHTInletBulkhead, CalColThreadedTee, CalColFTA, CalColBarb, CalColMTALow, CalColMTAUp, CalColReducer, CalColCap, CHTFloatValveInsert, CHTDrainFTA, CHTDrainMTA, CHTOutletBarb, view("ba"), CHTDrainBulkhead, CHTDrainValve, CalColValve, view("t"), CHTFittingsFrz)
# Chlorine Drum
ChemTankLyr := layer_new("ChemicalTank", yellow)
ChlorTank := CylinderF(ChlorTank_Origin, 0.5*D_ChlorineTank + T_ChemTankWall, H_ChlorineTank + T_ChemTankWall, [0; 90]*deg)
ChemTankFrz := FreezeLayer("ChemicalTank")
ChlorineTankInner := CylinderF(ChlorTank_Origin + [0; 0; T_ChemTankWall], D_ChlorineTank/2, H_ChlorineTank, [0; 90]*deg)
HollowTanks := SubtractF(["ChemicalTank"], "DeleteMe")
ChemTanksScript := stack(ChemTankLyr, ChlorTank, ChemTankFrz, ChlorineTankInner, GroupDelete, HollowTanks)
# Draw the chlorine tank and drain plumbing
# all half inch fittings in this layer
LayerChlorPieces := layer_new("ChlorDrumFittingsPlu", green)
ChlorDeliveryBulkheadFitting := InsertDwg(BulkheadDwg, ChlorDeliveryBulkhead_Origin, ND_ChemPlu, 90 deg)
ChlorDeliveryFTA := CouplingF(ChlorDeliveryFTA_Origin, [270; 0; 0]*deg, ND_ChemPlu, PS_Fi)
ChlorDeliveryPreValveMTA := MaleAdapterF(ChlorDeliveryPreValveMTA_Origin, [270; 0; 0]*deg, ND_ChemPlu, PS_Fi)
ChlorDeliveryValve := InsertDwg(BallValveDwg, ChlorDeliveryValve_Origin, ND_ChemPlu, 270 deg)
ChlorDeliveryPostValveMTA := MaleAdapterF(ChlorDeliveryPostValveMTA_Origin, [90; 0; 0]*deg, ND_ChemPlu, PS_Fi)
ChlorDeliveryElbow := ElbowF(ChlorDeliveryElbow_Origin, [0; 270; 0]*deg, ND_ChemPlu, PS_Fi)
ChlorDeliveryUnion := UnionF(ChlorDeliveryUnion_Origin, [0; 90; 0]*deg, ND_ChemPlu, PS_Fi)
ChlorDeliveryElbowToSedTrap := ElbowF(ChlorDeliveryElbowToSedTrap_Origin, [90; 0; 270]*deg, ND_ChemPlu, PS_Fi)
ChlorDeliveryAirReleaseTee := TeeF(ChlorDeliveryAirReleaseTee_Origin, [90; 0; 90]*deg, ND_ChemPlu, PS_Fi)
ChlorSedTrapTee := TeeF(ChlorSedTrapTee_Origin, [0; 0; 270]*deg, ND_ChemPlu, PS_Fi)
ChlorFlowSwapMTA := MaleAdapterF(ChlorFlowSwapMTA_Origin, [0; 270]*deg, ND_ChemPlu, PS_Fi)
ChlorFlowSwapValve := InsertDwg(BallValveDwg, [-ChlorFlowSwapValve_Origin[0]; ChlorFlowSwapValve_Origin[2]; ChlorFlowSwapValve_Origin[1]], ND_ChemPlu, 90 deg)
ChlorDeliveryBarb := TBarbF(ChlorDeliveryBarb_Origin, [0; 90; 0]*deg, ND_ChemPlu, D_LargeChlorineTubes, PS_Fi)
ChlorAirReleaseValve := InsertDwg(BallValveDwg, [-ChlorAirReleaseValve_Origin[0]; ChlorAirReleaseValve_Origin[2]; ChlorAirReleaseValve_Origin[1]], ND_ChemPlu, 270 deg)
ChlorSedTrapMTAUp := MaleAdapterF(ChlorSedTrapMTAUp_Origin, [0; 270; 0]*deg, ND_ChemPlu, PS_Fi)
ChlorSedTrapDrainValve := InsertDwg(BallValveDwg, [
    -ChlorSedTrapDrainValve_Origin[0];
    ChlorSedTrapDrainValve_Origin[2];
    ChlorSedTrapDrainValve_Origin[1]
], ND_ChemPlu, 90 deg)
ChlorSedTrapMTALow := MaleAdapterF(ChlorSedTrapMTALow_Origin, [0; 90; 0]*deg, ND_ChemPlu, PS_Fi)
ChlorSedTrapElbowToDrain := ElbowF(ChlorSedTrapElbowtoDrain_Origin, [0; 180; 0]*deg, ND_ChemPlu, PS_Fi)
ChlorSedTrapElbowBelowValve := ElbowF(ChlorSedTrapElbowBelowValve_Origin, [0; 0; 270]*deg, ND_ChemPlu, PS_Fi)
LayerChlorPiecesFrz := FreezeLayer("ChlorDrumFittingsPlu")
ChlorDeliveryFittings := stack(LayerChlorPieces, ChlorDeliveryBulkheadFitting, ChlorDeliveryFTA, ChlorDeliveryPreValveMTA, ChlorDeliveryValve, ChlorDeliveryPostValveMTA, ChlorDeliveryElbow, ChlorDeliveryUnion, ChlorDeliveryElbowToSedTrap, ChlorDeliveryAirReleaseTee, ChlorSedTrapTee, ChlorFlowSwapMTA, ChlorDeliveryBarb, view("ba"), ChlorSedTrapDrainValve, ChlorAirReleaseValve, ChlorFlowSwapValve, view("t"), ChlorSedTrapMTAUp, ChlorSedTrapMTALow, ChlorSedTrapElbowToDrain, ChlorSedTrapElbowBelowValve, LayerChlorPiecesFrz)
ChlorDrainReducerLyr := layer_new("ChlorineDrainReducer", green)
ChlorDrainReducerDraw := reducerF(ChlorEtDrainReducer_Origin, [0; 90; 0]*deg, ND_EtDrain, ND_ChemDrain, ReducerLengthDrain, PS_Fi)
ChlorDrainReducerFrz := FreezeLayer("ChlorineDrainReducer")
ChlorDrainReducer := stack(ChlorDrainReducerLyr, ChlorDrainReducerDraw, ChlorDrainReducerFrz)
# reducer and 1.5" fittings in this layer
ChlorDrainFittingsLayer := layer_new("ChlorDrumDrainFittings", green)
ChlorDrainBulkhead := InsertDwg(BulkheadDwg, [ChlorDrainBulkhead_Origin[0]; ChlorDrainBulkhead_Origin[2]; (-ChlorDrainBulkhead_Origin)[1]], ND_ChemDrain, 270 deg)
# switch this to front view
ChlorDrainFTA := CouplingF(ChlorDrainFTA_Origin, [0; 270]*deg, ND_ChemDrain, PS_Fi)
ChlorDrainMTAUp := MaleAdapterF(ChlorDrainMTAUp_Origin, [0; 270]*deg, ND_ChemDrain, PS_Fi)
ChlorDrainValve := InsertDwg(BallValveDwg, [-ChlorDrainValve_Origin[0]; ChlorDrainValve_Origin[2]; ChlorDrainValve_Origin[1]], ND_ChemPlu, 90 deg)
ChlorDrainMTALow := MaleAdapterF(ChlorDrainMTALow_Origin, [0; 90]*deg, ND_ChemDrain, PS_Fi)
ChlorDrainUnion := UnionF(ChlorDrainUnion_Origin, [0; 90]*deg, ND_ChemDrain, PS_Fi)
ChlorDrainTee := TeeF(ChlorDrainTee_Origin, [90; 90; 0]*deg, ND_ChemDrain, PS_Fi)
ChlorDrainElbowToEtDrain := ElbowF(ChlorDrainElbowToEtDrain_Origin, [180; 90; 0]*deg, ND_ChemDrain, PS_Fi)
ChlorEtDrainElbow := ElbowSUBF(ChlorEtDrainElbow_Origin, [180; 90; 0]*deg, ND_EtDrain, PS_Fi, ["Room"])
ChlorEtDrainTee := TeeSUBF(ChlorEtDrainTee_Origin, [90; 90; 0]*deg, ND_EtDrain, PS_Fi, ["Room"])
ChlorRoomDrainTee := TeeSUBF(ChlorRoomDrainTee_Origin, [0; 90; 0]*deg, ND_EtDrain, PS_Fi, ["Room"])
ChlorDrainFittingsFrz := FreezeLayer("ChlorDrumDrainFittings")
ChlorDrainFittings := stack(ChlorDrainReducer, ChlorDrainFittingsLayer, view("f"), ChlorDrainBulkhead, view("ba"), ChlorDrainValve, view("t"), ChlorDrainFTA, ChlorDrainMTAUp, ChlorDrainMTALow, ChlorDrainUnion, ChlorDrainTee, ChlorDrainElbowToEtDrain, ChlorEtDrainElbow, ChlorEtDrainTee, ChlorRoomDrainTee, ChlorDrainFittingsFrz)
LayerChlorPiping := layer_new("ChlorPipingPlu", blue)  # includes all piping (both 0.5" and 1.5")
ChlorAirReleasePipe := PipeF(ChlorAirReleasePipe_Origin, L_ChlorAirRelease, [0; 90]*deg, ND_ChemPlu, PS_Fi)
ChlorDeliveryElbowToSedTrapPipe := PipeF(ChlorSedTrapTee_Origin + [-ShortTeeLength(ND_ChemPlu); 0; ShortTeeLength(ND_ChemPlu)], L_DeliveryElbowToSedTrap, [0; 0]*deg, ND_ChemPlu, PS_Fi)
ChlorSedTrapPipe := PipeF(ChlorSedTrapTee_Origin, L_SedTrapPipe, [0; 270]*deg, ND_ChemPlu, PS_Fi)
ChlorSedTrapXPipe := PipeF(ChlorSedTrapElbowBelowValve_Origin + [-ElbowRadius(ND_ChemPlu); 0; -ElbowRadius(ND_ChemPlu)], L_SedTrapToDrainX, [0; 0]*deg, ND_ChemPlu, PS_Fi)
ChlorSedTrapToDrainYPipe := PipeF(ChlorDrainTee_Origin + [0; ShortTeeLength(ND_ChemDrain); -ShortTeeLength(ND_ChemDrain)], L_SedTrapToDrainY, [270; 0]*deg, ND_ChemPlu, PS_Fi)
ChlorDrainToEtDrainPipeY := PipeF(ChlorDrainElbowToEtDrain_Origin, L_ChlorDrainToEtDrainY, [270; 0; 0]*deg, ND_ChemDrain, PS_Fi)
ChlorDrainToEtDrainPipeZ := PipeF(ChlorEtDrainReducer_Origin + [0; 0; ReducerLengthDrain], L_ChlorDrainToEtDrainZ, [0; 90; 0]*deg, ND_ChemDrain, PS_Fi)
ChlorEtDrainElbowToRoomDrain := PipeF(ChlorEtDrainElbow_Origin + [0; -ElbowRadius(ND_EtDrain); -ElbowRadius(ND_EtDrain)], L_ChlorLargeDrainVertLow, [0; 270]*deg, ND_EtDrain, PS_Fi)
ChlorRoomDrain := PipeSUBF(ChlorRoomDrainTee_Origin, L_RoomDrainPipe, [270; 90]*deg, ND_EtDrain, PS_Fi, ["Room"])
ChlorDrainToGround := PipeF(ChlorDrainToGround_Origin, L_ChlorLargeDrainLast, [0; 270]*deg, ND_EtDrain, PS_Fi)
L_EtDrainThroughWall := ChlorEtDrainTee_Origin[1] - ChlorEtDrainElbow_Origin[1] - ShortTeeLength(ND_EtDrain) = 0.223013 m
EtDrainThroughWall := PipeSUBF(ChlorEtDrainElbow_Origin, L_EtDrainThroughWall, [270; 0]*deg, ND_EtDrain, PS_Fi, ["Room"])
L_EtDrainPipeY := EtDrainElbow2_Origin[1] - ChlorEtDrainTee_Origin[1] - ShortTeeLength(ND_EtDrain) = 0.622757 m
EtDrainYPipe := PipeF(EtDrainElbow2_Origin, L_EtDrainPipeY, [90; 0]*deg, ND_EtDrain, PS_Fi)
LayerChlorPipingFrz := FreezeLayer("ChlorPipingPlu")
ChlorDeliveryPlu := stack(LayerChlorPiping, ChlorAirReleasePipe, ChlorDeliveryElbowToSedTrapPipe, ChlorSedTrapPipe, ChlorSedTrapXPipe, ChlorSedTrapToDrainYPipe, ChlorDrainToEtDrainPipeY, ChlorDrainToEtDrainPipeZ, ChlorEtDrainElbowToRoomDrain, ChlorRoomDrain, ChlorDrainToGround, EtDrainThroughWall, EtDrainYPipe, LayerChlorPipingFrz)
RoomDrainWedge := WedgeF(RoomDrainWedge_Origin, RoomDrainWedge_Origin + RoomDrainWedge_Dim, [90; 180; 0]*deg)
SubtractWedge := SubtractF(["Room"], "DeleteMe")
ChlorPlu := stack(ChlorDeliveryFittings, ChlorDrainFittings, ChlorDeliveryPlu, RoomDrainWedge, GroupDelete, SubtractWedge)
# Design Tube Plumbing
CdcInletTee_Origin := [
    -ShortTeeLength(ND_ChemPlu) - W_SquarePipe/2 + Origin_LowerPlatform[0];
    W_ChemPlatform + OR_Fitting(ND_ChemPlu) + Origin_LowerPlatform[1];
    Z_LowerPlatform + W_SquarePipe/2
]
CdcInletAirReleaseMTA_Origin := CdcInletTee_Origin + [ShortTeeLength(ND_ChemPlu); 0; ShortTeeLength(ND_ChemPlu) + 2*SocketDepth(ND_ChemPlu)]
CdcInletAirReleaseValve_Origin := CdcInletAirReleaseMTA_Origin + [0; 0; MaleAdapterLength(ND_ChemPlu) - SocketDepth(ND_ChemPlu)]
CdcInletBarb_Origin := CdcInletTee_Origin + [-SocketDepth(ND_ChemPlu); 0; 0]
CdcInletMTAup_Origin := [
    CdcInletAirReleaseMTA_Origin[0];
    CdcInletAirReleaseMTA_Origin[1];
    CdcInletTee_Origin[2] - ShortTeeLength(ND_ChemPlu) - 2*SocketDepth(ND_ChemPlu)
]
CdcInletValve_Origin := CdcInletMTAup_Origin + [0; 0; -MaleAdapterLength(ND_ChemPlu) + SocketDepth(ND_ChemPlu)]
CdcInletMTAlow_Origin := CdcInletValve_Origin + [
    0;
    0;
    -BallValveLength(ND_ChemPlu) + 2*BallValveSocket(ND_ChemPlu) - MaleAdapterLength(ND_ChemPlu) + SocketDepth(ND_ChemPlu)
]
L_ChlorineTube = 0.5 m
L_BarbUncovered := 0.25*TBarbBLength(D_ChlorineTube) + (TBarbLength(ND_ChemPlu, D_ChlorineTube) - TBarbBLength(D_ChlorineTube) - TBarbTLength(ND_ChemPlu)) = 0.572263 cm
L_ChlorineTubeFinal := L_ChlorineTube - 2*L_BarbUncovered = 0.488555 m
L_CdcPlumbingTeeToWyeVert := ShortTeeLength(ND_ChemPlu) + 2*SocketDepth(ND_ChemPlu) + sin(45 deg)*(ElbowRadius(ND_ChemPlu) + DiagWyeLength(ND_ChemPlu) + 2*SocketDepth(ND_ChemPlu) + 2*CouplingLength(ND_ChemPlu) + 2*L_BarbUncovered + L_ChlorineTubeFinal)
L_CdcPlumbingVertPipe := L_CdcPlumbingTeeToWyeVert - ShortTeeLength(ND_ChemPlu) - 4*MaleAdapterLength(ND_ChemPlu) - 2*BallValveLength(ND_ChemPlu) + 4*BallValveSocket(ND_ChemPlu) - TeeLength(ND_ChemPlu) + OR(ND_ChemPlu)/sqrt(2)
CdcWye_Origin := [
    CdcInletMTAlow_Origin[0] - DiagWyeLength(ND_ChemPlu)*sin(45 deg);
    CdcInletMTAlow_Origin[1];
    CdcInletTee_Origin[2] - L_CdcPlumbingTeeToWyeVert + DiagWyeLength(ND_ChemPlu)*sin(45 deg)
] = [-0.231328; 0.873491; 3.45309] m
CdcFTAlow_Origin := CdcWye_Origin + [-2*SocketDepth(ND_ChemPlu)*sin(45 deg); 0; 2*SocketDepth(ND_ChemPlu)*sin(45 deg)]
CdcWyeTrapMTAlow_Origin := [
    CdcInletMTAlow_Origin[0];
    CdcInletMTAlow_Origin[1];
    CdcWye_Origin[2] - sin(45 deg)*DiagWyeLength(ND_ChemPlu) + LongWyeLength(ND_ChemPlu) - OR(ND_ChemPlu)/sqrt(2) + 2*SocketDepth(ND_ChemPlu)
]
CdcWyeTrapValve_Origin := CdcWyeTrapMTAlow_Origin + [0; 0; MaleAdapterLength(ND_ChemPlu) - SocketDepth(ND_ChemPlu)]
CdcWyeTrapMTAup_Origin := CdcWyeTrapValve_Origin + [
    0;
    0;
    BallValveLength(ND_ChemPlu) - 2*BallValveSocket(ND_ChemPlu) + MaleAdapterLength(ND_ChemPlu) - SocketDepth(ND_ChemPlu)
]
CdcDrainMTA_Origin := [0; 0; -4*SocketDepth(ND_ChemPlu) - TeeLength(ND_ChemPlu)] + CdcWyeTrapMTAlow_Origin
CdcDrainValve_Origin := CdcDrainMTA_Origin + [0; 0; SocketDepth(ND_ChemPlu) - MaleAdapterLength(ND_ChemPlu)]
CdcDesignBarbLow_Origin := CdcFTAlow_Origin + [
    -(CouplingLength(ND_ChemPlu) - SocketDepth(ND_ChemPlu))*sin(45 deg);
    0;
    (CouplingLength(ND_ChemPlu) - SocketDepth(ND_ChemPlu))*sin(45 deg)
]
CdcDesignTube_Origin := CdcDesignBarbLow_Origin + [-L_BarbUncovered*sin(45 deg); 0; L_BarbUncovered*sin(45 deg)]
CdcDesignBarbUp_Origin := CdcDesignTube_Origin + [
    -sin(45 deg)*(L_BarbUncovered + L_ChlorineTubeFinal);
    0;
    sin(45 deg)*(L_BarbUncovered + L_ChlorineTubeFinal)
]
CdcFTAup_Origin := CdcDesignBarbUp_Origin + [-(SocketDepth(ND_ChemPlu)*sin(45 deg)); 0; SocketDepth(ND_ChemPlu)*sin(45 deg)] = [-0.642039; 0.873491; 3.8638] m
CdcEl45_Origin := CdcFTAup_Origin + [
    -CouplingLength(ND_ChemPlu)*sin(45 deg) - ElbowRadius(ND_ChemPlu) + ElbowRadius(ND_ChemPlu)*sin(45 deg);
    0;
    (ElbowRadius(ND_ChemPlu) + CouplingLength(ND_ChemPlu))*sin(45 deg)
]
CdcOutletTee_Origin := CdcEl45_Origin + [-ShortTeeLength(ND_ChemPlu); 0; 2*SocketDepth(ND_ChemPlu) + ShortTeeLength(ND_ChemPlu)]
CdcOutletElbow_Origin := [
    Origin_LowerPlatform[0] - L_ChemPlatform + W_SquarePipe/2 + ElbowRadius(ND_ChemPlu);
    CdcOutletTee_Origin[1];
    CdcOutletTee_Origin[2]
]
CdcOutletBarb_Origin := CdcOutletElbow_Origin + [-ElbowRadius(ND_ChemPlu); 0; ElbowRadius(ND_ChemPlu) + SocketDepth(ND_ChemPlu)]
CdcOutletAirReleaseMTA_Origin := CdcEl45_Origin + [0; 0; 4*SocketDepth(ND_ChemPlu) + TeeLength(ND_ChemPlu)] = [-0.679474; 0.873491; 4.00484] m
CdcOutletAirReleaseValve_Origin := CdcOutletAirReleaseMTA_Origin + [0; 0; MaleAdapterLength(ND_ChemPlu) - SocketDepth(ND_ChemPlu)]
ChlorManifoldLayer := layer_new("ChlorControlFittings", green)
CdcInletTee := TeeF(CdcInletTee_Origin, [90; 0; 90]*deg, ND_ChemPlu, PS_Fi)
CdcInletAirReleaseMTA := MaleAdapterF(CdcInletAirReleaseMTA_Origin, [0; 90; 0]*deg, ND_ChemPlu, PS_Fi)
CdcInletBarb := TBarbF(CdcInletBarb_Origin, [180; 0; 0]*deg, ND_ChemPlu, D_LargeChlorineTubes, PS_Fi)
CdcInletMTAup := MaleAdapterF(CdcInletMTAup_Origin, [0; 270; 0]*deg, ND_ChemPlu, PS_Fi)
CdcInletMTAlow := MaleAdapterF(CdcInletMTAlow_Origin, [0; 90; 0]*deg, ND_ChemPlu, PS_Fi)
CdcWye := WyeF(CdcWye_Origin, [90; 0; 270]*deg, ND_ChemPlu, PS_Fi)
CdcFTAlow := CouplingF(CdcFTAlow_Origin, [0; 45; 0]*deg, ND_ChemPlu, PS_Fi)
CdcWyeTrapMTAlow := MaleAdapterF(CdcWyeTrapMTAlow_Origin, [0; 90; 0]*deg, ND_ChemPlu, PS_Fi)
CdcWyeTrapMTAup := MaleAdapterF(CdcWyeTrapMTAup_Origin, [0; 270; 0]*deg, ND_ChemPlu, PS_Fi)
CdcDrainMTA := MaleAdapterF(CdcDrainMTA_Origin, [0; 270; 0]*deg, ND_ChemPlu, PS_Fi)
CdcDesignBarbLow := TBarbF(CdcDesignBarbLow_Origin, [0; 225; 0]*deg, ND_ChemPlu, D_ChlorineTube, PS_Fi)
CdcDesignBarbUp := TBarbF(CdcDesignBarbUp_Origin, [0; 45; 0]*deg, ND_ChemPlu, D_ChlorineTube, PS_Fi)
CdcFTAup := CouplingF(CdcFTAup_Origin, [0; 45; 0]*deg, ND_ChemPlu, PS_Fi)
CdcEl45 := Elbow45F(CdcEl45_Origin, [180; 0; 90]*deg, ND_ChemPlu, PS_Fi)
CdcOutletTee := TeeF(CdcOutletTee_Origin, [90; 0; 90]*deg, ND_ChemPlu, PS_Fi)
CdcOutletElbow := ElbowF(CdcOutletElbow_Origin, [90; 0; 270]*deg, ND_ChemPlu, PS_Fi)
CdcOutletAirReleaseMTA := MaleAdapterF(CdcOutletAirReleaseMTA_Origin, [0; 90; 0]*deg, ND_ChemPlu, PS_Fi)
CdcOutletBarb := TBarbF(CdcOutletBarb_Origin, [0; 270; 0]*deg, ND_ChemPlu, D_LargeChlorineTubes, PS_Fi)
ChlorControlFittings := stack(ChlorManifoldLayer, CdcInletTee, CdcInletAirReleaseMTA, CdcInletBarb, CdcInletMTAup, CdcInletBarb, CdcInletMTAup, CdcInletMTAlow, CdcWye, CdcFTAlow, CdcWyeTrapMTAlow, CdcWyeTrapMTAup, CdcDrainMTA, CdcDesignBarbLow, CdcDesignBarbUp, CdcFTAup, CdcEl45, CdcOutletTee, CdcOutletElbow, CdcOutletAirReleaseMTA, CdcOutletBarb)
# draw all ball valves looking from the back
CdcInletAirReleaseValve := InsertDwg(BallValveDwg, [
    (-CdcInletAirReleaseValve_Origin)[0];
    CdcInletAirReleaseValve_Origin[2];
    CdcInletAirReleaseValve_Origin[1]
], ND_ChemPlu, 270 deg)
CdcInletValve := InsertDwg(BallValveDwg, [(-CdcInletValve_Origin)[0]; CdcInletValve_Origin[2]; CdcInletValve_Origin[1]], ND_ChemPlu, 90 deg)
CdcWyeTrapValve := InsertDwg(BallValveDwg, [(-CdcWyeTrapValve_Origin)[0]; CdcWyeTrapValve_Origin[2]; CdcWyeTrapValve_Origin[1]], ND_ChemPlu, 270 deg)
CdcDrainValve := InsertDwg(BallValveDwg, [(-CdcDrainValve_Origin)[0]; CdcDrainValve_Origin[2]; CdcDrainValve_Origin[1]], ND_ChemPlu, 90 deg)
CdcOutletAirReleaseValve := InsertDwg(BallValveDwg, [
    (-CdcOutletAirReleaseValve_Origin)[0];
    CdcOutletAirReleaseValve_Origin[2];
    CdcOutletAirReleaseValve_Origin[1]
], ND_ChemPlu, 270 deg)
ChlorControlValves := stack(view("ba"), CdcInletAirReleaseValve, CdcInletValve, CdcWyeTrapValve, CdcDrainValve, CdcOutletAirReleaseValve, view("t"))
ChlorManifoldFreeze := FreezeLayer("ChlorControlFittings")
ChlorControlFittingsTotal := stack(ChlorControlFittings, ChlorControlValves, ChlorManifoldFreeze)
ChlorControlPipesLayer := layer_new("ChlorControlPipes", blue)
L_CdcPlumbingHorizPipe := CdcOutletTee_Origin[0] - CdcOutletElbow_Origin[0]
ControlPipeVert := PipeF(CdcWyeTrapMTAup_Origin, L_CdcPlumbingVertPipe, [0; 90; 0]*deg, ND_ChemPlu, PS_Fi)
ControlPipeHoriz := PipeF(CdcOutletTee_Origin, L_CdcPlumbingHorizPipe, [0; 0; 0]*deg, ND_ChemPlu, PS_Fi)
ChlorManPipesFreeze := FreezeLayer("ChlorControlPipes")
OD_ChlorineTube := 1/4*in
ChlorDesignTubeLayer := layer_new("ChlorDesignTube", blue3)
ChlorDesignTube := CylinderF(CdcDesignTube_Origin, OD_ChlorineTube/2, L_ChlorineTubeFinal, [0; 45; 0]*deg)
ChlorDesignTubeFreeze := FreezeLayer("ChlorDesignTube")
ChlorDesignTubeInner := CylinderF(CdcDesignTube_Origin, D_ChlorineTube/2, L_ChlorineTubeFinal, [0; 45; 0]*deg)
SubtractTube := SubtractF(["ChlorDesignTube"], "DeleteMe")
ChlorineManTubeScript := stack(ChlorDesignTubeLayer, ChlorDesignTube, ChlorDesignTubeFreeze, ChlorDesignTubeInner, GroupDelete, SubtractTube)
ChlorManifoldPipes := stack(ChlorControlPipesLayer, ControlPipeVert, ControlPipeHoriz, ChlorManPipesFreeze)
ChlorManifoldPlu := stack(ChlorControlFittingsTotal, ChlorManifoldPipes, ChlorineManTubeScript)
# Mounted Lever and Drop Tube
# Lever Arm Slider
L_LeverArmSliderWindow := 3 cm
L_LeverArmSlider := 3*0.5*cm + L_LeverArmSliderWindow + OD_Fitting(ND_ChemPlu)
W_LeverArmSlider := T_CdcLeverArm*4
H_LeverArmSlider := H_LeverArm*1.5
# looking from the top, this is the left (-x direction), top (+y), upper (+z) point
Slider_Origin := [
    FlowMeteringTank_Origin[0] - L_EtMin - T_Et - L_CdcLeverArm*0.75;
    FlowMeteringTank_Origin[1] + (W_EtMin + W_LeverArmSlider)/2;
    Z_LeverArmFulcrum + H_LeverArmSlider/2
]
LeverSliderLyr := layer_new("LeverArmSlider", ltgrey)
LeverSliderBox := BoxF(Slider_Origin, [
    FlowMeteringTank_Origin[0] - L_EtMin - T_Et - L_CdcLeverArm*0.75 + L_LeverArmSlider;
    FlowMeteringTank_Origin[1] + W_EtMin/2 - W_LeverArmSlider/2;
    Z_LeverArmFulcrum - H_LeverArmSlider/2
], [0; 0; 0]*deg)
LeverSliderFrz := FreezeLayer("LeverArmSlider")
LeverArmUBox := BoxF([
    FlowMeteringTank_Origin[0] - L_EtMin - T_Et - L_CdcLeverArm*0.75;
    FlowMeteringTank_Origin[1] + W_EtMin/2 + 1.5*T_CdcLeverArm;
    Z_LeverArmFulcrum + 0.7*H_LeverArm/2
], [
    FlowMeteringTank_Origin[0] - L_EtMin - T_Et - L_CdcLeverArm*0.75 + L_LeverArmSlider;
    FlowMeteringTank_Origin[1] + W_EtMin/2 - W_LeverArmSlider/2 - zc;
    Z_LeverArmFulcrum - 0.7*H_LeverArm/2
], [0; 0; 0]*deg)
SliderWindowBox := BoxF([
    FlowMeteringTank_Origin[0] - L_EtMin - T_Et - L_CdcLeverArm*0.75 + 0.5 cm;
    FlowMeteringTank_Origin[1] + (W_EtMin + W_LeverArmSlider)/2;
    Z_LeverArmFulcrum + 0.5*H_LeverArm/2
], [
    FlowMeteringTank_Origin[0] - L_EtMin - T_Et - L_CdcLeverArm*0.75 + 0.5 cm + L_LeverArmSliderWindow;
    FlowMeteringTank_Origin[1] + W_EtMin/2 - W_LeverArmSlider/2;
    Z_LeverArmFulcrum - 0.5*H_LeverArm/2
], [0; 0; 0]*deg)
SubtractSliderParts := SubtractF(["LeverArmSlider"], "DeleteMe")
SliderScrewLyr := layer_new("sliderscrew", yellow)
H_SliderScrewThread := 1.5 cm
SliderScrewThread := CylinderSUBF([1 cm + Slider_Origin[0]; -W_LeverArmSlider/2 + Slider_Origin[1]; Z_LeverArmFulcrum + H_LeverArm/2], 2 mm, H_SliderScrewThread, [0; 90; 0]*deg, ["LeverArmSlider"])
SliderScrewTop := CylinderSUBF([
    1 cm + Slider_Origin[0];
    -W_LeverArmSlider/2 + Slider_Origin[1];
    Z_LeverArmFulcrum + H_LeverArm/2 + H_SliderScrewThread
], 0.75 cm, 0.5 cm, [0; 90; 0]*deg, ["LeverArmSlider"])
SliderScrewFrz := FreezeLayer("sliderscrew")
SliderScrewScript := stack(SliderScrewLyr, SliderScrewThread, SliderScrewTop, Union_All, SliderScrewFrz)
LeverSliderScript := stack(LeverSliderLyr, LeverSliderBox, LeverSliderFrz, LeverArmUBox, SliderWindowBox, GroupDelete, SubtractSliderParts, SliderScrewScript)
# Lever Arm
# mounting block
CdcMountingBlockLyr := layer_new("MountingBlock", yellow)
MountingPlate := BoxF(FlowMeteringTank_Origin + [-L_EtMin - T_Et; W_EtMin/2 - W_MountingPlate - T_CdcLeverArm/2; H_Et - H_MountingOverlap], FlowMeteringTank_Origin + [
    -L_EtMin - T_Et - T_MountingPlate;
    W_EtMin/2 - T_CdcLeverArm/2;
    H_Et - H_MountingOverlap + H_MountingPlate
], [0; 0; 0]*deg)
MountingBox := BoxF([
    -L_EtMin - T_Et + FlowMeteringTank_Origin[0];
    W_EtMin/2 - W_MountingPlate - T_CdcLeverArm/2 + FlowMeteringTank_Origin[1];
    Z_LeverArmFulcrum - W_MountingBox/2
], [
    -L_EtMin - T_Et + W_MountingBox + FlowMeteringTank_Origin[0];
    W_EtMin/2 - T_CdcLeverArm/2 + FlowMeteringTank_Origin[1];
    Z_LeverArmFulcrum + W_MountingBox/2
], [0; 0; 0]*deg)
MountingBlockFrz := FreezeLayer("MountingBlock")
CdcLeverMounting := stack(CdcMountingBlockLyr, MountingPlate, MountingBox, MountingBlockFrz)
CdcLeverLayer := layer_new("CDCLeverArm", grey)
CdcLeverArm := BoxSUBF([
    FlowMeteringTank_Origin[0] - L_EtMin - T_Et - L_CdcLeverArm;
    FlowMeteringTank_Origin[1] + (W_EtMin + T_CdcLeverArm)/2;
    Z_LeverArmFulcrum + H_LeverArm/2
], [
    FlowMeteringTank_Origin[0] - L_EtMin - T_Et + L_CdcLeverArm;
    FlowMeteringTank_Origin[1] + W_EtMin/2 - T_CdcLeverArm/2;
    Z_LeverArmFulcrum - H_LeverArm/2
], [0; 0; 0]*deg, ["LeverArmSlider"])
CdcLeverArmFulcrum := CylinderSUBF([
    -L_EtMin - T_Et + W_MountingBox/2 + FlowMeteringTank_Origin[0];
    W_EtMin/2 + T_CdcLeverArm/2 + 2 mm + FlowMeteringTank_Origin[1];
    Z_LeverArmFulcrum
], 0.5 cm, W_MountingPlate + T_CdcLeverArm + 4 mm, [90; 0; 0]*deg, ["MountingBlock"])
CdcLeverFrz := FreezeLayer("CDCLeverArm")
L_HoleOffset := 1 cm
D_Hole := 0.4 cm
LeverArmHoleL := CylinderF([
    FlowMeteringTank_Origin[0] - L_EtMin - T_Et - L_CdcLeverArm + L_HoleOffset;
    FlowMeteringTank_Origin[1] + W_EtMin/2 - T_CdcLeverArm;
    Z_LeverArmFulcrum
], D_Hole, 3*T_CdcLeverArm, [270; 0; 0]*deg)
LeverArmHoleR := CylinderF([
    FlowMeteringTank_Origin[0] - L_EtMin - T_Et + L_CdcLeverArm - L_HoleOffset;
    FlowMeteringTank_Origin[1] + W_EtMin/2 - T_CdcLeverArm;
    Z_LeverArmFulcrum
], D_Hole, 3*T_CdcLeverArm, [270; 0; 0]*deg)
SubtractLeverArmHoles := SubtractF(["CdcLeverArm"], "DeleteMe")
CdcLeverArm_Script := stack(LeverSliderScript, CdcLeverMounting, CdcLeverLayer, CdcLeverArm, CdcLeverArmFulcrum, CdcLeverFrz, LeverArmHoleL, LeverArmHoleR, GroupDelete, SubtractLeverArmHoles)
# Drop Tube
DropTubeBarbUpper_Origin := [
    Slider_Origin[0] + 1 cm + L_LeverArmSliderWindow + OR_Fitting(ND_ChemPlu);
    Slider_Origin[1] + OR_Fitting(ND_ChemPlu) + ShortTeeLength(ND_ChemPlu) + SocketDepth(ND_ChemPlu);
    Z_LeverArmFulcrum + IR(D_LargeChlorineTubes, PS_Fi)
] = [-1.19512; 0.665941; 4.23783] m
DropTubeTee_Origin := DropTubeBarbUpper_Origin + [0; -SocketDepth(ND_ChemPlu); 0]
DropTubeMTAUpper_Origin := DropTubeTee_Origin + [0; -ShortTeeLength(ND_ChemPlu); -ShortTeeLength(ND_ChemPlu) - 2*SocketDepth(ND_ChemPlu)]
DropTubeValve_Origin := DropTubeMTAUpper_Origin + [0; 0; -MaleAdapterLength(ND_ChemPlu) + SocketDepth(ND_ChemPlu)] = [-1.19512; 0.634191; 4.16242] m
DropTubeBarbLower_Origin := DropTubeValve_Origin + [0; 0; -BallValveLength(ND_ChemPlu) + 2*BallValveSocket(ND_ChemPlu) - TBarbTLength(ND_ChemPlu)]
DropTubeFittingsLyr := layer_new("DropTubeFittings", green)
DropTubeTee := TeeF(DropTubeTee_Origin, [0; 90; 0]*deg, ND_ChemPlu, PS_Fi)
DropTubeMTAUpper := MaleAdapterF(DropTubeMTAUpper_Origin, [0; 270; 0]*deg, ND_ChemPlu, PS_Fi)
DropTubeBarbUpper := TBarbF(DropTubeBarbUpper_Origin, [90; 0; 0]*deg, ND_ChemPlu, D_LargeChlorineTubes, PS_Fi)
DropTubeBarbLower := TBarbF(DropTubeBarbLower_Origin, [0; 90; 0]*deg, ND_ChemPlu, D_LargeChlorineTubes, PS_Fi)
DropTubeValve := InsertDwg(BallValveDwg, [(-DropTubeValve_Origin)[0]; DropTubeValve_Origin[2]; DropTubeValve_Origin[1]], ND_ChemPlu, 90 deg)
DropTubeFittingsFrz := FreezeLayer("DropTubeFittings")
DropTubePlumbing := stack(DropTubeFittingsLyr, DropTubeTee, DropTubeMTAUpper, DropTubeBarbUpper, DropTubeBarbLower, view("ba"), DropTubeValve, view("t"), DropTubeFittingsFrz)
# Float and Counterweight
R_Cord := 0.25 cm
CdcFloat_Origin := [
    FlowMeteringTank_Origin[0] - L_EtMin - T_Et + L_CdcLeverArm - L_HoleOffset;
    FlowMeteringTank_Origin[1] + W_EtMin/2;
    FlowMeteringTank_Origin[2] + H_Et - H_Freeboard - HL_Lfom - HL_EtOverflow - H_EtFloat/2
]
CdcFloatLyr := layer_new("CdcFloat", yellow)
CdcFloat := CylinderF(CdcFloat_Origin, OR_Fitting(ND_EtFloat), H_EtFloat, [0; 90]*deg)
CdcFloatFreeze := FreezeLayer("CdcFloat")
CdcCordLayer := layer_new("CdcFloatCord", yellow)
CdcCord := CylinderF([0; 0; H_EtFloat] + CdcFloat_Origin, R_Cord, Z_LeverArmFulcrum - (FlowMeteringTank_Origin[2] + H_Et - H_Freeboard - HL_Lfom - HL_EtOverflow + H_EtFloat/2), [0; 90]*deg)
CdcCordFrz := FreezeLayer("CdcFloatCord")
L_CounterweightCord := 15 cm
T_Counterweight := (2 + 3/16)*in = 0.0555625 m  # based on 5 lb counterbalance weight from mcmaster carr ($50) -- problem: made of cast iron
R_Counterweight := (3 + 3/4)/2*in = 0.047625 m
CdcCounterweightCordLyr := layer_new("CounterweightCord", red)
CdcCounterweightCord := CylinderF([
    FlowMeteringTank_Origin[0] - L_EtMin - T_Et - L_CdcLeverArm + L_HoleOffset;
    FlowMeteringTank_Origin[1] + W_EtMin/2;
    Z_LeverArmFulcrum
], 0.25 cm, L_CounterweightCord, [0; 270]*deg)
CdcCounterweightCordFrz := FreezeLayer("CounterweightCord")
CdcCounterweightLyr := layer_new("Counterweight", red)
CounterweightDraw := CylinderF([
    FlowMeteringTank_Origin[0] - L_EtMin - T_Et - L_CdcLeverArm + L_HoleOffset;
    FlowMeteringTank_Origin[1] + W_EtMin/2;
    Z_LeverArmFulcrum - L_CounterweightCord - T_Counterweight
], R_Counterweight, T_Counterweight, [0; 90]*deg)
CdcCounterweightFrz := FreezeLayer("Counterweight")
CounterweightScript := stack(CdcCounterweightCordLyr, CdcCounterweightCord, CdcCounterweightCordFrz, CdcCounterweightLyr, CounterweightDraw, CdcCounterweightFrz)
CdcFloatScript := stack(CdcFloatLyr, CdcFloat, CdcFloatFreeze, CdcCordLayer, CdcCord, CdcCordFrz)
# [component: inputs stack(Facility, StandScript, TankScript, ChemTanksScript, EntranceDetails, ChlorPlu, CdcFloatScript, CdcLeverArm_Script, CHTScript, ChlorManifoldPlu, DropTubePlumbing, CounterweightScript)]
CdcFloatScript
CdcLeverArm_Script
# ChlorManifoldPlu | CHTScript | CounterweightScript
DropTubePlumbing
L_Paper := 10.5 in
# Values of L.Paper and W.Paper can be changed depending on the desired paper size. 7.5" x 10.5" were chosen to give a .5" margin on either side of the paper to account for differences in printer margin settings.
W_Paper := 7.5 in
XStartPoint := LfomCoupling_Origin[0]
# This origin is defined in the LFOM modular code.
YStartPoint := LfomCoupling_Origin[1]
OrificeCenterDist := D_LfomOrifices + S_LfomOrificesMin
# The length of the layouts -- this was originally written to fall between orifices, but with the offset of alternating rows by half the orifice diameter, the border fell directly on the center line of the orifice. This would pose a problem when piecing the sheets together on-site, as the orifice center may not be exact. L.Border is offset by the orifice diameter to avoid this issue.
L_Border := floor(L_Paper/OrificeCenterDist)*OrificeCenterDist - D_LfomOrifices
W_Border := floor(W_Paper/(H_LfomOrifices[1] - H_LfomOrifices[0]))*(H_LfomOrifices[1] - H_LfomOrifices[0])
# The width of the layouts -- this is as close as possible to W.Paper without cutting off any orifices.
Labels := ["A"; "B"; "C"; "D"; "E"; "F"; "G"; "H"; "I"; "J"; "K"; "L"; "M"; "O"; "P"]
# Variables
# Create Layouts
LabelLayout(Text, TextSize, Start, End, Rotation) := concat("-mtext ", point(Start), sp, "height ", stringit(TextSize), sp, "r ", stringit(Rotation), sp, point(End), sp, Text)
CreateLayout(LayoutName) := concat("-layout ", "n ", stringit(LayoutName), sp)
SetLayout(LayoutName) := concat("-layout ", "s ", stringit(LayoutName), sp)
VPortErase(VPort1, VPort2) := concat(".erase ", point(VPort1), sp, point(VPort2), sp)
VPortNew(Corner1, Corner2) := concat("-vport ", point(Corner1), sp, point(Corner2), sp, "z ", "e")
ChangeView(CornerA, CornerB) := concat("ms ", "z ", "w ", point(CornerA), sp, point(CornerB), sp, "ps")
N_HLayouts :=
    Layouts ← round((OrificeCenterDist*N_LfomOrifices[0] + D_LfomOrifices)/L_Border) if (OrificeCenterDist*N_LfomOrifices[0] + D_LfomOrifices)/L_Border > 1.5
    Layouts ← ceil((OrificeCenterDist*N_LfomOrifices[0] + D_LfomOrifices)/L_Border) if (OrificeCenterDist*N_LfomOrifices[0] + D_LfomOrifices)/L_Border < 1.5
    return Layouts
# Calculates the number of horizontal layouts
# Calculates the number of vertical layouts (other than the first row of layouts).
N_VLayouts := round((H_LfomOrifices[last(H_LfomOrifices)] + D_LfomOrifices/2)/W_Border)
N_TLayouts :=
    Layouts ← round((OrificeCenterDist*N_LfomOrifices[last(N_LfomOrifices)] + D_LfomOrifices)/L_Border) if (OrificeCenterDist*N_LfomOrifices[last(N_LfomOrifices)] + D_LfomOrifices)/L_Border > 1
    Layouts ← ceil((OrificeCenterDist*N_LfomOrifices[last(N_LfomOrifices)] + D_LfomOrifices)/L_Border) if (OrificeCenterDist*N_LfomOrifices[last(N_LfomOrifices)] + D_LfomOrifices)/L_Border < 1
    return Layouts
# Calculates the number of horizontal layouts in the second row. Originally, the second row of layouts was the top row, however, with changes to the LFOM code, there can now be three or more vertical layouts. A way to calculate the number of orifices in these top rows must be determined.
SetUpHLayouts(N_Layout) :=
    Num ← 1 m
    Layout ← CreateLayout(Num)
    for a ∈ 1 .. N_Layout
        if a == 1
            Layout ← stack(Layout, SetLayout(Num), VPortErase([0; 0]*m, [10; 7.7]*m), VPortNew([.013; .013]*m, [.013 m + L_Border + D_LfomOrifices/2; W_Border + .013 m]), ChangeView([
                XStartPoint - D_LfomOrifices/2 + ((floor(L_Paper/OrificeCenterDist)*OrificeCenterDist)*(a - 1));
                YStartPoint
            ], [XStartPoint + L_Border*a; YStartPoint + W_Border]))
        if a > 1
            Layout ← stack(Layout, CreateLayout(Num), SetLayout(Num), VPortErase([0; 0]*m, [10; 7.7]*m), VPortNew([.013; .013]*m, [.013 m + L_Border + D_LfomOrifices/2; W_Border + .013 m]), ChangeView([
                XStartPoint - D_LfomOrifices/2 + (floor(L_Paper/OrificeCenterDist)*OrificeCenterDist)*(a - 1);
                YStartPoint
            ], [XStartPoint + L_Border*a; YStartPoint + W_Border]))
        Num ← Num + 1 m
    return Layout
# Renders layouts in bottom row. It might be helpful to combine these three functions (SetUpHLayouts,SetUpTLayouts, and SetUpVLayouts) into one function -- perhaps nested for-loops, as if one were traversing a matrix, now that the LFOM design has been modified for higher flow rates. The design now includes a 40cm LFOM for high flow rates, so there is a need for three rows  of layouts.
SetUpTLayouts(N_Layout) :=
    Num ← (N_HLayouts + 1)*m + 1 m
    Layout ← CreateLayout(Num)
    for c ∈ N_Layout
        if c == 1
            Layout ← stack(Layout, SetLayout(Num), VPortErase([0; 0]*m, [10; 7.7]*m), VPortNew([.013; .013]*m, [.013 m + L_Border + D_LfomOrifices/2; W_Border + .013 m]), ChangeView([
                XStartPoint - D_LfomOrifices/2 + ((floor(L_Paper/OrificeCenterDist)*OrificeCenterDist)*c);
                YStartPoint + W_Border
            ], [XStartPoint + L_Border*(c + 1); YStartPoint + 2*W_Border]))
        if c > 1
            Layout ← stack(Layout, CreateLayout(Num), SetLayout(Num), VPortErase([0; 0]*m, [10; 7.7]*m), VPortNew([.013; .013]*m, [.013 m + L_Border + D_LfomOrifices/2; W_Border + .013 m]), ChangeView([
                XStartPoint - D_LfomOrifices/2 + ((floor(L_Paper/OrificeCenterDist)*OrificeCenterDist)*c);
                YStartPoint + W_Border
            ], [XStartPoint + L_Border*(c + 1); YStartPoint + 2*W_Border]))
        Num ← Num + 1 m
    return Layout
# Renders layouts in second row (other than the first layout of the second row -- this is accounted for in SetUpVLayouts). Only used if N.TLayouts>1. See comment above about LFOM changes. This function needs to be modified.
SetUpVLayouts(N_Layout) :=
    Num ← N_HLayouts*m + 1 m
    Layout ← CreateLayout(Num)
    for b ∈ 1 .. N_Layout
        if b == 1
            Layout ← stack(Layout, SetLayout(Num), VPortErase([0; 0]*m, [10; 7.7]*m), VPortNew([.013; .013]*m, [.013 m + L_Border + D_LfomOrifices/2; W_Border + .013 m]), ChangeView([
                XStartPoint - D_LfomOrifices/2 + ((floor(L_Paper/OrificeCenterDist)*OrificeCenterDist)*(b - 1));
                YStartPoint + W_Border*b
            ], [XStartPoint + L_Border*b; YStartPoint + W_Border*(b + 1)]))
        if b > 1
            Layout ← stack(Layout, CreateLayout(Num), SetLayout(Num), VPortErase([0; 0]*m, [10; 7.7]*m), VPortNew([.013; .013]*m, [.013 m + L_Border + D_LfomOrifices/2; W_Border + .013 m]), ChangeView([
                XStartPoint - D_LfomOrifices/2 + ((floor(L_Paper/OrificeCenterDist)*OrificeCenterDist)*(b - 1));
                YStartPoint + W_Border*b
            ], [XStartPoint + L_Border*b; YStartPoint + W_Border*(b + 1)]))
        Num ← Num + N_TLayouts*m + 1 m
    Layout ← stack(Layout, SetUpTLayouts(N_TLayouts)) if N_TLayouts > 1
    return Layout
# Renders vertical layouts -- does not work properly when more than two rows of layouts are needed (i.e. for flow rates above 60L/s). (Needs to be modified -- see first comment.)
DimStyle(H_Component) := concat("-dimstyle ", "st ", "dimtxt ", stringit(H_Component), sp, "dimasz ", stringit(H_Component), sp, "dimgap ", stringit(H_Component), sp, "dimcen ", stringit(0.0000 m), sp)
# Changes dimension style for last orifice of bottom row
LfomDiameterDim := concat(DimStyle(.005 m), "_dimdiameter ", point([
    XStartPoint + (OrificeCenterDist*N_LfomOrifices[0]) - D_LfomOrifices/2 - S_LfomOrificesMin + (D_LfomOrifices/2*sqrt(2)/2);
    H_LfomOrifices[0] + (D_LfomOrifices/2*sqrt(2)/2)
]), sp, point([
    XStartPoint + (OrificeCenterDist*N_LfomOrifices[0] - D_LfomOrifices/2 + S_LfomOrificesMin) + (D_LfomOrifices/2*sqrt(2)/2);
    H_LfomOrifices[0] + (D_LfomOrifices/2*sqrt(2)/2)
]))  # Draws dimension
Boundary := concat("_line ", point([XStartPoint - D_LfomOrifices/2; YStartPoint + H_LfomOrifices[0] - D_LfomOrifices/2]), sp, point([
    XStartPoint - D_LfomOrifices/2;
    YStartPoint + H_LfomOrifices[last(H_LfomOrifices)] + W_Border - D_LfomOrifices/2
]), sp, "_line ", point([XStartPoint - D_LfomOrifices/2; YStartPoint + H_LfomOrifices[0] - D_LfomOrifices/2]), sp, point([
    (XStartPoint + N_HLayouts*L_Border + ((N_HLayouts - 1)*D_LfomOrifices/2));
    YStartPoint + H_LfomOrifices[0] - D_LfomOrifices/2
]), sp)
Zoom := concat("z ", "e")
CreateLabel(Str1, Str2) := concat("Page ", Str1, Str2)
CopyText(Object, BasePt, DisPt) := concat("copy ", point(Object), sp, point(BasePt), sp, sp, "mode ", "single ", sp, point(DisPt))
DelineateL(XStartPoint, YStartPoint) := concat("_line ", point([XStartPoint + L_Border; YStartPoint + (H_LfomOrifices[0] - D_LfomOrifices/2)]), sp, point([
    XStartPoint + L_Border;
    YStartPoint + H_LfomOrifices[last(H_LfomOrifices)] + W_Border - D_LfomOrifices/2
]), sp)  # Inserts border "lengthwise"
LabelT(XStartPoint) :=
    TempX ← XStartPoint
    Line ← Boundary
    c ← 0
    while XStartPoint < TempX + ((N_TLayouts - 1)*L_Border)
        Label_MiddleS ← [XStartPoint + L_Border - 1 cm; YStartPoint + (3/2*W_Border) - 1 cm]
        Label_MiddleE ← [XStartPoint + L_Border - 1 cm; YStartPoint + (3/2*W_Border) + 2 cm]
        Label_TopS ← [XStartPoint + L_Border - 1 cm; YStartPoint + 2*W_Border - 2 cm]
        Label_TopE ← [XStartPoint + L_Border - .5 cm; YStartPoint + 2*W_Border - .5 cm]
        Label_BottS ← [XStartPoint + L_Border - 5 cm; YStartPoint + W_Border - 1 cm]
        Label_BottE ← [XStartPoint + L_Border - 2 cm; YStartPoint + W_Border - .5 cm]
        Line ← stack(Line, Zoom, LabelLayout(CreateLabel(Labels[:, 0][c + N_HLayouts], Labels[:, 0][c + N_HLayouts + 1]), .005 m, Label_MiddleS, Label_MiddleE, 90 m), "", MirrorLast([XStartPoint + L_Border; YStartPoint], [XStartPoint + L_Border; YStartPoint + 2*W_Border], "n"), LabelLayout(Labels[:, 0][c + N_HLayouts], .005 m, Label_TopS, Label_TopE, 0 m), "", LabelLayout(CreateLabel(Labels[:, 0][c], Labels[:, 0][c + N_HLayouts]), .005 m, Label_BottS, Label_BottE, 0 m), "", MirrorLast([(XStartPoint + L_Border)/2; YStartPoint + W_Border], [XStartPoint + L_Border; YStartPoint + W_Border], "n"), Zoom)
        XStartPoint ← XStartPoint + L_Border + D_LfomOrifices/2
        c ← c + 1
    Label_TopS ← [XStartPoint + L_Border - 1 cm; YStartPoint + 2*W_Border - 2 cm]
    Label_TopE ← [XStartPoint + L_Border - .5 cm; YStartPoint + 2*W_Border - .5 cm]
    Label_BottS ← [XStartPoint + L_Border - 5 cm; YStartPoint + W_Border - 1 cm]
    Label_BottE ← [XStartPoint + L_Border - 2 cm; YStartPoint + W_Border - .5 cm]
    Line ← stack(Line, Zoom, LabelLayout(Labels[:, 0][c + N_HLayouts], .005 m, Label_TopS, Label_TopE, 0 m), "", LabelLayout(CreateLabel(Labels[:, 0][c], Labels[:, 0][c + N_HLayouts]), .005 m, Label_BottS, Label_BottE, 0 m), "", MirrorLast([(XStartPoint + L_Border)/2; YStartPoint + W_Border], [XStartPoint + L_Border; YStartPoint + W_Border], "n"), Zoom) if XStartPoint < TempX + (N_TLayouts*L_Border)
    return Line
# Labels the layout for the second row. This function was created before the 40cm LFOM design, so it must be modified to account for multiple rows of layouts.
DelineateLMultiple(XStartPoint, YStartPoint) :=
    TempX ← XStartPoint
    Line ← Boundary
    b ← 0
    while XStartPoint < TempX + ((N_HLayouts - 1)*L_Border)
        Label_MiddleS ← [XStartPoint + L_Border - 1 cm; (YStartPoint + W_Border)/2 - 1 cm]
        Label_MiddleE ← [XStartPoint + L_Border - 1 cm; (YStartPoint + W_Border)/2 + 2 cm]
        Label_TopS ← [XStartPoint + L_Border - 1 cm; YStartPoint + W_Border - 2 cm]
        Label_TopE ← [XStartPoint + L_Border - .5 cm; YStartPoint + W_Border - .5 cm]
        Line ← stack(Line, DelineateL(XStartPoint, YStartPoint), Zoom, LabelLayout(CreateLabel(Labels[:, 0][b], Labels[:, 0][b + 1]), .005 m, Label_MiddleS, Label_MiddleE, 90 m), "", MirrorLast([XStartPoint + L_Border; YStartPoint], [
            XStartPoint + L_Border;
            YStartPoint + H_LfomOrifices[last(H_LfomOrifices)] + W_Border - D_LfomOrifices/2
        ], "n"), LabelLayout(Labels[:, 0][b], .005 m, Label_TopS, Label_TopE, 0 m), "", Zoom)
        XStartPoint ← (XStartPoint + L_Border + D_LfomOrifices/2)
        b ← b + 1
    Label_TopS ← [XStartPoint + L_Border - 1 cm; YStartPoint + W_Border - 2 cm]
    Label_TopE ← [XStartPoint + L_Border - .5 cm; YStartPoint + W_Border - .5 cm]
    Line ← stack(Line, DelineateL(XStartPoint, YStartPoint), Zoom, LabelLayout(Labels[:, 0][b], .005 m, Label_TopS, Label_TopE, 0 m), "", Zoom) if XStartPoint < TempX + (N_HLayouts*L_Border)
    return Line  # Delineates the first row of layouts and labels them appropriately.
DelineateW(XStartPoint, YStartPoint) := concat("_line ", point([XStartPoint - D_LfomOrifices/2; YStartPoint + W_Border]), sp, point([XStartPoint + N_HLayouts*L_Border + (N_HLayouts - 1)*D_LfomOrifices/2; YStartPoint + W_Border]), sp)
# Inserts border vertically
DelineateWMultiple(XStartPoint, YStartPoint) :=
    TempY ← YStartPoint
    Line ← Boundary
    a ← 0
    while YStartPoint ≤ TempY + N_VLayouts*W_Border
        Line ← stack(Line, DelineateW(XStartPoint, YStartPoint))
        YStartPoint ← YStartPoint + W_Border
        a ← a + 1
    return Line  # Inserts multiple vertical borders
# Drawing Functions
# Template Code
LfomOrificesTemplate :=
    Local ← view("t")
    for h ∈ 0 .. last(H_LfomOrifices)
        origin ← [
            XStartPoint + (D_LfomOrifices + S_LfomOrificesMin)/2*(mod(h, 2) == 0);
            YStartPoint + H_LfomOrifices[h]
        ]
        Crosshair ← concat("z ", "e ", "_line ", point(origin[:, 0] - [D_LfomOrifices/4; 0 m]), sp, point(origin[:, 0] + [D_LfomOrifices/4; 0 m]), sp, sp, "_line ", point(origin[:, 0] - [0 m; D_LfomOrifices/4]), sp, point(origin[:, 0] + [0 m; D_LfomOrifices/4]), sp)
        PointArray ← [
            [origin[0] - D_LfomOrifices/3; origin[1]];
            [origin[0]; origin[1] - D_LfomOrifices/3];
            [origin[0] + (D_LfomOrifices/2*sqrt(2)/2); origin[1]];
            [origin[0]; origin[1] + (D_LfomOrifices/2*sqrt(2)/2)]
        ]
        Local ← stack(Local, circle(origin, D_LfomOrifices/20), circle(origin, D_LfomOrifices/2), Crosshair) if N_LfomOrifices[h] ≠ 0
        Local ← stack(Local, ArrayMultiple(PointArray, 1, N_LfomOrifices[h], 0, OrificeCenterDist)) if N_LfomOrifices[h] > 1
    Local ← stack(Local, LfomDiameterDim, DelineateLMultiple(XStartPoint, YStartPoint), DelineateWMultiple(XStartPoint, YStartPoint), LabelT(XStartPoint), SetUpHLayouts(N_HLayouts), SetUpVLayouts(N_VLayouts))
    return Local  # Code to generate the template: brings together all of the functions above.
# [component: inputs LfomOrificesTemplate]
ND_Thread := 1.5 in
ND_Barb := 3/8*in
EN := PS_Fi
OriginPoint := [0; 0; 0]
AngleVector := [0; 0; 0]*deg
# [component: inputs CHTInletBarb]
# [component: inputs WyeF([0; 0; 0], [0; 0; 0], ND_ChemPlu, PS_Fi)]
