# Stand alone chemical dosers for India
# MathCAD References
# [reference: ExpertInputs.xmcd]
# Variables Changed after Expert Inputs:
HL_LfomMin := 20 cm  # Changed to 10 cm to shorten the chemical dosing tubes
HL_LfomMax := 20 cm
HL_CdcCoag := HL_LfomMin
HL_CdcChlorine := HL_LfomMin
C_ChlorineStockMax := 3*gm/L
EN_Chlorine := 2
C_CoagStockMax = 200 gm/L
# Note that the ratio of stock to max dose is the same for chlorine and coagulant and that gives the same design for each doser (given that the viscosity is almost the same for both stocks).
C_ChlorineDoseMax = 2 mgm/L
# [reference: MathFunctions.xmcd]
# [reference: PipeDatabase - may.xmcd]
# [reference: MaterialsDatabase.xmcd]
# power supply for afternoon 3-4 hrs
# fill up tank, no outflow
# 6-9 supply AM, no inflow
# in 3 hrs 3/4 empty, wait for power
# fill up, no outflow
# 6-8 in PM provide service
# [reference: FluidsFunctions.xmcd]
# [reference: CdcFunctions.xmcd]
D_TubeAvailable := [2; 3; 4; 5; 6]*in/16
# Assumptions
ND_FiDrainValve := 1 in
T_TankWall := 25 cm
L_Wall := 3 m
T_EtBaffle := 5 cm
PS_Fi := 2
H_Bucket5Gal := 50 cm
T_Separator := 15 cm
W_Wall := 3 m
T_Et := 7.5 cm
V_FiUpflow := 11*mm/s
H_Freeboard := 10 cm
D_Bucket5Gal := 30 cm
L_TankOffset := 1.2 m
H_Wall := 3 m
T_FiLayer := 20 cm
S_FiInletMan := 40 cm
Z_BottomLowerTank := 6 m
Vol_OverheadTank := L_Wall*W_Wall*H_Wall
L_CdcTubeMax := L_Wall
S_Walkway := 60 cm
T_Platform := 15 cm
S_Walkway := 60 cm
# This is actual ID for 2.5 kg/cm^2 pipe
H_Room := 8 ft
ND_SystemDrain := D_pipeschedule(3*L/s, PS_Fi, Z_BottomLowerTank + H_Room, Z_BottomLowerTank + H_Room, Nu_Water, E_Pvc, K_PipeExit + K_PipeEnt + K_El90*2) = 1.5 in
Q_Plant := 15*L/s
ND_ChemPlatformDrain := D_pipeschedule(3*L/s, PS_Fi, H_Room/2, 1.2*W_Wall, Nu_Water, E_Pvc, K_PipeExit + K_PipeEnt + K_El90*3) = 2 in
ND_Transmission := D_pipeschedule(Q_Plant, PS_Fi, 2 m, 600 m, Nu_Water, E_Pvc, K_PipeExit + K_PipeEnt)
ND_Transmission = 8 in
HL_Transmission := h_l(Q_Plant, ND_Transmission, 600 m, K_PipeExit + K_PipeEnt, Nu_Water, E_Pvc)
HL_Transmission = 0.691315 m
# LFOM
W_Stout(HL_Lfom, z) := 2/(sqrt(2*g*z)*Pi_VenaContractaOrifice*π*HL_Lfom)
N_LfomRows(Q_Plant, HL_Lfom) := min(10, max(4, trunc(HL_Lfom/(4*(W_Stout(HL_Lfom, HL_Lfom)*Q_Plant)/(2*π)))))
fB_LfomRows(Q_Plant, HL_Lfom) := HL_Lfom/N_LfomRows(Q_Plant, HL_Lfom)
V_LfomPipe.Avg(HL_Lfom) := 4/(3*π)*sqrt(2*g*HL_Lfom)
A_LfomPipeMin(Q_Plant, HL_Lfom, Π_LfomSafety) := Π_LfomSafety*Q_Plant/V_LfomPipe.Avg(HL_Lfom)
fND_LfomPipe(Q_Plant, HL_Lfom, Π_LfomSafety, PS_Default) := NominalDiameter(2*sqrt(A_LfomPipeMin(Q_Plant, HL_Lfom, Π_LfomSafety)/π), PS_Default)
fHL_LfomHigh(Q_Plant, Π_LfomSafety, PS_Default) :=
    i ← 0
    while fND_LfomPipe(Q_Plant, HL_LfomMin + i*5*cm, Π_LfomSafety, PS_Default) > ND_LfomPipeMax and HL_LfomMin + i*5*cm < HL_LfomMax
        i ← i + 1
    return HL_LfomMin + i*5*cm
fHL_LfomHigh(Q_Plant, Π_LfomSafety, PS_Default) :=
    i ← 0
    while fND_LfomPipe(Q_Plant, HL_LfomMin + i*5*cm, Π_LfomSafety, PS_Default) > ND_LfomPipeMax and HL_LfomMin + i*5*cm < HL_LfomMax
        i ← i + 1
    j ← 0
    while fND_LfomPipe(Q_Plant, HL_LfomMin + i*5*cm, Π_LfomSafety - j*0.05, PS_Default) > ND_LfomPipeMax and Π_LfomSafety - j*0.05 > Π_LfomSafetyMin
        j ← j + 1
    return [HL_LfomMin + i*5*cm; (Π_LfomSafety - j*0.05)*m]
HL_Lfom := fHL_LfomHigh(Q_Plant, Π_LfomSafety, PS_Default)[0] = 0.2 m
Π_LfomSafety := fHL_LfomHigh(Q_Plant, Π_LfomSafety, PS_Default)[1]/m
Π_LfomSafety = 1.5
HL_Flowmeasure :=
    HL_Lfom if EN_LinearFlow
    HL_Nlfom otherwise
V_LfomPipe.Avg(HL_Lfom) = 0.84058 m/s
EN_LfomPipe :=
    1 if Q_Plant ≤ 70*L/s
    0 otherwise
D_LfomOrifices := 2.5 cm
N_LfomOrificesperRowMax(Q_Plant, HL_Lfom, PS_Default) := floor(π*fND_LfomPipe(Q_Plant, HL_Lfom, Π_LfomSafety, PS_Default)/D_LfomOrifices)
N_LfomOrificesperRowMax(Q_Plant, HL_Lfom, PS_Default) = 25
Q_ramp(Q_Plant, HL_Lfom) := ramp(fB_LfomRows(Q_Plant, HL_Lfom), fB_LfomRows(Q_Plant, HL_Lfom), HL_Lfom)/HL_Lfom*Q_Plant
Q_ramp(Q_Plant, HL_Lfom) = [1.875; 3.75; 5.625; 7.5; 9.375; 11.25; 13.125; 15] L/s
fH_LfomOrifices(Q_Plant, HL_Lfom) := ramp(D_LfomOrifices/2, fB_LfomRows(Q_Plant, HL_Lfom), HL_Lfom)
Q_LfomActual(Q_Plant, HL_Lfom, RowIndexSubmerged, n_Lfomorifices) :=
    Q ← 0*L/min
    for i ∈ 0 .. RowIndexSubmerged
        Q ← Q + n_Lfomorifices[i]*Q_orificeV(D_LfomOrifices, ramp(fB_LfomRows(Q_Plant, HL_Lfom), fB_LfomRows(Q_Plant, HL_Lfom), HL_Lfom)[RowIndexSubmerged] - ramp(D_LfomOrifices/2, fB_LfomRows(Q_Plant, HL_Lfom), HL_Lfom)[i], Pi_VenaContractaOrifice)
    return Q
fN_LfomOrifices(Q_Plant, HL_Lfom, PS_Default) :=
    Q_ramplocal ← Q_ramp(Q_Plant, HL_Lfom)
    H_ramplocal ← ramp(D_LfomOrifices/2, fB_LfomRows(Q_Plant, HL_Lfom), HL_Lfom)
    n[last(H_ramplocal)] ← 0
    for i ∈ 0 .. last(H_ramplocal)
        n[i] ←
            min(max(0, round((Q_ramplocal[i] - Q_LfomActual(Q_Plant, HL_Lfom, i, n))/Q_orificeV(D_LfomOrifices, ramp(fB_LfomRows(Q_Plant, HL_Lfom), fB_LfomRows(Q_Plant, HL_Lfom), HL_Lfom)[i] - ramp(D_LfomOrifices/2, fB_LfomRows(Q_Plant, HL_Lfom), HL_Lfom)[i], Pi_VenaContractaOrifice))), N_LfomOrificesperRowMax(Q_Plant, HL_Lfom, PS_Default)) if fND_LfomPipe(Q_Plant, HL_Lfom, Π_LfomSafety, PS_Default) ≤ 12 in
            max(0, round((Q_ramplocal[i] - Q_LfomActual(Q_Plant, HL_Lfom, i, n))/Q_orificeV(D_LfomOrifices, ramp(fB_LfomRows(Q_Plant, HL_Lfom), fB_LfomRows(Q_Plant, HL_Lfom), HL_Lfom)[i] - ramp(D_LfomOrifices/2, fB_LfomRows(Q_Plant, HL_Lfom), HL_Lfom)[i], Pi_VenaContractaOrifice))) otherwise
    return n
Q_LfomError(Q_Plant, HL_Lfom, PS_Default) :=
    N_LfomOrifices ← fN_LfomOrifices(Q_Plant, HL_Lfom, PS_Default)
    for j ∈ 0 .. last(N_LfomOrifices)
        Q_LfomError[j] ← (Q_LfomActual(Q_Plant, HL_Lfom, j, N_LfomOrifices) - Q_ramp(Q_Plant, HL_Lfom)[j])/Q_Plant
    return Q_LfomError
Q_LfomErrorMax := max(sqrt(Q_LfomError(Q_Plant, HL_Lfom, PS_Default)^2)) = 0.417272 %
H_Graph := 0 cm, 0.5 cm .. HL_Lfom
Q_LfomIdeal(Q_Plant, HL_Lfom, H) := Q_Plant*H/HL_Lfom
Q_Lfom(Q_Plant, HL_Lfom, PS_Default, H) :=
    H_Submerged ← H - ramp(D_LfomOrifices/2, fB_LfomRows(Q_Plant, HL_Lfom), HL_Lfom)
    N_LfomOrifices ← fN_LfomOrifices(Q_Plant, HL_Lfom, PS_Default)
    for i ∈ 0 .. last(H_Submerged)
        Q ← Q + Q_orificeV(D_LfomOrifices, H_Submerged[i], Pi_VenaContractaOrifice)*N_LfomOrifices[i]
    return Q
N_LfomOrifices := fN_LfomOrifices(Q_Plant, HL_Lfom, PS_Default) = [13; 2; 4; 3; 3; 2; 2; 2]
H_LfomOrifices := fH_LfomOrifices(Q_Plant, HL_Lfom) = [1.25; 3.75; 6.25; 8.75; 11.25; 13.75; 16.25; 18.75] cm
B_LfomRows := fB_LfomRows(Q_Plant, HL_Lfom) = 2.5 cm
ND_LfomPipe :=
    2 in if Q_Plant == 1.6*L/s
    fND_LfomPipe(Q_Plant, HL_Lfom, Π_LfomSafety, PS_Default) otherwise
ND_LfomPipe = 8 in
ND_RMPipe := ND_LfomPipe = 8 in
# Entrance Tank
# [reference: LFOM.xmcd]
ND_RMPipe = 8 in
ND_EtFloat := 6 in
L_Et := 2*S_Fitting + 2*ConRadius(ND_RMPipe) + 2*ConRadius(ND_EtFloat) + T_EtBaffle + S_EtFloat = 0.670687 m
L_Et := 70 cm
W_Et := 50 cm
H_Et := S_Fitting + T_EtBaffle + 2*ConRadius(ND_RMPipe) + S_EtFloat + ND_EtFloat
HW_Et := H_Et - H_Freeboard
# Chem Doser, Storage, Calibration Columns
C_ChlorineStockMax := 10*gm/L
L_CdcChlorineTube := L_CdcTube(Q_Plant, C_ChlorineDoseMax, C_ChlorineStockMax, D_TubeAvailable, HL_CdcChlorine, L_CdcTubeMax, EN_Chlorine, K_CdcTube) = 1.51122 m
N_CdcChlorineTubes := N_CdcTube(Q_Plant, C_ChlorineDoseMax, C_ChlorineStockMax, D_TubeAvailable, HL_CdcChlorine, L_CdcTubeMax, EN_Chlorine, K_CdcTube) = 1
D_CdcChlorine := D_CdcTube(Q_Plant, C_ChlorineDoseMax, C_ChlorineStockMax, D_TubeAvailable, HL_CdcChlorine, L_CdcTubeMax, EN_Chlorine, K_CdcTube) = 2 in/16
Q_ChlorineStock := Q_Plant*C_ChlorineDoseMax/C_ChlorineStockMax = 3 mL/s
# Supplier Information:
# http://www.rotoplas.com/assets/files/industria/catalogo.pdf
# 5 gallon bucket
# Tank Diameter | Tank Height
# Tank Volume | http://www.mcmaster.com/#storage-buckets/=kd23oh
# 35 gallon drum
# http://www.jlmovingsupplies.com/c31/DIXIE-OPEN-CLOSED-HEAD-DRUMS-p36721.html
Vol_SupplierChemTank := [18.93 L; 113.56 L; 208.198 L; 450 L; 600 L; 750 L; 1100 L; 2500 L]
Dimensions_SupplierChemTank := [
    11.875 in, 17.75 in;
    20.75 in, 31.75 in;
    22.5 in, 33.5 in;
    0.85 m, 0.99 m;
    0.96 m, 1.10 m;
    1.10 m, 1.02 m;
    1.10 m, 1.39 m;
    1.55 m, 1.65 m
]
Ti_ChlorineStock := 20 day
Vol_ChlorineTank := CeilNearest(Ti_ChlorineStock*C_ChlorineDoseMax*L_Wall*W_Wall*H_Wall/day/C_ChlorineStockMax, Vol_SupplierChemTank) = 113.56 L
R_ChlorineTank := Dimensions_SupplierChemTank[:, 0][index(Vol_ChlorineTank, Vol_SupplierChemTank)]/2 = 0.263525 m
H_ChlorineTank := Dimensions_SupplierChemTank[:, 1][index(Vol_ChlorineTank, Vol_SupplierChemTank)] = 0.80645 m
# in reality the tanks are closer to square
Vol_ChlorineTank := 200 L
R_ChlorineTank := 33 cm
H_ChlorineTank := Vol_ChlorineTank/(R_ChlorineTank^2*π) = 0.584591 m
L_ChemPlatform := 4*S_Fitting + 2*R_ChlorineTank + 2*R_ChlorineTank = 1.52 m
W_ChemPlatform := 2*max(R_ChlorineTank, R_ChlorineTank) + 2*S_Fitting + S_Walkway = 1.36 m
D_ChlorineFloatValveOrifice :=
    i ← 0
    while h_orifice(D_FltVlvOrificesAvail[i], Pi_VenaContractaOrifice, Q_ChlorineStock) ≥ H_CoagTankAboveHeadTank
        i ← i + 1
    return D_FltVlvOrificesAvail[i]
D_ChlorineFloatValveOrifice = 0.093 in
HL_ChlorineFloatValveOrifice := h_orifice(D_ChlorineFloatValveOrifice, Pi_VenaContractaOrifice, Q_ChlorineStock) = 6.01955 cm
HL_ChlorineTubeStockToCHMax := H_CoagTankAboveHeadTank - HL_ChlorineFloatValveOrifice = 23.9804 cm
D_ChlorineTubeStockToCHEst := NextLargest((128*Nu_Water*1*m*Q_ChlorineStock/(π*g*HL_ChlorineTubeStockToCHMax))^(1/4), D_TubeAvailable) = 1 in/8
D_ChlorineTubeStockToCH := max(3/8*in, D_ChlorineTubeStockToCHEst) = 3 in/8
HL_ChlorTubeStockToCHT := h_f(Q_ChlorineStock, D_ChlorineTubeStockToCH, 1 m, Nu_Water, E_Pvc) = 0.00151426 m
HL_ChlorStockToCHT := HL_ChlorineFloatValveOrifice + HL_ChlorTubeStockToCHT
H_CHTToStockOutlet := max(HL_ChlorStockToCHT, HL_ChlorStockToCHT, 15 cm)
H_CHTToStockBottom := H_CHTToStockOutlet - B_StockOutlet
# Calibration Column (Drop Tube)
SF_CalCol := 1.25
Ti_Res := 1.25*min
H_CalCol := 30 cm
Q_ChlorCalColMax := SF_CalCol*Q_ChlorineStock
Vol_ChlorCalCol := Ti_Res*Q_ChlorCalColMax
D_inChlorCCMin := sqrt(4*Vol_ChlorCalCol/(π*H_CalCol)) = 1.36021 in
ND_ChlorCalCol := NominalDiameter(D_inChlorCCMin, PS_Default)
D_inChlorCalCol := innerdiameter(ND_ChlorCalCol, PS_Default) = 1.734 in
# AutoCAD References
# AutoCAD drawing programs:
# Translators:
# These are the codes that take MathCAD outputs and create AutoCAD scripts that are used to draw the plant (formerly Basics)
# [reference: MtoATranslators.xmcd]
# The wrapped MtoA translator contains the functions that the user will want to access. These functions will draw pieces with full functionality - specifying the location, dimension, and orientation of the object. Also, it contains layer control and subtraction capabilities for grouped objects.
# [reference: MtoATranslatorsWrapped.xmcd]
# Drawing functions:
# [reference: ChannelF.xmcd]
# [reference: PlumbingF.xmcd]
# [reference: TankF.xmcd]
# [reference: StairsF.xmcd]
# Chemical Dose Controller For Overhead Tanks
# Storage Tank, Entrance Tank, Distribution Channel, Room
Tank_Origin := [0; 0; 0]*m
FlowMeteringTank_Origin := [0; 0; H_Wall + T_TankWall] + Tank_Origin
Z_ChlorTank := FlowMeteringTank_Origin[2] + H_Et + 20 cm
ChlorTank_Origin := [
    Tank_Origin[0] - L_Wall + S_Fitting + R_ChlorineTank;
    S_Fitting + R_ChlorineTank + FlowMeteringTank_Origin[1];
    Z_ChlorTank
]
RoomLyr := layer_new("Room", grey)
ND_FiInlet := 3 in
RoomBox := Tank(Tank_Origin + [0; 0; H_Wall + T_TankWall], [L_Wall; W_Wall; H_Room], T_TankWall)
HatchLedge := BoxF([-(W_ChemPlatform*3/4); W_Wall - 1.05*ConRadius(ND_FiInlet) - S_Fitting; H_Wall] + Tank_Origin, [
    -(W_ChemPlatform*3/4) - 71.35 cm;
    W_Wall - 1.05*ConRadius(ND_FiInlet) - S_Fitting - S_Walkway;
    H_Wall + T_TankWall + S_Fitting
] + Tank_Origin, [0; 0; 0]*deg)
RoomFrz := FreezeLayer("Room")
HatchLedgeCut := BoxF([-(W_ChemPlatform*3/4) - 10 cm; W_Wall - 1.05*ConRadius(ND_FiInlet) - 3*S_Fitting; H_Wall] + Tank_Origin, [
    -(W_ChemPlatform*3/4) - 61.35 cm;
    W_Wall - 1.05*ConRadius(ND_FiInlet) - S_Walkway + S_Fitting;
    H_Wall + T_TankWall + S_Fitting
] + Tank_Origin, [0; 0; 0]*deg)
DrainWedge := WedgeF([
    -L_Wall + ConRadius(ND_SystemDrain) + outerradius(ND_SystemDrain) + S_Fitting;
    0;
    H_Wall + T_TankWall
] + Tank_Origin, [
    -L_Wall + 3*ConRadius(ND_SystemDrain) + outerradius(ND_SystemDrain) + S_Fitting;
    2*outerradius(ND_SystemDrain);
    H_Wall + T_TankWall - outerradius(ND_SystemDrain)
] + Tank_Origin, [90; 0; 0]*deg)
SubtractDrainWedge := SubtractF(["Room"], "DeleteMe")
ND_ChemVent := 2 in
H_Vent := 19 in
Room := stack(RoomLyr, RoomBox, HatchLedge, RoomFrz, HatchLedgeCut, DrainWedge, GroupDelete, SubtractDrainWedge)
ChemVentCoupling_Origin := [
    Tank_Origin[0] - L_Wall - T_TankWall + CouplingLength(ND_ChemVent) - SocketDepth(ND_ChemVent);
    ChlorTank_Origin[1];
    ChlorTank_Origin[2] + H_ChlorineTank + H_Vent + ElbowRadius(ND_ChemVent)
]
ChemVentElbow_Origin := [
    ChlorTank_Origin[0];
    ChemVentCoupling_Origin[1];
    ChemVentCoupling_Origin[2] - ElbowRadius(ND_ChemVent)
]
ChemVentLyr := layer_new("ChemVent", blue)
ChemVentCoupling := CouplingSUBF(ChemVentCoupling_Origin, [0; 0]*deg, ND_ChemVent, PS_Fi, ["Room"])
ChemVentElbow := ElbowF(ChemVentElbow_Origin, [0; 0; 90]*deg, ND_ChemVent, PS_Fi)
ChemVentPipe := PipeSUBF(ChemVentElbow_Origin + [-ElbowRadius(ND_ChemVent); 0; ElbowRadius(ND_ChemVent)], ChemVentElbow_Origin[0] - ChemVentCoupling_Origin[0] - ElbowRadius(ND_ChemVent), [0; 0]*deg, ND_ChemVent, PS_Fi, ["Room"])
ChemVentFrz := FreezeLayer("ChemVent")
ChemVent := stack(ChemVentLyr, ChemVentCoupling, ChemVentElbow, ChemVentPipe, ChemVentFrz)
RawWaterInletCoupling_Origin := [
    CouplingLength(ND_Transmission) - SocketDepth(ND_Transmission);
    S_Fitting + ConRadius(ND_Transmission);
    S_Fitting + ConRadius(ND_Transmission)
] + FlowMeteringTank_Origin
RawWaterInletLyr := layer_new("RawWaterInlet", blue)
RawWaterInletCoupling := CouplingSUBF(RawWaterInletCoupling_Origin, [0; 0]*deg, ND_Transmission, PS_Fi, ["Room"])
L_RawWaterInletPipe := T_TankWall*2
RawWaterInletPipe := PipeSUBF(RawWaterInletCoupling_Origin + [L_RawWaterInletPipe; 0; 0], L_RawWaterInletPipe, [0; 0]*deg, ND_Transmission, PS_Fi, ["Room"])
RawWaterInletFrz := FreezeLayer("RawWaterInlet")
RawWaterInlet := stack(RawWaterInletLyr, RawWaterInletCoupling, RawWaterInletPipe, RawWaterInletFrz)
HatchLyr := layer_new("StorageHatch", ltgrey)
HatchBox := BoxSUBF([
    -(W_ChemPlatform*3/4) - 5 cm;
    W_Wall - 1.05*ConRadius(ND_FiInlet) - 2*S_Fitting;
    H_Wall + T_TankWall + S_Fitting
] + Tank_Origin, [
    -(W_ChemPlatform*3/4) - 66.3 cm;
    W_Wall - 1.05*ConRadius(ND_FiInlet) - S_Walkway;
    H_Wall + T_TankWall
] + Tank_Origin, [0; 0; 0]*deg, ["Room"])
HatchFrz := FreezeLayer("StorageHatch")
DoorLyr := layer_new("Door", red)
DoorBox := BoxSUBF([-W_ChemPlatform; W_Wall; H_Wall + T_TankWall + 6 cm] + Tank_Origin, [-W_ChemPlatform/2; T_TankWall + W_Wall; H_Wall + T_TankWall + 6.5 ft] + Tank_Origin, [0; 0; 0]*deg, ["Room"])
DoorFrz := FreezeLayer("Door")
Door := stack(DoorLyr, DoorBox, DoorFrz)
RoofLyr := layer_new("Roof", purple)
RoofBox := BoxF(Tank_Origin + [T_TankWall + zc; W_Wall + T_TankWall + zc; H_Room + H_Wall + T_TankWall], Tank_Origin + [-W_Wall - T_TankWall; -T_TankWall - zc; H_Room + H_Wall + T_TankWall + zc], [0; 0; 0]*deg)
FrzRoof := FreezeLayer("Roof")
Roof := stack(RoofLyr, RoofBox, FrzRoof)
StorageTankLyr := layer_new("StorageTank", grey)
FiTank := Tank(Tank_Origin, [L_Wall; W_Wall; H_Wall], T_TankWall)
StorageTanksFrz := FreezeLayer("StorageTank")
FlowMeteringTankLyr := layer_new("FlowMeteringTank", grey)
FlowMeteringTank := Tank(FlowMeteringTank_Origin, [L_Et; W_Et; H_Et], T_Et)
FlowMeteringTankFrz := FreezeLayer("FlowMeteringTank")
ChemTubeToLFOMLyr := layer_new("ChemDoseTubeToLFOM", blue)
ChemTubeToLFOMPipe := PipeSUBF([-L_Et; S_Fitting + ConRadius(ND_RMPipe); CapHeight(ND_RMPipe)/2] + FlowMeteringTank_Origin, T_Et, [0; 0]*deg, 0.5 in, PS_Fi, ["FlowMeteringTank"])
ChemTubeToLFOMFrz := FreezeLayer("ChemDoseTubeToLFOM")
ChemTubeToLFOM := stack(ChemTubeToLFOMLyr, ChemTubeToLFOMPipe, ChemTubeToLFOMFrz)
BaffleLyr := layer_new("Baffle", purple)
Baffle := BoxSUBF([-15 cm; -S_Fitting; 1.5*S_Fitting] + FlowMeteringTank_Origin, [-15 cm - T_SedWeir; W_Et + S_Fitting; H_Et] + FlowMeteringTank_Origin, [0; 0; 0]*deg, ["FlowMeteringTank"])
BaffleFrz := FreezeLayer("Baffle")
EtScript := stack(FlowMeteringTankLyr, FlowMeteringTank, FlowMeteringTankFrz, BaffleLyr, Baffle, BaffleFrz, ChemTubeToLFOM)
Tanks := stack(Room, FiTank, StorageTanksFrz, EtScript, HatchLyr, HatchBox, HatchFrz, Door, Roof, ChemVent, RawWaterInlet)
# LFOM Plumbing
LfomCoupling_Origin := [
    -L_Et + S_Fitting + ConRadius(ND_RMPipe);
    ConRadius(ND_RMPipe) + S_Fitting;
    -SocketDepth(ND_RMPipe)
] + FlowMeteringTank_Origin
RMPipeLyr := layer_new("RapidMixPipes", blue)
CapHeight(ND_EtFloat) + S_Fitting = 0.177 m
Lfom := PipeF(LfomCoupling_Origin, H_Et, [0; 90]*deg, ND_RMPipe, PS_Fi)
H_Et = 0.588938 m
LfomOrifices :=
    Local ← Lfom
    for h ∈ 0 .. last(H_LfomOrifices)
        if N_LfomOrifices[h] ≠ 0
            Local ← stack(Local, CylinderF([
                LfomCoupling_Origin[0];
                LfomCoupling_Origin[1];
                FlowMeteringTank_Origin[2] + H_Et - H_Freeboard + H_LfomOrifices[h] - HL_Lfom
            ], D_LfomOrifices/2, outerradius(ND_RMPipe) + zc, [
                (asin(0.5*S_LfomOrificesMin/(2*outerradius(ND_RMPipe))) + asin(D_LfomOrifices/(2*outerradius(ND_RMPipe))))*(mod(h, 2) == 0);
                0 deg
            ]))
        if N_LfomOrifices[h] > 1
            Local ← stack(Local, ArrayLastPolar([
                LfomCoupling_Origin[0];
                LfomCoupling_Origin[1];
                FlowMeteringTank_Origin[2] + H_Et - H_Freeboard - HL_Lfom + H_LfomOrifices[h]
            ], N_LfomOrifices[h], (N_LfomOrifices[h] - 1)*(2*asin(D_LfomOrifices/(2*outerradius(ND_RMPipe))) + 2*asin(S_LfomOrificesMin/(2*outerradius(ND_RMPipe))))))
    return Local
SubtractLfomOrifices := stack(view("t"), SubtractAll(LfomCoupling_Origin + [0; outerradius(ND_RMPipe); 0]))
N_LfomOrifices = [14; 3; 4; 3; 3; 3; 2; 2]
RMPipeFrz := FreezeLayer("RapidMixPipes")
H_LfomOrifices = [0.0119062; 0.0369063; 0.0619062; 0.0869063; 0.111906; 0.136906; 0.161906; 0.186906] m
D_LfomOrifices = 23.8125 mm
RMPipes := stack(RMPipeLyr, LfomOrifices, SubtractLfomOrifices, RMPipeFrz)
outerdiameter(8 in)*π/14 = 4.91603 cm
RMFitLyr := layer_new("RapidMixFittings", green)
outerdiameter(8 in) = 0.219075 m
outerdiameter(8 in)*π = 0.688244 m
625 mm/14 = 4.46429 cm
RMCoupling := CouplingSUBF(LfomCoupling_Origin, [0; 270; 0]*deg, ND_RMPipe, PS_Fi, ["FlowMeteringTank"])
outerdiameter(8 in)*π = 0.688244 m
RMFitFrz := FreezeLayer("RapidMixFittings")
RMFittings := stack(RMFitLyr, RMCoupling, RMFitFrz)
H_LfomOrifices[2] - H_LfomOrifices[1] = 0.025 m
RMPlumbing := stack(RMPipes, RMFittings)
# Chemical Doser
LA_Origin := [
    FlowMeteringTank_Origin[0] - L_Et - T_Et;
    FlowMeteringTank_Origin[1] + W_Et - ConRadius(ND_EtFloat) - S_Fitting;
    FlowMeteringTank_Origin[2] + H_Et + D_LABOrigintoLAOriginZ
] = [-0.775; 0.357925; 3.86434] m
LADtFitting_Origin := [
    LA_Origin[0] + L_CdcLever - L_LAOriginToDtY + innerdiameter(ND_DropTube, PS_Modules)/2 - .02 in;
    LA_Origin[1] + 1/8*in + L_LAOriginToDtCenterX;
    L_LAOriginToDtZ + LA_Origin[2]
]
LAReducerFitting_Origin := [-L_LAOriginToReducerY - T_CdcReducer + L_CdcLever/2; L_LAOriginToReducerX; L_LAOriginToDtZ] + LA_Origin
LADt_Center := [
    LA_Origin[0] + L_CdcLever - L_LAOriginToDtY;
    LA_Origin[1] + L_LAOriginToDtCenterX;
    LA_Origin[2] + L_LAOriginToDtZ + H_LeverArm
]
LAReducer_Center := LA_Origin + [-L_LAOriginToReducerCenterY; L_LAOriginToReducerCenterX; L_LAOriginToDtZ]
CdcSliderLyr := layer_new("CdcSlider", grey)
Slider := BoxF([LADt_Center[0] - 1 in; LADt_Center[1] - outerradius(ND_DropTube); LA_Origin[2] - 1/4*in], [
    LADt_Center[0] + 1 in;
    LADt_Center[1] - outerradius(ND_DropTube) - 3/4*in;
    LA_Origin[2] + H_LeverArm - 1/4*in
], [0; 0; 0]*deg)
CdcSliderFrz := FreezeLayer("CdcSlider")
LArmSubBox := BoxF([LADt_Center[0] - 0.2 in; LA_Origin[1] + 1/8*in; LA_Origin[2]], [LADt_Center[0] + 0.2 in; LA_Origin[1]; LA_Origin[2] + H_LeverArm], [0; 0; 0]*deg)
SubtractLArm := SubtractF(["CdcSlider"], "DeleteMe")
CdcSlider := stack(CdcSliderLyr, Slider, CdcSliderFrz, LArmSubBox, GroupDelete, SubtractLArm)
W_Bracket := 2 in
CdcBracketLyr := layer_new("CdcBracket", ltgrey)
Bracket := BoxF([LA_Origin[0]; LA_Origin[1] + 1 in; FlowMeteringTank_Origin[2] + H_Et], [LA_Origin[0] + 0.25 in; LA_Origin[1] - 1 in; LA_Origin[2] + H_LeverArm], [0; 0; 0]*deg)
CdcBracketFrz := FreezeLayer("CdcBracket")
CdcBracket := stack(CdcBracketLyr, Bracket, CdcBracketFrz)
CdcLayer := layer_new("CdcLayer", ltgrey)
LArm := BoxF([LA_Origin[0] - L_CdcLever - 1/2*in; LA_Origin[1] + 1/8*in; LA_Origin[2]], [LA_Origin[0] + L_CdcLever + 1/2*in; LA_Origin[1] - 1/8*in; LA_Origin[2] + H_LeverArm], [0; 0; 0]*deg)
LArmBar := CylinderSUBF([LA_Origin[0]; LA_Origin[1] + 1.1 in; LA_Origin[2] + H_LeverArm/2], R_LArmBar, 2.2 in, [90; 0]*deg, ["CdcLayer"])
DropTube1 := PipeF(LADt_Center, 35 cm, [0; -90]*deg, ND_DropTube, PS_Modules)
InsertCht := insertdwg("https://confluence.cornell.edu/download/attachments/173604905/CdcCht.dwg", CHT_Origin, 1, 1, 90 deg)
FreezeCdcLayer := FreezeLayer("CdcLayer")
CdcFloatLyr := layer_new("CdcFloat", yellow)
L_CdcFloat := LA_Origin[2] - (FlowMeteringTank_Origin[2] + H_Et - H_Freeboard - HL_Lfom + CapHeight(ND_EtFloat)) = 0.1984 m
FloatCable := CylinderF([
    LA_Origin[0] + L_CdcLever;
    LA_Origin[1];
    FlowMeteringTank_Origin[2] + H_Et - H_Freeboard - HL_Lfom + CapHeight(ND_EtFloat)
], D_Cable, L_CdcFloat, [0; 90]*deg)
CdcFloatCapTop := CapF([
    LA_Origin[0] + L_CdcLever;
    LA_Origin[1];
    FlowMeteringTank_Origin[2] + H_Et - H_Freeboard - HL_Lfom + CapHeight(ND_EtFloat) - CapThickness(ND_EtFloat)
], [0; -90]*deg, ND_EtFloat)
CdcFloatCapBottom := CapF([
    LA_Origin[0] + L_CdcLever;
    LA_Origin[1];
    FlowMeteringTank_Origin[2] + H_Et - H_Freeboard - HL_Lfom - CapHeight(ND_EtFloat) + CapThickness(ND_EtFloat)
], [0; 90]*deg, ND_EtFloat)
CdcFloatPipe := PipeF([
    LA_Origin[0] + L_CdcLever;
    LA_Origin[1];
    FlowMeteringTank_Origin[2] + H_Et - H_Freeboard - HL_Lfom + CapHeight(ND_EtFloat) - CapThickness(ND_EtFloat)
], 2*CapHeight(ND_EtFloat) - 2*CapThickness(ND_EtFloat), [0; -90]*deg, ND_EtFloat, PS_Default)
CdcFloatFrz := FreezeLayer("CdcFloat")
CdcFloat := stack(CdcFloatLyr, FloatCable, CdcFloatCapTop, CdcFloatCapBottom, CdcFloatPipe, CdcFloatFrz)
ChemDoser := stack(CdcSlider, CdcBracket, CdcLayer, LArm, LArmBar, DropTube1, FreezeCdcLayer, CdcFloat)
ND_ChemPlu := 1/2*in
# Chemical Tank
# Origin points
ChlorTank_Origin = [-2.62; 0.38; 4.03894] m
ChlorOutlet_Origin := [
    ChlorTank_Origin[0] + R_ChlorineTank + T_ChemTankWall;
    ChlorTank_Origin[1];
    Z_ChlorTank + B_StockOutlet
]
ChlorMtFAdapter_Origin := ChlorOutlet_Origin + [BulkheadThreadLength(ND_ChemPlu) - SocketDepth(ND_ChemPlu) + CouplingLength(ND_ChemPlu); 0; 0]
ChlorBallValve_Origin := [BallValveLength(ND_ChemPlu) + SocketDepth(ND_ChemPlu) - BallValveSocket(ND_ChemPlu); 0; 0] + ChlorMtFAdapter_Origin
# Chem Tanks
CHT_Origin := [
    ChlorTank_Origin[0] + 2*R_ChlorineTank;
    Tank_Origin[1] + 7.5 cm;
    FlowMeteringTank_Origin[2] + H_Et + 5 cm
]
CHTElbow_Origin := CHT_Origin + [15 cm; -7.5 cm + ConRadius(ND_ChlorCalCol); -5 cm]
ChemTankLyr := layer_new("ChemicalTank", yellow)
ChlorTank := CylinderF(ChlorTank_Origin, R_ChlorineTank + T_ChemTankWall, H_ChlorineTank + T_ChemTankWall, [0; 90]*deg)
CHT := insertdwg("CdcCht", CHT_Origin, 3.6, 3.6, 0 deg)
CHTElbow := ElbowF(CHTElbow_Origin, [270; 0; 90]*deg, ND_ChlorCalCol, PS_Fi)
CalColPipe := PipeF(CHTElbow_Origin + [ElbowRadius(ND_ChlorCalCol); 0; ElbowRadius(ND_ChlorCalCol)], H_CalCol, [0; 90; 0]*deg, ND_ChlorCalCol, PS_Fi)
ChemTankFrz := FreezeLayer("ChemicalTank")
ChlorineTankInner := CylinderF(ChlorTank_Origin + [0; 0; T_ChemTankWall], R_ChlorineTank, H_ChlorineTank, [0; 90]*deg)
HollowTanks := SubtractF(["ChemicalTank"], "DeleteMe")
ChemTanksScript := stack(ChemTankLyr, ChlorTank, CHT, CHTElbow, CalColPipe, ChemTankFrz, ChlorineTankInner, GroupDelete, HollowTanks)
ChemTankStandLyr := layer_new("ChemTankStand", green)
ChemStandCylinder := CylinderF(ChlorTank_Origin, R_ChlorineTank + 2*T_ChemTankWall, Z_ChlorTank - FlowMeteringTank_Origin[2], [0; 270]*deg)
ChemTankStandFrz := FreezeLayer("ChemTankStand")
ChemTankCylinderCut := CylinderF(ChlorTank_Origin + [0; 0; zc], R_ChlorineTank - T_ChemTankWall, Z_ChlorTank - FlowMeteringTank_Origin[2] + 2*zc, [0; 270]*deg)
ChemTankBoxCut := BoxF([0; 2.6*R_ChlorineTank/3; -2*T_ChemTankWall] + ChlorTank_Origin, [
    R_ChlorineTank + zc + ChlorTank_Origin[0];
    -2.6*R_ChlorineTank/3 + ChlorTank_Origin[1];
    FlowMeteringTank_Origin[2]
], [0; 0; 0]*deg)
RotateChemCutBox := ArrayLastPolar([ChlorTank_Origin[0]; ChlorTank_Origin[1]], 3, 360 deg)
SubtractStand := SubtractF(["ChemTankStand"], "DeleteMe")
ChemStand := stack(ChemTankStandLyr, ChemStandCylinder, ChemTankStandFrz, ChemTankCylinderCut, ChemTankBoxCut, RotateChemCutBox, GroupDelete, SubtractStand)
# Draw the chlorine tank plumbing
LayerChlorPieces := layer_new("ChlorConnectionsPlu", green)
ChlorBulkheadFitting := InsertDwg(BulkheadDwg, ChlorOutlet_Origin, ND_ChemPlu, 0 deg)
ChlorOutletAdapter := CouplingF(ChlorMtFAdapter_Origin, [0; 0; 0]*deg, ND_ChemPlu, PS_Fi)
ChlorBallValve := InsertDwg(BallValveDwg, ChlorBallValve_Origin, ND_ChemPlu, 0 deg)
ChlorDrainBulkheadFitting := InsertDwg(BulkheadDwg, [ChlorTank_Origin[0]; ChlorTank_Origin[2]; -ChlorTank_Origin[1]], ND_ChemPlu, 270 deg)
LayerChlorPiecesFrz := FreezeLayer("ChlorConnectionsPlu")
LayerChlorPiping := layer_new("ChlorPipingPlu", blue)
FirstChlorPipe := PipeF(FirstChlorPipe_Origin, L_FirstPipe, [0; 0]*deg, ND_CoagPiping, PS_Modules)
SecondChlorPipe := PipeF(SecondChlorPipe_Origin, L_SecondPipe, [0; 0]*deg, ND_CoagPiping, PS_Modules)
FirstChlorElbow := ElbowF(FirstChlorElbow_Origin, [0; 0; 180]*deg, ND_CoagPiping, PS_Modules)
SecondChlorElbow := ElbowF([ChlorineTank_Origin[0]; ThirdFCPipe_Origin[1]; ThirdFCPipe_Origin[2] - L_ThirdPipe1], [0; 270; 270]*deg, ND_CoagPiping, PS_Modules)
Chlor2ChlorPipe := PipeF([
    ChlorineTank_Origin[0];
    ThirdChlorPipe_Origin[1] - ElbowRadius(ND_CoagPiping) - L_Chlor2ChlorPipe;
    ThirdChlorPipe_Origin[2] - L_ThirdPipe
], L_Chlor2ChlorPipe, [270; 0]*deg, ND_CoagPiping, PS_Modules)
LayerChlorPipingFrz := FreezeLayer("ChlorPipingPlu")
ChlorPlu := stack(LayerChlorPieces, ChlorBulkheadFitting, ChlorOutletAdapter, ChlorBallValve, view("f"), ChlorDrainBulkheadFitting, view("t"), LayerChlorPiecesFrz)
# Plant Drain
DrainCoupling_Origin := [-W_Wall + S_Fitting + ConRadius(ND_SystemDrain); -SocketDepth(ND_SystemDrain); H_Wall + T_TankWall] + Tank_Origin
DrainElbowUpper_Origin := [
    DrainCoupling_Origin[0];
    Tank_Origin[1] - max(0, CouplingLength(ND_SystemDrain) - T_TankWall) - T_TankWall - SocketDepth(ND_SystemDrain);
    DrainCoupling_Origin[2]
]
DrainElbowLower_Origin := DrainElbowUpper_Origin + [0; -2*ElbowRadius(ND_SystemDrain); -Z_BottomLowerTank]
DrainLyr := layer_new("PlantDrain", blue3)
DrainCoupling := CouplingSUBF(DrainCoupling_Origin, [90; 0]*deg, ND_SystemDrain, PS_Fi, ["Room"])
DrainElbowUpper := ElbowF(DrainElbowUpper_Origin, [180; 90; 0]*deg, ND_SystemDrain, PS_Fi)
DrainPipeHoriz := PipeSUBF(DrainElbowUpper_Origin, DrainCoupling_Origin[1] - DrainElbowUpper_Origin[1] - CouplingLength(ND_SystemDrain) + SocketDepth(ND_SystemDrain), [270; 0]*deg, ND_SystemDrain, PS_Fi, ["Room"])
DrainElbowLower := ElbowF(DrainElbowLower_Origin, [0; 90; 0]*deg, ND_SystemDrain, PS_Fi)
DrainPipeVert := PipeF(DrainElbowLower_Origin + [0; ElbowRadius(ND_SystemDrain); ElbowRadius(ND_SystemDrain)], DrainElbowUpper_Origin[2] - DrainElbowLower_Origin[2] - 2*ElbowRadius(ND_SystemDrain), [0; 90]*deg, ND_SystemDrain, PS_Fi)
DrainFrz := FreezeLayer("PlantDrain")
Drain := stack(DrainLyr, DrainCoupling, DrainElbowUpper, DrainPipeHoriz, DrainElbowLower, DrainPipeVert, DrainFrz)
# Stock Tank Mixer
ND_Mixer := 1.5 in
L_ShortPipe := 3 in
L_RotationRod := H_ChlorineTank - 6 in - ConRadius(ND_Mixer) - ShortTeeLength(ND_Mixer)
L_SpoutRod := R_ChlorineTank - 5 in - ElbowRadius(ND_Mixer) - ShortTeeLength(ND_Mixer)
L_HandleVert := 6 in + 2 in
L_HandleHoriz := 8 in
L_HandleVertUpper := 6 in = 0.1524 m
MixerReducer_Origin := [0; 0; L_ShortPipe] + ChlorTank_Origin
MixerTee_Origin := MixerReducer_Origin + [ShortTeeLength(ND_Mixer); 0; L_RotationRod + ShortTeeLength(ND_Mixer)]
MixerElbow_Origin := MixerTee_Origin + [L_SpoutRod + ElbowRadius(ND_Mixer); -ElbowRadius(ND_Mixer); 0]
MixerHandleElbowCenterLower_Origin := [ChlorTank_Origin[0]; ChlorTank_Origin[1]; MixerTee_Origin[2] + L_HandleVertUpper]
MixerHandleElbowExtendLower_Origin := MixerHandleElbowCenterLower_Origin + [-L_HandleHoriz; 0; ElbowRadius(ND_Mixer)]
MixerHandleElbowExtendUpper_Origin := MixerHandleElbowExtendLower_Origin + [-ElbowRadius(ND_Mixer); 0; 2*SocketDepth(ND_Mixer) + L_HandleVertUpper]
MixerHandleElbowCenterUpper_Origin := [
    MixerHandleElbowCenterLower_Origin[0] - ElbowRadius(ND_Mixer);
    MixerHandleElbowCenterLower_Origin[1];
    MixerHandleElbowExtendUpper_Origin[2] + ElbowRadius(ND_Mixer)
]
MixerFittingLyr := layer_new("StockMixerFitting", green)
MixerReducer := reducerF(MixerReducer_Origin, [0; 270; 0]*deg, ND_Mixer, ND_ChemPlu, ND_Mixer, PS_Fi)
MixerTee := TeeF(MixerTee_Origin, [270; 0; 90]*deg, ND_Mixer, PS_Fi)
MixerElbow := ElbowF(MixerElbow_Origin, [0; 0; 0]*deg, ND_Mixer, PS_Fi)
MixerHandleElbowCenterLower := ElbowF(MixerHandleElbowCenterLower_Origin, [0; 0; 90]*deg, ND_Mixer, PS_Fi)
MixerHandleElbowExtendLower := ElbowF(MixerHandleElbowExtendLower_Origin, [90; 0; 270]*deg, ND_Mixer, PS_Fi)
MixerHandleElbowExtendUpper := ElbowF(MixerHandleElbowExtendUpper_Origin, [180; 0; 270]*deg, ND_Mixer, PS_Fi)
MixerHandleElbowCenterUpper := ElbowF(MixerHandleElbowCenterUpper_Origin, [270; 0; 90]*deg, ND_Mixer, PS_Fi)
MixerFittingFrz := FreezeLayer("StockMixerFitting")
MixerFitting := stack(MixerFittingLyr, MixerReducer, MixerTee, MixerElbow, MixerHandleElbowCenterLower, MixerHandleElbowExtendLower, MixerHandleElbowExtendUpper, MixerHandleElbowCenterUpper, MixerFittingFrz)
MixerPluLyr := layer_new("StockMixerPipe", blue)
MixerShortPipe := PipeF(ChlorTank_Origin, L_ShortPipe - ND_Mixer, [0; 90]*deg, ND_ChemPlu, PS_Fi)
RotationRod := PipeF(MixerTee_Origin + [-ShortTeeLength(ND_Mixer); 0; -ShortTeeLength(ND_Mixer)], L_RotationRod, [0; 270]*deg, ND_Mixer, PS_Fi)
SpoutRod := PipeF(MixerElbow_Origin + [-ElbowRadius(ND_Mixer); ElbowRadius(ND_Mixer); 0], MixerElbow_Origin[0] - MixerTee_Origin[0] - ElbowRadius(ND_Mixer), [0; 0]*deg, ND_Mixer, PS_Fi)
VertHandle := PipeF(MixerHandleElbowCenterLower_Origin, MixerHandleElbowCenterLower_Origin[2] - MixerTee_Origin[2] - ShortTeeLength(ND_Mixer), [0; 270]*deg, ND_Mixer, PS_Fi)
HorizHandleLower := PipeF(MixerHandleElbowCenterLower_Origin + [-ElbowRadius(ND_Mixer); 0; ElbowRadius(ND_Mixer)], L_HandleHoriz - ElbowRadius(ND_Mixer), [0; 0]*deg, ND_Mixer, PS_Fi)
VertHandleUpper := PipeF(MixerHandleElbowExtendUpper_Origin, L_HandleVertUpper, [0; 270]*deg, ND_Mixer, PS_Fi)
HorizHandleUpper := PipeF(MixerHandleElbowCenterUpper_Origin, L_HandleHoriz - ElbowRadius(ND_Mixer), [0; 0]*deg, ND_Mixer, PS_Fi)
MixerPluFrz := FreezeLayer("StockMixerPipe")
MixerPlu := stack(MixerPluLyr, MixerShortPipe, RotationRod, SpoutRod, VertHandle, HorizHandleLower, VertHandleUpper, HorizHandleUpper, MixerPluFrz)
Mixer := stack(MixerFitting, MixerPlu)
1/4*in = 0.00635 m
# [component: inputs stack(Tanks, RMPlumbing, ChemDoser, ChemTanksScript, ChemStand, ChlorPlu, Drain, Mixer)]
