# [component: outputs EN_Coag]
# I propose that we make all dosers using the 1/8" tubing.
# We need a design that makes it easy to install different numbers of dosing tubes.
# At a certain number of dosing tubes it will be necessary to switch to a different float valve. We need to identify that transition and at that transition it would make sense to switch to larger diameter feed tubes for the CHT.
C_CoagMax := 60*mg/L
Pi_CdcError := 10 %
HL_CdcTube := 20 cm
D_CdcTube := 1/8*in
Q_Plant := 50*L/s
K_Minor := 4
Nu_Water := 1*mm^2/s
C_CoagStockMax := 300*gm/L
Nu_Alum(C_Alum) := (1 + 4.255*10^-6*(C_Alum/(kg/m^3))^2.289)*Nu_Water
Nu_PACl(C_PACl) := (1 + 2.383*10^-5*(C_PACl/(kg/m^3))^1.893)*Nu_Water
Nu_Coag(C_Coag, EN_Coag) :=
    Nu ← Nu_Alum(C_Coag) if EN_Coag == 0
    Nu ← Nu_PACl(C_Coag) otherwise
    return Nu
Q_KError(D, HL_Max, K_Minor, Pi_CdcError) := π*D^2/4*sqrt(2*(1 - Pi_CdcError)*Pi_CdcError*HL_Max*g/K_Minor)
# Length of tube required to get desired head loss at maximum flow based on the Hagen-Poiseuille equation with minor losses.
L_tube(Q_max, D, h_lmax, ν, K_Minor) := (h_lmax*(g*π*D^4)/Q_max - K_Minor*8*Q_max/π)/(128*ν)
Q_CoagCdcDosingTube := Trunc(Q_KError(D_CdcTube, HL_CdcTube, K_Minor, Pi_CdcError), 1*mL/s) = 2 mL/s
N_CoagCdcTubes := ceil(C_CoagMax*Q_Plant/(C_CoagStockMax*Q_CoagCdcDosingTube)) = 6
Q_CoagStock := 2*mL/s*N_CoagCdcTubes = 12 mL/s
C_CoagStock := C_CoagMax*Q_Plant/Q_CoagStock = 250 gm/L
L_CoagCdcTube := L_tube(Q_CoagStock/N_CoagCdcTubes, D_CdcTube, HL_CdcTube, Nu_Coag(C_CoagStock, EN_Coag), K_Minor) = 1.25304 m
# Need the following...
# select correct Kerick valve based on coag flow and allowable head loss between stock tank and constant head tank
# Select flexible tubing size between stock tank and CHT.
# Select connectors/adaptors required.
