# [reference: MasterProgram.xmcd]
# Naming conventions aren't followed in this file.
# Eliminate the Fcm designations. We no longer using the Fcm (linear flow control module)
# [reference: BasicInputs lxa3.xmcd]
# This is the elevation difference between stock tank outlet and floatvalve
# We need to select a floatvalve that can operate with a reasonable amount of head. Perhaps 30 cm max. This doesn't have anything to do with the height of the Alum Stock Tank
H_MinAlumTank := 0.3 m + 0.4 m - 0.1 m
# This needs to be redone. I eliminated the orifice equation here because it wrongly assumed that we would use the same float valve for all plants. Large flows can't be handled by the tiny float valve that we are using in small plants.
#
# I don't know how this parameter is defined, but it seems to be the difference between the top of the entrance tank and the bottom of the stock tanks.
#
# In this equation 0.3 m is for the head loss through the float valve, 0.4 m is for the head loss through the dosing orifice, and -0.1 m is because the outlet for the stock tank is 0.1 m above the bottom.
V_AlumTank := Ti_AlumStock*C_CoagDoseMax = 6480 kg*s/m^3
# tanks have a 1.5 height to diameter ratio
Ratio_HeightToDiameterStockTank =  # error: This variable is undefined.  # Defined in the expert inputs
V_AlumTank == π*R_AlumTank^2*H_AlumTank  # disabled
R_AlumTank := (V_AlumTank/(2*π*Ratio_HeightToDiameterStockTank))^(1/3)  # error: This variable is undefined.
V_AlumTank == π*R_AlumTank^3*2*Ratio_HeightToDiameterStockTank  # disabled
H_AlumTank := Ratio_HeightToDiameterStockTank*2*R_AlumTank  # error: This variable is undefined.
# 2mg/L * Q.Plant=50gram/L*Q.Stock
V_ChlorineTank := Ti_ChlorineStock*C_ChlorineDoseMax = 216 kg*s/m^3
R_ChlorineTank := (V_ChlorineTank/(2*π*Ratio_HeightToDiameterStockTank))^(1/3)  # error: This variable is undefined.
