# [reference: MasterProgram.xmcd]
Q_Plant = 0.05 m^3/s
Q_FcmAlum := Q_Plant*C_FcmDoseMax/C_FcmAlum = 3.75e-5 m^3/s
C_FcmDoseMax = 0.09 kg/m^3
Q_FcmAlum = 3.75e-5 m^3/s
htank(Qalummax, Kvc, Areaorificefloatvalve, g) := (Qalummax/(Kvc*Areaorificefloatvalve))^2/(2*g)
Vtank(Qalummax, tmin) := tmin*Qalummax
Diametertank(Vtank, htank) := 2*(Vtank/htank)^.5/π^.5
Qalummax(Kvc, Area, g, h) := Kvc*Areaorificefloatvalve*(g*2*htank)^.5  # error: This variable is undefined.
Qalummax(2*m^3/s, .001*g/L, 1*g/L) =  # error: This variable is undefined.
Qalummax(2*m^3/s, .001*g/L, 1*g/L) =  # error
