# INDEX
# Basis of Design Assumptions | Click on these titles to go to that section:
# Drum  Parameters
# Flocculation tank assumptions
# Used throughout program
sedlayout := 2
Plant_Origin := [0; 0; 0]*m
# Sedimentation tank assumptions
Nu_Water := 1*10^-6*m^2/s  # The kinematic viscosity of water.  # Launder Design and Sludge Assumptions
Re_PipeTransition := 2100  # Sedtank Drain assumptions
E_Pvc := 0.12 mm
# Plant Leveling Tank assumptions
E_Concrete := 2 mm
# Grit Chamber assumptions
E_ConcreteLedge := 0.014 mm
W_ApColumn := 20 cm
# Channel assumptions
L_ApColumn := 20 cm
H_ApColumn := 120 cm  # Chemical Feed Stock Assumptions:
W_CpColumn := 20 cm
# Plant Elevation Design Assumptions
L_CpColumn := 20 cm
# Minor Loss Coefficients
H_CpColumn := 120 cm
W_MpColumn := 30 cm
L_MpColumn := W_MpColumn
S_Elbow := 5 cm  # minimum space between elbows in a tank
T_PltWall := T_PlantWall
T_Ap := T_PlantWall
T_Cp := T_PlantWall
T_EtWall := T_PlantWall
# Stock Tank  Parameters
T_ChannelWall := T_PlantWall
D_Drum := 15 cm
H_Drum := 0.7 m
S_Drum := 15 cm
W_CpWalkway := 30 cm  # This is the extra space in addition to the chemical drums needed for walking on the chemical platform.
W_ApWalkway := 30 cm
# Flocculation tank assumptions
# One flocculation tank has the same volume as the one sedimentation tanks. We arrive at this conclusion because:
# The Length of the flocculator is based on the same length of the sedimentation tank. In order to save money on materials, it was decided to make the width of the flocculation tank 1/2 the size of the sedimentation tanks. Therefore, in order to transition nicely into the channel that distributes flow into the three sedimentation tanks, the flocculator is modeled as a U shape. (Currently, we have assumed 2 channels in the flocculator and 3 sedimentation tanks.)
# The depth of the flocculation tank is similarly set by the depth of the sedimentation tank.
# (These are currently the parameters which set the dimensions for the flocculator. Until research proves otherwise, this is what guides the motivation for the flocculator design.)
Pi_Epsilon := 0.84  # What is this value?
# This is the ratio between the design flow rate (max flow rate) and the minimum flow rate. The flocculator must be able to handle both.
Pi_QPlant := 0.5
H_FlocInletPipe := 15 cm  # This is the height of the inlet pipe to the flocculator above the floor of the sed tank
# Baffle Characteristics
Amp_FlocBaffle := .5 in
Per_FlocBaffle := 8.5
N_Baffle := 1
X_FlocBaffle := 4 in
AN_FlocBaffle := 90 deg
N_FlocBaffleCol := 1  # this is a constant!
Y_FlocBaffle := 7 cm
Baffle_complex := 0  # 0 if rectangular, 1 if baffle is corrugated
# Inlet Channel Assumptions:
S_SedInletChannelMin := 3 cm  # This is the space needed around the pipe delivering water from the inlet channel to the sed tank
Perpindicular_Weir := 0
Parallel_Weir := 1
# Floc Hopper Assumptions:
# This is at 100 NTU based on results from Matt Hurst. The floc blanket grows at a rate of 7.5 cm/hr when the upflow velocity is 100 m/day.
Phi_FB100NTU := 7.5*cm/hr/(100*m/day) = 0.018
# This is from the floc model with the 0.5 accounting for the fact that the floc model is predicting the floc volume fraction and the floc blanket includes water between the flocs. Note that this estimate is close to 5 times the 100 NTU measured values.
Phi_FB500NTU := 0.054/0.5 = 0.108
Rho_H2O := 1000*kg/m^3  # Density of water
Rho_FB := 1001*kg/m^3  # Density of Flocs
# Sedimentation tank assumptions
N_SedSlopeInlets := 1  # This is the number of inlets coming out of each of the Sedimentation tank Inlet Slopes.
N_SedInletSlopes := 2  # Number of inlet slopes into each sed bay, (it has to be two)
N_SedInletPipes := 2  # Number of pipes entering each slope pair.
Pi_SedAboveW := 0.12
# This is the ratio between the depth of the water between the top of the plate settlers and the effluent launders and the spacing between effluent launders
# height of water above the lamella over the width of the sed tank
# 12cm/42in
12 cm/(1 m) = 0.12
Pi_SedCell := 2
# This is equivalent to saying that all of the kinetic energy contained in the flow will be dissipated over a length scale of 2 times the smallest dimension of flow.
# SedPlate Characteristics
Amp_SedPlate := .5 in  # Amplitude of curves in Plate Settlers
Per_SedPlate := 8.5  # Period of curves in Plate Settlers
N_SedPlateCol := 1  # number of columns of Plate Settlers - this is a constant!
Y_SedPlate := 0 cm
# Launder Design and Sludge Assumptions
# And one row of these
L_PltAssumed := 0.8 m
# Length of Plant Leveling Tank assumed to calculate headloss through launders. Any difference from actual length is assumed to be negligible.
N_ElLaunder := 4  # Number of elbows in launder design
# Sedtank Drain assumptions
# Plant Leveling Tank assumptions
Cd_PltWeir := 0.61  # Weir coefficient
# This is the ratio between the maximum water depth above the weir and the diameter of the weir
Pi_PltWeir := 1/3
S_Plt := 10 cm  # Space for concrete between inlet pipes
# Entrance Tank assumptions
HL_EtFloc := 5 cm
H_LfomSF := 5 cm
N_Lfom := 1
HW_EtMin := 20 cm  # Minimum water level in the entrance tank
# Difference between the height of the water in floc tank and the bottom set of holes on the linear flow orifice meter
H_LfomFreefall := 5 cm
Pi_LfomH := 2/3
# Both of these assumptions were tested over a range of flow rates and found to give reasonable Lfom configurations.
# Elevation between orfice rows at which the flow is calibrated. A value of 1 corresponds to the elevation of the next row of orifices and a value of 0 corresponds to the elevation of the current row of orifices.
N_LfomOrificesFirstrow := 5
# Number of orfices in the first row of the Lfom used to determine size of orifices.
L_RmPipe := 20 cm
# The total pipe length between the orifices and the flocculator (rapid mix pipe) .
N_RmEl := 0
# Pipe connecting the Grit chamber to the floc tank has three elbows. Based on how the AutoCAD team draws this pipe. The minor loss coefficient for this is K.el90
N_RmTee := 0
# Pipe connecting the Grit chamber to the floc tank has one T. Based on how the AutoCAD team draws this pipe. The minor loss coefficient for this is either K.Tflowbr
HL_RmDesign := 20 cm
# This is the allowable head loss through the rapid mix pipe and is what is used to size the pipes from the grit chamber to the flocculator AND the flow measurement tubes in the grit chamber
HL_Lfom := 20 cm  # Head loss through the Lfom, and the minimum height of the water in the entrance tank.
B_LfomOrifice := 2 cm  # Veritical distance between orifices
Pi_LfomOrificeArea := 3
# Ratio of LFOM pipe area to orifice area. Note that for this calculation is based on the assumption of one orifice located HL.FlowMeter below the water surface.
H_dmax := 20 cm
Pi_Sutro := 0.1
Pi_Lfomorifice := 20
D_DrillEng :=
    i ← 0
    D_DrillEng[0] ← 1/16*in
    while D_DrillEng[i] < 1 in
        i ← i + 1
        D_DrillEng[i] ← D_DrillEng[i - 1] + 1/16*in
    while D_DrillEng[i] < 2 in
        i ← i + 1
        D_DrillEng[i] ← D_DrillEng[i - 1] + 1/8*in
    return D_DrillEng
D_DrillMet :=
    i ← 0
    D_DrillMet[0] ← 1 mm
    while D_DrillMet[i] < 20 mm
        i ← i + 1
        D_DrillMet[i] ← D_DrillMet[i - 1] + 1 mm
    while D_DrillMet[i] < 50 mm
        i ← i + 1
        D_DrillMet[i] ← D_DrillMet[i - 1] + 2 mm
    return D_DrillMet
D_Drill :=
    D_Drill ← D_DrillEng if EN_DrillSeries == 0
    D_Drill ← D_DrillMet otherwise
# Rapid Mix assumptions
Pi_Dmix := 2.4  # ratio of diffusion length scale to kolmogorov length scale (smallest eddies in turbulent flow)
Tau_diffusion := 10 s  # time scale of diffusion
D_m := 0.673*10^-5*cm^2/s  # Diffusion coefficient
Pi_EtFlow := 0.2  # Ratio in the entrance tank that makes the flow 20% of the max flow
Pi_EtHW := 0.08  # Corresponding height ratio in the entrance tank for 20% of the max flow
# Channel assumptions
S_ChannelPipeWall := 2 cm  # Extra space allowed on both sides of pipe to avoid interference with the channel walls
# Chemical Feed Stock Assumptions:
HL_FcmTube := 20 cm
HL_FcmValveFreefall := 5 cm
D_FcmValveOrifice := 0.093 in
C_AlumDoseMax := 60*mg/L
HL_FcmInletDesign := 20 cm
H_StockTankPort := 10 cm
L_FcmTubeMax := 3 m
ID_FcmTubeEnglish := [0.0625; 0.125; 0.17; 0.25; 0.3125; 0.375]*in
ID_FcmTubeMetric := [2; 3; 4; 5; 6; 7]*mm
# AutoCAD Assumptions:
H_Text := .05 m
Disclaimer := "Disclaimer: This drawing is a PRELIMINARY DESIGN and must be reviewed and approved by a professional engineer."
