# Entrance Box
# Flow Control Drain and Entrance Tank Walkway
# This feature is a pipe with a gate valve draining into the entrance tank drain channel from a pipe out of the entrance tank's first hopper. The purpose is to control the plant flow by wasting a certain amount of the influent. The operator will need to learn empirically how many turns of the valve handle will give the desired flow rates, which he will read off of a scale in the entrance tank.
HW_EtEst := 0.8 m
L_EtFlowControlPipeEst := 2 m
ND_EtFlowControl := D_pipeschedule(Q_Plant, PS_Default, HW_EtEst, L_EtFlowControlPipeEst, Nu_Water, E_Pvc, K_PipeExit + K_PipeEnt + K_GateValve + 2*K_El90)
W_EtWalkway := W_EtWalkwayMin
ND_EtOverflowDrain := D_PipeChannel(Q_Plant/2, PS_Default)
ND_EtInlet := D_pipe(Q_Plant, AvailND, 1 m, 100 m, Nu_Water, E_Concrete, K_PipeEnt + K_PipeExit)
# Overflow Channel
W_EtOverflowSlot := innerdiameter(ND_EtOverflowDrain, PS_Default)*sin(acos(1 - 2*0.9))
# This sizes the slot such that only 10% of the vertical dimension of the pipe is cut away.
L_EtChannelPipesMin := W_rectweir(Q_Plant, 5 cm)/2
L_EtOverflowWeirMin := 2*L_EtChannelPipesMin
H_EtOverflowCutaway := 0.1*innerdiameter(ND_EtOverflowDrain, PS_Default)
H_EtLFOMtoOverflow := 3 cm
# Length, Width, and Height Calculations
W_Et := max(L_EtChannelPipesMin, 2*ConRadius(ND_EtFloat) + S_EtFloat + 2*ConRadius(ND_RMPipe) + 3*S_Fitting)
L_EtChannelPipes := W_Et
L_EtOverflowWeir := 2*L_EtChannelPipes
A_EntranceFlow := 1.1*π/4*D_pipe(Q_Plant, AvailND, HL_Flowmeasure + S_Fitting + H_EtLFOMtoOverflow, HL_Flowmeasure + S_Fitting + H_EtLFOMtoOverflow, Nu_Water, E_Concrete, K_PipeEnt)^2
S_EtBaffleBottom := max(10 cm, A_EntranceFlow/W_Et)
S_EtBaffle := max(A_EntranceFlow/W_Et, 2*ConRadius(ND_EtInlet) + 2*S_Fitting)
HL_EtBaffle := K_FlocBaffle*(Q_Plant/(S_EtBaffle*W_Et))^2/(2*g)
L_Et := 2*(S_Fitting + ConRadius(ND_RMPipe)) + ElbowRadius(ND_EtOverflowDrain) + SocketDepth(ND_EtOverflowDrain) + ConRadius(ND_EtOverflowDrain) + S_Fitting + T_ConcreteMin + S_EtBaffle
H_Et := HL_Flowmeasure + HL_EtBaffle + S_Fitting + 2*CapHeight(ND_EtFloat) + H_PlantFreeboard
H_EtWaterRise := Headloss_weir(Q_Plant, L_EtOverflowWeir) + H_EtLFOMtoOverflow
# This is a conservative (high) estimate of the amount of freeboard which will be used up by the water level rise if double the plant capacity is flowing into the entrance tank (does not take into account the fraction of the additional flow which will flow through the LFOM due to the higher water level)
# Elevations
HW_Et := H_Et - H_PlantFreeboard
D_RMOrifice := D_PipeED(E_MaxRM, Q_Plant, Pi_VenaContractaOrifice, Pi_Jet)
HL_RMMicroOrifice := h_orifice(D_RMOrifice, Pi_VenaContractaOrifice, Q_Plant)
HL_RMPipe := h_l(Q_Plant, innerdiameter(ND_RMPipe, PS_Default), 2*HW_EtMax + W_EtWalkway, K_El90 + K_PipeExit, Nu_Water, E_Pvc)
# estimate the length of RM pipe using:2*HW_EtMax + W_EtWalkway
ZW_RMPipe := HW_Sed + HL_Floc + HL_RMPipe + HL_RMMicroOrifice  # Elevation of the water inside the rapid mix pipe in the Tee outside the entrance tank
ZW_Et := ZW_RMPipe + H_Freefall + HL_Flowmeasure + HL_RMPipe
# elevation of the maximum water level in the entrance tank (relative to plant datum)
# This freefall is a safety factor inside the lfom
Z_EtTop := ZW_Et + H_PlantFreeboard  # Elevation of the top of the entrance tank walls (includes freeboard)
Z_Et := ZW_Et - HW_Et  # This is the elevation of the bottom slab of the entrance tank
# bottom elevation of entrance tank (same as the drain entrance elevation)
Z_RmMicroMix := Z_SedWeirExit
# This is the maximum elevation of the micromix plate to ensure that it is submerged until the plant flow stops. Since we are putting the plate in the flocculator entrance coupling this should not be an issue.
# Linear case
Z_LfomOrifices := ZW_Et - HL_Flowmeasure + D_LfomOrifices/2
# elevation centers of the bottom orifices of the LFOM. The bottom of the bottom row of orifices is at the zero elevation
# Doser Elevations
ZW_CdcCht := Z_EtTop + H_DoserAssembly  # End of doser tube elevation at zero flow. (also fluid level in constant head tank)
Z_CdcFloatValveOrifice := ZW_CdcCht + H_CdcFloatvalve
Z_CoagulantOutlet := Z_CdcFloatValveOrifice + H_CoagTankAboveHeadTank  # This is the height of the outlet from the stock tanks
Z_CoagulantTankBottom := Z_CoagulantOutlet - B_StockOutlet  # This is the height of the coagulant stock tank base
# Coagulant Stock Tank Elevation
Z_CoagTank := Z_EtTop + H_CoagTankAboveHeadTank + H_DoserAssembly - B_StockOutlet
Z_CoagTankOutlet := Z_CoagTank + B_StockOutlet
