# Expert Inputs
# Tabulated constants
Rho_H2O := 1000*kg/m^3  # Density of water
Nu_Water := 1*10^-6*m^2/s  # The kinematic viscosity of water.
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# Chemical Engineering Science, Vol. 50, No. 12, pp. 1877-1880, 1995
# THE INFLUENCE OF VISCOSITY ON MIXING IN JET REACTORS
# Jo BALDYGA, J. R. BOURNE* and R. V. GHOLAP
Pi_JetRound := 0.5
Pi_JetPlane := 0.225  # This is an estimate for plane jets as created in the flocculator and in the sed tank jet reverser.
Pi_VCOrifice := 0.63
P_Atm := 1 atm
Nu_Air := 12*mm^2/s  # needed for the filter siphon design
Rho_Air := 1.204*kg/m^3  # needed for the filter siphon design
# General assumptions and constants
Plant_Origin := [0; 0; 0]*m
Country := 0
Language := 0
Q_PlantMaxLF := 15.9*L/s  # Prompts the transition to a low flow plant
W_HumanMin := 0.5 m
H_HumanAccess := 1.5 m  # The height of the walkway above the drain channel bottom so that someone can walk through the drain channel.
H_PlantFreeboard := 0.1*m  # Used to set the minimum height of entrance, floc, and sed walls
S_Fitting := 5 cm  # minimum space between fittings in a tank or fittings and the wall of the tank.
W_ChannelMin := 15 cm  # Minimum channel width for constructability
# This should be changed to be a function of channel depth. In the form shown below. We need to get construction review of these break points.
H_MasonReachMax := 50 cm
W_ChannelMinProposed(H) :=
    W_ChannelMinConstructability ← 15 cm if H ≤ H_MasonReachMax
    W_HumanMin if H > H_MasonReachMax
Π_Rectangular := 1/2  # Π.Rectangular is defined as the optimum "height over width ratio" (1/2) for a rectangular open channel
EN_Water := 0  # Equals 1 to draw boxes showing max water levels, 0 normally
# If EN_Water is set to 1, this controls the filter operation mode for which water/sand elevations are drawn. 0 for terminal, 1 for clean bed, and 2 for backwash.
EN_FilterWater := 2
W_Door := 1 m
T_Acrylic := 1 cm
Q_TrainMax := 150.1*L/s
# due to a 24 in LFOM because that's the biggest pipe we have in our database right now. if we need a bigger single train, we can do that by adding that pipe size into the pipe database
# This might cause the sed tank inlet/outlet channels to get too big (they might cut into the floc hopper space). is this because the channels get too deep or because they get too wide?
# Double Train is not a good name for this variable, because we may have four train plants as we continue to reach higher flow rates. However, the cut off points for multiple train plants are not yet set.
EN_DoubleTrain :=
    1 if Q_Plant > 60*L/s
    0 otherwise
N_Train :=
    1 if Q_Plant ≤ 60*L/s
    2 if Q_Plant > 60*L/s and Q_Plant ≤ 120*L/s
    4 otherwise
Q_Train := Q_Plant/N_Train
# Flow orifice meter
Π_Lfomorifice := 10  # Maximum number of rows or orifices in lfom.
Π_LfomSafety := 1.5  # safety coefficient that ensures free fall at the bottom of the lfom pipe
Π_LfomSafetyMin := 1.15
# minimum safety coefficient for lfom pipe diameter; only reduced between 55 L/s and 70 L/s - the intermediate zone between the using an LFOM pipe and an LFOM channel
# It may be possible to eliminate this if we switch to plate LFOM at 50 Lps
HL_LfomMin := 20 cm  # Minimum head loss through linear orifice meter
HL_LfomMax := 40 cm  # Maximum head loss through linear orifice meter to be used as needed for high flow plants.
ND_LfomPipeMax := 36 in
# changed from 12 in by pc479 because this is not a constraint anymore because we don't have an elbow constraining us. LFOM still needs to fit in the entrance tank. Need to check this constraint (mrf222)
H_LfomFreefall := 10 cm
EN_LfomPipe :=
    0 if Q_Plant ≥ 80*L/s
    1 otherwise  # Enumerated type that selects between pipe (1) and plate (0) for the LFOM
# Entrance tank
EN_Grit := 0  # 0 if we want entrance tank sized to capture grit, 1 for minimum size
# Used to make a smaller entrance tank if the source water doesn't contain grit.
EN_TwoInlets := 0  # 0 if there is only one inlet, 1 if there is two inlets
AN_EtSlope := 45 deg  # Angle of the sloped walls of the entrance tank hoppers
S_EtFloat := 5 cm  # Extra space around the float (increase in effective diameter) to ensure that float has free travel
ED_RapidMix := 3*W/kg  # Increased to get better mixing (10/10/2015 by Monroe)
L_FlocCouplingExt := 5 cm  # Distance that the rapid mix coupling extends into the first floc channel so that the RM orifice place can be fixed in place
W_EtHopperPeak := 3 cm
L_EtWallToDrainMax := 40 cm  # Distance from the front wall to the pipe stubs in the hopper drains so that an operator can easily reach them.
V_EtCaptureBod := 8*mm/s  # Entrance tank capture velocity
AN_EtPlate := 50 deg
S_EtPlate := 2.5 cm
T_EtPlate := 2 mm
B_EtPlate := S_EtPlate + T_EtPlate
ND_EtMod := 1/2*in
ND_EtModSpacer := 3/4*in
T_EtFloat := 5 cm  # Thickness of the PVC disk used as the float for the chemical dose controller lever arm.
S_EtLaminaPipeToEdge := 5 cm
ND_RMPlateRestrainer := 1/2*in
ND_EtPlateSupport := 3 in  # ND of the pipes that are embedded in the entrance tank slope to support the plate settler module
# Chemical dose controller
EN_Coag := 1  # 0 is alum, 1 is PACl
M_CoagSack := 25 kg  # Coagulant stock concentration will be based on integer numbers of sacks of chemical mixed into the
Ti_CoagStockMinEst := 1 day
# The coagulant stock is relatively stable and can last many days. Here we set the minimum time the coagulant stock will last when applying the maximum possible dose to size the stock tanks. In general the dose will be less than this and the stock will last much longer.
Ti_ChlorStockAve := 1 day
# Want chlorine stock to run out on average every day so that the stock is made fresh frequently because the chlorine stock degrades with time depending on temperature, concentration, and pH.
ID_CoagTube := 1/8*in
# 1/8" tubes are readily available in hardware stores in Honduras
ID_ChlorTube := 1/8*in
C_CoagStockEst := 150*gm/L
C_ChlorStockEst1 := 15*gm/L
P_Chlor := .7
# This is the elevation difference between the outlet of the coagulant stock tanks and the water level in the constant head tank, which is set by the hydraulic head required to provide the desired max chemical flow rate through the float valve orifice in the CHT. It is treated as constant here to ensure a practical elevation difference is left between the stock tanks and the CHT even when a float valve is selected which requires very little hydraulic head to deliver the required maximum chemical flow rate.
H_CoagTankAboveHeadTank := 30 cm
B_StockOutlet := 10 cm  # This is the distance from the bottom of the stock tanks to the outlets to allow space for solids to settle.
S_ChemTankBorder := 5 cm  # Distance between a tank and the border of the platform
# This is the estimated elevation difference between the water level in the constant head tank and the top of the entrance tank wall. The constant head tank water level is the same as the elevation of the outlet of the dosing tube when the lever arm is horizontal (zero flow). Therefore this height depends only on the hardware used to make the slider/drop tube assembly and to mount the lever arm to the entrance tank wall. Note that this will vary depending on hardware used, and is only defined here to calculate the elevation of the stock tanks, which can be approximate.
H_DoserAssembly := 6.77 cm
Pi_LinearCdcError := 0.1
# Maximum error allowed between a linear flow vs tube head loss relationship and the actual performance (which is affected by non-linear minor losses), assuming calibration at the maximum flow rate
K_CdcTube := 2  # Estimated minor loss coefficient for the small-diameter flexible tubing using fittings that have larger ID than the tubing
# Head loss through the doser at maximum flow rate.
HL_Cdc := 20 cm
# Maximum head loss through the small-diameter dosing tubing, which corresponds to the variation in water levels in the entrance tank and the difference between the maximum and minimum elevation of the dosing tube outlet attached to the lever arm.
H_CdcFloatvalve := 5 cm  # Estimated distance between fluid level in constant head tank and float valve orifice
ND_ChlorPipe := 1/2*in  # Nominal diameter of the PVC plumbing for the chlorine dosing system.
ND_CoagPipe := 1/2*in  # Nominal diameter of the PVC plumbing for the coagulant dosing system.
# Supplier Information:
# http://www.rotoplas.com/assets/files/industria/catalogo.pdf
Vol_ChemTankAvail := [5 gal; 35 gal; 55 gal; 450 L; 750 L; 1100 L; 2500 L]
D_ChemTankAvail := [11.875 in; 20.75 in; 22.5 in; 0.85 m; 1.10 m; 1.10 m; 1.55 m]
H_ChemTankAvail := [17.75 in; 31.75 in; 33.5 in; 0.99 m; 1.02 m; 1.39 m; 1.65 m]
# 5-gallon bucket
# http://www.mcmaster.com/#storage-buckets/=kd23oh
# 35-gallon drum
# http://www.jlmovingsupplies.com/c31/DIXIE-OPEN-CLOSED-HEAD-DRUMS-p36721.html
# Chemical dose controller dimensions (based on inserted drawings)
L_CdcLeverArm := 0.5 m  # st587 addition
D_CdcLeverCylinder1 := 1 in
D_CdcLeverCylinder4 := 2 in
D_CdcLeverCylinder2 := 0.5 in
L_CdcLeverPivottoCylinder2 := 6 cm
L_CdcLeverCylinder2to3 := 9.5 cm
L_CdcLeverPivotBox := 2 in
W_CdcLeverPivotBox := 1 in
H_CdcLeverPivotBox := 1 in
T_CdcLeverArm := 1/8*in
H_CdcLeverArm := 1 in
L_CdcLeverInnerBar := 7 in
L_CdcLeverMountingPlate := 6 in
W_CdcLeverMountingPlate := 0.5 cm
H_CdcLeverMountingPlate := 2 in
S_LeverToEtZTop := 1 cm
T_CdcFloat := 5 cm
D_CdcFloatCable := 0.5 cm
L_CdcLeverSliderOriginToScrew := 1 in
T_CdcLeverSlider := 1/4*in
H_CdcLeverSlider := 1.5 in
L_CdcLeverSlider := 3 in
H_CdcLeverSliderShort := 1/8*in
L_CdcLeverCylinder := 6 in
L_EtFrontWallToCdcFloat := 0.874 m
L_CdcLever := 0.5 m  # This may be obsolete now... mrf222 2/10/16
W_LeverArm := 0.0032 m
H_LeverArm := 0.0254 m  # height of the lever arm
D_CdcCht := 6 in
H_LeverHole := 0.0312 m - 0.0095/2*m
# Distance from the top of the entrance tank to the to the middle of the lever arm hole for the cable - (minus the) radius of the hole
D_Cable := 0.1 in
D_LABOrigintoLAOriginZ := 0.0254 m  # Edited DLABOrigintoLAOriginZ to accommodate dimensions from McMaster vs Inserted Drawing
L_LAOriginToDtY := 0.7812 m  # Distance from the lever arm origin to the outside center of the top part of the drop tube in the y direction
L_LAOriginToDtZ := 0.0429 m  # Distance from the lever arm origin to the drop tube in the z direction
L_LAOriginToDtCenterX := 0.0290 m  # Distance from the lever arm origin to the center of the drop tube in the x direction
T_CdcReducer := 9.5 mm  # Measured from CDC research team's apparatus
L_LAOriginToReducerX := 0.0290 m  # Distance from the lever arm origin to the center of the reducer in the x direction
L_LAOriginToReducerY := 0.7315 m  # Distance from the lever arm origin to the outside center of the top part of the reducer in the y direction
L_LAOriginToReducerCenterX := 0.0290 m  # Distance from the lever arm origin to the center of the reducer in the x direction
L_LAOriginToReducerCenterY := 0.7919 m  # Distance from the lever arm origin to the center of the reducer in the y direction
L_Slider := 3 in
R_LArmBar := 3/16*in
D_LArmBar := 3/8*in
W_LBracket := 5/8*in
L_LBracket := 1.5 in
T_LBracket := .08 in
L_LArmBar := 4 in
W_Slider := 3.2*10^-3*m
ND_DropTube := 1/2*in
H_Slider := 5/8*in
L_DropTube := 0.61 m
# The length of the drop tube needs to be calculated. The drop tube must as long as the supercritical flow. Thus the drop tube must extend down to the elevation of the sed tank effluent weir. This constant should be removed!
OD_CdcFitting := 5/32*in  # Outer diameter of fitting- measured from CDC research team's fitting
ID_CdcFitting := 0.126 in  # Inner diameter of fitting- measured from CDC research team's fitting
L_CdcFitting := 0.75 in  # Length of fitting - measured from CDC research team's fitting
# Constant Head Tank Dimensions | st587 addition
# five gallons bucket dimensions for constant head tanks
D_CHT := 30/3*cm
H_CHT := 37/3*cm
T_CHTwall := 1/3*cm
ND_DeliveryPipe := 0.5 in  # based on measurements in the lab and the system in Atima
PS_FlexTube := 2
L_PVCBallValve := .1625 m/4
T_MountingBoard := 1.5 in
# Manifold Dimensions
S_CdcLevertoManifold := 40 cm
L_ChlorAirReleasePipe := 30 cm  # Arbitratily selected
# Flocculator
H_FlocOption := 0
# The minor loss coefficient is 2. According to measurements at Agalteca and according to
# https://confluence.cornell.edu/display/AGUACLARA/PAHO+Water+Treatment+Publications (page 100 in chapter on flocculation)
K_FlocBaffle := 2.5
# Increased both to provide a safety margin on flocculator head loss and to simultaneously scale back on the actual collision potential we are trying to achieve.
S_FlocBaffleSetBackPlastic := 2 cm
CP_FlocBod := 75 m^(2/3)  # Target flocculator collision potential basis of design
Pi_JSOptMin := 3  # Minimum J/S ratio for flocculator geometry that will provide optimal efficiency.
Pi_FlocBaffle := 1  # Ratio of the width of the gap between the baffle and the wall and the spacing between the baffles.
ED_FlocBod := 10*mW/kg  # Max energy dissipation rate in the flocculator, basis of design.
Ti_FlocDrain := 15 min
ND_FlocMod := 1/2*in
ND_FlocSpacer := 3/4*in
S_FlocModEdgeToLastPipe := 10 cm
ND_FlocRMRestrainer := 1/2*in
L_FlocDrainStubExt := 20 cm  # Height that the drain stub extends above the top of the flocculator wall
S_FlocModPipeToEdge := 10 cm
T_FlocBaffle := 2 mm
H_FlocFreeBoard := 3 cm
# Sedimentation tank
# General
V_SedUpBod := 1*mm/s
V_SedCBod := 0.12*mm/s  # Plate settler capture velocity
AN_SedSlope := 50 deg
AN_SedHopperSlope := 45 deg  # This slope needs to be verified for functionality in the field. A steeper slope may be required in the floc hopper.
HW_SedEst := 2 m
SedGateValveURL := "https://confluence.cornell.edu/download/attachments/173604905/Sed-Scaled-Gate-Valve-Threaded.dwg"
SupportBoltURL := "https://confluence.cornell.edu/download/attachments/173604905/PlateSettlerSupportBolt.dwg"
L_SedUpflowMax := 5.8 m  # Max length of the active part of the sed tank so that single pipe segments can be used for the inlet and outlet manifolds
# Inlet channel
HL_SedWeirMax := 5 cm
H_SedInletWeirFreeboard := 2 cm
# Height of the inlet channel overflow weir above the normal water level in the inlet channel so that the far side of the overflow weir does not fill with water under normal operating conditions. This means the water level in the inlet channel will increase when the inlet overflow weir is in use.
# Exit launder
HL_SedLaunderBod := 4 cm  # Target headloss through the launder orifices
Pi_QLaunderOrifices := 0.80  # Acceptable ratio of min to max flow through the launder orifices
B_SedLaunderOrificesEst := 10 cm  # Center to center spacing of orifices in the launder
L_SedLaunderCapExcess := 3 cm  # The additional length needed in the launder cap pipe that is to be inserted into the launder coupling
H_LamellaToLaunder := 5 cm  # Space between the top of the plate settlers and the bottom of the launder pipe
# Plate settler modules
ND_SedMod := 0.5 in  # Diameter of the pipe used to hold the plate settlers together
ND_SedModSpacer := 3/4*in  # Diameter of the pipe used to create spacers. The spacers slide over the 1/2" pipe and are between the plates
T_SedLamellaLedge := 8 cm  # This is the vertical thickness of the lip where the lamella support sits. mrf222
S_SedLaminaPipeToEdge := 5 cm
B_SedPlateFrameCrossEst := 0.8 m  # Approximate x-dimension spacing between cross pipes in the plate settler support frame.
L_SedPlateEst := 60 cm  # Estimated plate length used to get an initial estimate of sedimentation tank active length.
ND_SedPlateFrame := 1.5 in  # Pipe size of the support frame that holds up the plate settler modules
# Floc weir
H_FlocWeirToPlateFrame := 10 cm  # Vertical distance from the top of the floc weir to the bottom of the pipe frame that holds up the plate settler modules
L_SedHopperMin := 50 cm  # Minimum length (X dimension) of the floc hopper
# Inlet manifold
ED_SedInletMax := 150*mW/kg  # Max energy dissipation rate in the sed diffuser outlets
Pi_QSedInlet := 0.8  # Ratio of min to max flow through the inlet manifold diffusers
ND_SedManifoldMax := 8 in
S_SedInletManSlope := 10 cm  # This is the minimum distance between the inlet manifold and the slope of the sed tank.
L_SedManConnectionStub := 4 cm
# Length of exposed manifold stub coming out of the floc weir to which the free portion of the inlet manifold is attached with a flexible coupling
L_SedManFirstDiffuserGap := 3 cm  # Space between the end of the manifold pipe and the edge of the first diffuser's hole, or the first manifold orifice.
L_SedManifoldDiffuser := 15 cm
H_JetReverserToDiffusers := 3 cm  # Vertical distance from the edge of the jet reverser half-pipe to the tip of the inlet manifold diffusers
L_SedManifoldPipeFromTankEnd := 2 cm  # Gap between the end of the inlet manifold pipe and the end wall of the tank to be able to install the pipe
Pi_PvcStretch := 1.2  # Assumed stretch of the PVC pipes as they are heated and molded
L_SedWallToDiffuserGapMin := 3 cm
D_SedManifoldPort := 1.25 in
# Diameter of the holes drilled in the manifold so that the molded 1" diffuser pipes can fit tightly in place (normal OD of a 1" pipe is close to 1-5/16")
# Outlet to filter
HL_SedToFiPipeMax := 10 cm
# If the plant has two trains, the current design shows the exit channel continuing from one set of sed tanks into the filter inlet channel. The execution of this extended channel involves a few calculations.
K_sedexit :=
    1 if EN_DoubleTrain == 1
    0 otherwise
H_SedExitFree := 5 cm
H_SedExitFree :=
    H_SedExitFree if EN_DoubleTrain == 1
    0 cm otherwise
H_SedWeirFreeboard := 5 cm
# added 12/5/16 by mrf222
# ensures weir does not overtop backwards if filter weir is too high
# Stacked rapid sand filter
# Construction and Design Inputs
# Design guidelines say 11 mm/s. The success of lab-scale backwashing at 10 mm/s suggests that this is a reasonable and conservative value
V_FiBw := 11*mm/s
N_FiLayer := 6
V_FiLayer := V_FiBw/N_FiLayer = 1.83333 mm/s
H_FiLayerMin := 20 cm  # Minimum thickness of each filter layer (can be increased to accomodate larger pipe diameters in the bottom layer)
B_FiManifoldBranch := 10 cm  # center to center distance for slotted pipes.
L_FiManBranchExt := 2 cm  # How far the branch extends into the trunk line
Ti_FiBwInitiationBod := 3 min  # The time to drain the filter box of the water above the fluidized bed
HL_FiDirty := 60 cm
# Mickey suggested this value based on lab experience. This was moved to Expert Inputs 12/4/16 by mrf222 as a result of feedback from Monroe and Skyler. In the Moroceli plant, the Fi Entrance box was overflowing before filtration backwash. The HL of a dirty filter has therefore been increased from 40 to 60 cm.
HL_FiBwSF := 20 cm
# This is the extra head we are going to provide on top of steady state backwash head loss to ensure that we can fluidize the bed to initiate backwash.
HL_FiSiphonMax := 35 cm  # Maximum acceptable head loss through the siphon at steady state; used to calculate a diameter
ND_FiSandOutlet := 2 in  # Diameter of sand drain pipe
H_FiDistBarrier := 10 cm  # Height of the barrier between the exit box and distribution box.
L_FiSiphonChannelStubMin := 20 cm
# Length that the siphon pipe extends up into the plant drain channel. Being able to shorten the stub from which the siphon discharges into the main plant drain channel allows for some flexibility in the hydraulic design.
HL_FiEntrancePipeMax := 10 cm
ND_FiTrunkMax := 6 in
ND_FiBackwashSiphonMax := 8 in
AN_FiTrunkValves := 25 deg
# Purge valves on the trunk lines are angled downwards so that sediment is cleared more effectively. This angle allows the tees to fit on top of one another at the filter wall.
T_FiWeir := 5 cm
# ND.FiInletChannelDrain moved to SRSF design file mrf222 12/7/16
S_FiBranchToWall := 5 cm
FiGateValveURL := "https://confluence.cornell.edu/download/attachments/173604905/Fi-Scaled-Gate-Valve-Threaded.dwg"
FiBallValveURL := "https://confluence.cornell.edu/download/attachments/173604905/FiMetalBallValve.dwg"
H_FiWallToPlantFloorMin := 10 cm
HL_FiInletWeirMax := 5 cm
Q_FiMin := 8*L/s  # Dimensions get too small for construction below a certain flow rate
ND_FiManWingSpacer := 2 in  # Nominal diameter of the spacer tees in the four corners of the filter manifold assembly.
# Length of the vertical pipe segment following the valve on the filter sand drain. This stub can be capped to allow the sand in the valve to settle, so that the valve can be closed without damage from fluidized sand.
L_FiSandOutletPipe := 20 cm
N_FiLayerValve := 3  # Number of filter layers with valves used in the drawing code (only the 3 exits)
# Elevation Safety Margins
H_FiBwNoSuckAir := 20 cm  # Minimum depth in the entrance box during backwash such that there is standing water over the inlet.
H_FiSiphonNoSuckAir := 10 cm  # Minimum water depth over the orifices in the siphon manifold so that air is not entrained.
H_FiFluidizedBedToSiphon := 20 cm
H_FiForwardNoSuckAir := 10 cm
H_FiWeirFreefall := 3 cm
H_FiAirRemovalBlockSubmerged := 5 cm
H_FiBypassSafety := 10 cm
H_DrainOutletSafety := 10 cm
H_FiOverflowWeirFreefall := 10 cm
# Plant drain channel
L_ChemLeverArmSpace := 75 cm
# Space beyond the entrance tank in the plant drain channel where the drop pipes from the CDC lever arm can come down and be connected with the chlorine and coagulant dosing points.
# Operator access
W_MpWalkwayMin := 1*m  # combine walkway assumptions!
W_DCWalkway := 1.2 m  # Width of the walkway above the main plant drain channel.
W_EtWalkway := 1 m  # Width of the floor space between the flocculator and the rapid mix pipe floor cutout next to the entrance tank.
W_TrainWalkway := 1.5 m  # for high flow, double train situations
W_BasementStairs := 0.9 m
W_EntranceStairs := 1.2 m
# Minor loss coefficients
# Individual K Values
K_El90 := 0.9  # 90 deg elbow
K_El45 := 0.45
# The loss coefficient for the channel transition in a 90 degree turn
K_90 := 0.4
K_AngleValve := 4.3
K_GlobeValve := 10
K_GateValve := 0.39
K_ChkValveConv := 4
K_ChkValveBall := 4.5
K_Exp := 1  # headloss coefficient of jet
K_TeeFlowRun := 0.6
K_TeeFlowBr := 1.8
K_PipeEnt := 0.5
K_PipeExit := 1
K_RMGateVin := .25
# Drain channels
Slope_PlantDC :=
    1 % if EN_DoubleTrain == 0
    2 % otherwise
Slope_EtDC :=
    1 % if EN_DoubleTrain == 0
    2 % otherwise
W_EtDCMin := 20 cm
