# INPUT PLANT FLOW RATE
# FIXED INPUT PARAMETERS FOR THE DOSER
# INPUT PARAMETERS FOR Non-Linear CDC Arm:
MaxΔH := 0.4 m  # Max plant head loss, this is constant for all future AguaClara plants
# Input Vena Contracta of Orifice
#
# Input tubing roughness for tube 1
#
# Input tubing roughness for tube 2
#
# Input tubing 1's length
#
# Input tubing 2's length
#
# Input tubing 1's diameter
#
# Input tubing 2's diameter
#
# Input viscosity of alum solution
#
# Input density of water
#
# Input density of alum solution
K_vc := 0.63
ε_tube1 := .000001 mm
ε_tube2 := .000001 mm
L_tube1 := 50 cm
L_tube2 := 50 cm
Diameter_tubing1 := 3/8*in
Diameter_tubing2 := 3/8*in
ν_alum := 1.1*10^-6*m^2/s
ρ_H2O := 1000*kg/m^3
ρ_alum := 1.62*gm/cm^3
# CONCENTRATION RANGES
C_alum1 := [20; 30; 40; 50; 60; 70; 80; 90; 100]*mg/L
C_alum2 := [5; 7.5; 10; 12.5; 15; 17.5; 20; 22.5; 25]*mg/L
Conc_2 := [20; 24; 28; 32; 36; 40; 44]*mg/l  # This is a three scaled doser
Conc_1 := [10; 12; 14; 16; 18; 20; 22]*mg/l
Conc_3 := [40; 48; 56; 64; 72; 80; 88]*mg/l
# SURFACE TENSION
σ := .074*N/m  # at 20 degrees C
d_orifices := .1 mm, .2 mm .. 15 mm  # create a range of possible orifice diameters
Δh(d) := 2*σ/(ρ_alum*g*d/2) - 2*d/2/3  # height required to form droplets
Δh2(d) := 2*σ/(ρ_alum*g*d/2)
ρ_alum = 1620 kg/m^3
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# small | medium | large
# small orifice
d := 1 mm
d2 := d*sqrt(2)
d3 := d2*sqrt(2)
d3 = 2 mm
d2 = 1.41421 mm
# LEVER ARM DIMENSIONS
d_2 := 1 mm*round(d2/(1 mm), 1) = 1.4 mm
L_lever := .9 m  # This is the length of the lever arm
L_back := L_lever/2
MaxH := .4 m  # This is the headloss through the whole plant
# This is the maximum angle of the lever arm at max plant flow
Max_Angle := asin(MaxH/L_back)
Max_Angle = 62.734 deg  # This is the maximum angle the lever arm will have, at max plant flow
# REQUIRED FLOW OF ALUM
Flow_alum1 := Q_Plant*Conc_1/C_AlumStock
# The flow of alum required, for each dosage range, to maintain set concentrations
Flow_alum2 := Q_Plant*Conc_2/C_AlumStock
# QUESTION: Can I assume that the diameter of a water
# droplet and the orifice diameter are the same?
Flow_alum3 := Q_Plant*Conc_3/C_AlumStock
# The following section is for the design tool definitions
Flow_Alum0 := Flow_alum1[0]
Flow_Alum20 := Flow_alum2[0]
Flow_Alum30 := Flow_alum3[0]
Flow_Alum1 := Flow_alum1[1]
Flow_Alum21 := Flow_alum2[1]
Flow_Alum31 := Flow_alum3[1]
Flow_Alum2 := Flow_alum1[2]
Flow_Alum22 := Flow_alum2[2]
Flow_Alum32 := Flow_alum3[2]
Flow_Alum3 := Flow_alum1[3]
Flow_Alum23 := Flow_alum2[3]
Flow_Alum33 := Flow_alum3[3]
Flow_Alum4 := Flow_alum1[4]
Flow_Alum24 := Flow_alum2[4]
Flow_Alum34 := Flow_alum3[4]
Flow_Alum5 := Flow_alum1[5]
Flow_Alum25 := Flow_alum2[5]
Flow_Alum35 := Flow_alum3[5]
Flow_Alum6 := Flow_alum1[6]
Flow_Alum26 := Flow_alum2[6]
Flow_Alum36 := Flow_alum3[6]
Flow_alum1 =  # error: This variable is undefined.
# This calculates the head required to deliver the flow of alum
head(alumflow, d) := (alumflow/(K_vc*(π*d^2/4)))^2/(2*g)
head(Flow_alum2, d_2) =  # error
head(Flow_alum1, d) =  # error
head(Flow_alum2, d2) =  # error
Flow_alum2 =  # error
head_2 := [5.74; 8.266; 11.25; 14.694; 18.597; 22.96; 27.781]*cm
head(Flow_alum3, d3) =  # error
ScaleSet := head(Flow_alum1, d)/sin(Max_Angle)
Flow_alum3 =  # error
Flow_alumd.2(head_2) := K_vc*(π*d_2^2/4)*(2*g*head_2)^0.5
ScaleSet =  # error  # This is the generated scale for the triple scale doser
ScaleSet[0] =  # error
Flow_alumd.2(head_2) = [61.7403; 74.0902; 86.4349; 98.7832; 111.131; 123.481; 135.827] mL/min
# TRIPLE SCALE CALCULATIONS
# MINIMUM PLANT FLOW (accounting for surface tension)
# Purpose: to find the angle/flow rate where the first point starts to be affected by surface tension
d = 1 mm
d2 = 1.41421 mm
d3 = 2 mm
Δh(d) = 1.82985 cm
K_vc = 0.63
Area(d) := (π*d^2/4)
Q_min := K_vc*Area(d)*sqrt(2*g*Δh(d))
Angle_min := asin(Δh(d)/ScaleSet[0])
Q_min = 17.7855 mL/min
Angle_min =  # error
Angle_mindegrees := Angle_min*180/π
Δh_entrance := L_lever/2*sin(Angle_min)
MaxΔH = 0.4 m
K_plant := MaxΔH*2*g/(Q_Plant^2)
Q_Plantmin := sqrt((2*g*Δh_entrance)/K_plant)
SF := 1.85  # This is a safety factor
# I specified a safety factor
# I input a diameter of the orifice in the constant head tank to be .09 inches. This should be CHANGED later
HL_FloatValveOrifice := trunc(SF*head(Flow_alum3[6], .09 in)/cm)*cm
HL_FloatValveOrifice =  # error
# REQUIRED HEIGHT OF STOCK TANK
# OUTPUT:
# Scale | Min Plant Flow
Q_Plantmin =  # error
ScaleSet =  # error
Scale_Distance0 := ScaleSet[0]
Scale_Distance1 := ScaleSet[1]
Scale_Distance2 := ScaleSet[2]
Scale_Distance3 := ScaleSet[3]
Scale_Distance4 := ScaleSet[4]
Scale_Distance5 := ScaleSet[5]
Scale_Distance6 := ScaleSet[6]
