# Floc Hopper Program
# The main purpose of the floc hopper is to regulate the height of the floc blanket. Many of the parameters of the floc hopper will be dependant on various input parameters concerning the sedimentation tank and lamella.
# [reference: MasterProgram.xmcd]
# The floc hopper will be constructed as a trapzeoid. This width will correspond to the shorter parallel side when viewed at its trapezoidal cross-sectional area. This width will match the width of the sedimentation sludge drain.
W_FlocHopper := W_SedSludgeFlat
# This length will correspond to the longer parallel side when viewed at its trapezoidal cross-sectional area. This length will match the width of the sedimentation tank.
L_FlocHopper := W_SedBayActual
L_FlocHopperOffset := L_SedPlate*cos(AN_SedPlate)
# The horiztonal component of the floc hopper, so that the first lamella closest to the sedimentation tank wall and the floc hopper will line up vertically.
Z_FlocHopper := Z_SedSlopes - H_SedSludge  # The vertical component (elevation) of the height of the floc hopper.
H_FlocHopper := sqrt(Z_FlocHopper^2 + L_FlocHopperOffset^2)
# The actual height of the floc hopper. This would be the height connecting the two parallel sides when viewed at its trapezoidal cross-sectional area.
T_FlocHopper := T_SedSlopePlate
AN_FlocHopper := atan(Z_FlocHopper/L_FlocHopperOffset)*(180/π)
