# THIS CODE IS FOR UNTAPERED FLOCCULATION
# [reference: MasterProgram.xmcd]
L_Sed = 3.08571 m
# Double click anywhere on Solution Algorithm to scroll through the whole thing.
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ED_Floc = 6 mW/kg
Q_Plant = 10 L/s
# These are here just to see what the input values are. They are the main parameters guiding the design so it is nice to see what they are.
# The new flocculation model more carefully distinguishes between maximum and average energydissipation rates. The flocculators should be designed based on a maximum allowed energy dissipation rate to ensure that suboptimal geometry (high h/b ratios) doesn't result in excessively high energy dissipation rates that could break flocs. However, since this model is now incorporating the concept of a maximum energy dissipation rate the energy dissipation rate guidelines need to be increased to account for the distinction between average and maximum.
# Because we are now using the concept of a maximum energy dissipation rate it should be possible to directly incorporate results from laminar flow flocculators to produce guidelines on the maximum allowable energy dissipation rates. One caveat is that the turbulent flow energy dissipation rates are time averaged and it is not yet clear what the expected temporal variability is for turbulent flow energy dissipation rates.
# CFD results and functions | This section is unchanged from vertical.
# all design values from Yi, Wenqi, 2009
# The fraction of the maximum collision potential that could be achieved if the energy dissipation rate was uniformly distributed. Or, if this fraction of the available energy were uniformly distributed the collision potential would be the same as what it is given the nonuniformity in the energy dissipation rate distribution.
# ratio of water depth to baffle spacing
# CFD1
# CFD2
# Note that this data (ψ.Pdat) can not be used directly in design because it has units! It only applies to the case for b=0.1m (the case used in the CFD FLUENT analysis).
# CFD3
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ψ_Pdat := [0.49962; 0.65143; 0.67122; 0.71292; 0.89548; 1.00041; 1.24420; 1.45759; 2.15668]*m^(2/3)
Pi_JSdat := [2; 3; 4; 5; 8; 10; 15; 20; 40]  # J/S*values
α_ψdat := [0.65; 0.86; 0.87; 0.85; 0.71; 0.64; 0.53; 0.46; 0.33]
# The maximum energy dissipation rate is loosely defined as the the maximum energy dissipation rate that is seen by a significant fraction of the flow. We don't have a good way to characterize this parameter analytically yet, but I estimated this using the color contours of the energy dissipation rate (data from Yi, Wenqi, 2009). Note the very large values of this ratio for high h/b ratios. High h/b ratios have very nonuniform energy dissipation rates.
# Minor loss coefficient. This many equivalents of the kinetic energy are lost through one baffle. Note that the minor loss coefficient is very large for small h/b values
# CFD4
# CFD5
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# Changed K.Pdat to 2.5 to more closely match actual measured values from Agalteca.
K_Pdat := [2.5; 2.5; 2.5; 2.5; 2.5; 2.5; 2.5; 2.5; 2.5]
α_εdat := [1.875617391; 1.808368729; 1.776938668; 1.927164849; 3.356408643; 4.221784408; 6.332676611; 7.793864103; 13.75322341]
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# CFD6
α_ψ(Pi_JS) := linterp(Pi_JSdat, α_ψdat, Pi_JS)  # These functions use linear interpolation to create functional relationships as a function of the h/b ratios
α_ε(Pi_JS) := linterp(Pi_JSdat, α_εdat, Pi_JS)
K_P(Pi_JS) := linterp(Pi_JSdat, K_Pdat, Pi_JS)
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3^(1/3) = 1.44225
b := 0.1 m
# Determine whether to use horizontal or vertical.
# HV1
# Generic
# Ρ
# S
# J
# Vertical
# W
# S
# H
# Horizontal
# H
# S
# W
# Change everything into generic variables so that they are less confusing and so we can easily calculate for both types of flolcculators.
# HV2
S_FlocBaffleMin := W_HumanMin = 0.45 m
# HV3
J(P, S) := P*S
J_Min := J(Pi_JSOptimal, S_FlocBaffleMin) = 1.35 m
# HV4
P_MinHorizontal(Q, S, Pi_JS, ED, J) := Q/(S*(J*2*ED/(K_P(Pi_JS)*α_ε(Pi_JS)))^(1/3))
# HV5
# There will be headloss. See if
# significant.
HW_FlocEnd := HW_Sed = 2.14154 m
P_MinHorizontal(Q_Plant, S_FlocBaffleMin, Pi_JSOptimal, ED_Floc, J_Min) = 0.145219 m
# Override user input until floc options debugged.
P_FlocChannelHIteration1 :=
    HW_FlocEnd if H_FlocOption == 0
    P_MinHorizontal(Q_Plant, S_FlocBaffleMin, Pi_JSOptimal, ED_Floc, J_Min) if H_FlocOption == -1
    H_FlocOption*m if H_FlocOption > 0
# H.FlocOption = 0 if same as sed; -1 is minimum depth for horizontal flow or a positive number is the number a  user specified
# HV6
Q_MinHorizontal(P, S, Pi_JS, ED, J) := P*S*(J*2*ED/(K_P(Pi_JS)*α_ε(Pi_JS)))^(1/3)
Q_MinHorizontal(P_FlocChannelHIteration1, S_FlocBaffleMin, Pi_JSOptimal, ED_Floc, J_Min) = 147.469 L/s
# HV7
# Create a variable that will be used to distinguish between horizontal and vertical when deciding which algorithm to use in future steps.
S_FlocBaffleNonIterative(Q, P, Pi_JS, ED) := (Q/P)^(3/4)*(1/Pi_JS)^(1/4)*(K_P(Pi_JS)*α_ε(Pi_JS)/(2*ED))^(1/4)
N_FlocSpacesFH(L, T, S) := (Floor((L + T)/(S + T) + 1, 2) - 1)  # Floor to ensure minimum spacing constraint met for horizontal.
SofN_FlocBaffleF(L, T, N_Spaces) := (L + T)/N_Spaces - T
S_FlocBaffleCalcHIteration1 := S_FlocBaffleNonIterative(Q_Plant, P_FlocChannelHIteration1, Pi_JSOptimal, ED_Floc) = 0.0597981 m
N_FlocSpacesCalcIteration1 := N_FlocSpacesFH(L_Sed, T_FlocBaffle, S_FlocBaffleCalcHIteration1) = 31
S_FlocBaffleCalcHIteration2 := SofN_FlocBaffleF(L_Sed, T_FlocBaffle, N_FlocSpacesCalcIteration1) = 0.0608295 m
P_FlocChannelH :=
    P_MinHorizontal(Q_Plant, S_FlocBaffleCalcHIteration2, Pi_JSOptimal, ED_Floc, J(Pi_JSOptimal, S_FlocBaffleCalcHIteration2)) if H_FlocOption == -1
    P_FlocChannelHIteration1 otherwise
    = 2.14154 m
EN_FlocHoriz :=
    EN_FlocHoriz ← 1 if Q_Plant ≥ Q_MinHorizontal(P_FlocChannelHIteration1, S_FlocBaffleCalcHIteration2, Pi_JSOptimal, ED_Floc, J_Min) and H_FlocOption > -1 and S_FlocBaffleCalcHIteration2 ≥ S_FlocBaffleMin
    EN_FlocHoriz ← 1 if H_FlocOption == -1
    EN_FlocHoriz ← 0 otherwise
HW_Sed = 2.14154 m
EN_FlocHoriz = 0
## Flocculator Functions
# FF1
# See choosing between horizontal and vertical.
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N_FlocSpacesF(L, T, S) := (Round((L + T)/(S + T) + 1, 2) - 1)  # Round to odd number instead of floor to get closer to desired Energy Dissipation
# FF2
# The function below can also be used directly to solve for Ρ by substituting S for Ρ
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# FF2
# recursive function
S_FlocBaffleIterative(Q, Ρ, J, S, ED) := (K_P(J/S)*α_ε(J/S)/(2*J*ED))^(1/3)*Q/Ρ
EDV(Q, J, S, Ρ) := α_ε(J/S)*K_P(J/S)/(2*J)*(Q/(Ρ*S))^3
# Monroe put this in to make step FGV2 more clear for vertical.
P_FlocBaffle(Q, J, S, ED) := (K_P(J/S)*α_ε(J/S)/(2*J*ED))^(1/3)*Q/S
S_FlocBaffleF(Q, Ρ, J, ED) :=
    if EN_FlocHoriz == 0
        S ← S_FlocBaffleIterative(Q, Ρ, J, J/4, ED)
        error ← 1
        while error > 0.001
            S_new ← S_FlocBaffleIterative(Q, Ρ, J, S, ED)
            error ← |S - S_new|/(S + S_new)
            S ← S_new
    return S
# This function returns a spacing that gives the target energy dissipation rate.
# FF2
# From Monroe's Flocculation notes
S_FlocBaffleNonIterative(Q, P, Pi_JS, ED) := (Q/P)^(3/4)*(1/Pi_JS)^(1/4)*(K_P(Pi_JS)*α_ε(Pi_JS)/(2*ED))^(1/4)
EDH(Q, P, Pi_JS, S) := ((Q/P)^(3/4)*(1/Pi_JS)^(1/4)*(K_P(Pi_JS)*α_ε(Pi_JS)/2)^(1/4)/S)^4
# FF3
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# Collision potential per baffle (p for pantalla)
ψ_P(J, S) := (J^2*α_ψ(J/S)*K_P(J/S)/2)^(1/3)
# FF4-6 are just needed for vertical. Might want to eventually change if we decide to make vertical flocculator untapered.
# FF4
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EDV(Q, J, S, Ρ) := α_ε(J/S)*K_P(J/S)/(2*J)*(Q/(Ρ*S))^3
# FF5
# The following function cycles through each flocculator channel and checks the possible range of the number of baffles in a channel to see which number of baffles results in the correct energy dissipation rate and cumulative collision potential at the end of the channel.
# The following is Monroe's original code. Changes were made but seemed to make it not work so we reverted to original.
N_FlocSpacesPerChannelF(ED_ChannelRange, N_FlocSpacesMax, N_FlocSpacesMin) :=
    i ← 0
    while ED_ChannelRange[i] ≤ ED_Floc and i < (N_FlocSpacesMax - N_FlocSpacesMin)
        i ← i + 1
    i + N_FlocSpacesMin
# The number of baffles in the last channel needs to remain odd
# so that the water flows can flow through the exit port to
# the sed tank.
## Calculation of Flocculator Geometry
# FGH1
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# FGH2
# This should automatically be true for H.FlocOption=-1 because of the Choosing Between Horizontal and Vertical Algorithm. Check to be sure.
# FGH3
J_FlocChannelH := S_FlocBaffleCalcHIteration2*Pi_JSOptimal = 0.182488 m
# The minimum is technically zero (i.e. no baffles), but should avoid divide by zero problems (the number of baffles must be an even integer).  The number of baffles should be one less than the number of spaces
# FGH4
# FGH5
ψ_SpaceH := ψ_P(J_FlocChannelH, S_FlocBaffleCalcHIteration2) = 0.329579 m^(2/3)
CP_Floc = 100 m^(2/3)
ED_SpaceH := ED_Floc
# FGH6
# Calculate the number of spaces in each channel
Q_Plant = 158.503 gal/min
N_FlocChannelSpacesTotalH := ceil(CP_Floc/ψ_SpaceH) = 304
# FGH7
N_FlocChannelsH := ceil(N_FlocChannelSpacesTotalH/N_FlocSpacesCalcIteration1) = 10
ChannelsH := 0 .. N_FlocChannelsH - 1  # range variable for the floc channels
# FGH8
# turn this into matrix and apply same logic as vertical? how will that affect the rest of the horiz code???
S_FlocPortGapH := 0 m
N_FlocChannelSpacesH :=
    for i ∈ 0 .. N_FlocChannelsH - 1
        Spaces[i] ← N_FlocSpacesCalcIteration1
    Spaces[last(Spaces)] ← N_FlocSpacesCalcIteration1 - 2 if (S_FlocPortGapH + W_InletChannelEst) > (2*S_FlocBaffleCalcHIteration2)
    return Spaces
    = [31; 31; 31; 31; 31; 31; 31; 31; 31; 29]
# Should all be odd for horizontal
N_FlocChannelBafflesH := N_FlocChannelSpacesH - 1
N_FlocChannelBafflesH = [30; 30; 30; 30; 30; 30; 30; 30; 30; 28]
N_FlocBafflesH := sum(N_FlocChannelBafflesH) = 298  # Total number of baffles in the flocculator
# Now we need to calculate the following for each channel
# baffle center to center distance
# baffle separation distance
# head loss in each channel
# FGH9
S_FlocBaffleH := SofN_FlocBaffleF(L_Sed, T_FlocBaffle, N_FlocChannelSpacesH)
S_FlocBaffleH = [0.0608295; 0.0608295; 0.0608295; 0.0608295; 0.0608295; 0.0608295; 0.0608295; 0.0608295; 0.0608295; 0.0677833] m
J_FlocChannelH := Pi_JSOptimal*S_FlocBaffleH[0]  # Redefine J with actual baffle spacing
# FGV1
# If space large enough to be concrete, set width to optimal and H/S to 3. Know H so can get S. Similar to horizontal. Use non-iterative scheme to get number of spaces.
#
# If plastic, know width of channel (need to change in code). Rest of vertical same.
J_FlocChannelV :=
    H_FlocOption*m if H_FlocOption > 0
    HW_FlocEnd otherwise
S_FlocBaffleMaxV := SofN_FlocBaffleF(L_Sed, T_FlocBaffle, N_FlocSpacesF(L_Sed, T_FlocBaffle, J_FlocChannelV/Pi_JSMin)) = 1.0019 m
N_FlocSpacesMinV := N_FlocSpacesF(L_Sed, T_FlocBaffle, J_FlocChannelV/Pi_JSMin) - 1 = 2
# Should only be set as this when W.FlocChannelMin is higher?
# FGV2
P_FlocChannelVPlastic := .5*W_Plastic
# FGV3
S_FlocBaffleMinVPlastic := S_FlocBaffleF(Q_Plant, P_FlocChannelVPlastic, J_FlocChannelV, ED_Floc) = 16.2799 cm
EDV(Q_Plant, J_FlocChannel, S_FlocBaffle[Channels], P_FlocChannel)
# subtract one to handle the case when we reduce the number of spaces through rounding down to an odd or even integer.
P_FlocChannelV1 := W_Plastic
N_FlocSpacesMaxVPlastic := N_FlocSpacesF(L_Sed, T_FlocBaffle, S_FlocBaffleMinVPlastic) = 15
# P.FlocChannelV=W.Plastic until S.FlocBaffleV>HumanMin
# P.FlocChannelV=HumanMin when S.FlocBaffle<H/3.
# P.FlocChannelV=Wider when S.FlocBaffle=H/3
# if N.FlocChannelSpacesV = N.FlocSpacesMinV
# FGV4
# Now calculate the maximum energy dissipation rate given the range of possible baffle spacings and the total collision potential for a channel full of baffles of that spacing.
P_FlocChannelV := max(P_FlocBaffle(Q_Plant, J_FlocChannelV, S_FlocBaffleMaxV, ED_Floc), W_HumanMin) = 0.45 m
iPlastic :=
    (0 .. N_FlocSpacesMaxVPlastic - N_FlocSpacesMinV) if N_FlocSpacesMinV ≤ N_FlocSpacesMaxVPlastic
    0 otherwise
# starting with low Q
# channel width is 1/2 width of policarbonate sheet, spacing between baffles is less than humanmin
# spacing between baffles is greater than human min and less than 1/3H, channel width is human min
# at H/S of 3 channel width increases with increased flow until it is possible to switch to horizontal
# For horizontal H/S stays at 3 and channel width grows to accomodate increased flow (forever)
J_FlocChannelV/2 = 1.07077 m
# Now calculate the collision potential for an entire channel for each of the possible number of baffles and the corresponding energy dissipation rate
# 45 cm 22 cm
# 20L/s 45 cm 35 cm
# 45 L/s 74 cm 74 cm
# 70 L/s 114 cm 74 cm
ED_ChannelRangePlastic[iPlastic] := EDV(Q_Plant, J_FlocChannelV, SofN_FlocBaffleF(L_Sed, T_FlocBaffle, iPlastic + N_FlocSpacesMinV), P_FlocChannelVPlastic)
# FGV5
ED_ChannelRangePlastic = [2.53274e-6; 8.66551e-6; 2.08043e-5; 4.16645e-5; 7.74376e-5; 0.000142809; 0.000265657; 0.000461028; 0.00075821; 0.00118389; 0.00178538; 0.00261555; 0.00374261; 0.00525199] m^2/s^3
# Calculate the number of spaces in each channel
N_FlocSpacesPerChannelVPlastic := N_FlocSpacesPerChannelF(ED_ChannelRangePlastic, N_FlocSpacesMaxVPlastic, N_FlocSpacesMinV) = 15
S_FlocBafflePerChannelVPlastic := SofN_FlocBaffleF(L_Sed, T_FlocBaffle, N_FlocSpacesPerChannelVPlastic) = 0.168381 m
S_FlocBaffleOptimalV := SofN_FlocBaffleF(L_Sed, T_FlocBaffle, N_FlocSpacesF(L_Sed, T_FlocBaffle, J_FlocChannelV/Pi_JSOptimal))
P_FlocChannelVHumanMin := max(P_FlocBaffle(Q_Plant, J_FlocChannelV, S_FlocBaffleOptimalV, ED_Floc), W_HumanMin) = 0.45 m
# FGV3
S_FlocBaffleMinVHumanMin := S_FlocBaffleF(Q_Plant, P_FlocChannelVHumanMin, J_FlocChannelV, ED_Floc) = 17.6185 cm
N_FlocSpacesMaxVHumanMin := N_FlocSpacesF(L_Sed, T_FlocBaffle, S_FlocBaffleMinVHumanMin) = 15
# Now calculate the maximum energy dissipation rate given the range of possible baffle spacings and the total collision potential for a channel full of baffles of that spacing.
iHumanMin := 0 .. N_FlocSpacesMaxVHumanMin - N_FlocSpacesMinV
# Now calculate the collision potential for an entire channel for each of the possible number of baffles and the corresponding energy dissipation rate
ED_ChannelRangeHumanMin[iHumanMin] := EDV(Q_Plant, J_FlocChannelV, SofN_FlocBaffleF(L_Sed, T_FlocBaffle, iHumanMin + N_FlocSpacesMinV), P_FlocChannelVHumanMin)
N_FlocSpacesPerChannelVHumanMin := N_FlocSpacesPerChannelF(ED_ChannelRangeHumanMin, N_FlocSpacesMaxVHumanMin, N_FlocSpacesMinV) = 15
ED_ChannelRangeHumanMin = [3.47426e-6; 1.18868e-5; 2.85381e-5; 5.7153e-5; 0.000106224; 0.000195898; 0.000364412; 0.000632412; 0.00104007; 0.00162399; 0.00244908; 0.00358785; 0.0051339; 0.00720438] m^2/s^3
S_FlocBafflePerChannelVHumanMin := SofN_FlocBaffleF(L_Sed, T_FlocBaffle, N_FlocSpacesPerChannelVHumanMin) = 0.168381 m
S_FlocBafflePerChannelV :=
    S_FlocBafflePerChannelVPlastic if S_FlocBafflePerChannelVPlastic < W_HumanMin
    S_FlocBafflePerChannelVHumanMin otherwise
    = 0.168381 m
P_FlocChannelV :=
    P_FlocChannelVPlastic if S_FlocBafflePerChannelVPlastic < W_HumanMin
    P_FlocChannelVHumanMin otherwise
    = 0.5 m
N_FlocSpacesPerChannelV :=
    N_FlocSpacesPerChannelVPlastic if S_FlocBafflePerChannelVPlastic < W_HumanMin
    N_FlocSpacesPerChannelVHumanMin otherwise
    = 15
# Calculate the number of spaces in each channel
ψ_SpaceV := ψ_P(J_FlocChannelV, S_FlocBafflePerChannelV) = 1.49272 m^(2/3)
# FGV6
N_FlocChannelSpacesTotalV := ceil(CP_Floc/ψ_SpaceV) = 67
# This needs to happen here because X.FlocBaffles is returning a matrix having units of length. It will not allow us to return N.FlocChannelSpaces/Baffles because they are unitless...
N_FlocChannelsV := ceil(N_FlocChannelSpacesTotalV/N_FlocSpacesPerChannelV) = 5
ChannelsV := 0 .. N_FlocChannelsV - 1  # range variable for the floc channels
S_FlocBaffleV :=
    for i ∈ 0 .. N_FlocChannelsV - 1
        Spacing[i] ← S_FlocBafflePerChannelV
    Spacing[last(Spacing)] ← SofN_FlocBaffleF(L_Sed, T_FlocBaffle, N_FlocSpacesPerChannelV - 1)
    return Spacing
    = [0.168381; 0.168381; 0.168381; 0.168381; 0.183265] m
S_FlocPortGapV :=
    (0 m) if S_FlocBaffleV[0] < W_HumanMin
    T_ConcreteMin otherwise
    = 0 m
N_FlocChannelSpacesV :=
    for i ∈ 0 .. N_FlocChannelsV - 1
        Spaces[i] ← N_FlocSpacesPerChannelV
    Spaces[last(Spaces)] ← N_FlocSpacesPerChannelV - 1
    return Spaces
    = [15; 15; 15; 15; 14]
N_FlocChannelSpacesV[last(N_FlocChannelSpacesV)] :=
    N_FlocChannelSpacesV[last(N_FlocChannelSpacesV)] - 2 if (S_FlocPortGapV + W_InletChannelEst) > (2*S_FlocBaffleV[last(S_FlocBaffleV)])
    N_FlocChannelSpacesV[last(N_FlocChannelSpacesV)] otherwise
# Spacing gets reassigned later in the code if the first case is true.
N_FlocChannelBafflesV := N_FlocChannelSpacesV - 1 = [14; 14; 14; 14; 13]
N_FlocBafflesV := sum(N_FlocChannelBafflesV) = 69  # Total number of baffles in the flocculator
## Assign Correct Variables for either Horizontal or Vertical
S_FlocBaffle :=
    S_FlocBaffle ← S_FlocBaffleH if EN_FlocHoriz == 1
    S_FlocBaffle ← S_FlocBaffleV otherwise
    = [0.168381; 0.168381; 0.168381; 0.168381; 0.183265] m
J_FlocChannel :=
    J_FlocChannel ← J_FlocChannelH if EN_FlocHoriz == 1
    J_FlocChannel ← J_FlocChannelV otherwise
    = 2.14154 m
P_FlocChannel :=
    P_FlocChannel ← P_FlocChannelH if EN_FlocHoriz == 1
    P_FlocChannel ← P_FlocChannelV otherwise
    = 0.5 m
J_FlocChannel = 2.14154 m
N_FlocBaffles :=
    N_FlocBaffles ← N_FlocBafflesH if EN_FlocHoriz == 1
    N_FlocBaffles ← N_FlocBafflesV otherwise
    = 69
N_FlocChannelBaffles :=
    N_FlocChannelBaffles ← N_FlocChannelBafflesH if EN_FlocHoriz == 1
    N_FlocChannelBaffles ← N_FlocChannelBafflesV otherwise
    = [14; 14; 14; 14; 13]
N_FlocChannels :=
    N_FlocChannels ← N_FlocChannelsH if EN_FlocHoriz == 1
    N_FlocChannels ← N_FlocChannelsV otherwise
    = 5
N_FlocChannelSpaces :=
    N_FlocChannelSpaces ← N_FlocChannelSpacesH if EN_FlocHoriz == 1
    N_FlocChannelSpaces ← N_FlocChannelSpacesV otherwise
    = [15; 15; 15; 15; 14]
Channels :=
    Channels ← ChannelsH if EN_FlocHoriz == 1
    Channels ← ChannelsV otherwise
HW_FlocEnd :=
    HW_FlocEnd ← P_FlocChannel if EN_FlocHoriz == 1
    HW_FlocEnd ← J_FlocChannel otherwise
    = 2.14154 m
# Need for drain calculations
W_FlocChannel :=
    W_FlocChannel ← J_FlocChannel if EN_FlocHoriz == 1
    W_FlocChannel ← P_FlocChannel otherwise
    = 0.5 m
# Needed for AutoCad code
HW_FlocChannel :=
    HW_FlocChannel ← P_FlocChannel if EN_FlocHoriz == 1
    HW_FlocChannel ← J_FlocChannel otherwise
BaffleType :=
    BaffleType ← "Concrete" if (S_FlocBaffleV[0] ≥ W_HumanMin) or EN_FlocHoriz == 1
    BaffleType ← "Plastic" otherwise
    = "Plastic"
# This forces the baffles to be plastic if there is a spacing between baffles that is less than the minimum channel width (minimum human width) because plastic baffles can be removed and concrete baffles cannot. This will automatically make the horizontal flocculator have concrete baffles since the space will never be less than the minimum.
S_FlocPortGap :=
    S_FlocPortGap ← S_FlocPortGapH if EN_FlocHoriz == 1
    S_FlocPortGap ← S_FlocPortGapV otherwise
    = 0 m
# FG1
# Verify that the channels are all the correct length...
L_Sed = 3.08571 m
vectorize(N_FlocChannelSpaces*S_FlocBaffle) + (N_FlocChannelSpaces - 1)*T_FlocBaffle = [3.08571; 3.08571; 3.08571; 3.08571; 3.08571] m
# FG2
ED_FlocChannel[Channels] :=
    ED_FlocChannel[Channels] ← EDH(Q_Plant, P_FlocChannel, Pi_JSOptimal, S_FlocBaffle[Channels]) if EN_FlocHoriz == 1
    ED_FlocChannel[Channels] ← EDV(Q_Plant, J_FlocChannel, S_FlocBaffle[Channels], P_FlocChannel) otherwise
ED_FlocChannel = [5.25199; 5.25199; 5.25199; 5.25199; 3.74261] mW/kg  # This is the actual energy dissipation rate in each channel
# Calculate the collision potential for each channel
CP_FlocChannel[Channels] := ψ_P(J_FlocChannel, S_FlocBaffle[Channels])*N_FlocChannelSpaces[Channels]
CP_FlocChannel = [22.3908; 22.3908; 22.3908; 22.3908; 21.1674] m^(2/3)
CP_FlocTotal := sum(CP_FlocChannel) = 110.731 m^(2/3)
# FG3
HL_FlocBaffle := K_P(J_FlocChannel/S_FlocBaffle)*Q_Plant^2/(2*g*(S_FlocBaffle*P_FlocChannel)^2) = [0.00179831; 0.00179831; 0.00179831; 0.00179831; 0.00151806] m
# head loss per baffle in each channel
HL_FlocChannels := vectorize(HL_FlocBaffle*(N_FlocChannelBaffles + 1)) = [0.0269746; 0.0269746; 0.0269746; 0.0269746; 0.0212528] m  # total head loss per channel
HL_Floc := HL_FlocBaffle*N_FlocChannelSpaces = 0.129151 m  # total head loss in the flocculator
H_Sed = 2.24154 m
HW_FlocStart :=
    (P_FlocChannel + HL_Floc) if EN_FlocHoriz == 1
    (J_FlocChannel + HL_Floc) otherwise
HW_Sed = 2.14154 m
# Here we are assuming that the entire flocculator has extra tall walls. But that isn't necessary. The walls could be different heights for each channel.
H_Floc := HW_FlocStart + H_PlantFreeboard = 2.37069 m
J_FlocChannel = 2.14154 m
# FG4
L_FlocTank := N_FlocChannels*L_Sed = 15.4286 m  # Total length of floc tanks
Ti_Floc := J_FlocChannel*L_FlocTank*P_FlocChannel/Q_Plant  # This is an estimate. It doesn't include ports, head loss, or space taken up by baffles.
# FG5
W_FlocPortH := S_FlocBaffle = [0.168381; 0.168381; 0.168381; 0.168381; 0.183265] m
H_FlocPortH :=
    if EN_FlocHoriz == 1
        for i ∈ 0 .. N_FlocChannels - 1
            H_FlocPort[i] ← H_Floc
    return H_FlocPort
A_FlocPortH := W_FlocPortH*H_FlocPortH
# FG5
W_FlocPortEstV := S_FlocBaffle = [16.8381; 16.8381; 16.8381; 16.8381; 18.3265] cm
H_FlocPortEstV := P_FlocChannel = 0.5 m
# This keeps the energy dissipation rate through the ports the same as through the baffles since the dimension of the port is actually exactly the same as the dimension through the baffles
A_FlocPortV := W_FlocPortEstV*H_FlocPortEstV
W_FlocPortV := W_FlocPortEstV - S_FlocPortGapV
H_FlocPortV := A_FlocPortV/W_FlocPortV
# FG5
H_FlocPort :=
    H_FlocPort ← H_FlocPortH if EN_FlocHoriz == 1
    H_FlocPort ← H_FlocPortV otherwise
W_FlocPort :=
    W_FlocPort ← W_FlocPortH if EN_FlocHoriz == 1
    W_FlocPort ← W_FlocPortV otherwise
A_FlocPort :=
    A_FlocPort ← A_FlocPortH if EN_FlocHoriz == 1
    A_FlocPort ← A_FlocPortV otherwise
a
## Position calculations for each baffle
# Now we need to assign positions, lengths and elevations to floc baffles
# BP1
L_FlocBaffleLowerH := J_FlocChannel - S_FlocBaffle[0] = 1.97315 m  # Since we kept J.FlocChannel same for last channel too.
L_FlocBaffleUpperH := J_FlocChannel - S_FlocBaffle[0] = 1.97315 m
# BP1
L_FlocBaffleLowerV := HW_FlocEnd - S_FlocBaffle*Pi_FlocBaffle = [1.97315; 1.97315; 1.97315; 1.97315; 1.95827] m
L_FlocBaffleUpperV := (H_Floc - .5*H_PlantFreeboard) - S_FlocBaffle*Pi_FlocBaffle = [2.15231; 2.15231; 2.15231; 2.15231; 2.13742] m
# BP1
L_FlocBaffleLower :=
    L_FlocBaffleLower ← L_FlocBaffleLowerH if EN_FlocHoriz == 1
    L_FlocBaffleLower ← L_FlocBaffleLowerV otherwise
HW_FlocEnd = 2.14154 m
1.656 - 0.555 = 1.101
1.656 - .533 = 1.123
L_FlocBaffleUpper :=
    L_FlocBaffleUpper ← L_FlocBaffleUpperH if EN_FlocHoriz == 1
    L_FlocBaffleUpper ← L_FlocBaffleUpperV otherwise
S_FlocBaffle = [0.168381; 0.168381; 0.168381; 0.168381; 0.183265] m
# BP2
S_FlocBaffle[last(S_FlocBaffle)] :=
    (L_Sed - W_InletChannelEst - 2*S_FlocPortGap - W_FlocPort[last(W_FlocPort) - 1] - T_FlocBaffle)/(N_FlocChannelSpaces[last(N_FlocChannelSpaces)] - 2) - T_FlocBaffle if (S_FlocPortGap + W_InletChannelEst) > S_FlocBaffle[last(S_FlocBaffle)]
    SofN_FlocBaffleF(L_Sed, T_FlocBaffle, N_FlocChannelSpaces[last(N_FlocChannelSpaces)]) otherwise
B_FlocBaffle := S_FlocBaffle + T_FlocBaffle  # center to center distance
S_FlocBaffle = [0.168381; 0.168381; 0.168381; 0.168381; 0.183348] m
X_FlocBaffles :=
    for channel ∈ 0 .. N_FlocChannels - 1
        for i ∈ 0 .. N_FlocChannelBaffles[channel] - 1
            x[i, channel] ← S_FlocBaffle[channel] + B_FlocBaffle[channel]*i
    if (S_FlocPortGap + W_InletChannelEst) > S_FlocBaffle[last(S_FlocBaffle)]
        for i ∈ 0 .. N_FlocChannelBaffles[last(N_FlocChannelBaffles)] - 1
            x[i, N_FlocChannels - 1] ← B_FlocBaffle[last(B_FlocBaffle)]*i + S_FlocPortGap + W_InletChannelEst
        return x
    return x
# if the spacing between baffles is less than the sum of the inlet channel and the "lip" between ports and the nearest baffle, at least one baffle will be in the midst of the inlet channel (or too close to it). In this case, respace the baffles using the remaining length (Length of the sed tank - width of the inlet channel - "lip"). The remaining space should be divided by the number of calculated spaces -1 because one baffle would be aligned with the edge of the remaining space (not dividing it up into 2 spaces).
# if the spacing is not such that at least one baffle will be in the midst of the inlet channel, space normally.
S_FlocBaffle[last(S_FlocBaffle)] + B_FlocBaffle[last(S_FlocBaffle)]*0 = 0.183348 m
X_FlocBaffles = [
    0.168381, 0.168381, 0.168381, 0.168381, 0.19716;
    0.376762, 0.376762, 0.376762, 0.376762, 0.420508;
    0.585143, 0.585143, 0.585143, 0.585143, 0.643856;
    0.793524, 0.793524, 0.793524, 0.793524, 0.867203;
    1.0019, 1.0019, 1.0019, 1.0019, 1.09055;
    1.21029, 1.21029, 1.21029, 1.21029, 1.3139;
    1.41867, 1.41867, 1.41867, 1.41867, 1.53725;
    1.62705, 1.62705, 1.62705, 1.62705, 1.76059;
    1.83543, 1.83543, 1.83543, 1.83543, 1.98394;
    2.04381, 2.04381, 2.04381, 2.04381, 2.20729;
    2.25219, 2.25219, 2.25219, 2.25219, 2.43064;
    2.46057, 2.46057, 2.46057, 2.46057, 2.65399;
    2.66895, 2.66895, 2.66895, 2.66895, 2.87733;
    2.87733, 2.87733, 2.87733, 2.87733, 0
] m
N_FlocChannelSpaces = [15; 15; 15; 15; 14]
S_FlocBaffle = [0.168381; 0.168381; 0.168381; 0.168381; 0.183348] m
# Does not work for lower flow rates because there are no baffles in the floc tank, so the array cannot calculate coordinates
L_Sed = 3.08571 m
# X array is the distance from the inside of the wall of the floc tank (on the side of the plant that has the inlet channel to the sed tank) to the face of the baffle closest to that end of the floc tank
# BP3
Y_FlocBafflesH :=
    if EN_FlocHoriz == 1
        if mod(N_FlocChannels, 2) == 0
            for i ∈ 0 .. (N_FlocChannels - 1)
                for j ∈ 0 .. N_FlocChannelBaffles[i] - 1
                    Y_FlocBaffles[j, i] ← (Plant_Origin[1] + (N_SedTanks*(W_Sed + T_PlantWall)) + ((N_FlocChannels - i - 1)*(J_FlocChannel + T_PlantWall))) + mod(j, 2)*S_FlocBaffle[0] if mod(i, 2) == 1
                    Y_FlocBaffles[j, i] ← (Plant_Origin[1] + (N_SedTanks*(W_Sed + T_PlantWall)) + ((N_FlocChannels - i - 1)*(J_FlocChannel + T_PlantWall))) + mod(j + 1, 2)*S_FlocBaffle[0] otherwise
            Y_FlocBaffles[j, i]
        otherwise
            for i ∈ 0 .. (N_FlocChannels - 1)
                for j ∈ 0 .. N_FlocChannelBaffles[i] - 1
                    Y_FlocBaffles[j, i] ← (Plant_Origin[1] + (N_SedTanks*(W_Sed + T_PlantWall)) + ((N_FlocChannels - i - 1)*(J_FlocChannel + T_PlantWall))) + mod(j, 2)*S_FlocBaffle[0] if mod(i + 1, 2) == 1
                    Y_FlocBaffles[j, i] ← (Plant_Origin[1] + (N_SedTanks*(W_Sed + T_PlantWall)) + ((N_FlocChannels - i - 1)*(J_FlocChannel + T_PlantWall))) + mod(j + 1, 2)*S_FlocBaffle[0] otherwise
            Y_FlocBaffles[j, i]
    return Y_FlocBaffles
# S.FlocBaffle0 should be used because if the last channel is respaced it screws up how it is drawn so that there is a little gap between the bafflle and the edge of the channel.
# Even number of floc channels causes the entrance tank to switch sides
# Odd number of floc channels
Y_FlocBafflesV :=
    if EN_FlocHoriz == 0
        for j ∈ 0 .. (N_FlocChannels - 1)
            Y_FlocBaffles[0, j] ← Plant_Origin[1] + (N_SedTanks*(W_Sed + T_PlantWall)) + ((N_FlocChannels - j - 1)*(P_FlocChannel + T_PlantWall))
    return Y_FlocBaffles
Y_FlocBaffles :=
    Y_FlocBaffles ← Y_FlocBafflesH if EN_FlocHoriz == 1
    Y_FlocBaffles ← Y_FlocBafflesV otherwise
# BP4
S_FlocBaffle = [0.168381; 0.168381; 0.168381; 0.168381; 0.183348] m
Z_FlocBafflesH :=
    if EN_FlocHoriz == 1
        for channel ∈ Channels
            for i ∈ 0 .. N_FlocChannelBaffles[channel] - 1
                z[i, channel] ← 0 m
    return z
# Z array is the elevation of the bottom of the baffle
Y_FlocBaffles = [6.9, 6.25, 5.6, 4.95, 4.3] m
# BP4
Channelsnew := 0 .. N_FlocChannels - 2
Z_FlocBafflesV :=
    if EN_FlocHoriz == 0
        for channel ∈ Channelsnew
            for i ∈ 0 .. N_FlocChannelBaffles[channel] - 1
                z[i, channel] ← mod(i, 2)*S_FlocBaffle[channel]
        for i ∈ 0 .. N_FlocChannelBaffles[last(N_FlocChannelBaffles)] - 1
            z[i, N_FlocChannels - 1] ← mod(i + 1, 2)*S_FlocBaffle[N_FlocChannels - 1]
    return z
# BP4
Z_FlocBaffles :=
    Z_FlocBaffles ← Z_FlocBafflesH if EN_FlocHoriz == 1
    Z_FlocBaffles ← Z_FlocBafflesV otherwise
Z_FlocBaffles = [
    0, 0, 0, 0, 0.183348;
    0.168381, 0.168381, 0.168381, 0.168381, 0;
    0, 0, 0, 0, 0.183348;
    0.168381, 0.168381, 0.168381, 0.168381, 0;
    0, 0, 0, 0, 0.183348;
    0.168381, 0.168381, 0.168381, 0.168381, 0;
    0, 0, 0, 0, 0.183348;
    0.168381, 0.168381, 0.168381, 0.168381, 0;
    0, 0, 0, 0, 0.183348;
    0.168381, 0.168381, 0.168381, 0.168381, 0;
    0, 0, 0, 0, 0.183348;
    0.168381, 0.168381, 0.168381, 0.168381, 0;
    0, 0, 0, 0, 0.183348;
    0.168381, 0.168381, 0.168381, 0.168381, 0
] m
# BP5
L_FlocBafflesH :=
    if EN_FlocHoriz == 1
        for channel ∈ Channels
            for i ∈ 0 .. N_FlocChannelBaffles[channel] - 1
                l[i, channel] ← L_FlocBaffleLower
    return l  # L array is the total height (length) of the baffle
# The lengths of all the baffles are the same for horizontal
# BP5
L_FlocBafflesV :=
    if EN_FlocHoriz == 0
        for channel ∈ Channelsnew
            for i ∈ 0 .. N_FlocChannelBaffles[channel] - 1
                l[i, channel] ← L_FlocBaffleUpper[channel] if mod(i, 2) == 1
                l[i, channel] ← L_FlocBaffleLower[channel] otherwise
        for i ∈ 0 .. N_FlocChannelBaffles[last(N_FlocChannelBaffles)] - 1
            l[i, N_FlocChannels - 1] ← L_FlocBaffleLower[N_FlocChannels - 1] if mod(i, 2) == 1
            l[i, N_FlocChannels - 1] ← L_FlocBaffleUpper[N_FlocChannels - 1] otherwise
    return l
# For the last channel, the length of the
# baffles needed to be changed since the
# up/down had been adjusted.
# BP5
L_FlocBaffles :=
    L_FlocBaffles ← L_FlocBafflesH if EN_FlocHoriz == 1
    L_FlocBaffles ← L_FlocBafflesV otherwise
L_FlocBaffles = [
    1.97315, 1.97315, 1.97315, 1.97315, 2.13742;
    2.15231, 2.15231, 2.15231, 2.15231, 1.95827;
    1.97315, 1.97315, 1.97315, 1.97315, 2.13742;
    2.15231, 2.15231, 2.15231, 2.15231, 1.95827;
    1.97315, 1.97315, 1.97315, 1.97315, 2.13742;
    2.15231, 2.15231, 2.15231, 2.15231, 1.95827;
    1.97315, 1.97315, 1.97315, 1.97315, 2.13742;
    2.15231, 2.15231, 2.15231, 2.15231, 1.95827;
    1.97315, 1.97315, 1.97315, 1.97315, 2.13742;
    2.15231, 2.15231, 2.15231, 2.15231, 1.95827;
    1.97315, 1.97315, 1.97315, 1.97315, 2.13742;
    2.15231, 2.15231, 2.15231, 2.15231, 1.95827;
    1.97315, 1.97315, 1.97315, 1.97315, 2.13742;
    2.15231, 2.15231, 2.15231, 2.15231, 0
] m
L_FlocWithWalls := L_Sed + 2*T_PlantWall = 3.38571 m
W_FlocWithWalls := W_FlocChannel*N_FlocChannels + T_PlantWall*(N_FlocChannels + 1)
## Drain Calculations (Vertical)
# This is a program to calculate how much time is required to drain out a flocculator section. Each section of the flocculator is connected to one another with alternating holes on the bottom of the baffles. These holes are small enough not to disrupt flow over the baffles and big enough such that one drain will empty out all the sections.
# Initially, the tank is full. This is denoted at time=t(0).
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# Once the tanks start draining, at time=t(1) all the water is level.
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# At time=t(2), section 1 has begun to drain quicker than sections 2, 3 & 4.
# Each hole on the bottom of the baffles is treated as an orifice.
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# available valve diameters
D_Valvem := [0.0508; 0.0762; 0.1016; 0.127; 0.1524; 0.1778; 0.2032]*m
Q_minor(K_minor, D, h1, h2) :=
    Q ← (π*D^2/4*sqrt(2*g*(h1 - h2)/K_minor)) if h1 - h2 > 0
    Q ← 0*m^3/s otherwise
# Base and width are defined as the base and width of a single channel
# We need to calculate 'n' different h values plus an extra 'h'
# which would be the value emptied from tank 1. The tanks are
# numbered from 1 to n
# There will only be n-1 different flows out from each tank
# . | .
t_masterV(base, width, D_Valve, K_Valve, h_initial, H_LowerBaffle, n_tanks) :=
    time ← (sqrt(h_initial) - sqrt(H_LowerBaffle))/((π*D_Valve^2/(8*n_tanks*base*width))*sqrt(2*g/K_Valve))
    Δt ← base*width*H_LowerBaffle/(Q_minor(K_Valve, D_Valve, H_LowerBaffle, 0 m)*100)
    for i ∈ 0 .. n_tanks
        h_tank[i] ← H_LowerBaffle
    h_tank[0] ← 0 m
    while h_tank[n_tanks, 0] > 1 mm
        time ← time + Δt
        for i ∈ 0 .. n_tanks
            Q[i] ← Q_minor(K_Valve, D_Valve, h_tank[i + 1], h_tank[i]) if i < n_tanks
            Q[i] ← 0*m^3/s otherwise
            h_tank[i] ← h_tank[i] + (Q[i] - Q[i - 1])*Δt/(base*width) if i > 0
            h_tank[i] ← 0 m otherwise
    return time  # initial guess for time based on the total number of tanks in each channel
# delta t is based on the height of the lower baffle in the first channel
# Solution path to get port area and valve diameter
# Find area of ports assuming all including valve are same area.
# Try solution with valve one size smaller
# find required port area
# If that doesn't work, then increase valve size
# find required port area
# These equations are from integration of the flow out of a tank with changing depth
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# If the valve is the flow limiter, the relationship is linear
# Below code has been updated 3/18/2010
# The following function returns a port size based on allowable valve sizes
FlocValveSize(desiredT) :=
    tankDrainTime ← 100 hr
    i ← 0
    D_Valve ← 0 m
    if EN_FlocHoriz == 0
        D_Valve ← D_Valvem[last(D_Valvem)] if desiredT ≤ t_masterV(L_FlocTank*N_FlocChannels/((N_FlocBaffles + N_FlocChannels + 1)/2), W_FlocChannel, D_Valvem[last(D_Valvem)], Pi_VenaContractaOrifice, (HW_FlocEnd + HW_FlocStart)/2, L_FlocBaffleLower[0], N_FlocChannels + N_FlocBaffles + 1)
        while i < rows(D_Valvem) and D_Valve == 0 m
            tankDrainTime ← t_masterV(L_FlocTank*N_FlocChannels/((N_FlocBaffles + N_FlocChannels + 1)/2), W_FlocChannel, D_Valvem[i], Pi_VenaContractaOrifice, (HW_FlocEnd + HW_FlocStart)/2, L_FlocBaffleLower[0], N_FlocChannels + N_FlocBaffles + 1)
            D_Valve ← D_Valvem[i] if tankDrainTime < 1.1*desiredT
            i ← i + 1 otherwise
            D_Valve
    otherwise
        i ← 0
        D_Valveguess ← sqrt(sqrt((HW_FlocEnd + HW_FlocStart)/2)/((π*desiredT/(8*L_Sed*N_FlocChannels*(T_PlantWall + W_FlocChannel)))*sqrt(2*g/Pi_VenaContractaOrifice)))
        D_Valve ← D_Valvem[last(D_Valvem)] if D_Valveguess > D_Valvem[last(D_Valvem)]
        while (D_Valveguess > D_Valvem[i]) and D_Valve ≠ D_Valvem[last(D_Valvem)]
            i ← i + 1
            D_Valve ← D_Valvem[i] if D_Valvem[i] > D_Valveguess
        D_Valve
    D_Valve
D_FlocValveCalc := FlocValveSize(Ti_FlocDrain) = 8 in
D_FlocValve := 2*outerradius(NominalDiameter(D_FlocValveCalc, EN_PipeSpec))
H_FlocSlope := D_FlocValve/2
L_BafflePort := sqrt(π/4*D_FlocValve^2)
D_FlocScale := D_FlocValveCalc/(1.16 m) = 0.175172
# Assupmtions:
# The Flocculator can be assumed as one straight channel rather than wrapping back and forth
# The port size is calculated for the time to drain 2 channels, since there is a valve on at least every other channel
# The volume of each "tank" (space between baffles) is equal
# The size of a port is equal to the size of the valve
# The minor loss through the port is the same as the minor loss through the valve (Pi.VenaContractaOrifice)
# Drain Valve Position Calcs for Vertical Flocculator
# excludes sed tank valve for now
Y_FlocDrainValves :=
    for i ∈ 0 .. ceil(N_FlocChannels/2) - 1
        y[i] ← Plant_Origin[1] + N_SedTanks*(W_Sed + T_PlantWall) + 0.5*W_FlocChannel + 2*(W_FlocChannel + T_PlantWall)*i
    y[N_FlocChannels/2] ← Plant_Origin[1] + N_SedTanks*(W_Sed + T_PlantWall) + 0.5*W_FlocChannel + (W_FlocChannel + T_PlantWall)*(N_FlocChannels - 1) if mod(N_FlocChannels, 2) == 0
    y
# if the number of channels is even, add a valve in the first channel
# assuming the valve is selected from its center
Y_FlocDrainValves = [4.55; 5.85; 7.15] m
