# [reference: BasicInputs.xmcd]
# [reference: ExpertInputs.xmcd]
# [reference: DesignAssumptions.xmcd]
# [reference: MathFunctions.xmcd]
# [reference: PipeDatabase.xmcd]
# [reference: MinorLossCoefficients.xmcd]
# [reference: FluidsFunctions.xmcd]
N_rows := Π_Lfomorifice = 10  # Rows of Orifices in the LFOM, currently set expert inputs
S_LfomRows := H_dmax/N_rows = 0.02 m  # Height of each row
D_LfomOrificeMax := S_LfomRows  # The diameter of the orifices cannot be greater than the height of each row
# Step 1: Calculate the minimum diameter of the LFOM pipe:
# 1.  A stout is a theoretical weir with width proportional to 1/sqrt(height).  Practically this is impossible to create because width goes to infinity as height goes to zero.  However, this gives the equation that both the LFOM and sutro weir look to copy.  Therefore we use the stout weir equation to model the LFOM y(x) = α/sqrt(x) = α*basicY(x).  However, first note that 1/sqrt(x) has unitsm^-.5 insteat of units of m (as width should) so we need to correct for units by multiplying by 1 m^1.5
basicY(x) := m^1.5/sqrt(x)
# 2. We Solve for alpha using the flow equation flow(height)= Pi_VenaContractaOrifice*integral(sqrt(2*g*(height - x))*basicY(x), x = 0 .. height) at max height and setting equal to Q_Plant.
Flow_overAlpha := sqrt(2*g)*Pi_VenaContractaOrifice*integral(sqrt(H_dmax - x)*basicY(x), x = 0 m .. H_dmax)
α := Q_Plant/Flow_overAlpha
α = 0.0136904
y(x) := α*basicY(x)
# 3. To calculate  calculate the average velocity at the bottom we weight the falling velocity from each height sqrt(2*g*height) by the amount of flow at that height and deviding by Q_Plant
#
# Thus we get:
V_LfomExit := 2*g*Pi_VenaContractaOrifice/Q_Plant*integral(sqrt(x*(H_dmax - x))*y(x), x = 0 m .. H_dmax)
# Note that 0.841*m/s is the speed of the falling water for all LFOMS of height 20 cm, regardless of total flow through the plant.  Even for flow as low as 3*L/s the percent error at each test location is less than 2%
V_LfomExit = 0.840585 m/s
# 4. we need the average velocity at the bottom to be greater than the Q.Plant/Area, so we can then solve for minArea and thus the minimum diameter
A_LfomSafe := Π_LfomSafety*Q_Plant/V_LfomExit
D_LfomMin := 2*sqrt(A_LfomSafe/π)
D_LfomMin = 0.190664 m
ND_Lfom := NominalDiameter(D_LfomMin, PS_Default)
ND_Lfom = 8 in
ND_Lfom = 0.2032 m
ND_RMPipe := ND_Lfom
# Step 2: Define the simple formulas for calculating flow from an Orifice Array
D_LfomOrifices := FloorNearest(D_LfomOrificeMax, D_Drill)
# We want as large orifices as possible to reduce the number of orifices needed to be drilled.  Note that for very small
D_LfomOrifices = 0.748031 in
# The area of each orifice multiplied by the Vena Contracta Coefficient
A_LfomOrifices := π*(D_LfomOrifices/2)^2*Pi_VenaContractaOrifice
# The additional height of the center of the orifice above each testing location.  This is just the diameter/2 because the bottom of the orifice is tangential to the test height. (this gives a correct zero level)
H_LfomOrificeCenter := D_LfomOrifices/2 = 9.5 mm
N_LfomMaxOrificesperRow := floor(π*ND_Lfom/(2*D_LfomOrifices)) = 16
# A bound on the number of orifices allowed in each row.  We want a the distance between each orifice equal to the orifice diameter
H_LfomOrifice :=
    array[N_rows - 1] ← 0
    for i ∈ 0 .. last(array)
        array[i] ← i*S_LfomRows + H_LfomOrificeCenter
    return array
# The height locations of the center of the orifices.  Necessary for calculating height difference.  Also, this is passed to the design tool so that the orifices can be drawn at the correct heights
FlowOutSingle(RowIn, RowOut) :=
    heightDiff ← (RowIn + 1)*S_LfomRows - H_LfomOrifice[RowOut]
    heightDiff ← 0 if heightDiff < 0
    Velocity ← sqrt(2*g*heightDiff)
    Q_singleOrifice ← Velocity*A_LfomOrifices
    return Q_singleOrifice
# FlowOutSingle calculates the amount of flow out of a single orifice in row #RowOut when the water is just enough to submerge row # RowIn.  Thus FlowOutSingle(i, i) is positive and nonzero
FlowOutSingle(7, 7) = 8.10602e-5 m^3/s
TotalFlow_fromRowNumber(WaterRowHeight, Orificearray) :=
    total ← 0
    for i ∈ 0 .. WaterRowHeight
        total ← total + FlowOutSingle(WaterRowHeight, i)*Orificearray[i]
    return total
# This calculate the total flow through the LFOM when the water just submerges the inputed row.  WaterRowHeight can be viewed as the number of rows submerged.
TotalFlow_vector(orificeArray) :=
    OutFlow[last(orificeArray)] ← 0
    for i ∈ 0 .. last(OutFlow)
        OutFlow[i] ← TotalFlow_fromRowNumber(i, orificeArray)
    return OutFlow  # TotalFlow.vector simply calculates a vector where each cell is equal to the amount of total flow when water is at that height.
# Step 3: Define helpful variables for the algorithm
TargetFlow :=
    Flow[N_rows - 1] ← 0
    for i ∈ 0 .. last(Flow)
        Flow[i] ← (i + 1)*Q_Plant/N_rows
    return Flow
# This simply finds the flow after each row if the algorith was perfect and had a perfectly linear relationship.  We am to get as close to this value at each row in the algorithm, and then pick the best orifice array at the end by minimizing mean squared error (MSE) to this value.
TargetFlow = [0.0012; 0.0024; 0.0036; 0.0048; 0.006; 0.0072; 0.0084; 0.0096; 0.0108; 0.012] m^3/s
TargetFlow = [0.0012; 0.0024; 0.0036; 0.0048; 0.006; 0.0072; 0.0084; 0.0096; 0.0108; 0.012] m^3/s
Q_LfomScale := TargetFlow
TempOrificeArray[N_rows - 1] := 0
# TempOrificeArray is an array of zeros that has the same size as the number of rows in the LFOM.  We pass this to the algorithm.
TempOrificeArray = [0; 0; 0; 0; 0; 0; 0; 0; 0; 0]
incrementHoleOnLevel := FlowOutSingle(1, 1) = 8.10602e-5 m^3/s
# incrementHoleOnLevel is the increased flow from adding a single orifice in the top row that is submerged.  Thus given the orifices below a certain row, we can find the ideal additional orifices on that row.
# Step 4: Functions for the Algorithm
# 1) At each row, the fractional number of orifices needed to meet the targetflow array is calculated.
# 2)Because using either the floor or ceil of this number will effect values of flow rates for heigher rows, we recursivly call the algorithm for both values.
# 3)Once we go deep enough into the recursion that we have calculated the orifice number for each row, we calculate the mean squared error for that array, as well as the past best array, and return the array that gives the lower MSE.
MSE(flowArray) :=
    sum ← 0
    for i ∈ 0 .. last(flowArray)
        sum ← sum + (flowArray[i] - TargetFlow[i])^2
    return sum  # Simply the Mean Squared Error of a flow array compared to the TargetFlow array
pickBetterEstimator(testingArray, bestArray) :=
    testingFlow ← TotalFlow_vector(testingArray)
    bestFlow ← TotalFlow_vector(bestArray)
    toReturn ← testingArray if MSE(bestFlow) > MSE(testingFlow)
    toReturn ← bestArray otherwise
    return toReturn  # pickBetterEstimator returns the array with the lower MSE.
pickBottom(testingArray, level) :=
    previousFlow ← TotalFlow_fromRowNumber(level, testingArray)
    additionalFlow ← TargetFlow[level] - previousFlow
    bottom ← floor(additionalFlow/incrementHoleOnLevel)
    bottom ← max(0, bottom)
    bottom ← min(N_LfomMaxOrificesperRow - 1, bottom)
    return bottom
# pickBottom takes the floor of the ideal ratio for additional orifices required.  thus we can add one to get the ceil of this value
N_LfomMaxOrificesperRow = 16
# This is where everything happens:
# If we have calculated each row, we return the new better estimator
#
# otherwise:
# set the current row to either the floor or ceil of the ideal number(a ratio) or orifices for that row
# call the function for the next level, using each value in turn
# and return the current best array we have calculated.
recurseEstimator(testingArray, bestArray, level) :=
    toReturn ← pickBetterEstimator(testingArray, bestArray) if level > last(testingArray)
    otherwise
        if level ≤ last(testingArray)
            bottom ← pickBottom(testingArray, level)
            for i ∈ bottom .. bottom + 1
                tempArray ← testingArray
                tempArray[level] ← i
                bestArray ← recurseEstimator(tempArray, bestArray, level + 1)
            toReturn ← bestArray
    return toReturn
N_LfomOrifices := recurseEstimator(TempOrificeArray, TempOrificeArray, 0)
# Call the function with TempOrificeArray at the zero level.  Our LFOM Array that is calculated is N_LfomOrifices
N_LfomOrifices = [15; 4; 5; 3; 4; 2; 3; 3; 2; 2]
# Step 5: Analysis of N.LfomOrifices
FlowBestEstimate := TotalFlow_vector(N_LfomOrifices)  # The total flow when water just submerges each row.
AddZeroforGraph(array) :=
    temp[rows(array)] ← 0
    for i ∈ 1 .. last(temp)
        temp[i] ← array[i - 1]
    return temp  # This adds the (0,0) value to the flow arrays for graphing
EstimateGraph := AddZeroforGraph(FlowBestEstimate)  # The two arrays to be graphed
IdealGraph := AddZeroforGraph(TargetFlow)
H_testlocations :=
    temp[last(EstimateGraph)] ← 0
    for i ∈ 0 .. last(temp)
        temp[i] ← i*S_LfomRows
    return temp  # The height values after each row.  This includes zero height
xi := 0 .. last(EstimateGraph)  # Variable tool used for graphing
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PercentError := (FlowBestEstimate - TargetFlow)/TargetFlow*100  # For all values exept for the zero value, which has no error
PercentErrorGraph := AddZeroforGraph(PercentError)
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