# Monroe's reflections on this file and on our CDC design.
#
# I previously thought that we would develop a basic design for the CDC and that we would alway use 1/8" tubing. It is now clear that it is necessary to use different diameters of tubing to get a reasonable range of plant flow rates. This means that we will need to find appropriate fittings for several different sizes of tubing. We need to create designs for the different versions of CDC and ideally we should find a way to reduce the number of different systems that we manufacturer.
# We are currently constrained with the length of the doser tubing based on the distance to the floor. We could remove a section of the floor and have the tubing extend into the drain channel. It would reduce the number of tubes needed for a doser significantly if we could use 2.5 m long tubes.
# Chlorination is a challenge because the stock needs to be dilute enough so that it doesn't decay rapidly and the viscosity of the dilute solutions is close to that of water (do we have data for this?). One way to reduce the length of the tubing required is to reduce the driving head. It might be reasonable to reduce the driving head for the chlorinator to 10 cm. I have made this change. This cuts the tubing length in half as well.
# We should calculate the required L/D ratio for keeping the nonlinear error small.
# Before creating a full set of doser designs we should review our design options and see which parameters we could tweak to get a nicer set of doser designs. We should also investigate likely maximum dosages for PACl and Alum.
# Design algorithm
# Calculate the maximum flow for each available tube size given error constraint from major losses.
# Calculate the number of tubes needed for each tube size
# Calculate the total chemical flow for each tube size
# Calculate the required stock concentration for each tube size
# Calculate the length of tubing required for each tube size
# Select the tubing size that is shorter than max allowed
# Find the index of the tubing size selected
# Use the index to obtain the correct value for each of the related variables.
# Linear Chemical Dose Controller
# Maximum Tube Length to Span the Walkway without Hitting the Floor
L_TubeDrape := 0.25 m  # add this length to short tubes so that they drape nicely
D_CdcTubeWeight := 4 in
H_CdcTubeLong := ZW_CdcCht - Z_Walkway - D_CdcTubeWeight/2 = 1.33488 m
H_CoagCdcTubeShort := Z_EtTop + H_DoserAssembly - Z_Walkway - HL_CoagCdc - D_CdcTubeWeight/2 = 1.13488 m
X_TubeDrape := W_PlantDC*H_CoagCdcTubeShort/(H_CdcTubeLong + H_CoagCdcTubeShort)
H_CdcTubeLong/(W_PlantDC - x) == H_CdcTubeShort/x
L_CoagCdcTubeMax := sqrt(H_CdcTubeLong^2 + (W_PlantDC - X_TubeDrape)^2) + sqrt(H_CoagCdcTubeShort^2 + X_TubeDrape^2) = 2.66452 m  # slight underestimate
L_CoagCdcTubeMin := sqrt((H_DoserAssembly + HL_CoagCdc)^2 + W_PlantDC^2) + L_TubeDrape
H_ChlorCdcTubeShort := Z_EtTop + H_DoserAssembly - Z_Walkway - HL_ChlorCdc - D_CdcTubeWeight/2 = 1.23488 m
L_ChlorCdcTubeMax := sqrt(H_CdcTubeLong^2 + (W_PlantDC - X_TubeDrape)^2) + sqrt(H_ChlorCdcTubeShort^2 + X_TubeDrape^2) = 2.75775 m
L_ChlorCdcTubeMin := sqrt((H_DoserAssembly + HL_ChlorCdc)^2 + W_PlantDC^2) + L_TubeDrape
# use the minimums later to calculate the length of "connector tubes" (larger diameter tubes connected to the design tube, adding the necessary length to reach the drop tube). We will need to create a database of reducing barb fittings to figure out the next larger diameter tube we can use, and report that in the design specs.
# Functions for Coagulant Viscosities and Selecting Available Tube Diameters
D_TubeAvailable :=
    D ← D_TubeMetric if EN_TubeSeries
    D ← D_TubeEnglish otherwise
    return D
D_TubeAvailable =  # error: This variable is undefined.
Nu_Alum(C_Alum) := (1 + 4.255*10^-6*(C_Alum/(kg/m^3))^2.289)*Nu_Water
Nu_PACl(C_PACl) := (1 + 2.383*10^-5*(C_PACl/(kg/m^3))^1.893)*Nu_Water
Nu_Coag(C_Coag, EN_Chem) :=
    Nu ← Nu_Alum(C_Coag) if EN_Chem == 0
    Nu ← Nu_PACl(C_Coag) if EN_Chem == 1
    Nu ← Nu_Water if EN_Chem == 2
    return Nu
# Flow Rate Constraints for Laminar Tube Flow, Deviation from Linear Head Loss Behavior, and Lowest Possible Flow
# Maximum flow that can be put through a tube of a given diameter without exceeding the allowable deviation from linear head loss behavior
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Q_MaxError(D, HL_Cdc) := π*D^2*sqrt((1 - Π_LinearCdcError)*HL_Cdc*g/(8*K_CdcTube*(1/Π_LinearCdcError)))
Q_Available(D_TubeAvailable, HL) := floor(10*Q_MaxError(D_TubeAvailable, HL)/(mL/s))*mL/s/10  # round for convenient flow values
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# Length of Tubing Required Given Head Loss, Max Flow, and Diameter
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# Length of tube required to get desired head loss at maximum flow based on the Hagen-Poiseuille equation.
L_Tube(Q, D, HL, ν, K_Minor) := (HL*g*π*D^4/Q - K_Minor*8*Q/π)/(128*ν)
L == (HL - K_Minor*8*Q^2/(g*π^2*D^4))*g*π*D^4/(128*ν*Q)
N_TubeArray(Q_Plant, C_DoseMax, C_StockMax, D_TubeAvailable, HL) := ceil(Q_Plant*C_DoseMax/(C_StockMax*Q_Available(D_TubeAvailable, HL)))
N_CoagTubeArray := N_TubeArray(Q_Plant, C_CoagDoseMax, C_CoagStockMax, D_TubeAvailable, HL_CoagCdc) = [23; 13; 8; 6; 4; 2]
N_ChlorTubeArray := N_TubeArray(Q_Plant, C_ChlorineDoseMax, C_ChlorineStockMax, D_TubeAvailable, HL_ChlorCdc) = [7; 4; 3; 2; 1; 1]
Q_ChemStockArray(Q_Plant, C_DoseMax, C_StockMax, D_TubeAvailable, HL) := vectorize(Q_Available(D_TubeAvailable, HL)*N_TubeArray(Q_Plant, C_DoseMax, C_StockMax, D_TubeAvailable, HL))
Q_ChlorStockArray := Q_ChemStockArray(Q_Plant, C_ChlorineDoseMax, C_ChlorineStockMax, D_TubeAvailable, HL_ChlorCdc) = [4.2; 4.4; 5.4; 5.2; 4.7; 7.3] mL/s
Q_CoagStockArray := Q_ChemStockArray(Q_Plant, C_CoagDoseMax, C_CoagStockMax, D_TubeAvailable, HL_CoagCdc) = [20.7; 20.8; 20; 22.2; 26.4; 20.6] mL/s
C_ChemStockArray(Q_Plant, C_DoseMax, C_StockMax, D_TubeAvailable, HL) := C_DoseMax*Q_Plant/Q_ChemStockArray(Q_Plant, C_DoseMax, C_StockMax, D_TubeAvailable, HL)
C_CoagStockArray := C_ChemStockArray(Q_Plant, C_CoagDoseMax, C_CoagStockMax, D_TubeAvailable, HL_CoagCdc) = [386.473; 384.615; 400; 360.36; 303.03; 388.35] gm/L
C_ChlorStockArray := C_ChemStockArray(Q_Plant, C_ChlorineDoseMax, C_ChlorineStockMax, D_TubeAvailable, HL_ChlorCdc) = [47.619; 45.4545; 37.037; 38.4615; 42.5532; 27.3973] gm/L
# Calculate the length of each diameter tube given the corresponding flow rate and coagulant viscosity
# Choose the tube that is shorter than the maximum length tube
L_CdcTube(Q_Plant, C_DoseMax, C_StockMax, D_TubeAvailable, HL, EN_Coag, K_CdcTube) := L_Tube(Q_Available(D_TubeAvailable, HL), D_TubeAvailable, HL, Nu_Coag(C_ChemStockArray(Q_Plant, C_DoseMax, C_StockMax, D_TubeAvailable, HL), EN_Coag), K_CdcTube)
L_ChlorTube := L_CdcTube(Q_Plant, C_ChlorineDoseMax, C_ChlorineStockMax, D_TubeAvailable, HL_ChlorCdc, 2, K_CdcTube) = [1.19433; 2.04846; 3.03096; 4.34861; 7.57838; 11.9262] m
L_CoagTube := L_CdcTube(Q_Plant, C_CoagDoseMax, C_CoagStockMax, D_TubeAvailable, HL_CoagCdc, EN_Coag, K_CdcTube) = [0.547088; 0.978402; 1.45573; 2.305; 4.94133; 5.83396] m
# Find the index of that tube
i_Cdc(Q_Plant, C_DoseMax, C_StockMax, D_TubeAvailable, HL, L_CdcTubeMax, EN_Coag, K_CdcTube) := match(FloorNearest(L_CdcTubeMax, L_CdcTube(Q_Plant, C_DoseMax, C_StockMax, D_TubeAvailable, HL, EN_Coag, K_CdcTube)), L_CdcTube(Q_Plant, C_DoseMax, C_StockMax, D_TubeAvailable, HL, EN_Coag, K_CdcTube))[0]
# 0 is alum  For EN.Coag
# 1 is PACl
# 2 is water
# Main Coagulant Small-Diameter Tube Design
L_CoagCdcTube := L_CdcTube(Q_Plant, C_CoagDoseMax, C_CoagStockMax, D_TubeAvailable, HL_CoagCdc, EN_Coag, K_CdcTube)[i_Cdc(Q_Plant, C_CoagDoseMax, C_CoagStockMax, D_TubeAvailable, HL_CoagCdc, L_CoagCdcTubeMax, EN_Coag, K_CdcTube)] = 2.305 m
Q_CoagStock := Q_ChemStockArray(Q_Plant, C_CoagDoseMax, C_CoagStockMax, D_TubeAvailable, HL_CoagCdc)[i_Cdc(Q_Plant, C_CoagDoseMax, C_CoagStockMax, D_TubeAvailable, HL_CoagCdc, L_CoagCdcTubeMax, EN_Coag, K_CdcTube)] = 22.2 mL/s
D_CdcCoag := D_TubeAvailable[i_Cdc(Q_Plant, C_CoagDoseMax, C_CoagStockMax, D_TubeAvailable, HL_CoagCdc, L_CoagCdcTubeMax, EN_Coag, K_CdcTube)] = 0.1875 in
N_CoagCdcTubes := N_TubeArray(Q_Plant, C_CoagDoseMax, C_CoagStockMax, D_TubeAvailable, HL_CoagCdc)[i_Cdc(Q_Plant, C_CoagDoseMax, C_CoagStockMax, D_TubeAvailable, HL_CoagCdc, L_CoagCdcTubeMax, EN_Coag, K_CdcTube)] = 6
C_CoagStock := C_ChemStockArray(Q_Plant, C_CoagDoseMax, C_CoagStockMax, D_TubeAvailable, HL_CoagCdc)[i_Cdc(Q_Plant, C_CoagDoseMax, C_CoagStockMax, D_TubeAvailable, HL_CoagCdc, L_CoagCdcTubeMax, EN_Coag, K_CdcTube)] = 360.36 kg/m^3
# Chlorine Small-Diameter Tube Design
L_ChlorCdcTube := L_CdcTube(Q_Plant, C_ChlorineDoseMax, C_ChlorineStockMax, D_TubeAvailable, HL_ChlorCdc, 2, K_CdcTube)[i_Cdc(Q_Plant, C_ChlorineDoseMax, C_ChlorineStockMax, D_TubeAvailable, HL_ChlorCdc, L_ChlorCdcTubeMax, 2, K_CdcTube)] = 2.04846 m
Q_ChlorStock := Q_ChemStockArray(Q_Plant, C_ChlorineDoseMax, C_ChlorineStockMax, D_TubeAvailable, HL_ChlorCdc)[i_Cdc(Q_Plant, C_ChlorineDoseMax, C_ChlorineStockMax, D_TubeAvailable, HL_ChlorCdc, L_ChlorCdcTubeMax, 2, K_CdcTube)] = 4.4 mL/s
D_CdcChlor := D_TubeAvailable[i_Cdc(Q_Plant, C_ChlorineDoseMax, C_ChlorineStockMax, D_TubeAvailable, HL_ChlorCdc, L_ChlorCdcTubeMax, 2, K_CdcTube)] = 4 in/32
N_ChlorCdcTubes := N_TubeArray(Q_Plant, C_ChlorineDoseMax, C_ChlorineStockMax, D_TubeAvailable, HL_ChlorCdc)[i_Cdc(Q_Plant, C_ChlorineDoseMax, C_ChlorineStockMax, D_TubeAvailable, HL_ChlorCdc, L_ChlorCdcTubeMax, 2, K_CdcTube)] = 4
C_ChlorStock := C_ChemStockArray(Q_Plant, C_ChlorineDoseMax, C_ChlorineStockMax, D_TubeAvailable, HL_ChlorCdc)[i_Cdc(Q_Plant, C_ChlorineDoseMax, C_ChlorineStockMax, D_TubeAvailable, HL_ChlorCdc, L_ChlorCdcTubeMax, 2, K_CdcTube)] = 45.4545 kg/m^3
# Filter Coagulant Small-Diameter Tube Design
# This will be deleted as soon as the drawing code is updated. Deleting it now will cause a lot of the drawing to fail!!!
L_FiCoagCdcTube := L_CdcTube(Q_Plant, C_FilterCoagDoseMax, C_CoagStockMax, D_TubeAvailable, HL_CoagCdc, EN_Coag, K_CdcTube)[i_Cdc(Q_Plant, C_FilterCoagDoseMax, C_CoagStockMax, D_TubeAvailable, HL_CoagCdc, L_CoagCdcTubeMax, EN_Coag, K_CdcTube)] = 1.47673 m
Q_FiCoagStock := Q_ChemStockArray(Q_Plant, C_FilterCoagDoseMax, C_CoagStockMax, D_TubeAvailable, HL_CoagCdc)[i_Cdc(Q_Plant, C_FilterCoagDoseMax, C_CoagStockMax, D_TubeAvailable, HL_CoagCdc, L_CoagCdcTubeMax, EN_Coag, K_CdcTube)] = 0.9 mL/s
D_CdcFiCoag := D_TubeAvailable[i_Cdc(Q_Plant, C_FilterCoagDoseMax, C_CoagStockMax, D_TubeAvailable, HL_CoagCdc, L_CoagCdcTubeMax, EN_Coag, K_CdcTube)] = 3 in/32
N_FiCoagCdcTubes := N_TubeArray(Q_Plant, C_FilterCoagDoseMax, C_CoagStockMax, D_TubeAvailable, HL_CoagCdc)[i_Cdc(Q_Plant, C_FilterCoagDoseMax, C_CoagStockMax, D_TubeAvailable, HL_CoagCdc, L_CoagCdcTubeMax, EN_Coag, K_CdcTube)] = 1
C_FiCoagStock := C_ChemStockArray(Q_Plant, C_FilterCoagDoseMax, C_CoagStockMax, D_TubeAvailable, HL_CoagCdc)[i_Cdc(Q_Plant, C_FilterCoagDoseMax, C_CoagStockMax, D_TubeAvailable, HL_CoagCdc, L_CoagCdcTubeMax, EN_Coag, K_CdcTube)] = 66.6667 kg/m^3
# Need the following...
# Select connectors/adaptors required.
# Main Coagulant CHT Float Valve Design
D_CoagFloatValveOrifice :=
    i ← 0
    while h_orifice(D_FltVlvOrificesAvail[i], Pi_VenaContractaOrifice, Q_CoagStock) ≥ H_CoagTankAboveHeadTank
        i ← i + 1
    return D_FltVlvOrificesAvail[i]
D_CoagFloatValveOrifice =  # error
HL_CoagFloatValveOrifice := h_orifice(D_CoagFloatValveOrifice, Pi_VenaContractaOrifice, Q_CoagStock) = 20.8205 cm
L_TubeStockToCHEst := 1 m
HL_CoagTubeStockToCHMax := H_CoagTankAboveHeadTank - HL_CoagFloatValveOrifice = 9.17951 cm
D_CoagTubeStockToCHEst := (128*Nu_Water*L_TubeStockToCHEst*Q_CoagStock/(π*g*HL_CoagTubeStockToCHMax))^(1/4) = 0.221659 in
D_CoagTubeStockToCH := max(3/8*in, D_CoagTubeStockToCHEst) = 0.375 in
# Use 3/8" tubing to connect the stock tank/calibration column to the constant head tank unless a larger tube is needed (which it probably never will be).
# Chlorine CHT Float Valve Design
D_ChlorFloatValveOrifice :=
    i ← 0
    while h_orifice(D_FltVlvOrificesAvail[i], Pi_VenaContractaOrifice, Q_ChlorStock) ≥ H_CoagTankAboveHeadTank
        i ← i + 1
    return D_FltVlvOrificesAvail[i]
D_ChlorFloatValveOrifice =  # error
HL_ChlorFloatValveOrifice := h_orifice(D_ChlorFloatValveOrifice, Pi_VenaContractaOrifice, Q_ChlorStock) = 13.3698 cm
HL_ChlorTubeStockToCHMax := H_CoagTankAboveHeadTank - HL_ChlorFloatValveOrifice = 16.6302 cm
D_ChlorTubeStockToCHEst := (128*Nu_Water*L_TubeStockToCHEst*Q_ChlorStock/(π*g*HL_ChlorTubeStockToCHMax))^(1/4) = 0.127479 in
D_ChlorTubeStockToCH := max(3/8*in, D_ChlorTubeStockToCHEst) = 0.375 in
# Use 3/8" tubing to connect the stock tank/calibration column to the constant head tank unless a larger tube is needed (which it probably never will be).
# Filter Coagulant CHT Float Valve Design
D_FilterCoagFloatValveOrifice :=
    i ← 0
    while h_orifice(D_FltVlvOrificesAvail[i], Pi_VenaContractaOrifice, Q_FiCoagStock) ≥ H_CoagTankAboveHeadTank
        i ← i + 1
    return D_FltVlvOrificesAvail[i]
D_FilterCoagFloatValveOrifice =  # error
HL_FilterCoagFloatValveOrifice := h_orifice(D_FilterCoagFloatValveOrifice, Pi_VenaContractaOrifice, Q_FiCoagStock) = 0.559377 cm
HL_FilterCoagTubeStockToCHMax := H_CoagTankAboveHeadTank - HL_FilterCoagFloatValveOrifice = 29.4406 cm
D_FilterCoagTubeStockToCHEst := (128*Nu_Water*L_TubeStockToCHEst*Q_FiCoagStock/(π*g*HL_FilterCoagTubeStockToCHMax))^(1/4) = 0.0743233 in
D_FilterCoagTubeStockToCH := max(3/8*in, D_CoagTubeStockToCHEst) = 0.375 in
# Use 3/8" tubing to connect the stock tank/calibration column to the constant head tank unless a larger tube is needed (which it probably never will be).
# Lever Arm Scale
L_LeverArmTotal := 36 in
L_SliderEffective := 3.5 in  # Distance between the end of the slider and the pivot point of the freefall PVC tube.
L_LeverArmEffective := L_LeverArmTotal - L_SliderEffective
L_CdcFloatArm := L_LeverArmEffective/(1 + HL_CoagCdc/HL_Flowmeasure)
# To find the length of the side of the arm with the scale and the side of the arm with the float attached, solve two equations for two unknowns. One equation is similar triangles at maximum flow. The other is that the two sides of the bar must add up to the total.
L_CdcFloatArm =  # error
L_CdcScaleArm := L_LeverArmTotal - L_CdcFloatArm
L_CdcScaleArm =  # error
