# AguaClara Water Treatment Plants
# Automated Design
# Add variable descriptions next to every varible so it is easy to interpret what this all means.
# Design References
# [reference: BasicInputs- hmr6.xmcd]
# Use BasicClientInputs and ExpertClientInputs when this is run by LabVIEW.
# Use BasicInputs and ExpertInputs to use the program in MathCAD
# Change the reference by
# - right clicking
# - select properties
# - reference tab
# - type in the correct file name
# [reference: ExpertInputs.xmcd]
B_SedPlateFramePipes = 0.3 m
# [reference: DesignAssumptions.xmcd]
# [reference: MathFunctions.xmcd]
# [reference: PipeDatabase.xmcd]
# [reference: MinorLossCoefficients.xmcd]
# [reference: FluidsFunctions.xmcd]
# [reference: Sedimentation Tank - hmr6 rb563.xmcd]
# [reference: Floc Hopper - New Design.xmcd]
# [reference: FCM.xmcd]
# [reference: Flocculator 3.xmcd]
# [reference: RapidMixer.xmcd]
# [reference: EntranceTankDim.xmcd]
# [reference: Materials List.xmcd]
Q_Plant = 0.03 m^3/s
N_SedTanks = 3
W_ExitChannelMin = 0.254 m
W_SedBay = 1 m
N_SedBays = 3
# Sed Tanks and Slopes:
Geom_ExitChannel = 1
B_SedPort =  # error: This variable is undefined.  # Height of the narrowest part of the manifold ports
N_SedTanks = 3
W_SedPort =  # error
H_SedBetween = 0 cm  # Distance from the top of the inlet manifold to the bottom of the ledge supporting the lamella frame
A_SedPort =  # error  # Port Area
L_Sed = 4.11429 m
W_SedSludgeFlat = 5 cm  # Distance between tips of manifold plates (space alloted for the drain holes
N_SedBays = 3  # Number of bays of inlet manifolds in each sed tank
AN_SedTopInlet = 60 deg  # Angle of the top of the inlet manifold
L_SedPort =  # error  # Length of the port through which water exits the inlet manifold
AN_SedBottom = 10 deg  # Angle of the bottom of inlet manifold
W_SedSlopePlate =  # error  # Width of ferrous cement plates in whice one manifold port is cut
Q_SedBay = 3.33333 L/s
W_SedBayActual = 0.9 m
L_SedSlopeManifold =  # error  # This is the extra distance between the last slope and the wall
# Sedimentation Tank Sludge Drain:
N_SedSludgeOrifices = 41  # per cell
Ti_SludgeDrain = 10 min  # Tank Drain time
W_SedSludge = 14.4729 cm  # Width of the sludge channel
B_SedSludgeOrifices = 10 cm  # Distance center to center between drain orifices
H_SedSludge = 7.23643 cm  # Depth of the sludge channel
T_SedSludge = 4.86821 cm
T_SedSludge = 4.86821 cm
# Thickness of the plate topping the sludge channel
# through which drain holes are formed
W_SedDrainCover = 19.4729 cm
D_SedSludgeOrifice = 0.015 m  # Diameter of drain orifices
W_SedInletBottom = 2.80527 m
N_SedSludgeOrifices = 41
ND_SedSludgeValve = 3 in
# Sedimentation Tank Dimensions:
Z_SedSludge = 0.121046 m  # Height from 0 of the top of the sludge drain
H_SedBottomSlope =  # error  # Height of the bottom slope
H_SedTopSlope =  # error  # Height of the top of the inlet manifold
Z_SedSlopes = 0.339074 m  # Height from 0 of the top of the inlet manifold
W_Sed = 3 m  # Total tank wall height
L_Sed = 4.11429 m  # Total tank length
# Inlet Channel:
HW_InletChannel = 0.429576 m  # Width of the drop chimneys connecting channel to sed inlet manifolds
W_InletChannel = 0.621955 m  # length of drop chimmneys
L_Channel = 9.6 m
W_SedManifoldEntrance =  # error
L_SedManifoldEntrance =  # error
H_SedManifoldPort =  # error  # Ports at bottom of inlet chimney are set to be triangles
W_SedManifoldPort =  # error
N_SedInletPipes = 2  # per sed bay
H_InletChannel = 0.529576 m
# Sedimentation Tank Effluent Launder:
N_SedLaunderOrifices = 38  # Number of orifices per launder
Q_SedLaunderOrifices = 4.30201e-5 m^3/s  # More Launder Dimensions
ND_SedLaunder = 4 in
B_SedLaunderOrifices = 0.111228 m  # Center to center launder spacing
L_SedLaunder = 2.88486 m
# Exit Channel:
D_SedLaunderOrifice = 0.393701 in
W_ExitChannel = 0.457468 m
H_ExitChannel = 0.529576 m
L_ExitChannel = 9.6 m
H_PltWeir =  # error  # height of the weir carrying water to the distribution tank
HW_ExitChannel = 0.389576 m  # water height in exit channel from 0
# Lamella:
L_SedPlate = 0.522514 m
B_SedPlate = 2.09769 cm  # center to center distance between lamella
S_SedPlate = 1.7 cm  # spacing between lamella
N_SedPlates = 104  # Number of Sed Plates per Sedimentation Tank Bay.
AN_SedPlate = 60 deg
ZW_ExitChannel = 0.972687 m
V_SedC = 9.52379 m/day
L_SedActive = 2.11334 m
T
V_SedUp = 70 m/day
Z_SedLaunder = 0.878454 m
H_SedPlate = 0.452511 m
H_SedAbove = 0.115758 m  # Height of water needed above the lamella
N_SedPlates = 104
HW_Sed = 0.974145 m
H_Sed = 1.07415 m
Z_Mp = 0.544569 m
N_SedPorts =  # error
H_SedBayDivider = 0.339074 m
W_SedSlopePlateRemaining =  # error
W_SedBayDivider = 0.15 m
# Sedimentation Tank Floc Hopper:
A_FlocHopper =  # error
L_FlocHopper = 0.9 m  # Length of the hopper cement plate
L_FlocHopperOffset = 0.261257 m  # distance from the edge of the channel to the bottom of the first lamella (collection distance)
W_FlocHopper = 0.05 m  # width of the hopper set within each bay
# Flow Controller:
N_Fcm = 4
ID_FcmTube = 4.318 mm
ID_FcmTube = 0.17 in
L_FcmTube = 286.178 cm
Q_FcmTubeMax = 337.5 mL/min
HL_FcmValve = 21.1625 cm
# Flocculator: | Look at Flocculator Positioning arrays
W_FlocChannel = 1.34535 m
# Fill last channel with bafffles from last channel
# Fix port width to be based on energy dissipation in that channel
ED_Floc = [20; 2] mW/kg
# Adjust spacing after the number of baffles per channel is known.
# Check the residence time of the flocculator should be at least 20minutes
HW_FlocEnd = 0.974145 m
X_FlocBaffles = [
    0.148831, 0.148831, 0.190794, 0.375429, 0.375429, 0.671955;
    0.337662, 0.337662, 0.421587, 0.790857, 0.790857, 1.10225;
    0.526494, 0.526494, 0.652381, 1.20629, 1.20629, 1.53254;
    0.715325, 0.715325, 0.883175, 1.62171, 1.62171, 1.96283;
    0.904156, 0.904156, 1.11397, 2.03714, 2.03714, 2.39312;
    1.09299, 1.09299, 1.34476, 2.45257, 2.45257, 2.82341;
    1.28182, 1.28182, 1.57556, 2.868, 2.868, 3.2537;
    1.47065, 1.47065, 1.80635, 3.28343, 3.28343, 3.68399;
    1.65948, 1.65948, 2.03714, 3.69886, 3.69886, 0;
    1.84831, 1.84831, 2.26794, 0, 0, 0;
    2.03714, 2.03714, 2.49873, 0, 0, 0;
    2.22597, 2.22597, 2.72952, 0, 0, 0;
    2.41481, 2.41481, 2.96032, 0, 0, 0;
    2.60364, 2.60364, 3.19111, 0, 0, 0;
    2.79247, 2.79247, 3.4219, 0, 0, 0;
    2.9813, 2.9813, 3.6527, 0, 0, 0;
    3.17013, 3.17013, 3.88349, 0, 0, 0;
    3.35896, 3.35896, 0, 0, 0, 0;
    3.54779, 3.54779, 0, 0, 0, 0;
    3.73662, 3.73662, 0, 0, 0, 0;
    3.92545, 3.92545, 0, 0, 0, 0
] m
L_FlocBaffles = [
    0.771182, 0.771182, 0.729219, 0.544584, 0.544584, 0.851233;
    1.12399, 1.12399, 1.08203, 0.897392, 0.897392, 0.498426;
    0.771182, 0.771182, 0.729219, 0.544584, 0.544584, 0.851233;
    1.12399, 1.12399, 1.08203, 0.897392, 0.897392, 0.498426;
    0.771182, 0.771182, 0.729219, 0.544584, 0.544584, 0.851233;
    1.12399, 1.12399, 1.08203, 0.897392, 0.897392, 0.498426;
    0.771182, 0.771182, 0.729219, 0.544584, 0.544584, 0.851233;
    1.12399, 1.12399, 1.08203, 0.897392, 0.897392, 0.498426;
    0.771182, 0.771182, 0.729219, 0.544584, 0.544584, 0;
    1.12399, 1.12399, 1.08203, 0, 0, 0;
    0.771182, 0.771182, 0.729219, 0, 0, 0;
    1.12399, 1.12399, 1.08203, 0, 0, 0;
    0.771182, 0.771182, 0.729219, 0, 0, 0;
    1.12399, 1.12399, 1.08203, 0, 0, 0;
    0.771182, 0.771182, 0.729219, 0, 0, 0;
    1.12399, 1.12399, 1.08203, 0, 0, 0;
    0.771182, 0.771182, 0.729219, 0, 0, 0;
    1.12399, 1.12399, 0, 0, 0, 0;
    0.771182, 0.771182, 0, 0, 0, 0;
    1.12399, 1.12399, 0, 0, 0, 0;
    0.771182, 0.771182, 0, 0, 0, 0
] m
Z_FlocBaffles = [
    0, 0, 0, 0, 0, 0.421587;
    0.148831, 0.148831, 0.190794, 0.375429, 0.375429, 0;
    0, 0, 0, 0, 0, 0.421587;
    0.148831, 0.148831, 0.190794, 0.375429, 0.375429, 0;
    0, 0, 0, 0, 0, 0.421587;
    0.148831, 0.148831, 0.190794, 0.375429, 0.375429, 0;
    0, 0, 0, 0, 0, 0.421587;
    0.148831, 0.148831, 0.190794, 0.375429, 0.375429, 0;
    0, 0, 0, 0, 0, 0;
    0.148831, 0.148831, 0.190794, 0, 0, 0;
    0, 0, 0, 0, 0, 0;
    0.148831, 0.148831, 0.190794, 0, 0, 0;
    0, 0, 0, 0, 0, 0;
    0.148831, 0.148831, 0.190794, 0, 0, 0;
    0, 0, 0, 0, 0, 0;
    0.148831, 0.148831, 0.190794, 0, 0, 0;
    0, 0, 0, 0, 0, 0;
    0.148831, 0.148831, 0, 0, 0, 0;
    0, 0, 0, 0, 0, 0;
    0.148831, 0.148831, 0, 0, 0, 0;
    0, 0, 0, 0, 0, 0
] m
N_FlocChannels = 6
L_FlocTank = 24.6857 m
HL_Floc = 24.8675 cm
HW_FlocStart = 1.22282 m
S_FlocBaffle = [14.8831; 14.8831; 19.0794; 37.5429; 37.5429; 42.1587] cm
B_FlocBaffle = [18.8831; 18.8831; 23.0794; 41.5429; 41.5429; 46.1587] cm
N_FlocChannelBaffles = [21; 21; 17; 9; 9; 8]
W_FlocPort = [0.0988312; 0.0988312; 0.140794; 0.325429; 0.325429; 0.371587] m
HL_FlocChannels = [8.26143; 8.26143; 4.27548; 1.46683; 1.46683; 1.13552] cm
L_FlocBaffleLower = [0.771182; 0.771182; 0.729219; 0.544584; 0.544584; 0.498426] m
L_FlocBaffleUpper = [1.12399; 1.12399; 1.08203; 0.897392; 0.897392; 0.851233] m
H_FlocPort = [2.02597; 2.02597; 1.82312; 1.55205; 1.55205; 1.52637] m
Ti_Floc = 17.9734 min  # residence time of the flocculator
N_FlocBaffles = 85
# Rapid Mix Unit and Entrance Tank:
L_Et = 1.92428 m
W_Et = 1.92428 m
H_Et = 1.62282 m  # Height of Entrance Tank Orifice
W_EtOrifice[30] = 0.031 m
L_trueET[30] = 0.775584 m  # Length of Entrance Tank Orifice
Pi_EtFlow[30] = 0.278388  # Ratio of the minimum flow divided by the maximum flow through the plant.
L_FlocEntryOrifice = 134.535 cm  # Length of orifice entering into flocculator from Rapid Mix Unit
W_FlocEntryOrifice = 2.47629 cm  # Height of orifice entering into flocculator
ED_Diffusion =  # error  # Minimum Energy Dissipation needed
HL_FlocEntryOrifice = 6.17021 cm  # Head loss caused by entering flocculation tank.
A_FlocEntry = 0.0333146 m^2
A_EtOrifice = 240.431 cm^2
HW_EtTotal =  # error  # Total Height of water at beginning of rapid mix unit
HW_Channel2 =  # error  # Height of water at the back of the entrance tank channel (from channel bottom)
HW_EtChannel = 10.4398 cm  # Height of Waterfall into flocculator
W_EtChannel = 14.8831 cm  # Widt of entrance tank channel
Vol_Stock = 2430 L  # Volume of chemical stock tanks
ZW_ExitChannel = 0.972687 m  # Water Level at the end of the plant in the exit channel and exit channel box
HW_Sed = 0.974145 m
HW_FlocStart = 1.22282 m  # Water level at the beginning of the floc tank
HL_Floc = 24.8675 cm  # just for ref. the head loss throught the floc tank
HW_EtTotal =  # error  # Height of the water in the entrance channel
# Materials List:
L_LaunderPipe =  # error
N_Launders = 18
L_LaunderPipeTotal = 51.9275 m
N_Valves = 9
N_LaunderCouplings = 18
N_ValveCouplings = 9
N_SedPlatesTotal = 936
N_SedPlatesPerSheet = 6
N_SedPlateSheets = 156
N_PipeSedPlateStand =  # error
A_SedTank =  # error
# [reference: AutoCADMasterProgram.xmcd]
# AutoCAD References
AC_SedTank =  # error
AC_EntranceTank = [
    "-layer m entrancetank";
    "c t 214,214,214";
    "entrancetank";
    "  ";
    "_-view o t _zoom w 0.16,18.26207,0 -2.08428,20.50635,1.62282 _box 0,18.42207,0 -1.92428,20.34635,1.62282 _box 0.15,18.27207,-0.15 -2.07428,20.49635,1.62282 _subtract 0.15,18.27207,-0.15  0,18.42207,0 ";
    "-layer s 0";
    "  ";
    "-layer f entrancetank";
    "  ";
    "-layer s entrancetank";
    "  ";
    "_box -1.92428,18.27207,1.57282 -1.77545,18.42207,1.62282";
    "-layer s 0";
    "  ";
    "-layer t entrancetank";
    "  ";
    "_-view o t";
    "_subtract 0.15,18.42207,0  -1.92428,18.27207,1.57282 ";
    "-layer f entrancetank";
    "  "
]
AC_FlocTank =  # error
