# AguaClara Water Treatment Plants
# Automated Design
# Add variable descriptions next to every varible so it is easy to interpret what this all means.
# Design References
# [reference: BasicInputs1Sed1Bay.xmcd]
# Use BasicClientInputs and ExpertClientInputs when this is run by LabVIEW.
# Use BasicInputs and ExpertInputs to use the program in MathCAD
# Change the reference by
# - right clicking
# - select properties
# - reference tab
# - type in the correct file name
# [reference: ExpertInputs.xmcd]
# [reference: DesignAssumptions.xmcd]
# [reference: MathFunctions.xmcd]
# [reference: PipeDatabase.xmcd]
# [reference: MinorLossCoefficients.xmcd]
# [reference: FluidsFunctions.xmcd]
# [reference: Sedimentation Tank.xmcd]
# [reference: Floc Hopper - New Design.xmcd]
# [reference: FCM.xmcd]
# [reference: Flocculator 3.xmcd]
# [reference: RapidMixer.xmcd]
# [reference: Materials List.xmcd]
# [reference: EntranceTankDim.xmcd]
Q_Plant = 2 L/s
N_SedTanks = 1
W_ExitChannelMin = 0.092 m
W_SedBay = 0.92 m
N_SedBays = 1
# Sed Tanks and Slopes:
B_SedPort = 3.91009 cm  # Height of the narrowest part of the manifold ports
N_SedTanks = 1
W_SedPort = 3.91009 cm
H_SedBetween = 0 cm  # Distance from the top of the inlet manifold to the bottom of the ledge supporting the lamella frame
A_SedPort = 15.2888 cm^2  # Port Area
L_Sed = 2.68323 m
W_SedSludgeFlat = 5 cm  # Distance between tips of manifold plates (space alloted for the drain holes
N_SedBays = 1  # Number of bays of inlet manifolds in each sed tank
AN_SedTopInlet = 60 deg  # Angle of the top of the inlet manifold
L_SedPort = 4.51498 cm  # Length of the port through which water exits the inlet manifold
AN_SedBottom = 10 deg  # Angle of the bottom of inlet manifold
W_SedSlopePlate = 30 cm  # Width of ferrous cement plates in whice one manifold port is cut
Q_SedBay = 2 L/s
W_SedBayActual = 0.92 m
L_SedSlopeManifold = 0.800718 m  # This is the extra distance between the last slope and the wall
# Sedimentation Tank Sludge Drain:
N_SedSludgeOrifices = 17  # per cell
Ti_SludgeDrain = 30 min  # Tank Drain time
W_SedSludge = 7.57039 cm  # Width of the sludge channel
B_SedSludgeOrifices = 15 cm  # Distance center to center between drain orifices
H_SedSludge = 3.78519 cm  # Depth of the sludge channel
T_SedSludge = 7.4641 cm
T_SedSludge = 7.4641 cm
# Thickness of the plate topping the sludge channel
# through which drain holes are formed
W_SedDrainCover = 19.2376 cm
D_SedSludgeOrifice = 0.0111125 m  # Diameter of drain orifices
W_SedInletBottom = 0.363812 m
N_SedSludgeOrifices = 17
ND_SedSludgeValve = 2 in
# Sedimentation Tank Dimensions:
Z_SedSludge = 0.112493 m  # Height from 0 of the top of the sludge drain
H_SedBottomSlope = 0.0603079 m  # Height of the bottom slope
H_SedTopSlope = 0.693442 m  # Height of the top of the inlet manifold
Z_SedSlopes = 0.805935 m  # Height from 0 of the top of the inlet manifold
W_Sed = 0.92 m  # Total tank wall height
L_Sed = 2.68323 m  # Total tank length
# Inlet Channel:
HW_InletChannel = 0.134586 m  # Width of the drop chimneys connecting channel to sed inlet manifolds
W_InletChannel = 0.265757 m  # length of drop chimmneys
L_Channel = 1.22 m
W_SedManifoldEntrance = 0.187 m
L_SedManifoldEntrance = 0.211412 m
H_SedManifoldPort = 0.147757 m  # Ports at bottom of inlet chimney are set to be triangles
W_SedManifoldPort = 0.298759 m
N_SedInletPipes = 2  # per sed bay
H_InletChannel = 0.234586 m
# Sedimentation Tank Effluent Launder:
N_SedLaunderOrifices = 40  # Number of orifices per launder
Q_SedLaunderOrifices = 2.5e-5 m^3/s  # More Launder Dimensions
ND_SedLaunder = 3 in
B_SedLaunderOrifices = 0.1 m  # Center to center launder spacing
L_SedLaunder = 2.05029 m
# Exit Channel:
D_SedLaunderOrifice = 0.3125 in
W_ExitChannel = 0.217187 m
H_ExitChannel = 0.234586 m
L_ExitChannel = 1.22 m
H_PltWeir = 0.0716259 m  # height of the weir carrying water to the distribution tank
HW_ExitChannel = 0.0945864 m  # water height in exit channel from 0
# Lamella:
L_SedPlate = 0.4572 m
B_SedPlate = 1.90483 cm  # center to center distance between lamella
S_SedPlate = 1.7 cm  # spacing between lamella
N_SedPlates = 78  # Number of Sed Plates per Sedimentation Tank Bay.
AN_SedPlate = 60 deg
ZW_ExitChannel = 1.4573 m
V_SedC = 10.5982 m/day
L_SedActive = 1.40149 m
T
V_SedUp = 70 m/day
Z_SedLaunder = 1.41285 m
H_SedPlate = 0.395947 m
H_SedAbove = 0.1289 m  # Height of water needed above the lamella
N_SedPlates = 78
HW_Sed = 1.4973 m
H_Sed = 1.5973 m
Z_Mp = 1.36272 m
N_SedPorts = 7
H_SedBayDivider = 0.875935 m
W_SedSlopePlateRemaining = 0.58323 m
W_SedBayDivider = 0.15 m
# Sedimentation Tank Floc Hopper:
A_FlocHopper =  # error: This variable is undefined.
L_FlocHopper = 0.92 m  # Length of the hopper cement plate
L_FlocHopperOffset = 0.2286 m  # distance from the edge of the channel to the bottom of the first lamella (collection distance)
W_FlocHopper = 0.05 m  # width of the hopper set within each bay
# Flow Controller:
N_Fcm = 1
ID_FcmTube = 3.175 mm
ID_FcmTube = 0.125 in
L_FcmTube = 313.698 cm
Q_FcmTubeMax = 90 mL/min
HL_FcmValve = 1.50489 cm
# Flocculator: | Look at Flocculator Positioning arrays
W_FlocChannel = 0.45 m
# Fill last channel with bafffles from last channel
# Fix port width to be based on energy dissipation in that channel
ED_Floc = [20; 2] mW/kg
# Adjust spacing after the number of baffles per channel is known.
# Check the residence time of the flocculator should be at least 20minutes
HW_FlocEnd = 1.4973 m
X_FlocBaffles = [
    0.0451009, 0.0451009, 0.0451009, 0.0451009, 0.0451009, 0.0451009, 0.0451009, 0.0451009, 0.0451009, 0.0451009, 0.0451009, 0.0478461;
    0.130202, 0.130202, 0.130202, 0.130202, 0.130202, 0.130202, 0.130202, 0.130202, 0.130202, 0.130202, 0.130202, 0.135692;
    0.215303, 0.215303, 0.215303, 0.215303, 0.215303, 0.215303, 0.215303, 0.215303, 0.215303, 0.215303, 0.215303, 0.223538;
    0.300404, 0.300404, 0.300404, 0.300404, 0.300404, 0.300404, 0.300404, 0.300404, 0.300404, 0.300404, 0.300404, 0.311384;
    0.385505, 0.385505, 0.385505, 0.385505, 0.385505, 0.385505, 0.385505, 0.385505, 0.385505, 0.385505, 0.385505, 0.399231;
    0.470606, 0.470606, 0.470606, 0.470606, 0.470606, 0.470606, 0.470606, 0.470606, 0.470606, 0.470606, 0.470606, 0.487077;
    0.555707, 0.555707, 0.555707, 0.555707, 0.555707, 0.555707, 0.555707, 0.555707, 0.555707, 0.555707, 0.555707, 0.574923;
    0.640807, 0.640807, 0.640807, 0.640807, 0.640807, 0.640807, 0.640807, 0.640807, 0.640807, 0.640807, 0.640807, 0.662769;
    0.725908, 0.725908, 0.725908, 0.725908, 0.725908, 0.725908, 0.725908, 0.725908, 0.725908, 0.725908, 0.725908, 0.750615;
    0.811009, 0.811009, 0.811009, 0.811009, 0.811009, 0.811009, 0.811009, 0.811009, 0.811009, 0.811009, 0.811009, 0.838461
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] m
L_FlocBaffles = [
    1.4522, 1.4522, 1.4522, 1.4522, 1.4522, 1.4522, 1.4522, 1.4522, 1.4522, 1.4522, 1.4522, 2.24173;
    2.24448, 2.24448, 2.24448, 2.24448, 2.24448, 2.24448, 2.24448, 2.24448, 2.24448, 2.24448, 2.24448, 1.44946;
    1.4522, 1.4522, 1.4522, 1.4522, 1.4522, 1.4522, 1.4522, 1.4522, 1.4522, 1.4522, 1.4522, 2.24173;
    2.24448, 2.24448, 2.24448, 2.24448, 2.24448, 2.24448, 2.24448, 2.24448, 2.24448, 2.24448, 2.24448, 1.44946;
    1.4522, 1.4522, 1.4522, 1.4522, 1.4522, 1.4522, 1.4522, 1.4522, 1.4522, 1.4522, 1.4522, 2.24173;
    2.24448, 2.24448, 2.24448, 2.24448, 2.24448, 2.24448, 2.24448, 2.24448, 2.24448, 2.24448, 2.24448, 1.44946;
    1.4522, 1.4522, 1.4522, 1.4522, 1.4522, 1.4522, 1.4522, 1.4522, 1.4522, 1.4522, 1.4522, 2.24173;
    2.24448, 2.24448, 2.24448, 2.24448, 2.24448, 2.24448, 2.24448, 2.24448, 2.24448, 2.24448, 2.24448, 1.44946;
    1.4522, 1.4522, 1.4522, 1.4522, 1.4522, 1.4522, 1.4522, 1.4522, 1.4522, 1.4522, 1.4522, 2.24173;
    2.24448, 2.24448, 2.24448, 2.24448, 2.24448, 2.24448, 2.24448, 2.24448, 2.24448, 2.24448, 2.24448, 1.44946
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] m
Z_FlocBaffles = [
    0, 0, 0, 0, 0, 0, 0, 0, 0, 0, 0, 0.0478461;
    0.0451009, 0.0451009, 0.0451009, 0.0451009, 0.0451009, 0.0451009, 0.0451009, 0.0451009, 0.0451009, 0.0451009, 0.0451009, 0;
    0, 0, 0, 0, 0, 0, 0, 0, 0, 0, 0, 0.0478461;
    0.0451009, 0.0451009, 0.0451009, 0.0451009, 0.0451009, 0.0451009, 0.0451009, 0.0451009, 0.0451009, 0.0451009, 0.0451009, 0;
    0, 0, 0, 0, 0, 0, 0, 0, 0, 0, 0, 0.0478461;
    0.0451009, 0.0451009, 0.0451009, 0.0451009, 0.0451009, 0.0451009, 0.0451009, 0.0451009, 0.0451009, 0.0451009, 0.0451009, 0;
    0, 0, 0, 0, 0, 0, 0, 0, 0, 0, 0, 0.0478461;
    0.0451009, 0.0451009, 0.0451009, 0.0451009, 0.0451009, 0.0451009, 0.0451009, 0.0451009, 0.0451009, 0.0451009, 0.0451009, 0;
    0, 0, 0, 0, 0, 0, 0, 0, 0, 0, 0, 0.0478461;
    0.0451009, 0.0451009, 0.0451009, 0.0451009, 0.0451009, 0.0451009, 0.0451009, 0.0451009, 0.0451009, 0.0451009, 0.0451009, 0
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] m
N_FlocChannels = 12
L_FlocTank = 32.1988 m
HL_Floc = 69.2277 cm
HW_FlocStart = 2.18958 m
S_FlocBaffle = [4.51009; 4.51009; 4.51009; 4.51009; 4.51009; 4.51009; 4.51009; 4.51009; 4.51009; 4.51009; 4.51009; 4.78461] cm
B_FlocBaffle = [8.51009; 8.51009; 8.51009; 8.51009; 8.51009; 8.51009; 8.51009; 8.51009; 8.51009; 8.51009; 8.51009; 8.78461] cm
N_FlocChannelBaffles = [31; 31; 31; 31; 31; 31; 31; 31; 31; 31; 31; 30]
W_FlocPort = [-0.00489907; -0.00489907; -0.00489907; -0.00489907; -0.00489907; -0.00489907; -0.00489907; -0.00489907; -0.00489907; -0.00489907; -0.00489907; -0.00215388] m
HL_FlocChannels = [5.84162; 5.84162; 5.84162; 5.84162; 5.84162; 5.84162; 5.84162; 5.84162; 5.84162; 5.84162; 5.84162; 4.96987] cm
L_FlocBaffleLower = [1.4522; 1.4522; 1.4522; 1.4522; 1.4522; 1.4522; 1.4522; 1.4522; 1.4522; 1.4522; 1.4522; 1.44946] m
L_FlocBaffleUpper = [2.24448; 2.24448; 2.24448; 2.24448; 2.24448; 2.24448; 2.24448; 2.24448; 2.24448; 2.24448; 2.24448; 2.24173] m
H_FlocPort = [-4.14271; -4.14271; -4.14271; -4.14271; -4.14271; -4.14271; -4.14271; -4.14271; -4.14271; -4.14271; -4.14271; -9.99628] m
Ti_Floc = 180.792 min  # residence time of the flocculator
N_FlocBaffles = 371
# Rapid Mix Unit and Entrance Tank:
L_Et = 0.496847 m
W_Et = 0.496847 m
H_Et = 2.58958 m  # Height of Entrance Tank Orifice
W_EtOrifice[30] = 0.031 m
L_trueET[30] = 0.0517056 m  # Length of Entrance Tank Orifice
Pi_EtFlow[30] = 0.278388  # Ratio of the minimum flow divided by the maximum flow through the plant.
L_FlocEntryOrifice = 45 cm  # Length of orifice entering into flocculator from Rapid Mix Unit
W_FlocEntryOrifice = 0.726682 cm  # Height of orifice entering into flocculator
ED_Diffusion =  # error  # Minimum Energy Dissipation needed
HL_FlocEntryOrifice = 2.84626 cm  # Head loss caused by entering flocculation tank.
A_FlocEntry = 0.00327007 m^2
A_EtOrifice = 16.0287 cm^2
HW_EtTotal =  # error  # Total Height of water at beginning of rapid mix unit
HW_Channel2 =  # error  # Height of water at the back of the entrance tank channel (from channel bottom)
HW_EtChannel = 3.80455 cm  # Height of Waterfall into flocculator
W_EtChannel = 4.51009 cm  # Widt of entrance tank channel
Vol_Stock = 162 L  # Volume of chemical stock tanks
ZW_ExitChannel = 1.4573 m  # Water Level at the end of the plant in the exit channel and exit channel box
HW_Sed = 1.4973 m
HW_FlocStart = 2.18958 m  # Water level at the beginning of the floc tank
HL_Floc = 69.2277 cm  # just for ref. the head loss throught the floc tank
HW_EtTotal =  # error  # Height of the water in the entrance channel
# Materials List:
L_LaunderPipe =  # error
N_Launders = 2
L_LaunderPipeTotal = 4.10057 m
N_Valves = 1
N_LaunderCouplings = 2
N_ValveCouplings = 1
N_SedPlatesTotal = 78
N_SedPlatesPerSheet = 8
N_SedPlateSheets = 10
N_PipeSedPlateStand =  # error
A_SedTank = 3.63954 m^2
# [reference: AutoCADMasterProgram.xmcd]
# AutoCAD References
AC_SedTank = [
    "_-view o t"; "-layer m tank"; "c t 132,132,132"; "tank"; "  "; "_-view o t _zoom w 0.16,-0.16,0 -2.84323,1.08,1.5973 _box 0,0,0 -2.68323,0.92,1.5973 _box 0.15,-0.15,-0.15 -2.83323,1.07,1.5973 _subtract 0.15,-0.15,-0.15  0,0,0 "; "-layer s 0"; "  "; "-layer f tank"; "  "
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]
AC_EntranceTank = [
    "-layer m entrancetank";
    "c t 214,214,214";
    "entrancetank";
    "  ";
    "_-view o t _zoom w 0.16,8.11,0 -0.65685,8.92685,2.58958 _box 0,8.27,0 -0.49685,8.76685,2.58958 _box 0.15,8.12,-0.15 -0.64685,8.91685,2.58958 _subtract 0.15,8.12,-0.15  0,8.27,0 ";
    "-layer s 0";
    "  ";
    "-layer f entrancetank";
    "  ";
    "-layer s entrancetank";
    "  ";
    "_box -0.49685,8.12,2.53958 -0.45175,8.27,2.58958";
    "-layer s 0";
    "  ";
    "-layer t entrancetank";
    "  ";
    "_-view o t";
    "_subtract 0.15,8.27,0  -0.49685,8.12,2.53958 ";
    "-layer f entrancetank";
    "  "
]
AC_FlocTank =  # no stored result
