# [reference: MasterProgram.xmcd]
# Automated Materials List
N_SedPlatesTotal := N_SedPlates*N_SedBays*N_SedTanks
N_SedPlatesPerSheet := floor(L_SedPlateSheet/L_SedPlate)
N_SedPlateSheets := ceil(N_SedPlatesTotal/N_SedPlatesPerSheet) = 44  # Total number of corrugated sheets needed to construct lamella/plate settlers
# ***Purple variables are verified***
# Channel and Tank Walls
A_FlocFloor := (L_Sed + 2*T_PlantWall)*(W_FlocChannel*N_FlocChannels + T_PlantWall*(N_FlocChannels + 1)) = 11.5114 m^2
A_FlocWalls := ((H_Floc*L_Sed) - (H_FlocPort[N_FlocChannels - 1]*W_FlocPort[N_FlocChannels - 1])) + (L_Sed*H_Floc) + ((N_FlocChannels*W_FlocChannel + ((N_FlocChannels + 1)*T_PlantWall))*H_Floc) + ((N_FlocChannels - 1)*((L_Sed*H_Floc) - (H_FlocPort[0]*W_FlocPort[0]))) = 51.5235 m^2
Vol_FlocFloor := A_FlocFloor*T_PlantWall = 1.72671 m^3
# **This is for vertical flocculator; Calculate for horizontal in the future**
Vol_FlocWalls := A_FlocWalls*T_PlantWall = 7.72852 m^3
A_SedWalls := (N_SedTanks + 1)*(L_Sed*H_Sed - ((H_ExitChannel*W_ExitChannel) + (H_InletChannel*W_InletChannel))) + ((N_SedTanks*W_Sed) + ((T_PlantWall*(N_SedTanks + 1))*2))*H_Sed = 30.843 m^2
Vol_SedWalls := A_SedWalls*T_PlantWall = 4.62645 m^3
A_SedFloor := (L_Sed + 2*T_PlantWall)*(N_SedTanks*W_Sed + (N_SedTanks + 1)*T_PlantWall) = 15.0664 m^2
Vol_SedFloor := A_SedFloor*T_PlantWall = 2.25996 m^3
A_EtWalls := 2*(H_Et*(L_Et + (2*T_EtWall))) + 2*(H_Et*W_Et) = 13.4708 m^2
A_EtFloor := (W_Et + 2*T_EtWall)*(L_Et + 2*T_EtWall) = 1.99088 m^2
Vol_EtWalls := A_EtWalls*T_EtWall = 2.02062 m^3
Vol_EtFloor := A_EtFloor*T_EtWall = 0.298631 m^3
Vol_EntranceTank := Vol_EtFloor + Vol_EtWalls = 2.31925 m^3
Vol_StockTank := Q_AlumStockMax*Ti_StockMin = 0.81 m^3
# **D.StockTank is a user input, newly created**
R_StockTank := D_StockTank/2
H_StockTank := Vol_StockTank/(pi*R_StockTank^2)
# **Stock Tank is not drawn yet**
# **new variable defined here**
A_StockTank := 2*pi*R_StockTank^2 + 2*pi*R_StockTank*H_StockTank  # **new variable defined here**
A_StockTankFloor := Vol_StockTank/(2*R_StockTank)  # **new variable defined here**
L_InletTank := S_Elbow + ElbowRadius(ND_PltWeir) + ConRadius(ND_PltWeir) + SocketDepth(ND_PltWeir) = 0.550245 m
# ***Turquoise variables are intermediate variables***
W_InletTank := ((2*ConRadius(ND_PltWeir)) + (2*S_Elbow))
Vol_InletTankWalls := (((L_InletTank + 2*T_ChannelWall)*(W_InletTank + 2*T_ChannelWall)) - (L_InletTank*W_InletTank) - ((L_InletTank - T_ChannelWall)*T_ChannelWall))*H_InletChannel = 0.0990866 m^3
A_InletTankFloor := (W_InletTank + 2*T_ChannelWall)*(L_InletTank + 2*T_ChannelWall) = 0.563619 m^2
Vol_InletTankFloor := A_InletTankFloor*T_ChannelWall = 0.0845428 m^3
Vol_InletChannelTank := Vol_InletTankFloor + Vol_InletTankWalls = 0.183629 m^3
L_ExitTank := S_Elbow + ElbowRadius(ND_PltWeir) + ConRadius(ND_PltWeir) + SocketDepth(ND_PltWeir) = 0.550245 m
W_ExitTank := 4*ConRadius(ND_PltWeir) + 3*S_Elbow = 0.67578 m
A_ExitTankWalls := (L_ExitTank*T_ChannelWall) + 2*((W_ExitTank + 2*T_ChannelWall)*T_ChannelWall) = 0.375271 m^2
Vol_ExitTankWalls := A_ExitTankWalls*H_ExitChannel = 0.122355 m^3
A_ExitTankFloor := (L_ExitTank + 2*T_ChannelWall)*(W_ExitTank + 2*T_ChannelWall) = 0.829652 m^2
Vol_ExitTankFloor := A_ExitTankFloor*T_ChannelWall = 0.124448 m^3
Vol_ExitChannelTank := Vol_ExitTankFloor + Vol_ExitTankWalls = 0.246803 m^3
A_ExitChannelWalls := L_Channel*(H_ExitChannel + T_ChannelWall) = 2.1184 m^2
# **Area and Volume of the walls are only for the INSIDE wall; the outside wall is already inlcuded in the area and volume of the sed walls.**
A_ExitChannelFloor := L_Channel*W_ExitChannel = 2.30266 m^2
Vol_ExitChannelWalls := A_ExitChannelWalls*T_ChannelWall = 0.317761 m^3
Vol_ExitChannelFloor := A_ExitChannelFloor*T_ChannelWall = 0.345399 m^3
# **Area and Volume of the walls are only for the INSIDE wall; the outside wall is already inlcuded in the area and volume of the sed walls.**
A_InletChannelWalls := L_Channel*(H_InletChannel + T_ChannelWall) = 2.1184 m^2
A_InletChannelFloor := L_Channel*W_InletChannel = 1.74962 m^2
Vol_InletChannelWall := A_InletChannelWalls*T_ChannelWall = 0.317761 m^3
Vol_InletChannelFloor := A_InletChannelFloor*T_ChannelWall = 0.262442 m^3
# **Cross Sectional Area of One Slope**
A_SedSlope := 1/2*(tan(AN_SedPlate)*(1/2*(W_SedBay - W_SedSludge) - 1/2*(W_SedDrainCover - W_SedSludge))^2) + ((1/2*(W_SedBay - W_SedSludge) - 1/2*(W_SedDrainCover - W_SedSludge))*tan(AN_SedPlate) + T_SedSludge + H_SedSludge)*T_ConcreteMin + ((T_SedSludge + H_SedSludge)*(1/2*(W_SedBay - W_SedSludge) - 1/2*(W_SedDrainCover - W_SedSludge)) + H_SedSludge*(W_SedDrainCover - W_SedSludge)/2) = 0.218196 m^2
# Ferrous Cement
Vol_DistributionTunnelCovers := T_SedSlopePlate*L_SedSlopeManifold*W_SedSlopePlate*N_SedPorts
A_DistributionTunnelCovers := Vol_DistributionTunnelCovers/T_SedSlopePlate
Vol_FlocBafflesTotal := W_FlocChannel*T_FlocBaffle*(L_FlocBaffleLower*ceil(N_FlocChannelBaffles/2) + L_FlocBaffleUpper*floor(N_FlocChannelBaffles/2)) = 2.84091 m^3
A_FlocBafflesTotal := Vol_FlocBafflesTotal/T_FlocBaffle = 71.0226 m^2  # **new variable defined here**
# Pipes and Valves
N_PipeSedPlateFrame := W_Sed/B_SedPipe - 1 + L_Sed/B_SedPipe - 1
L_PipeSedPlateFrameTotal := N_SedTanks*((W_Sed/B_SedPipe - 1)*L_Sed + (L_Sed/B_SedPipe - 1)*W_Sed)
# Length of pipe needed for Sedimentation Tank Plate Frame at ND.SedPlateFrame
L_Weir := 2*H_PltWeir = 0.092925 m  # Total length of Weir pipe in Inlet and Exit Channel Tanks at ND.PltWeir
N_Launders := N_SedTanks*N_SedBays*N_SedLaunders
L_LaunderPipeTotal := L_SedLaunder*N_Launders = 7.18286 m  # Total length of launder pipe at ND.SedLaunder
N_LaunderCouplings := N_Launders  # Number of couplings for launder pipe going through concrete wall
N_Valves := N_SedBays*N_SedTanks  # Valves and valve couplings to drain sedimentation tanks
N_ValveCouplings := N_Valves
