EN_MatApply := 1  # EN.MatApply equals 0 if materials are not to be applied, otherwise materials are applied
# Material Constants
E_Pvc := 0.12 mm
E_Concrete := 2 mm
E_ConcreteLedge := 0.014 mm
ρ_Concrete := 2400*kg/m^3
T_ConcreteMin := 5 cm
EN_DrillSeries := 0  # 0 is English, 1 is metric
EN_TubeSeries := 0
D_Rebar := 1/2*in
USD := ¤  # Defining US Dollars as a currency unit
Lem := USD/19.06  # Lempira/US Dollar exchange rate as of 3/5/2012
# Drill Series
D_DrillEng :=
    i ← 0
    D_DrillEng[0] ← 1/32*in
    while D_DrillEng[i] ≤ 3/16*in - 1/128*in
        i ← i + 1
        D_DrillEng[i] ← D_DrillEng[i - 1] + 1/128*in
    while D_DrillEng[i] < 1 in - 1/16*in
        i ← i + 1
        D_DrillEng[i] ← D_DrillEng[i - 1] + 1/16*in
    while D_DrillEng[i] < 2 in
        i ← i + 1
        D_DrillEng[i] ← D_DrillEng[i - 1] + 1/4*in
    return D_DrillEng
D_DrillMet :=
    i ← 0
    D_DrillMet[0] ← 0.5 mm
    while D_DrillMet[i] ≤ 5 mm - 0.1 mm
        i ← i + 1
        D_DrillMet[i] ← D_DrillMet[i - 1] + 0.1 mm
    while D_DrillMet[i] < 20 mm
        i ← i + 1
        D_DrillMet[i] ← D_DrillMet[i - 1] + 1 mm
    while D_DrillMet[i] < 50 mm
        i ← i + 1
        D_DrillMet[i] ← D_DrillMet[i - 1] + 2 mm
    return D_DrillMet
D_Drill :=
    D_Drill ← D_DrillEng if EN_DrillSeries == 0
    D_Drill ← D_DrillMet otherwise
