# [reference: BasicInputs.xmcd]
# [reference: ExpertInputs.xmcd]
# [reference: MathFunctions.xmcd]
# [reference: PipeDatabase.xmcd]
# [reference: FluidsFunctions.xmcd]
# [reference: SedimentationTank.xmcd]
# [reference: Flocculator.xmcd]
# [reference: LFOM.xmcd]
# [reference: LinearCdc.xmcd]
# [reference: ChemStorageTanks.xmcd]
# [reference: EntranceTank.xmcd]
# [reference: StackedRapidSandFilter.xmcd]
# AutoCAD drawing programs:
# Translators:
# These are the codes that take MathCAD outputs and create AutoCAD scripts that are used to draw the plant (formerly Basics)
# [reference: MtoATranslators.xmcd]
# The wrapped MtoA translator contains the functions that the user will want to access. These functions will draw pieces with full functionality - specifying the location, dimension, and orientation of the object. Also, it contains layer control and subtraction capabilities for grouped objects.
# [reference: MtoATranslatorsWrapped.xmcd]
# Plant Elements:
# These are all of the files that draw the fundamental parts of the plants (tees, elbows, tanks, pipes, etc)
# [reference: ChannelF.xmcd]
# [reference: PlumbingF.xmcd]
# [reference: TankF.xmcd]
# [reference: StairsF.xmcd]
# [reference: DrainChannelF.xmcd]
# Specific Pieces:
# These are the codes that draw the bigger pieces of the plant (the sed tank, floc tank, etc)
# [reference: FlocculatorAC.xmcd]
# [reference: SedimentationTankAC.xmcd]
# [reference: EntranceTankAC.xmcd]
# [reference: ChemStockTanksAC.xmcd]
# [reference: StackedRapidSandFilterAC.xmcd]
# [reference: CdcAC.xmcd]
# [reference: OperatorAccessAC.xmcd]
# Entrance Tank
A_EtWalls := 2*(H_Et*(L_Et + (2*T_EtWall))) + 2*(H_Et*W_Et) = 7.00078 m^2
A_EtFloor := (W_Et + 2*T_EtWall)*(L_Et + 2*T_EtWall) = 3.5962 m^2  # Surface area of Tank floor
Vol_EtWalls := A_EtWalls*T_EtWall = 1.05012 m^3
Vol_EtFloor := A_EtFloor*T_EtWall = 0.53943 m^3
Vol_Et := Vol_EtFloor + Vol_EtWalls = 1.58955 m^3  # Volume of concrete needed to build Entrance Tank
Vol_EtSlopeFull := ((L_EtHopper - S_Fitting - ConRadius(ND_EtDrain))*W_Et*H_EtHopper + H_EtHopperBack*L_EtHopper*(W_Et - 2*(S_Fitting + ConRadius(ND_EtDrain)))*0.5 - 0.5*H_EtHopperBack*(L_EtHopper - 2*(S_Fitting + ConRadius(ND_EtDrain)))*(W_Et - 2*(S_Fitting + ConRadius(ND_EtDrain))))
Vol_EtHalfSlopeLast := 0.25*L_EtHopper*H_EtHopperBack*(W_Et - 2*(S_Fitting + ConRadius(ND_EtDrain))) + 0.5*H_EtLastSlope*W_Et*(L_EtHopper - S_Fitting - ConRadius(ND_EtDrain)) - □  # error: This placeholder is empty.
N_EtDrainStoppers := N_EtFullHopper + 2 = 4
N_EtDrains := N_EtDrainStoppers = 4
# Volume for the hoppers
Vol_HoppersBetween := 3*W_Et*H_EtHopper^2*1/sqrt(3) + H_EtHopper*(4*ND_Rebar + T_ConcreteMin)*W_Et
W_HopperBottom := W_Et - OuterDiameterFittingPVC(ND_EtDrain) - 2*S_Fitting = 0.469088 m
Vol_HoppersAgainstEtWall := 3*(L_EtHopper*W_HopperBottom^2*sqrt(3)/2 - W_HopperBottom^2*sqrt(3)*(L_EtHopper - OuterDiameterFittingPVC(ND_EtDrain) - 2*S_Fitting)/3) = 305.815 L
Vol_Hoppers := Vol_HoppersBetween + Vol_HoppersAgainstEtWall
# Chemical Dosing Components
# Stock Tank Dimensions
H_CoagTank = 0.8509 m
H_FilterCoagTank = 0.8509 m
H_ChlorineTank = 0.8509 m
R_CoagTank = 0.28575 m
R_FilterCoagTank = 0.28575 m
R_ChlorineTank = 0.28575 m
# Dosing Plumbing
# Drainage Plumbing
# Flocculator
# Flocculator Concrete
A_FlocSlab := |(TotalFloc_Dim[0] + 2*T_PlantWall)*TotalFloc_Dim[1]| = 6.55693 m^2
Vol_FlocSlab := A_FlocSlab*T_PlantWall = 0.98354 m^3
A_FlocWalls := |(TotalFloc_Dim[0] + 2*T_PlantWall)*TotalFloc_Dim[2]| + |2*(N_FlocChannels*W_FlocChannel + (N_FlocChannels - 1)*T_PlantWall)*TotalFloc_Dim[2]| = 14.1378 m^2
Vol_FlocWalls := A_FlocWalls*T_PlantWall = 2.12068 m^3
# Flocculator Baffles
L_BafflesTotal :=
    TotalLength ← 0 m
    for i ∈ 0 .. N_FlocChannels - 1
        for j ∈ 0 .. N_FlocChannelBaffles[i] - 1
            TotalLength ← TotalLength + L_FlocBaffles[j, i]
    return TotalLength
    = 95.1746 m
A_BafflesTotal := L_BafflesTotal*W_FlocBaffle = 61.8635 m^2
# Flocculator Modules
# Module Piping for Beginning Channels
N_BeginningModuleCaps := □  # error: This placeholder is empty.
N_BeginningModuleCouplings := □  # error: This placeholder is empty.
N_BeginningModulePipes := □  # error: This placeholder is empty.
ND_FlocModulesLarge = 0.0381 m
ND_SpacerPipe = 0.01905 m
ND_FlocModulesMain = 0.0127 m
# Sedimentation Tank
W_SedTotal := W_Sed*N_SedTanks + (N_SedTanks + 1)*T_PlantWall = 7.0008 m
A_Walls := 2*H_Sed*W_SedChannel + ((W_SedInletChannel + W_SedExitChannel + 3*T_SedWeir)*L_SedChannel) + (H_SedInletChannel*L_SedChannel) + (L_Sed*H_Sed*(N_SedTanks + 1))
A_ChannelsFloor := W_SedTotal*(W_SedInletChannel + W_SedExitChannel + W_SedWeirInlet + W_SedInletChannelPostWeir)
Vol_ChannelsFloor := A_ChannelsFloor*T_ChannelWall = 7.99077 m^3
A_ChannelWalls := L_SedChannel*(H_SedInletChannel + T_ChannelWall) = 2.77213 m^2
W_SedInletChannel + W_SedExitChannel = 0.758587 m
L_SedChannel = 6.7008 m
W_SedBay*N_SedBays*N_SedTanks + (N_SedBays*N_SedTanks + 1)*T_PlantWall = 7.4508 m
6.37 m - 5.09 m - 2*T_PlantWall = 0.98 m
L_InletTank := S_Elbow + ElbowRadius(ND_PltWeir) + ConRadius(ND_PltWeir) + SocketDepth(ND_PltWeir)
W_InletTank := ((2*ConRadius(ND_PltWeir)) + (2*S_Elbow))
Vol_InletTankWalls := (((L_InletTank + 2*T_ChannelWall)*(W_InletTank + 2*T_ChannelWall)) - (L_InletTank*W_InletTank) - ((L_InletTank - T_ChannelWall)*T_ChannelWall))*H_InletChannel
A_InletTankFloor := (W_InletTank + 2*T_ChannelWall)*(L_InletTank + 2*T_ChannelWall)
Vol_InletTankFloor := A_InletTankFloor*T_ChannelWall
Vol_InletChannelTank := Vol_InletTankFloor + Vol_InletTankWalls
L_ExitTank := S_Elbow + ElbowRadius(ND_PltWeir) + ConRadius(ND_PltWeir) + SocketDepth(ND_PltWeir)
W_ExitTank := 4*ConRadius(ND_PltWeir) + 3*S_Elbow
A_ExitTankWalls := (L_ExitTank*T_ChannelWall) + 2*((W_ExitTank + 2*T_ChannelWall)*T_ChannelWall)
# **Area and Volume of the walls are only for the INSIDE wall; the outside wall is already included in the area and volume of the sed walls.**
Vol_ExitTankWalls := A_ExitTankWalls*H_ExitChannel  # L_SedHopper
A_ExitTankFloor := (L_ExitTank + 2*T_ChannelWall)*(W_ExitTank + 2*T_ChannelWall)
Vol_ExitTankFloor := A_ExitTankFloor*T_ChannelWall
Z_SedHopperBackSlope = 0.888992 m
# Sed Tank Slopes
A_SedSlope := H_SedSideSlopes*W_SedSideSlopes/2 = 0.16427 m^2  # **Cross Sectional Area of One Slope**
A_SedSlopes := A_SedSlope*N_SedBays*N_SedTanks = 0.985618 m^2
Vol_SedSlopes := A_SedSlopes*L_Sed = 1.82321 m^3
# Floc Hopper
A_FlocHopperSlope := H_SedSideSlopes*W_SedSideSlopes/2 = 0.16427 m^2
P_FlocChannelMin =  # error: This variable is undefined.
P_FlocChannelVPlastic =  # error
# Pipes and Valves of Sed Tank
N_PipeSedPlateFrame := W_Sed/B_SedPipe - 1 + L_Sed/B_SedPipe - 1
# Length of pipe needed for Sedimentation Tank Plate Frame at ND.SedPlateFrame
L_PipeSedPlateFrameTotal := N_SedTanks*((W_Sed/B_SedPipe - 1)*L_Sed + (L_Sed/B_SedPipe - 1)*W_Sed)
L_Weir := 2*H_PltWeir  # Total length of Weir pipe in Inlet and Exit Channel Tanks at ND.PltWeir
L_SedLaunder = 0.861837 m
# Number of couplings for launder pipe going through concrete wall
N_SedValves := N_SedBays*N_SedTanks = 6
N_SedValveCouplings := N_SedValves = 6
# Lamella and Modules
N_SedPlatesTotal = 162
T_SedPlate = 0.002 m
L_SedPlate = 0.5 m
N_SedModulePlates - 1 = 8
L_SedPlateTotal := N_SedPlatesTotal*L_SedPlate = 81 m
ND_SedModulePipe = 0.0127 m
N_SedModuleCaps := 2*4*N_SedModulePlates*N_SedBays*N_SedTanks = 432
N_SedModulePipes := 4*N_SedModules*N_SedBays*N_SedTanks = 72
L_SedModulePipes := B_SedPlate*(N_SedModulePlates - 1) + T_SedPlate + 2*(CapHeight(ND_SedModulePipe) - ConRadius(ND_SedModulePipe) + outerradius(ND_SedModulePipe)) = 0.263942 m
N_SedModuleSpacers := 4*(N_SedModulePlates - 1)*N_SedModules*N_SedBays*N_SedTanks = 576
L_SedModuleSpacers := B_SedPlate - T_SedPlate = 0.025 m
# Filter
# Filter Bed Concrete
A_FiBedSlab := (L_Fi + 2*T_FiWall)*(N_Fi*W_Fi + (N_Fi + 1)*T_FiWall) = 1.58219 m^2
Vol_FiBedSlab := T_FiWall*A_FiBedSlab = 0.395548 m^3  # need to subtract out the subtractions for the backwash trunk lines
A_FiWall := ((N_Fi + 1)*T_FiWall + N_Fi*W_Fi)*(L_Fi + 2*T_FiWall) - N_Fi*W_Fi*L_Fi = 1.04647 m^2
Vol_FiWalls := A_FiWall*H_Fi = 4.56161 m^3
# Filter Sand
H_FiSand = 1.24083 m
Vol_FiSandTotal := H_FiSand*W_Fi*L_Fi*N_Fi = 0.664738 m^3
# Filter Auxiliary Box and Inlet Channel Concrete
A_FiAuxBoxSlab := (|FiAuxSubBox_Dim[0]| + |W_FiInletChannel| + T_PlantWall)*|FiAuxSubBox_Dim[1]| = 3.17597 m^2
Vol_FiAuxBoxSlab := A_FiAuxBoxSlab*T_PlantWall = 0.476395 m^3
A_FiAuxBoxWalls := 2*(|(|FiAuxSubBox_Dim[0]| + |W_FiInletChannel| + T_PlantWall)*FiAuxSubBox_Dim[2]| + |FiAuxSubBox_Dim[1]*FiAuxSubBox_Dim[2]|) = 1.44523 m^2
Vol_FiAuxBoxWalls := A_FiAuxBoxWalls*T_PlantWall = 0.216785 m^3
A_ExitBoxInnerWall := FiExitBox_dim[1]*FiExitBox_dim[2] = 0.777868 m^2
Vol_ExitBoxInnerWall := A_ExitBoxInnerWall*T_PlantWall = 0.11668 m^3
# Inlet Channel Plumbing
N_FiEntrancePipes = 1
ND_FiEntrancePipe = 0.1016 m
L_FiInletPipe = 1.08794 m
N_FiInletCouplings := N_FiEntrancePipes = 1
ND_FiInletCouplings := ND_FiEntrancePipe = 0.1016 m
# Backwash Trunk Line Pipes and Fittings
N_FiBwTrunk := N_Fi = 1  # All the following lengths of pipes, number of couplings, etc. need to be multiplied by this number
ND_FiBwTrunk = 0.1524 m
L_FiBwTrunkThroughWall := L_FiManFerncoCoupling/2 + T_FiWall + SocketDepth(ND_FiBwTrunk) = 0.327 m
L_FiInPipe0 := N_Fi*(L_FiInPipe0a + L_FiInPipe0b + L_FiBwTrunkThroughWall) = 5.22725 m
N_BackwashCouplings := 2*N_Fi = 2
N_BackwashTees := 1*N_Fi = 1
# Backwash Manifold Branches
ND_FiBwManBranch = 0.0381 m
N_FiBwManBranch := 20*N_Fi = 20
L_FiBwManBranch = 0.405887 m
L_FiBwManBranchTotal := N_FiBwManBranch*L_FiBwManBranch = 8.11773 m
# Manifold Branch Receivers
N_FiBwBranchHolders := 2*N_Fi = 2
ND_FiBwBranchHolder = 0.0762 m
L_FiBwBranchHolder = 0.449692 m
N_FiBwBranchCaps := 2*N_FiBwBranchHolders = 4
# Siphon Pipes and Fittings
N_FiSiphon := N_Fi = 1
ND_FiSiphon = 0.1016 m
N_SiphonManifoldCaps := 2
N_FiSiphonTees := 2
N_FiSiphonCouplings := 2
N_FiSiphonElbows := 3
N_FiSiphonManifold := 2
L_FiSiphonManifold = 0.129277 m
L_FiSiphonPipe1a = 0.202937 m
L_FiSiphonPipe1b = 0.0637963 m
L_FiSiphonPipe2 = 1.56494 m
L_FiSiphonPipe3 = 0.114 m
L_FiSiphonPipe4 = 3.32087 m
L_FiSiphonChannelPipe1 = 1.4908 m
L_FiSiphonChannelStub = 0.26482 m
L_FiSiphonPipes := N_Fi*(N_FiSiphonManifold*L_FiSiphonManifold + L_FiSiphonPipe1a + L_FiSiphonPipe1b + L_FiSiphonPipe2 + L_FiSiphonPipe3 + L_FiSiphonPipe4 + L_FiSiphonPipeBottom + L_FiSiphonChannelPipe1 + L_FiSiphonChannelStub) = 10.2667 m
# Inlet and Exit Plumbing
N_Fi = 1  # All the following numbers will simply be multiplied by the number of filters
ND_FiTrunk = 0.0762 m
# Between the entrance/exit boxes and the filter
N_TrunkElbows := 11  # total for all trunk lines (except for backwash)
N_TrunkCouplings := 2*N_FiLayer  # out of the entrance box and into exit box and into/out of the filter
L_Inlet1Pipes := L_FiInPipe1a + L_FiInPipe1b = 4.45128 m
L_Inlet2Pipes := L_FiInPipe2a + L_FiInPipe2b + L_FiInPipe2c + L_FiInPipe2d = 4.14883 m
L_Inlet3Pipes := L_FiInPipe3a + L_FiInPipe3b + L_FiInPipe3c + L_FiInPipe3d = 3.51468 m
L_Outlet0Pipes := L_FiOutPipe0a + L_FiOutPipe0b = 3.89968 m
L_Outlet1Pipes := L_FiOutPipe1a + L_FiOutPipe1b = 3.16128 m
L_Outlet3Pipes := L_FiOut3PipeZ + L_FiOut3PipeX + L_FiOut3PipeY = 4.41681 m
L_Stubs := 3*L_FiEntPipeStub + 3*L_FiExitPipeStub = 2.56788 m
# Manifold Trunks
N_FiTrunkCaps := 12
L_FiTrunkTotal := N_FiLayer*L_FiTrunk
L_TrunkLines := L_Inlet1Pipes + L_Inlet2Pipes + L_Inlet3Pipes + L_Outlet0Pipes + L_Outlet1Pipes + L_Outlet3Pipes + L_Stubs + L_FiTrunkTotal = 28.8367 m
# Manifold Branches
N_FiManBranchTotal = 40
ND_FiManBranch = 0.0254 m
L_FiManBranch = 0.459862 m
L_FiManBranchTotal := N_FiManBranchTotal*L_FiManBranch
# Manifold Branch Receivers
N_FiBranchHolders := 2*N_FiLayer = 12
ND_FiBranchHolder = 0.0508 m
N_FiBranchCaps := 2*N_FiBranchHolders = 24
# Exit Box Drain
N_Fi = 1
ND_FiExitWaste = 0.0508 m
N_ExitBoxDrainCouplings := 2
N_ExitBoxDrainElbows := 1
L_ExitBoxDrainPipes := L_FiOutPipe2a + L_FiExitDrainPipeHoriz + L_ExitBoxDrainStub
# Sand Drain Plumbing
N_Fi = 1
ND_FiSandOutlet = 0.0508 m
L_FiSandDrainPipes := L_FiSandDrainPipeVert + L_FiSandDrainPipeAngled
N_SandDrainCaps := 1
N_SandDrainValves := 1
# Distribution Plumbing
# This definitely needs to be checked -- not sure how distribution plumbing will be arrayed with higher numbers of filters.
ND_DistPipe = 0.1016 m
N_DistPlumb := 1 + floor(N_Fi/2)
N_DistCouplings := 2
N_DistTee :=
    0 if N_Fi ≤ 2
    1 otherwise
N_DistElbows := 2
L_DistPipes :=
    (L_FiDistPipe1 + L_FiDistPipe2 + L_FiDistPipe3) if N_Fi ≤ 2
    ((L_FiDistPipe1 + L_FiDistPipe2 + L_FiDistPipe3 + L_FiDistPipe4 + L_FiDistPipe5)*N_Fi) otherwise
# Plant Floor and Chemical Platform
A_ChemPlatform := L_EtChemPlatform*W_EtChemPlatform = 4.69603 m^2
Vol_ChemPlatform := A_ChemPlatform*T_PlantWall = 0.704405 m^3
A_MainFloor := |Floor_Dim[0]*Floor_Dim[1]| = 88.0575 m^2
# does not include subtractions, can be used to calculate the roof area, etc.
# Also, can be used to calculate all the concrete needed for plant floor + floor of all the unit processes
# Drain Channels
# Entrance Tank Drain Channel
A_EntranceTankDC := L_EtDC*W_EtDC = 0.840844 m^2
Vol_EntranceTankDC := A_EntranceTankDC*T_PlantWall = 0.126127 m^3
# Plant Drain Channel (drawn in SRSFAC)
A_PlantDC :=
    (L_PlantDC*W_PlantDC) if Z_PlantLowerDCBottom > Z_PlantUpperDCBottom - Slope_PlantDC*L_PlantUpperDC - 10 cm
    (L_PlantLowerDC*W_PlantDC + L_PlantUpperDC*W_PlantDC) otherwise
A_DCWestWallLower := (Z_Walkway - T_Floor - PlantLowerDC_Origin[2])*(PlantLowerDC_Origin[1] + L_PlantLowerDC + T_PlantWall - (Plant_Origin[1] - T_PlantWall)) = 15.5475 m^2
A_DCWestWallUpper := (Z_Walkway - T_Floor - PlantUpperDC_Origin[2])*(Plant_Origin[1] - T_PlantWall + L_PlantDC + T_PlantWall - PlantUpperDC_Origin[1]) = 6.44086 m^2
A_DCEastWallLower := (Z_Walkway - T_Floor - PlantLowerDC_Origin[2])*(PlantLowerDC_Origin[1] + L_PlantLowerDC + T_PlantWall - (Plant_Origin[1] - T_PlantWall)) = 15.5475 m^2
A_DCEastWallUpper := (Z_Walkway - T_Floor - PlantUpperDC_Origin[2])*(Plant_Origin[1] - T_PlantWall + L_PlantDC + T_PlantWall - PlantUpperDC_Origin[1]) = 6.44086 m^2
A_DCNorthWall := (Z_Walkway - T_Floor - PlantUpperDC_Origin[2])*(Plant_Origin[1] - T_PlantWall + L_PlantDC + T_PlantWall - (Plant_Origin[1] - T_PlantWall + L_PlantDC)) = 0.196868 m^2
A_RMRecessWalls := (Z_Walkway - T_Floor - (Z_FlocTank - T_PlantWall))*□  # error: This '(' requires a matching ')'.
A_DCDropoffWall := (PlantUpperDC_Origin[2] - H_PlantDC - Slope_PlantDC*L_PlantUpperDC - PlantLowerDC_Origin[2])*(PlantLowerDC_Origin[1] + L_PlantLowerDC + T_PlantWall - (PlantLowerDC_Origin[1] + L_PlantLowerDC)) = 0.0889169 m^2
A_PlantDCWallsTotal :=
    A_DCWestWallLower + A_DCWestWallUpper + A_DCEastWallLower + A_DCEastWallUpper + A_DCNorthWall + A_RMRecessWalls if Z_PlantLowerDCBottom > Z_PlantUpperDCBottom - Slope_PlantDC*L_PlantUpperDC - 10 cm
    A_DCWestWallLower + A_DCWestWallUpper + A_DCEastWallLower + A_DCEastWallUpper + A_DCNorthWall + A_DCDropoffWall + A_RMRecessWalls otherwise
Vol_PlantDCWalls := A_PlantDCWallsTotal*T_PlantWall
Floc_Origin[1] + N_FlocChannels*(W_FlocChannel + T_PlantWall) - Et_Origin[1] = -1.15 m
Plant_Origin[1] - T_PlantWall = -0.15 m
Vol_PlantDCBottom := A_PlantDC*T_PlantWall = 1.78072 m^3
PlantLowerDC_Origin[1] + L_PlantLowerDC + T_PlantWall = 7.114 m
Vol_PlantDCWalls := A_PlantDCWalls*T_PlantWall
Vol_PlantDCTotal := Vol_PlantDCBottom + Vol_PlantDCWalls
H_PlantDC = 0.187544 m
Vol_TotalDC := Vol_EntranceTankDC + Vol_PlantDCTotal
