CeilNearest(number, array) :=
    i ← 0
    while (number > array[i] and i < last(array))
        i ← i + 1
    return array[i]
FloorNearest(number, array) :=
    i ← 0
    while (number > array[i] and i < last(array))
        i ← i + 1
    return array[i - 1]
RoundNearest(number, array) :=
    i ← 0
    while (number > array[i] and i < last(array))
        i ← i + 1
    Rounded ← array[i] if (number - array[i - 1]) > (array[i] - number)
    Rounded ← array[i - 1] otherwise
    return Rounded
Specialcase(range, interval) := range/interval - 1
Normalcase(range, interval) := range/interval
rampwithjump(initial, start, interval, range) :=
    ramp[0] ← initial
    end ← Normalcase(range, interval) if start ≥ interval
    end ← Specialcase(range, interval) otherwise
    for i ∈ 1 .. end
        ramp[i] ← start + (i - 1)*interval
    return ramp
ramp(start, interval, range) :=
    for i ∈ 0 .. range/interval - 1
        ramp[i] ← start + i*interval
    return ramp
index(s, array) :=
    i ← 0
    while s > 1.0005*array[i] and i < last(array)
        i ← i + 1
    return i
NextLargest(value, array) :=
    FinalVal ← array[last(array)] if array[last(array)] ≤ value
    FinalVal ← array[0] otherwise
    i ← 0
    while array[i] < value and i < (rows(array) - 1)
        i ← i + 1
        FinalVal ← array[i]
    FinalVal
