Z_RMMacroOrifice := Z_SedWeirExit = 1.77109 m
L_RMPipeEst := L_Sed + W_MpWalkway + Z_SedWeirExit = 17.6141 m
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K_RMPipe := 2*K_El90 + K_PipeExit = 2.8
# Size the rapid mixer pipe
ND_RMPipe := D_pipeschedule(Q_Plant, EN_PipeSpec, HL_RMPipeEst, L_RMPipeEst, Nu_Water, E_Pvc, K_RMPipe) = 24 in
D_RMPipe := innerD(ND_RMPipe, EN_PipeSpec) = 22.043 in
K_RMMacroOrifice := 2  # put in expert inputs
V_RMPipe := Q_Plant/A_circle(D_RMPipe) = 60.9246 cm/s
HL_RMPipe := h_l(Q_Plant, D_RMPipe, L_RMPipeEst, K_RMPipe, Nu_Water, E_Pvc) = 6.26377 cm
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HL_RMMicroOrificeMin =  # error: This variable is undefined.
# Given in expert inputs to make sure we have some head loss to work with (this might not be necessary anymore)
HL_RMMicroOrificeMinforED := Q_Plant^2/(2*g)*(4/(π*((0.34*4*Q_Plant/π)^3/ED_RMMicroOrifice)^(2/7)) - 1/A_circle(D_RMPipe))^2 = 16.8277 cm
# Minimum HL to get target energy dissipation rate
HL_RMMicroOrificeMinforDoseController := HL_ChemDoserMin - HL_Floc - HL_SedWeirExit - HL_SedLaunder - HL_RMPipe = 5.75168 cm
# Minimum head loss for dose controller to work
HL_RMMicroOrifice := max(HL_RMMicroOrificeMinforED, HL_RMMicroOrificeMin, HL_RMMicroOrificeMinforDoseController) = 16.8277 cm
HL_PlantTotal := HL_Floc + HL_SedWeirExit + HL_SedLaunder + HL_RMPipe + HL_RMMicroOrifice = 51.076 cm
HL_ChemDoserMin =  # error
HL_RMMicroOrificeMin =  # error
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# If a macromix orifice is used, the right side of this equation must also have HL.RMMacroOrifice subtracted from it.
# Total area through all of the micro mix orifices
HL_Floc + HL_SedWeirExit + HL_SedLaunder + HL_RMPipe + HL_RMMicroOrificeMin =  # error
A_RMMicroOrifices := A_circle(D_RMPipe)/(Pi_VenaContractaOrifice*(sqrt(HL_RMMicroOrifice*2*g/V_RMPipe^2) + 1)) = 997.277 cm^2
# Diameter of micro mix orifice (if there is only one used)
D_RMMicroOrifice := D_circle(A_RMMicroOrifices) = 35.6339 cm
# Velocity through the orifice if no jet
V_RMMicroOrifice := Q_Plant/A_RMMicroOrifices = 1.5041 m/s
# Velocity through micro orifice jet
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V_RMMicroOrificeJet := V_RMMicroOrifice/Pi_VenaContractaOrifice = 2.42596 m/s
# This is the energy dissipation rate through the micro mix orifice if only one orifice is used.  If this value is greater than the minimum ED through the micro mix, then OK.  Else, increase the number
# of orifices
ED_RMMicroOrificeOne := (0.34*V_RMMicroOrificeJet)^3/(D_RMMicroOrifice*sqrt(Pi_VenaContractaOrifice)) = 2 W/kg
D_RMMicroOrificeMax := 1/sqrt(Pi_VenaContractaOrifice)*((0.34*(4*Q_Plant/π))^3/ED_RMMicroOrifice)^(1/7) = 31.2618 cm
# Calculating: Size of Entrance Tank
A_Et := Q_Plant/V_EtUp
L_Et := sqrt(A_Et)
W_Et := A_Et/L_Et
H_Et := HL_PlantTotal + 2*D_RMPipe + H_PlantFreeboard = 1.66227 m
Z_EtTop := Z_SedWeirExit + HL_PlantTotal + H_PlantFreeboard = 2.31357 m
