# Design References
# [reference: BasicInputs.xmcd]
# [reference: ExpertInputs.xmcd]
# [reference: DesignAssumptions.xmcd]
# [reference: MathFunctions.xmcd]
# [reference: PipeDatabase.xmcd]
# [reference: MinorLossCoefficients.xmcd]
# [reference: FluidsFunctions.xmcd]
# [reference: Sedimentation Tank.xmcd]
# design channels. Check hydraulic and other physical constraints for the channel width and height.
# Evaluate the feasibility of having the water level in the filter be below the backwash trough at all times. This would eliminate the need for a valve on the backwash trough.
## Constraints
# Max head loss through inlet piping during filtration
# Max head loss through inlet piping during backwash
# Max head loss through outlet piping during filtration
# Max head loss through outlet piping during backwash (siphon)
# Max ratio of head loss in manifold to head loss through filter layer during filtration
# Max ratio of head loss in manifold to head loss through filter layer during filtration
## Filter Bed Sizing
# Select the stacked filter configuration and backwash velocity
V_FiBw := 11*mm/s  # CEPIS says 11 mm/s. The success of lab-scale backwashing at 10 mm/s suggests that this is a reasonable and conservative value
N_Fi := 1  # We choose 1 filters for now, each of which will have 6 sand layers.
N_FiLayer := 6
# This is allows us to set the plant flow rate without going into MasterProgram every time. The master program is still using the flow rate there to calculate the rest of the variables (L.Sed, L.Floc, etc)
Q_Plant := 15*L/s
# Calculate the required filtration velocity and filter area
V_FiLayer := V_FiBw/N_FiLayer = 1.83333 mm/s
# 1.4 mm/s to 1.7 mm/s is the design value recommended by CEPIS.  The 1.83 mm/s velocity was tested on the lab scale and seems to work.  It is also within the typical range for filters according to the AWWA guidelines.
V_FiLayer = 158.4 m/day
# The flow will be divided evenly between the N_Fi = 1 filters.
Q_Fi := Q_Plant/N_Fi = 15 L/s
A_Fi := Q_Fi/(N_FiLayer*V_FiLayer) = 1.36364 m^2  # This is the required area of each of the N_Fi = 1 filters.
# Determine the geometry of the filter
# Note: The filter is rectangular for now, but we may consider cylindrical shapes later due to large filter bed sizes.  The filter is not constrained by any underdrains because of the use of manifolds
T_FiLayer := 20 cm  # Depth of each filter layer
H_FiSand := N_FiLayer*T_FiLayer = 1.2 m  # The total depth of sand
# Top View | Side View
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# Calculate the head loss through the inlet plumbing
# This is for the piping prior to entering the filterbox/manifold
# List the assumed properties of the sand in the filter
# The listed properties include the diameter of sand, density of a sand grain, density of water,
# and the porosity of a sand bed.
D_FiSand := 0.5 mm  # Average estimated diameter of sand
ε_FiSand := 0.4  # Porosity in a sand bed
Rho_Water := 1000*kg/m^3  # Density of sand and water, respectively
Rho_FiSand := 2650*kg/m^3
# Calculate the clean-bed head loss during filtration
# The head loss across each layer of the filter must be large compared to losses in the plumbing that distributes water into the sand bed, in order for the water to be distributed uniformly to each layer.  At the beginning of a filtration cycle when the sand bed is clean, the head loss is the smallest.  This minimum head loss during filtration is estimated by the Carman-Kozeny equation.
k_Kozeny := 5  # Carman-Kozeny coefficient
h_lKozeny(L, D, V, ε, ν) := k_Kozeny*L*ν/g*(1 - ε)^2/ε^3*36/D^2*V
HL_FiCleanLayer := h_lKozeny(T_FiLayer, D_FiSand, V_FiLayer, ε_FiSand, Nu_Water)
# The head loss in the slotted pipes will be small compared with the clean bed head loss. Head loss in the filter media will thus equilibrate the flow.
HL_FiCleanLayer = 0.151428 m
# Calculate the head loss across the bed during backwashing
# The head loss during backwash is the energy required to fluidize the sand in the filter.
HL_FiBwSS := H_FiSand*(Rho_FiSand - Rho_Water)*(1 - ε_FiSand)/Rho_Water
# The backwash head loss is almost exactly equal  to the sand bed depth. Note that this ignores losses in the plumbing.
HL_FiBwSS = 1.188 m
# This is a design constraint we have chosen so the filter box is not too tall.  It is the additional head loss in the filter media as it becomes full.  Does not include the clean bed head loss.
HL_FiDirty := 30 cm
# Terminal head loss through the filter; set to be 30 cm and the signal for backwash
HL_FiTerminal := HL_FiCleanLayer + HL_FiDirty
V_FiMinFluidization := 5*mm/s  # The 11 mm/s that is used above is for steady state; this is only an initiation number
HL_FiBwSF := 20 cm
# The head loss in a laminar regime is porportional to  velocity so we can use the relation between filtration velocity and min fludization velocity to calculate the additional head loss to initiate fluidization through the bottom 20cm of sand.  Add to this the head loss through the other 5 fluidized layers.  Thus far, lab evidence suggests this is a good predicter of real world performance.
HL_FiBwInitiation := HL_FiTerminal*V_FiMinFluidization/V_FiLayer + (N_FiLayer - 1)/N_FiLayer*HL_FiBwSS = 2.22117 m
# Pressure recovery dominates major and minor losses, so it will set our manifold and trunk pipe sizes
Pi_FiManifoldHeadLoss := 0.1
# Ratio of head loss through the slotted pipes to the head loss through the clean bed; this is half the total head loss in the manifold, the other half will be in the trunk line.  Due to the sqrt(h) relationship this will lead to about 11% overall variability through the inlet piping.
# Exit and entrance pipes will have additional head loss. We need to verify that this head loss is acceptable. The constraint is that we don't want excessive head loss through these pipes because that head loss will force us to use a deeper filter box or will result in lower water level elevation in the effluent.
HL_FiManifoldTarget := HL_FiCleanLayer*Pi_FiManifoldHeadLoss = 1.51428 cm
# Use 3*HL target because when the pipe is a manifold, the ehad loss is actually cut by a factor of 3
E_Pvc = 0.00012 m  # Roughness
V_FiBranch := sqrt(2*g*HL_FiManifoldTarget) = 0.544977 m/s
B_FiManifoldBranch := 10 cm
ManBranchSize :=
    ManBranchSize[0] ← Pipesizes[5, 0]
    ManBranchSize[1] ← Pipesizes[7, 0]
    return ManBranchSize  # Pipe sizes listed in order, regardless of PipSpec
BranchManQ :=
    for i ∈ 0 .. rows(ManBranchSize) - 1
        BranchManQ[i] ← V_FiBranch*π*innerdiameter(ManBranchSize[i], EN_PipeSpec)^2/4
    return BranchManQ
# Calculates Q in the manifold branch given the Velocity
BranchManL :=
    for i ∈ 0 .. rows(ManBranchSize) - 1
        BranchManL[i] ← BranchManQ[i]/(2*V_FiLayer*B_FiManifoldBranch)
    return BranchManL
# Calculates the length of the manifold branch given the filtration area and filtration velocity
NumBranch :=
    for i ∈ 0 .. rows(ManBranchSize) - 1
        NumBranch[i] ← A_Fi/(BranchManL[i]*B_FiManifoldBranch) if BranchManL[i] ≠ 0
    return NumBranch  # Calculates the number of branches reach the required filtration area
ManBranchSize = [1; 1.5] in
BranchManQ = [0.381251; 0.830297] L/s
BranchManL = [103.978; 226.445] cm
NumBranch = [13.1147; 6.02194]
Index :=
    i ← 0
    while i ≤ rows(ManBranchSize) - 1
        i ← i + 1 if NumBranch[i] > 20
        return i otherwise
    return i
    = 0
# This returns the index of the smallest diameter pipe that has less than 20 manifold branches.  This is a contrained value based on what seems reasonable.  For now, there are only 2 pipe sizes we would use (1" and 1.5") for flow rates from 6 L/s to 25 L/s, bu tin the event we would have larger flow rates for a single filter box, this algorithm will still work once the above arrays are modified.
HL_FiManBranch := 1/3*h_l(BranchManQ[Index], innerD(ManBranchSize[Index], 2), BranchManL[Index], K_PipeExit, Nu_Water, E_Pvc) = 18.6852 mm
# Just a check and used to calculate tank heights.
ND_FiManBranch := ManBranchSize[Index] = 1 in
N_FiManBranch := ceil(NumBranch[Index]) = 14
L_FiManBranch := A_Fi/(N_FiManBranch*B_FiManifoldBranch) = 0.974026 m
W_Fi := L_FiManBranch = 0.974026 m
# This is only the active filtration width.  The actual box has the manifold turck lines embedded in concrete on either side, 2 wall thicknesses, and a lip to hold the manifold branches from lifting during backwash.
L_Fi := A_Fi/W_Fi = 1.4 m
Q_FiLayer := 2*Q_Fi/N_FiLayer = 5 L/s
Q_FiManBranch := BranchManQ[Index] = 0.381251 L/s
# The bottom manifold needs to be designed to handle full filter flow for backwash operation
Q_FiBwManBranch := Q_Fi/N_FiManBranch = 1.07143 L/s  # branches on one side of trunk
ND_FiBwManBranch := D_pipeschedule(Q_FiBwManBranch, EN_PipeSpec, Pi_FiManifoldHeadLoss*HL_FiBwSS, W_Fi, Nu_Water, E_Pvc, K_PipeExit) = 1.5 in
# The method for calculating this needs to be changed so we use PR and not HL
PR_FiBwManBranch := (Q_FiBwManBranch/(π*innerD(ND_FiBwManBranch, EN_PipeSpec)^2/4))^2/(2*g) = 2.52153 cm
HL_FiBwManBranch := 1/3*h_l(Q_FiBwManBranch, innerD(ND_FiBwManBranch, EN_PipeSpec), W_Fi, K_PipeExit, Nu_Water, E_Pvc) = 13.9289 mm
# We want to design the size of the slots in the backwash manifold so that it has significant head loss.  This will ensure that the whole bed fluidizes and eliminates the posibility of only half of it doing so.  This head loss will be lower by a factor of six (read: negligible) during filtration.
# design of restricting orifices in the backwash branches to ensure that flow distributes uniformly during backwash
# Set the orifice head loss during filtration to be equal to the 10% of clean bed head loss
# Use that to determine the total orifice area (slot area) in the backwash manifolds.
A_FiBwOrifices := A_orifice(HL_FiManifoldTarget, Pi_VenaContractaOrifice, Q_FiBwManBranch) = 31.2065 cm^2
# How do we decide the number of slots and their spacing? We don't have an A.FiManSlot
L_FiBwManSlotTotal := A_FiBwOrifices/(.2 mm) = 15.6032 m
ND_FiBwManBranch = 1.5 in
W_Fi = 0.974026 m
□ := L_FiBwManSlotTotal/W_Fi  # error: This placeholder is empty.
π*innerD(ND_FiBwManBranch, EN_PipeSpec) = 13.8367 cm
L_FiBwManSlot := π*innerD(ND_FiBwManBranch, EN_PipeSpec)/4 = 3.45918 cm  # This is for 1 slot on either side of the pipe each being 1/4 of the circumferance
S_FiBwManSlot := 2*L_FiBwManSlot/(L_FiBwManSlotTotal/W_Fi) = 0.431876 cm
# Pressure recovery dominates the design. The constraint on the manifolds is that the pressure recovery term must be small relative to the head loss through the filter bed.
ND_FiTrunk := NominalDiameter(ID_Manifold(2*Q_FiLayer, HL_FiManifoldTarget), EN_PipeSpec) = 6 in
# The ID.Manifold function calculates an ID given the HL constraint, in this case the pressure recovery.
HL_FiTrunk := 1/3*h_l(Q_Fi, innerD(ND_FiTrunk, EN_PipeSpec), L_Fi, 0, Nu_Water, E_Pvc) = 2.07759 mm
V_Trunk := 2*Q_FiLayer/(innerdiameter(ND_FiTrunk, EN_PipeSpec)^2/4*π) = 0.533344 m/s  # Just checking our initial constraint on V.
ND_FiBwTrunk := NominalDiameter(ID_Manifold(Q_Fi, HL_FiManifoldTarget), EN_PipeSpec) = 8 in
HL_FiBwTrunk := 1/3*h_l(Q_Fi, innerD(ND_FiBwTrunk, EN_PipeSpec), L_Fi, 0, Nu_Water, E_Pvc) = 0.551624 mm
outerdiameter(ND_FiTrunk)/T_FiLayer = 0.841375
# As long as this is less than 1 there is enough room for exit and entrance trunk lines in the same wall.  This isn't a concern during filtration because the flow path through this sand is longer.  There aren't any slots on the trunk lines.
# Total head loss in the inlet plumbing for filtration and Bw
HL_FiInletPlumbing := h_l(2*Q_FiLayer, innerD(ND_FiTrunk, EN_PipeSpec), 2 m, K_El90 + K_PipeEnt, Nu_Water, E_Pvc) + HL_FiTrunk + HL_FiManBranch = 4.51983 cm
# This is for one of the middle manifolds embedded in sand and the length of the pipe outside the filter box is approximated at 2 m;  there are 4 90 deg elbows
HL_FiBwInletPlumbing := h_l(Q_Fi, innerD(ND_FiBwTrunk, EN_PipeSpec), 2 m, K_El90 + K_PipeEnt, Nu_Water, E_Pvc) + HL_FiBwTrunk + HL_FiBwManBranch = 3.27347 cm
HL_FiOutletPlumbing := HL_FiInletPlumbing = 4.51983 cm
# Calculate the Z of the backwash channel weir
# Calculate the head loss through the siphon during backwash
# AKA time to drain the filter box of the water above the fluidized bed
Ti_FiBwInitiation := 3 min
# Need a flow rate in order to determine HL through the siphon tube
#
# Siphon has to handle the entire flow into the filter plus drain the terminal head in under 1 min
Q_FiSiphonDesign := Q_Fi + A_Fi*HL_FiBwInitiation/Ti_FiBwInitiation = 31.827 L/s
K_FiSiphon := 2*K_El90 + K_PipeExit + K_PipeEnt + 0.2 = 3.5
# Minor losses for flow through the siphon; they will be much greater than major losses, making major losses negligible will dominate.
#
# 0.2 is from losses through the straight path of a T intersection
h_eFiSiphonGuess := 20 cm  # Maximum acceptable head loss through the siphon; used to calculate a Diameter
# Minor Loss Equation rearranged to solve for D, not necessarily an available pipe size
D_FiSiphonGuess := nthroot(K_FiSiphon*8/(g*π^2)*Q_FiSiphonDesign^2/h_eFiSiphonGuess, 4) = 0.195648 m
ND_FiSiphon := NominalPipeSize(D_FiSiphonGuess) = 8 in
HL_FiSiphonMax := h_e(Q_FiSiphonDesign, innerD(ND_FiSiphon, EN_PipeSpec), K_FiSiphon) = 17.8844 cm  # Head loss through the siphon
HL_FiSiphonSS := h_e(Q_Fi, innerD(ND_FiSiphon, EN_PipeSpec), K_FiSiphon) = 3.97251 cm
# Calculate the head loss over the weirs
SF_Fi := 10 cm  # This is a safety factor used in many filter calculations
# We are making the exit and backwash weirs as long as the filter is wide because it is a convenient dimension for construction.
L_FiWeir := max(OuterDiameterFittingPVC(ND_FiBwTrunk) + OuterDiameterFittingPVC(ND_FiTrunk) + 3*T_ConcreteMin, W_HumanMin) = 0.570688 m
# This is used for entrance and exit weirs (not necessarily backwash)
HL_FiBwWeir := Headloss_weir(Q_FiSiphonDesign, L_FiWeir) = 9.65122 cm
HL_FiWeir := Headloss_weir(Q_Fi, L_FiWeir) = 5.84492 cm  # This is true of the entrance and exit weirs
Z_FiEntranceWeir := Z_SedWeirExit - (H_Freefall + HL_FiWeir) = 1.42754 m  # This is the maximum water height in the entrance box
Z_FiBwWeir := Z_FiEntranceWeir - (SF_Fi + HL_FiBwInletPlumbing + HL_FiBwInitiation + HL_FiSiphonSS + HL_FiBwWeir) = -1.0626 m
Q_FiSiphonMax := Q_pipetotal(innerD(ND_FiSiphon, EN_PipeSpec), Z_FiEntranceWeir - Z_FiBwWeir, 4 m, Nu_Water, E_Pvc, K_FiSiphon) = 113.42 L/s
# Calculate the height bottom of the filter box and its height
# Bed expands 30% when fluidized
H_FiFluidizedBed := 1.3*H_FiSand
Z_FiSiphonInlet := Z_FiBwWeir - SF_Fi = -1.1626 m
# Minimum length of the siphon that needs to be submerged in the filter box is set to the SF
Z_FiBottom := Z_FiSiphonInlet - H_FiFluidizedBed - SF_Fi = -2.8226 m
H_Fi := Z_FiEntranceWeir + H_PlantFreeboard - Z_FiBottom = 4.35014 m
Z_FiTop := Z_FiBottom + H_Fi = 1.52754 m
# Calculate the dimesions of the entrance box
# One SF for not sucking air into the backwash line the other is for 10 extra cm of extra head to initiate backwash
Z_FiEntranceBottom := Z_FiEntranceWeir - (HL_FiBwInitiation - HL_FiBwSS) - 2*SF_Fi = 0.194371 m
H_FiEntrance := Z_FiEntranceWeir - Z_FiEntranceBottom + H_PlantFreeboard = 1.33317 m
Z_FiEntranceBottom + H_FiEntrance = 1.52754 m  # The entrance channel wall opposite and perpendicular the weir is the same height as the filter box
L_FiEntrance := L_FiWeir = 0.570688 m
ND_FiEntranceOverflow := D_pipeschedule(Q_Fi, EN_PipeSpec, 1 m, 1 m, Nu_Water, E_Pvc, 2) = 3 in
ND_DistPipe := D_pipeschedule(Q_Plant, EN_PipeSpec, 1 m, 100 m, Nu_Water, E_Pvc, 2) = 6 in
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# This will be the pipe layout in the entrance and exit boxes to allow for 2 90 degree elbows in  Pipes 2 and 3 coming from the entrance box (on the right)
W_FiEntrance := 2*T_ConcreteMin + OuterDiameterFittingPVC(ND_FiBwTrunk) + 3*OuterDiameterFittingPVC(ND_FiTrunk) = 0.888987 m
# We have a concrete min for the entrance/exit boxes, but for the filter, we do not want to have extra space inside the filter.  Should we include it so the pipes line up easier? Put T.ConcreteMin into the filter dimension
# How much does the filter bed over fluidize when the entrance box level lowers after backwash initiation?
H_FiFluidizedBedVariation := (HL_FiBwInitiation - HL_FiBwSS)*(W_FiEntrance^2 - 3*OuterDiameterFittingPVC(ND_FiTrunk)^2/4*π)/A_Fi = 0.538237 m
HL_FiBwInitiation - HL_FiBwSS = 1.03317 m
HL_FiBwInletPlumbing = 0.0327347 m
OuterDiameterFittingPVC(ND_FiBwTrunk) = 9.3125 in
Q_Ratio := sqrt((HL_FiBwInitiation - HL_FiBwSS)/HL_FiBwInletPlumbing) = 5.61799
# We will leave the bottom of these tanks at a low elevation (that we have calculated) and add pipe stubs as needed. We need to experiment with free fall in the backwash pipe and with the inevitable entrainment of air to see if that is a problem. There will be a tradeoff between air entrainment and fluidized bed expansion. We may want to include an air vent in the backwash pipe (T with vertical leg returning to above original water height to vent air).
# Calculate the dimensions of the overflow box
W_FiOverflow := 2*T_ConcreteMin + OuterDiameterFittingPVC(ND_DistPipe) = 0.28415 m
L_FiOverflow := L_FiEntrance
H_FiOverflow := H_FiEntrance
Z_FioverflowBottom := Z_FiEntranceBottom
W_FiEntrance := (2*W_Fi + 2*outerdiameter(ND_FiBwTrunk) + 2*T_ConcreteMin + T_PlantWall - 2*T_SedWeir - W_FiOverflow)/2 = 1.12603 m
# Calculate the dimensions of the exit box
Z_FiExitWeir := Z_FiEntranceWeir - (HL_FiTerminal + HL_FiInletPlumbing + HL_FiOutletPlumbing) = 0.885714 m
# This means the water evel in the entrance box will actually be 10 cm higher than we assumed in previous calculations to ensure BW initiation (aka we have a 10cm SF for BW initiation)
# The goal is to have water start overflowing from the entrance tank when the filter reaches terminal head loss
Z_SedWeirExit - Z_FiExitWeir = 0.700274 m  # This is the energy used to filter water
Z_FiEntranceWeir - Z_FiExitWeir = 0.541824 m  # Difference in heights for the Exit and Entrance weirs
Z_FiExitBottomMin := Z_FiBwWeir + HL_FiSiphonSS + (HL_FiBwSS*(H_FiFluidizedBed - T_FiLayer)/H_FiFluidizedBed) = 0.0128167 m
# The first two terms determine the height of the water at BW SS.  The additonal terms claculates the additonal height to prevent the pressure in the lowest outlet pipe from causing bacwash water to flow into the exit box.
HW_FiExit := 15 cm
# We aren't using this because we want the bottoms of the entrance/exit boxes to be 1 slab.  If we were...this is a contraint based on minimizing consturction materials.  From the above calculations we have ~1m to play with for the bottom of the box.
Z_FiExitBottom := Z_FiEntranceBottom = 0.194371 m
ZW_FiExit := Z_FiExitWeir + HL_FiWeir = 0.944163 m
H_FiExit := ZW_FiExit - Z_FiExitBottom + H_PlantFreeboard = 0.849792 m
L_FiExit := L_FiEntrance = 0.570688 m
W_FiExit := W_FiEntrance = 1.12603 m
W_Fi + OuterDiameterFittingPVC(ND_FiBwTrunk) - (W_FiExit + .5*OuterDiameterFittingPVC(ND_DistPipe)) = -0.0075375 m
# This is a check to make sure the  entrance/exit boxes in different filters did not overlap
# Calculate the dimensions of the backwash box
ZW_FiStart := Z_FiExitWeir + HL_FiOutletPlumbing + HL_FiCleanLayer = 1.08234 m  # Minimum height of water in the filter box during filtration
Z_FiSiphonThroughWall := ZW_FiStart - SF_Fi - outerdiameter(ND_FiSiphon)/2 = 0.872802 m
# This is the center line of the pipe through the wall.  This is a Maximum.  We can lower the pipe as long as the bottom of the siphon exit does not go below the bottom of the filter (+ SF.Fi to allow for flow).
Z_FiSiphonThroughWall - Z_FiSiphonInlet = 2.0354 m
H_FiBwWeir := Z_FiBwWeir - Z_FiBottom = 1.76 m
# We decided we could simultaneous make the box shallow and the pipe the shortest it could be by raising the bottom of the filter box.  In the event we want to change that constraint, this is the amount of room we have to play with.  For every cm we lower this, we lowert he other end 1 cm plus another 1.5cm to ensure air doesn't leak out.  We can use this to calculate a min
H_FiBw := H_FiBwWeir + H_PlantFreeboard = 1.86 m
Q_FiSiphonMax = 113.42 L/s  # Just for reference
ND_FiBwWeirDrain := D_pipeschedule(Q_FiSiphonMax, EN_PipeSpec, H_FiBwWeir, H_FiBwWeir, Nu_Water, E_Pvc, K_El90 + K_PipeEnt + K_PipeExit) = 8 in
# This means we are using a drain channel
ND_FiBwDrain := 3 in
# This is the addition of the two siphon pipes and the drain pipe for the backwash box
W_FiBw := OuterDiameterFittingPVC(ND_FiBwDrain) + 4*T_ConcreteMin + 2*OuterDiameterFittingPVC(ND_FiSiphon) = 0.774675 m
L_FiBw := max(2*outerdiameter(ND_FiSiphon) + SocketDepth(ND_FiSiphon) + 5 cm + CouplingLength(ND_FiSiphon) - T_PlantWall, W_HumanMin) = 0.6117 m
# 5 cm is for exposed pipe, 1 of the diameters is for the elbow radius
Z_FiBwBottom := Z_FiBottom = -2.8226 m
Z_FiBwTop := Z_FiBwBottom + H_FiBw = -0.962601 m
# Calculate the dimensions of the backwash drain box
W_FiBwWeirDrain := L_FiWeir = 0.570688 m
# Make sure the wall thickness for all walls in the BW Box are T.PlantWall, including the weir because the Weir wall goes all the way to the floor
L_FiBwWeirDrain := 2*T_ConcreteMin + OuterDiameterFittingPVC(ND_FiBwWeirDrain)
# This means the depth of the box will scale with flow so that water will flow more smoothly into the pipe leading to the drain channel
Z_FiBwWeirDrainBottom := Z_FiBwWeir - ND_FiBwWeirDrain = -1.2658 m
H_FiBwWeirDrain := Z_FiBwTop - Z_FiBwWeirDrainBottom = 0.3032 m
# Calculate the dimensions of the drain channel
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Q_FiBwDrain := Q_FiSiphonMax = 113.42 L/s
W_FiBwDrain := W_FiOverflow + 2*T_SedWeir - 2*T_PlantWall = 0.08415 m  # This is tiny...
# Length will be claculated in AutoCAD because having the various origins of the tanks will be helpful for doing so
# This is not totally correct. Need to add an L for the entrance channel.  It shouldn't make a huge difference.  Should be calculated independently in AutoCAD Scripts
L_FiBwDrain := 2*T_PlantWall + L_FiEntrance + L_FiExit + T_SedWeir = 1.49138 m
H_FiBwDrain := h_frectreal(Q_FiBwDrain, W_FiBwDrain, L_FiBwDrain, Nu_Water, E_Pvc, 1) = 0.262427 m
# Calculate the Z of the top of the pipe stubs in the entrance and exit boxes
ZW_FiStart = 1.08234 m
# We are going to set the top one to some level (20cm) below the min water level (at the beginning of filtration) and then have some distance (5 cm) in between them.
#
# For exit, all the pipes are going to be the same height, and we should reference the min height we calculated (and maybe deleted) before plus a SF.
Z_FiEntrancePipes :=
    for i ∈ 0 .. 3
        Z_FiEntrancePipes[0] ← ZW_FiStart - 20 cm if i == 0
        Z_FiEntrancePipes[i] ← Z_FiEntrancePipes[i - 1] - 5 cm otherwise
    return Z_FiEntrancePipes
    = [0.88234; 0.83234; 0.78234; 0.73234] m
# This may not be correct for the BW pipe which may need to be shorter, but Monore "really doesn't think so"
Z_FiExitBottomMin = 0.0128167 m
Z_FiExitPipes := [Z_FiExitWeir - 10 cm; Z_FiExitBottomMin; Z_FiExitWeir - 10 cm; Z_FiExitWeir - 10 cm] = [0.785714; 0.0128167; 0.785714; 0.785714] m
# Piping and Fittings
# The last elbow for the backwash trunk line is replaced with a T.  The oppostie direction from the filter is a valve that goes to the waste channel in the event we want to dewater the filter without de-sanding it.
#
# The de-sanding pipe will be sized based on the volume of the fluidized bed being drained in under 5 minutes.  Predict a 3 in pipe
# There will be a tradeoff between air entrainment and fluidized bed expansion. We may want to include an air vent in the backwash pipe (T with vertical leg returning to above original water height to vent air).
