# [reference: BasicInputs.xmcd]
# [reference: ExpertInputs.xmcd]
# Algorithm Order:
# - Preliminary calculations
# - Inlet and exit channel dimensions
# - Manifold calculations
# - Sludge Drain
# - Side Slopes
# - Launder sizing
# - Plate Settler Algorithm -> channel positions, tank dimensions, plate dimensions, number of plates, launder
# - Divide plates into modules
# - Floc hopper dimensions
# - Drains
# [reference: MathFunctions.xmcd]
# [reference: PipeDatabase.xmcd]
# [reference: MinorLossCoefficients.xmcd]
# [reference: FluidsFunctions.xmcd]
# Sedimentation Tank
# Questions:
# - What is the minimum allowable space between the slopes of the walls and the side of the inlet manifold pipe to avoid floc breakup and have good sed tank hydraulics?
# - Is it okay to fix the plate settler spacing at the minimum value?
# - How long until the floc weir fills up with sludge? Will it need to be drained more often than the operator wants to drain the entire sed tank? In that case it would need its own drain. Does it need a separate drain leading to the main plant drain channel or is a pipe straight down to the main sludge drain sufficient? Will that need to have a plug?
# - The sludge drain channel is pretty much inaccessible as it passes beneath the floc weir hopper. What can we do about that?
# Preliminary Dimension and Flow Calculations
# Maximum length of the upflow section of the sed tank is based on the maximum flow rate through the inlet manifold pipe to stay below the maximum energy dissipation rate to prevent floc breakup and the desired upflow velocity to maintain a floc blanket.
L_SedUpflowMax := Q_PipeED(ED_SedInlet, innerD(ND_SedManifoldMax, PS_Default), Pi_VenaContractaOrifice, Pi_Jet)/(V_SedUpBod*W_SedBay)
Q_Sed := Q_Plant/N_SedTanks = 0.003 m^3/s  # Flow rate through one sed tank.
# There is a minimum number of total sed bays required to maintain the desired upflow velocity in each sed tank given the maximum length calculated above.
N_SedBaysTotal := ceil(Q_Plant/(V_SedUpBod*W_SedBay*L_SedUpflowMax)) = 1
N_SedBaysMin := ceil(N_SedBaysTotal/N_SedTanks) = 1  # Minimum number of sed bays per sed tank given the minimum total number calculated above.
N_SedBays := max(N_SedBaysMin, N_SedBaysEst) = 1  # The number of bays per tank is the maximum of the calculated value and the user input
L_SedUpflow := Q_Sed/(W_SedBay*N_SedBays*V_SedUpBod)
# Actual length of the upflow section of the sed tank (not including the floc hopper) given the number of sed bays per sed tank.
W_Sed := N_SedBays*W_SedBay
Q_SedBay := Q_Sed/N_SedBays
Z_SedLaunder
ND_SedLaunder := ND_Manifold(Q_SedBay, HL_SedLaunderBod, L_SedUpflow, Pi_QLaunderOrifices, PS_Default, Nu_Water, E_Pvc, K_PipeExit, 2*floor(L_SedUpflow/B_SedLaunderOrificesEst))
# This is a very slightly conservative estimate on the size of the launder. Close enough that there is no need to recalcualte this diameter.
Q_SedManifold := Q_SedBay  # There is one manifold per bay
ND_SedManifold := NominalDiameter(D_PipeED(ED_SedInlet, Q_SedBay, Pi_VenaContractaOrifice, Pi_Jet), PS_Default)
# Inlet Channel Design
L_Channel := N_SedTanks*W_Sed + (N_SedTanks + 1)*T_PlantWall  # Length of the inlet channel, which runs along the entire width of the sed tanks.
# The area of the inlet channel must be large enough not to break up flocs
A_InletChannelED := A_Channel(Q_Plant, ED_SedInlet, Pi_VenaContractaOrifice, Pi_Jet)
HW_SedWeirExit := 2*ConRadius(ND_SedLaunder)
# We want to make both channels the same depth for ease of construction. The exit channel must be deep enough to receive the launders. So we do a good estimate on the size of the launders and make the channel deep enough to receive the launder pipe (without embedding the launder pipe in the concrete channel floor!)
W_InletChannelPlumbing := 2*ConRadius(ND_SedManifold) + 2*S_SedInletChannelMin = 0.24415 m
HW_InletChannelPlumbing := HL_SedLaunderBod + 2*ConRadius(ND_SedLaunder) + T_ConcreteMin = 0.218587 m
[W_InletChannelPreWeir; HW_SedInletChannel] :=
    W ← W_InletChannelPlumbing
    HW ← HW_InletChannelPlumbing
    while W*HW < A_InletChannelED
        HW ← HW + 1 mm if HW < W
        W ← W + 1 mm otherwise
    return [W; HW]
H_SedInletChannel := HW_SedInletChannel + H_PlantFreeboard
EN_InletChannelGeom :=
    hl_weir ← Headloss_weir(Q_Plant, W_InletChannelPreWeir)
    Geom_Channel ← Perpendicular_Weir if (hl_weir ≤ HL_SedWeirMax)
    Geom_Channel ← Parallel_Weir otherwise
    return Geom_Channel
# This function determines the geometry of the weir based on the headloss through it. Hl.SedWeirMax is an expert input. 0-->Perpendicular, 1--> Parallel
W_SedWeirInlet :=
    W_InletChannelPreWeir if EN_InletChannelGeom == Perpendicular_Weir
    L_Channel otherwise
# The width of the sed weir inlet is considered in its longitudunal direction. In the case of a perpendicular configuration, its width is the same as the width of the channel. In the parallel case, it is the same as its length.
HL_SedWeirInlet := Headloss_weir(Q_Plant, W_SedWeirInlet) = 0.0117426 m
H_SedWeirInlet := HW_SedInletChannel + 2 cm = 0.275588 m
W_InletChannelPostWeir := max(W_ChannelMin, W_HorizChannel(Q_Plant, H_SedWeirInlet, HL_SedChannelMax, L_Channel, Nu_Water, E_Concrete, 1))
W_SedInletChannel :=
    W_InletChannelPreWeir if EN_InletChannelGeom == Perpendicular_Weir
    W_InletChannelPreWeir + T_SedWeir + W_InletChannelPostWeir if EN_InletChannelGeom == Parallel_Weir
V_SedInletChannel := Q_Plant/(W_InletChannelPreWeir*HW_SedInletChannel) = 0.184012 m/s  # This is the velocity in the part of the channel that delivers the flocs
L_SedEst := 4 m
ND_SedInletChannelDrain := NominalDiameter(D_PipeTotal(Q_Plant, HW_SedEst, HW_SedEst + L_SedEst, Nu_Water, E_Pvc, K_PipeEnt + K_PipeExit + K_El90), PS_Default) = 3 in
W_SedInletChannelDrainBox := max(2*S_Fitting + 2*ConRadius(ND_SedInletChannelDrain), W_InletChannelPostWeir)
# Exit Channel Design
ND_SedExitChannelDrain := NominalDiameter(D_PipeTotal(Q_Plant, HW_SedEst, HW_SedEst, Nu_Water, E_Pvc, K_PipeEnt + K_PipeExit + K_El90), PS_Default) = 3 in
L_ExitChannel := L_Channel = 5.07 m
# To ensure uniform distribution of flow between tank bays, head loss in the channel was designed to be twenty times smaller than head loss in the launder. After converting from head loss to flow, the ratio of flow rates in the launders is calculated to be sqrt(20/21)
Π_QSedTanks := sqrt(10/11) = 0.953463
H_SedExitChannel := H_SedInletChannel
HW_SedExitChannel := HW_SedInletChannel - HL_SedLaunderBod
W_ExitChannelPreWeir := max(W_HorizChannel(Q_Plant, HW_SedExitChannel, HL_SedChannelMax, L_Channel, Nu_Water, E_Concrete, 1), W_ChannelMin, SocketDepth(ND_SedLaunder) + CapHeight(ND_SedLaunder) + 2 cm)
W_ExitChannelPostWeir := max(W_ChannelMin, W_HorizChannel(Q_Plant, H_SedWeirInlet, HL_SedChannelMax, L_Channel, Nu_Water, E_Concrete, 1))
# The water level change in the exit channel is designed to be 10% of the head loss through the launder orifices. The difference in flow between sed tanks will then be 1 - sqrt(10/11) = 4.65374 %. Note that this is only applicable for the case of a perpendicular weir. For the case of a parallel weir the differences in flow between sed tanks should be even smaller..
Geom_ExitChannel :=
    hl_perpweir ← Headloss_weir(Q_Plant, max(W_ExitChannelPreWeir, 2*S_Fitting + 2*ConRadius(ND_SedExitChannelDrain)))
    Geom_Channel ← Perpendicular_Weir if (hl_perpweir ≤ HL_SedWeirMax)
    Geom_Channel ← Parallel_Weir otherwise
    return Geom_Channel
W_SedWeirExit :=
    max(W_ExitChannelPreWeir, 2*S_Fitting + 2*ConRadius(ND_SedExitChannelDrain)) if Geom_ExitChannel == Perpendicular_Weir
    L_Channel - 2*S_Fitting - 2*ConRadius(ND_SedExitChannelDrain) + W_ExitChannelPostWeir otherwise
HL_SedWeirExit := Headloss_weir(Q_Plant, W_SedWeirExit)
H_SedWeirExit := HW_SedExitChannel - HL_SedWeirExit
# W.ExitChannelMin is the width of the channel next to the sed tank. It is just wide enough to make it possible to plug the launder pipes. The l
W_SedExitChannel :=
    max(W_ExitChannelPreWeir, 2*S_Fitting + 2*ConRadius(ND_SedExitChannelDrain)) if Geom_ExitChannel == Perpendicular_Weir
    max(W_ExitChannelPreWeir + T_SedWeir + W_ExitChannelPostWeir, 2*S_Fitting + 2*ConRadius(ND_SedExitChannelDrain)) otherwise
H_ExitChannelLaunder := H_SedWeirExit - outerdiameter(ND_SedLaunder)
# Manifold Design
L_SedManifoldPipe := L_SedUpflow - W_InletChannelPreWeir/2 - ElbowRadius(ND_SedManifold) - CapHeight(ND_SedManifold) + SocketDepth(ND_SedManifold)
array :=
    N_Ports ← floor(L_SedManifoldPipe/B_SedManifoldPortEst)
    Q_Ports ← Q_SedBay/N_SedManifoldPorts  # error: This placeholder is empty.
N_SedManifoldPorts := floor(L_SedManifoldPipe/B_SedManifoldPortEst) - 1 = 29
Q_SedManifoldPort := Q_SedBay/N_SedManifoldPorts
D_SedManifoldPortEst := D_PipeED(ED_SedInlet, Q_SedManifoldPort, Pi_VenaContractaOrifice, Pi_Jet) = 0.0356849 m
D_SedManifoldPort := CeilNearest(D_SedManifoldPortEst, D_Drill)
A_SedManifoldPort := A_circle(D_SedManifoldPort)
# Diffuser Design
ND_SedManifoldDiffuser := NominalPipeSize(D_SedManifoldPort + 0.5 in)
L_SedManifoldDiffuserEst := 4*innerdiameter(ND_SedManifoldDiffuser, PS_Default) = 0.220777 m
# Minimum space between the side of the manifold pipe and the sloped walls of the sed tank?
S_SedManToSlopeMin := 10 cm
# Calculate the energy dissipation rate created by the port. We will use this to evaluate this design.
ED_SedManifoldPort := ED_Port(Q_SedManifoldPort, D_SedManifoldPort, Pi_VenaContractaOrifice)
Circ_SedManifoldDiffuser := π*innerdiameter(ND_SedManifoldDiffuser, PS_Default) = 17.3398 cm
B_SedManifoldPort := B_SedManifoldPortEst
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W_Port := 2/Pi_VenaContractaOrifice^2*((Pi_Jet*Q_SedManifoldPort/(2*B_SedManifoldPort))^3/ED_Floc)^(1/4) = 2.74893 cm
W_Jet := W_Port/2*0.62^2 = 0.528345 cm
# Sludge Drain
# Here we are assuming that we are willing to use up to 50% of the available energy to get the flow through the valve and discharge it to atmosphere.
HL_Valve := 0.5*HW_SedEst
# This is the initial drain rate
# The factor of two is because the flow rate decreases linearly as the tank drain (for a constant cross section tank). Thus the average drain rate is 1/2 the initial drain rate.
Q_SedSludgeDrain := 2*W_SedBay*L_SedUpflow*HW_SedEst/Ti_SludgeDrain
# There will be a drain orifice in between each manifold port
B_SedSludgeOrifices := B_SedManifoldPort
N_SedSludgeOrifices := floor((L_SedUpflow - W_InletChannelPreWeir/2 - ElbowRadius(ND_SedManifold))/B_SedSludgeOrifices) = 31  # per bay
Q_SedSludgeOrifices := Q_SedSludgeDrain/N_SedSludgeOrifices
ND_SedSludgeValve := D_pipeschedule(Q_SedSludgeDrain, PS_Default, HL_Valve, 0.01 m, Nu_Water, E_Pvc, K_PipeExit + K_GateValve)
# The pipe length in this equation is irrelevant. Minor losses dominate
# This is the actual head loss through the valve given its diameter
HL_SedDrainValve := h_e(Q_SedSludgeDrain, innerdiameter(ND_SedSludgeValve, PS_Default), K_GateValve + K_PipeExit) = 0.859702 m
HL_SludgeDrain := HW_SedEst - HL_SedDrainValve = 1.1403 m
L_FlocWeirHopperEst := 1 m
# This is the required diameter of the sludge drain if it were circular
D_SedSludge := D_Manifold(Q_SedSludgeDrain, HL_SludgeDrain, L_SedUpflow + L_FlocWeirHopperEst, Pi_QSludgeOrifices, Nu_Water, E_Concrete, 0, N_SedSludgeOrifices)
# To get the effective "diameter" of the sludge drain manifold (the cross section will actually be a polygon) an approximate length for the portion of the sludge drain which runs under the floc hopper is assumed to be 1m and is entered in the manifold function as if its section had inlet holes as well. Since the effect of the additional length on the calculated "diameter" is very small, the accuracy of these assumptions is not very important.
HL_SedSludgeEst := HL_Manifold(Q_SedSludgeDrain, D_SedSludge, L_SedUpflow + L_FlocWeirHopperEst, 0, Nu_Water, E_Concrete, N_SedSludgeOrifices)
HL_SedSludgeEst = 0.164525 m
HL_SedSludgeOrificeEst := HL_SludgeDrain - HL_SedSludgeEst
D_SedSludgeOrifice := RoundNearest(D_circle(A_orifice(HL_SedSludgeOrificeEst, Pi_VenaContractaOrifice, Q_SedSludgeOrifices)), D_Drill)
# The cross sectional area of the drain if it were circular
A_SedSludge := π/4*D_SedSludge^2
# Assume sludge drain is twice as wide as it is high (to save depth in the sed tank)
W_SedSludge := sqrt(2*A_SedSludge)
H_SedSludge := A_SedSludge/W_SedSludge
Z_SedSludge := H_SedSludge = 0.0490699 m  # Elevation of the top of the sludge drain channel (and the bottom of the drain cover).
# End Slope
L_SedEndSlope := S_Fitting + ConRadius(ND_SedManifold) + ElbowRadius(ND_SedManifold) + SocketDepth(ND_SedManifold)
H_SedEndSlope := tan(AN_SedSlope)*L_SedEndSlope
# Sludge Drain Cover
# The jet reverser is the semi-circular trough in the center of the drain cover into which the jets from the inlet manifold discharge and re-suspend sludge. The concrete semi-circle will be cast using a length of PVC pipe.
#
# For now we have set the diameter of the semi-circle to the diameter of the manifold diffusers so that it will be scaled with jet flow rate, but this should be based on the requirements for good floc re-suspension.
ND_SedJetReverser := ND_SedManifoldDiffuser
# The drain cover needs to be wide enough to rest on the ledges of the drain channel, and also needs to be at least as wide as the jet reverser.
W_SedDrainCover := max(W_SedSludge + 2*T_ConcreteMin, ND_SedJetReverser) = 7.80078 in
L_SedDrainCoverSlopes := (W_SedDrainCover - outerdiameter(ND_SedJetReverser))/2
H_SedDrainCoverTotal := T_ConcreteMin + outerradius(ND_SedJetReverser) + L_SedDrainCoverSlopes*tan(AN_SedSlope) = 7.85487 in
A_SedDrainCover := H_SedDrainCoverTotal*W_SedDrainCover - L_SedDrainCoverSlopes*tan(AN_SedSlope)*(2*L_SedDrainCoverSlopes + outerdiameter(ND_SedJetReverser)) - 1/2*π*outerradius(ND_SedJetReverser)^2
ρ_Concrete := 2400*kg/m^3
M_DrainCoverMax := 20 kg
S_SedDrainCoverSegment := 0.5 cm
L_SedDrainCoverTotal := L_SedUpflow - L_SedEndSlope
L_SedDrainCoverSegment :=
    N ← 1
    L ← (L_SedDrainCoverTotal - (N - 1)*S_SedDrainCoverSegment)/N
    while A_SedDrainCover*L*ρ_Concrete > M_DrainCoverMax
        N ← N + 1
        L ← (L_SedDrainCoverTotal - (N - 1)*S_SedDrainCoverSegment)/N
    return L
# Side Slopes
W_SedSideSlopes := (W_SedBay - W_SedDrainCover)/2
H_SedSideSlopes := tan(AN_SedSlope)*((W_SedBay - outerdiameter(ND_SedJetReverser))/2 - T_ConcreteMin) = 0.796462 m
# Manifold Vertical Position
H_SedManifoldLift := max(L_SedManifoldDiffuserEst, ConRadius(ND_SedManifold) - outerradius(ND_SedManifold), (outerradius(ND_SedManifold) + S_SedManToSlopeMin)/cos(AN_SedSlope) - outerradius(ND_SedManifold) - outerradius(ND_SedJetReverser)*tan(AN_SedSlope), ConRadius(ND_SedManifold)/cos(AN_SedSlope) - ConRadius(ND_SedManifold) - outerradius(ND_SedJetReverser)*tan(AN_SedSlope), (ElbowRadius(ND_SedManifold) + ConRadius(ND_SedManifold))/cos(AN_SedSlope) - ElbowRadius(ND_SedManifold) - outerradius(ND_SedManifold))
Z_SedManifoldPipe := Z_SedSludge + T_ConcreteMin + outerradius(ND_SedJetReverser) + outerradius(ND_SedManifold) + H_SedManifoldLift
L_SedManifoldDiffuser := H_SedManifoldLift
# Lamella Design and Tank Dimension Algorithm
B_SedPlate := B_SedPlateMin
N_SedModulePlatesMax := floor(L_SedPlateCantilevered/B_SedPlate*tan(AN_SedPlate)) = 12
N_SedModulePlatesMin := 8
index2(s, array) :=
    i ← 0
    while s ≠ array[i] and i < last(array)
        i ← i + 1
    return i
PlateIndex :=
    for j ∈ N_SedModulePlatesMin .. N_SedModulePlatesMax
        for i ∈ 0 .. 50
            matrix[i, j - N_SedModulePlatesMin] ← j*(i + 1)
    array ← matrix[:, 0]
    for j ∈ N_SedModulePlatesMin + 1 .. N_SedModulePlatesMax
        array ← stack(array, matrix[:, j - N_SedModulePlatesMin])
    array ← sort(array)
    i ← 0
    while i < (last(array) - 1)
        array ← stack(submatrix(array, 0, i, 0, 0), submatrix(array, i + 2, last(array), 0, 0)) if array[i] == array[i + 1]
        array ← submatrix(array, 0, i + 1, 0, 0) if (i + 1 == i + 2 and i + 2 == last(array))
        i ← i + 1
    return array
H_SedFlocWeir := 80 cm  # The vertical distance from the top lip of the jet reverser to the floc weir.
H_ManifoldToFlocWeir := 10 cm
H_FlocWeirToLamella := 10 cm  # Vertical distance from the top of the floc weir to the bottom of the plate pipe frame.
H_LamellaToLaunder := 5 cm  # Vertical distance from the top of the plate settlers to the bottom of the exit launder.
Z_LamellaBottom := Z_SedSludge + H_SedFlocWeir + H_FlocWeirToLamella + outerdiameter(ND_SedPlateFrame) = 0.99733 m
# The following is the minimum possible vertical distance from the bottom of the plates themselves to the bottom of the outside walls of the channels.
H_LamellaToChannelInitial := max(Z_SedManifoldPipe + ElbowRadius(ND_SedManifold) + SocketDepth(ND_SedManifold) + CouplingLength(ND_SedManifold) - T_ChannelWall - Z_LamellaBottom, 0 m)
[L_SedPlateEst; N_SedPlates; H_LamellaToChannelEst; L_WeirToEChanEst; V_SedCapture] :=
    H_LamToChan ← H_LamellaToChannelInitial
    V_c ← 100*mm/s
    L_PlateChanGap ← 1 m
    N_Plates ← 0 m
    L_Plate ← 0 m
    while V_c > V_SedCBod
        H_LamToChan ← H_LamToChan + 1 cm
        L_Plate ← (H_LamToChan + T_ChannelWall + H_ExitChannelLaunder - H_LamellaToLaunder - 2*T_SedPlate/2*cos(AN_SedPlate))/sin(AN_SedPlate)
        L_WeirToEChan ← L_Plate*cos(AN_SedPlate) + T_SedPlate/2*cos(AN_SedPlate)
        L_PlateArea ← L_SedUpflow - W_SedInletChannel - T_ChannelWall + H_LamToChan/tan(AN_SedPlate)
        N_Plates ← FloorNearest(L_PlateArea/B_SedPlate + 1, PlateIndex)*m
        V_c ← (Q_SedBay/(W_SedBay*N_Plates/m))/(B_SedPlate + L_Plate*sin(AN_SedPlate)*cos(AN_SedPlate) - T_SedPlate)
    return [L_Plate; N_Plates; H_LamToChan; L_WeirToEChan; V_c*s]
V_SedCapture := V_SedCapture/s
N_SedPlates := N_SedPlates/m
L_SedPlateEst = 0.425375 m
N_PlatesPerSheet := floor(L_SedPlateSheet/L_SedPlateEst) = 8
W_ExitChannelPreWeir = 15.6375 cm
L_SedPlate := L_SedPlateSheet/N_PlatesPerSheet = 0.45725 m
2*ConRadius(6 in) + 2*S_Fitting = 0.28415 m
Z_SedChannelBottom := Z_LamellaBottom + L_SedPlate*sin(AN_SedPlate) + 2*T_SedPlate/2*cos(AN_SedPlate) + H_LamellaToLaunder - H_ExitChannelLaunder = 1.35493 m
L_PlateChannelGap := L_SedUpflow + T_SedPlate/2*sin(AN_SedPlate) - W_SedInletChannel - T_ChannelWall - (N_SedPlates - 1)*B_SedPlate - T_SedPlate/sin(AN_SedPlate) + (Z_SedChannelBottom - T_ChannelWall - Z_LamellaBottom)/tan(AN_SedPlate)
L_WeirToEChan := L_WeirToEChanEst - L_PlateChannelGap
N_SedPlates = 112
L_SedPlate = 45.725 cm
L_WeirToEChan = 0.174698 m
V_SedCapture = 0.118559 mm/s
V_SedCBod = 0.12 mm/s
N_SedPlateModules :=
    for i ∈ N_SedModulePlatesMin .. N_SedModulePlatesMax
        N ← N_SedPlates/i
        break if mod(N_SedPlates, i) == 0
    return N
H_Sed := Z_SedChannelBottom + T_ChannelWall + H_SedInletChannel = 1.86052 m
# Exit Launder
Z_SedLaunder := Z_SedChannelBottom + H_SedWeirExit - outerradius(ND_SedLaunder) = 1.50147 m
L_SedLaunder := L_SedUpflow - W_SedInletChannel - T_ChannelWall - W_SedExitChannel - CouplingLength(ND_SedLaunder) - CouplingLengthFlex(ND_SedLaunder) + SocketDepthFlex(ND_SedLaunder)
# There will be two orifices per row along the active length of the launder
N_SedLaunderOrifices := 2*floor((L_SedLaunder - SocketDepth(ND_SedManifold) - SocketDepthFlex(ND_SedManifold))/B_SedLaunderOrificesEst) = 46
Q_SedLaunderOrifices := Q_SedBay/N_SedLaunderOrifices
# This the HL due to major & minor losses loses through the manifold.
HL_SedLaunderMajor := HL_Manifold(Q_SedBay, innerdiameter(ND_SedLaunder, PS_Default), L_SedLaunder, 0, Nu_Water, E_Pvc, N_SedLaunderOrifices)
HL_SedLaunderOrificeEst := HL_SedLaunderBod - HL_SedLaunderMajor = 0.0387417 m
D_SedLaunderOrifice := RoundNearest(D_circle(A_orifice(HL_SedLaunderOrificeEst, Pi_VenaContractaOrifice, Q_SedLaunderOrifices)), D_Drill) = 1.2 cm
# This is the total headloss through the launder based on the actual diameter of the orifices
HL_SedLaunderOrifice := h_orifice(D_SedLaunderOrifice, Pi_VenaContractaOrifice, Q_SedLaunderOrifices) = 4.2716 cm
HW_Sed := Z_SedLaunder + outerradius(ND_SedLaunder) + HL_SedLaunderOrifice = 1.60134 m
# The size of the opening in the cap to allow the inflow of water into the sedimentation tank during refill is determined by the Orifice Equation Q=A*K*(2*g*h)^.5 so that the flow rate through the cap is at most the flow rate out of the other sedimentation tanks.
HW_LaunderCap := □  # error: This placeholder is empty.
A_LaunderCapOrifice := Q_Sed/(Pi_VenaContractaOrifice*sqrt(2*g*HW_LaunderCap))  # error: This variable is undefined.
D_CapOrifice := RoundNearest(D_circle(A_orifice(h_orifice(sqrt(A_LaunderCapOrifice/(π/4)), Pi_VenaContractaOrifice, Q_SedBay/N_SedLaunders), Pi_VenaContractaOrifice, Q_SedBay/N_SedLaunders)), D_Drill)  # error: This variable is undefined.
L_LaunderCouplingPipe := T_ChannelWall + CapHeight(ND_SedLaunder)
# Floc Weir, Hopper, and Hopper Drain
L_SedHopper := L_WeirToEChan - T_ConcreteMin + T_ChannelWall + W_SedExitChannel = 0.581073 m
ND_SedHopperDrain := 1 in
L_SedHopperFrontSlope := min((H_SedFlocWeir - ElbowRadius(ND_SedHopperDrain))/tan(AN_SedSlope), L_SedHopper)
H_SedHopperFrontSlope := L_SedHopperFrontSlope*tan(AN_SedSlope)
Z_SedHopperBottom := Z_SedSludge + H_SedFlocWeir - H_SedHopperFrontSlope = 8.71699 cm
H_SedHopperBackSlope := min((L_SedHopper - L_SedHopperFrontSlope - T_ConcreteMin)*tan(AN_SedSlope), Z_SedChannelBottom - Z_SedHopperBottom)
L_SedHopperBackSlope := H_SedHopperBackSlope/tan(AN_SedSlope)
L_SedHopperExcess := L_SedHopper - L_SedHopperFrontSlope - L_SedHopperBackSlope = 0.05 m
Q_pipetotal(innerdiameter(ND_SedHopperDrain, PS_Default), HW_Sed - Z_SedHopperBottom, L_SedHopper - L_SedHopperFrontSlope + T_PlantWall)
Q_pipetotal(D, h_l, L, ν, ε, K) :=
    Q_tempprev ← Q_pipemajor(D, h_l, L, ν, ε) if K == 0
    otherwise
        Q_temp ← 0*m^3/s
        error ← 1
        Q_tempprev ← min(Q_pipemajor(D, h_l, L, ν, ε), Q_pipeminor(D, h_l, K))
        while error > 0.01
            Q_temp ← Q_tempprev
            h_fnew ← h_l*h_f(Q_temp, D, L, ν, ε)/(h_f(Q_temp, D, L, ν, ε) + h_e(Q_temp, D, K))
            Q_tempprev ← Q_pipemajor(D, h_fnew, L, ν, ε)
            error ← 0 if Q_tempprev == 0*m^3/s
            error ← |Q_temp - Q_tempprev|/mean(Q_temp, Q_tempprev) otherwise
    return Q_tempprev
# Total Length
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L_Sed := L_SedUpflow + T_ConcreteMin + L_SedHopper = 4.1033 m
W_Port := 2/Pi_VenaContractaOrifice^2*((Pi_Jet*Q_SedManifoldPort/(2*B_SedManifoldPort))^3/ED_Floc)^(1/4) = 2.74893 cm
W_Jet := W_Port/2*0.62^2 = 0.528345 cm
