# [reference: BasicInputs- hmr6.xmcd]
# [reference: ExpertInputs.xmcd]
# [reference: DesignAssumptions.xmcd]
# [reference: MathFunctions.xmcd]
# [reference: PipeDatabase.xmcd]
# [reference: MinorLossCoefficients.xmcd]
# [reference: FluidsFunctions.xmcd]
# steps to design inlet manifold and determine maximum sed tank length
# new spec for manifold diameter is based on scour velocity
# need a maximum length of sed tank that we are willing to design based on maximum size pipe that we are willing to use. Perhaps based on how a large pipe fits in the valley. I propose tht we randomly pick a max pipe diameter of 12" (for now)
# Algorithm to give port diameters based on Pi.VenacontractaOrifice*port area = pipe area
# Sedimentation Influent Manifold Program
# The maximum allowable pipe used for the influent manifold
ND_SedManifoldMax = 12 in
# The actual inner diameter of the nomial pipe size
ID_SedManifoldPipeMax := innerdiameter(ND_SedManifoldMax, EN_PipeSpec) = 0.27305 m
A_SedManifoldPipeMax := π*ID_SedManifoldPipeMax^2/4 = 0.0585564 m^2
# This is the maximum possible length of a sedimentation tank for the maximum pipe size
L_SedMax := A_SedManifoldPipeMax*V_Scour/(V_SedUpBod*W_SedBay) = 7.22753 m
# The area of the water flowing through the manifold ports must be equal to the area of the manifold
A_SedManifoldPorts := A_SedManifoldPipeMax/Pi_VenaContractaOrifice = 0.0929466 m^2
B_SedManifoldPort = 10 cm  # The spacing of the manifold ports
Q_SedManifoldPort := V_SedUpBod*W_SedBay*B_SedManifoldPort = 0.0810185 L/s
N_SedManifoldPortsMax := floor(L_SedMax/B_SedManifoldPort)
N_SedManifoldPortsMax = 72
Q_Sed := Q_Plant/N_SedTanks = 5 L/s  # Flow rate through one sed tank
# This is the minimum number of bays required for the entire plant
N_SedBaysTotal := ceil(Q_Plant/(V_SedUpBod*W_SedBay*L_SedMax)) = 2
N_SedBaysMin := ceil(N_SedBaysTotal/N_SedTanks) = 1
# The number of bays per tank is the maximum of the calculated value and the user input
N_SedBays := max(N_SedBaysMin, N_SedBaysEst) = 2
L_Sed := Q_Sed/(W_SedBay*N_SedBays*V_SedUpBod) = 3.08571 m
# The number of ports per manifold calculated from the actual sed length
N_SedManifoldPorts := floor(L_Sed/B_SedManifoldPort) = 30
W_Sed := N_SedBays*W_SedBay = 2 m
W_SedBayActual := (W_Sed - (N_SedBays - 1)*T_PlantWall)/N_SedBays  # This accounts for the bay divider wall
Q_SedBay := Q_Sed/N_SedBays = 2.5 L/s
Q_SedManifold := Q_SedBay = 2.5 L/s  # There is one manifold per bay
A_SedManifoldPipe := Q_SedManifold/V_Scour = 250 cm^2
A_SedManifoldPort := A_SedManifoldPipe/(Pi_VenaContractaOrifice*N_SedManifoldPorts) = 13.2275 cm^2  # The area of a single port
# Calculate the energy dissipation rate created by the port. We will use this to evaluate this design.
ED_SedManifoldPort := ED(Q_SedManifoldPort, A_SedManifoldPort, Pi_VenaContractaOrifice) = 1.26336 mW/kg
ND_SedManifold := NominalDiameter(2*sqrt(A_SedManifoldPipe/π), EN_PipeSpec) = 8 in
ID_SedManifoldPipe := innerdiameter(ND_SedManifold, EN_PipeSpec) = 0.182601 m
OD_SedManifoldPipe := outerdiameter(ND_SedManifold) = 0.219075 m
S_SedManifoldBetween := V_SedUpBod*W_SedBay/(2*V_Scour) = 0.405093 cm
# The elevation of the center of the manifold
Z_SedManifoldPipe := OD_SedManifoldPipe/2 + S_SedManifoldBetween = 0.113588 m
# Inlet Channel Design
L_Channel := N_SedTanks*W_Sed + (N_SedTanks + 1)*T_PlantWall  # Length of the Inlet Channel
# The area of the inlet channel must be large enough not to break up flocs
A_InletChannel := A_Port(Q_Plant, ED_SedInlet, Pi_VenaContractaOrifice)
HW_InletChannel := sqrt(A_InletChannel)  # Assume the channel is square
# This is the required width of the inlet channel in order to prevent floc breakup
W_InletChannelED := A_InletChannel/HW_InletChannel
# This is the required area of the manifold entrance pipe (the pipe that delivers water from the inlet channel to the manifold) to prevent floc breakup
A_SedChimneyPipeMin := A_Port(Q_SedManifold, ED_Floc[1], Pi_VenaContractaOrifice) = 0.0219315 m^2
A_SedManifoldEntrance := A_Port(Q_SedManifold, ED_SedInlet, Pi_VenaContractaOrifice) = 0.0219315 m^2
# Based on the available pipe sizes, this is the smallest acceptable pipe for the manifold entrance
ND_SedManifoldEntrance := NominalPipeSize(2*sqrt(A_SedManifoldEntrance/π)) = 8 in
D_SedManifoldEntrance := innerdiameter(ND_SedManifoldEntrance, EN_PipeSpec) = 0.182601 m
A_SedChimneyPipe := (D_SedManifoldEntrance/2)^2*π = 0.0261875 m^2
# This is the minimum width of the inlet channel in order to fit the coupling of the manifold entrance pipe.  The diameter of a cap is being used as an estimate for the outer diameter of the coupling socket for now
W_InletChannelCoupling := 2*ConRadius(NominalDiameter(outerdiameter(ND_SedManifoldEntrance), EN_PipeSpec)) + 2*S_SedInletChannelMin = 0.44862 m
W_InletChannelEst := max(W_InletChannelED, W_InletChannelCoupling) = 0.44862 m
Geom_InletChannel :=
    hl_weir ← Headloss_weir(Q_Plant, W_InletChannelEst)
    Geom_Channel ← Perpindicular_Weir if (hl_weir ≤ HL_SedWeirMax)
    Geom_Channel ← Parallel_Weir otherwise
    return Geom_Channel
    = 0
W_SedWeirInlet :=
    W_InletChannelEst if Geom_InletChannel == Perpindicular_Weir
    L_Channel otherwise
    = 0.44862 m
HL_SedWeirInlet := Headloss_weir(Q_Plant, W_SedWeirInlet) = 0.0523678 m
H_SedWeirInlet := HW_InletChannel - HL_SedWeirInlet = 0.215895 m
W_InletChannel :=
    W_SedWeirInlet if Geom_InletChannel == Perpindicular_Weir
    w_minchannelHL(H_SedWeirInlet, HW_InletChannel, Q_Plant, L_Channel, Nu_Water, E_Concrete, 1, HL_SedWeirInlet) + T_SedWeir + W_InletChannelEst if Geom_InletChannel == Parallel_Weir
    = 0.44862 m
H_InletChannel := HW_InletChannel + H_PlantFreeboard = 0.368262 m
L_SedManifoldPipe := L_Sed - W_InletChannelEst/2 = 2.8614 m
# Exit Channel Design
L_ExitChannel := L_Channel = 4.45 m
# To ensure uniform distribution of flow between tank bays, head loss in the channel was designed to be twenty times smaller than head loss in the launder. After converting from head loss to flow, the ratio of flow rates in the launders is calculated to be sqrt(20/21)
Π_QSedTanks := sqrt(20/21)
# The exit channel needs to at least be wide enough to fit a cap onto the launders
W_ExitChannelMin := 10 in
H_ExitChannel := H_InletChannel
HW_ExitChannel := HW_InletChannel - HL_SedLaunderBod
FindSide(Q, L, υ, ε, open) :=
    b ← W_InletChannel
    w ← b
    error ← 1
    while error > 0.001
        h_temp ← h_frect(Q, w, b, L, υ, ε, open)
        b ← b*(h_temp/HL_SedLaunderBod*Π_QSedTanks^2/(1 - Π_QSedTanks^2))^(1/4)
        w ← b
        error ← |h_temp/HL_SedLaunderBod - (1 - Π_QSedTanks^2)/Π_QSedTanks^2|
    return w
# The exit channel is design by assuming the weir geometry is a perpindicular weir, and then the maximum of the the width determined by the headloss in the exit channel and the minimum width to be albe to fit a cap on the launders is chosen
W_ExitChannelEst := max(FindSide(Q_Plant, L_Channel, Nu_Water, E_Concrete, 1), W_ExitChannelMin) = 0.254 m
Geom_ExitChannel :=
    hl_weir ← Headloss_weir(Q_Plant, W_ExitChannelEst)
    Geom_Channel ← Perpindicular_Weir if (hl_weir ≤ HL_SedWeirMax)
    Geom_Channel ← Parallel_Weir otherwise
    return Geom_Channel
    = 0
W_SedWeirExit :=
    W_ExitChannelEst if Geom_ExitChannel == Perpindicular_Weir
    L_Channel otherwise
    = 0.254 m
HL_SedWeirExit := Headloss_weir(Q_Plant, W_SedWeirExit) = 0.0765176 m
H_SedWeirExit := HW_ExitChannel - HL_SedWeirExit = 15.1745 cm
W_ExitChannel :=
    W_SedWeirExit if Geom_ExitChannel == Perpindicular_Weir
    (W_ExitChannelMin + T_SedWeir + w_minchannelHL(H_SedWeirExit, HW_ExitChannel, Q_Plant, L_Channel, Nu_Water, E_Concrete, 1, HL_SedWeirExit)) otherwise
    = 0.254 m
# Lamella Design
S_SedPlate := B_SedPlateMin - T_SedPlate = 1.7 cm
L_SedPlateEst :=
    L1 ← HW_InletChannel*cos(AN_SedPlate)
    L2 ← 0 m
    while |L1 - L2| > 0.01 m
        L_Inactive ← L1*cos(AN_SedPlate) + W_InletChannel + W_ExitChannel + 2*T_ChannelWall
        V_Up ← Q_Sed/(W_Sed*(L_Sed - L_Inactive))
        L2 ← (B_SedPlateMin*(V_Up/V_SedCBod - 1) + T_SedPlate)/(sin(AN_SedPlate)*cos(AN_SedPlate))
        L1 ← L2
    return L1
L1 := HW_InletChannel/cos(AN_SedPlate)
V_SedCBod = 10 m/day
# the actual function L.Sed.Plate does not realize any iteration, it gives the same result as the following equation.
(B_SedPlateMin*(Q_Sed/(W_Sed*(L_Sed - (HW_InletChannel*cos(AN_SedPlate)*cos(AN_SedPlate) + W_InletChannel + W_ExitChannel + 2*T_ChannelWall)))/V_SedCBod - 1) + T_SedPlate)/(sin(AN_SedPlate)*cos(AN_SedPlate)) = 0.455605 m
L_SedPlateEst = 0.455605 m
L_SedPlate := L_SedPlateSheet/floor(L_SedPlateSheet/L_SedPlateEst) = 0.4572 m
L_SedInactive := L_SedPlate*cos(AN_SedPlate) + W_InletChannel + W_ExitChannel + 2*T_ChannelWall
L_SedActiveMax := L_Sed - L_SedInactive = 1.85449 m
V_SedUpActiveBelow := Q_Sed/(W_Sed*L_SedActiveMax)
V_SedUpActiveBelow = 0.00134808 m/s
B_SedPlate := (L_SedPlate*sin(AN_SedPlate)*cos(AN_SedPlate) - T_SedPlate)/(V_SedUpActiveBelow/V_SedCBod - 1) = 1.83119 cm
B_SedPlateHorizontal := B_SedPlate/sin(AN_SedPlate)
N_SedPlates := ceil(L_SedActiveMax/B_SedPlateHorizontal) + 1 = 89
# Number of spaces where water is traveling is one less than the number of plates used to create those spaces
H_SedPlate := L_SedPlate*sin(AN_SedPlate)
H_SedPlate = 0.395947 m
# Now calculate actual values of all parameters!
L_SedActive := L_Sed - L_SedInactive - N_SedPlates*T_SedPlate/sin(AN_SedPlate) = 1.54619 m
V_SedUp := Q_Sed/(L_Sed*W_Sed) = 70 m/day
V_SedUpActive := Q_Sed/(L_SedActive*W_Sed) = 139.698 m/day
V_SedC := V_SedUpActive/(1 + L_SedPlate/S_SedPlate*cos(AN_SedPlate)*sin(AN_SedPlate)) = 11.0473 m/day
# Launderer Design
# 1. Equally divide the flow from the plant into each sedimentation tank.
# 2. Calculate the number of orifices using an equal spacing on the length of the launder.
# 3. The flow through each orifice is the flow in the tank divided by the number of orifices.
# 4. The elevation of the manifold launder should be placed in the middle of the water depth above the lamella in the sedimentation tank.
# 5. Find the length of the longest and shortest launders to the plant leveling tank.
# 6. Using an iterative program, and the available pipe sizes from the pipe database, the launder diameter is determined with a function from fluids functions
# 7.Sum the number of bends in the launder piping
# 8. Use function to find equal flow between parallel pipes.
# 9. The diameter of the launder is the max value of 6 and 8.
# 10. Calculate the total headloss in the launder.
# 11. Calculate the total headloss in the orifice.
# 12. Use orifice equation to find diameter of orifice holes.
# The launder will be located between the top of the lamella and the surface of the water in the sedimentation tank, the orifices will be at the center of the launders
# Clarify this. Where are the orifices located? Current proposal is that the two rows be about 135 degrees apart and face slightly downward.
# Add solution method description
L_SedLaunder := L_Sed - T_ChannelWall - W_InletChannel - W_ExitChannel = 2.23309 m  # This estimate is good enough to do a full launder design
N_SedLaunderOrificesEst := 2*floor(L_SedActive/B_SedLaunderOrifices) = 30
# This 2 must be from the assumption that there are two rows of orifices.
B_SedLaunderOrifices = 0.1 m
Q_Plant = 0.01 m^3/s
Q_SedLaunderOrificesEst := (Q_SedBay/N_SedLaunders)/N_SedLaunderOrificesEst = 4.16667e-5 m^3/s
Q_SedBay = 0.0025 m^3/s
K_SedLaunder := K_PipeExit = 1
ND_SedLaunder := ND_Manifold(Q_SedBay/N_SedLaunders, HL_SedLaunderBod, L_SedActive, Pi_QLaunderOrifices, EN_PipeSpec, Nu_Water, E_Pvc, K_SedLaunder, N_SedLaunderOrificesEst)
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HL_SedLaunder := HL_Manifold(Q_SedBay/N_SedLaunders, innerdiameter(ND_SedLaunder, EN_PipeSpec), L_SedActive, 0, Nu_Water, E_Pvc, N_SedLaunderOrificesEst) + h_f(Q_SedBay/N_SedLaunders, innerdiameter(ND_SedLaunder, EN_PipeSpec), L_SedLaunder - L_SedActive, Nu_Water, E_Pvc)
HL_SedLaunderOrifice := HL_SedLaunderBod - HL_SedLaunder
HL_SedLaunderOrifice = 0.0374742 m
D_SedLaunderOrifice := RoundNearest(D_circle(A_orifice(HL_SedLaunderOrifice, Pi_VenaContractaOrifice, Q_SedLaunderOrificesEst)), D_Drill)
Q_SedLaunderOrifices := Q_orifice(D_SedLaunderOrifice, HL_SedLaunderOrifice, Pi_VenaContractaOrifice)
HL_SedLaunder := h_orifice(D_SedLaunderOrifice, Pi_VenaContractaOrifice, Q_SedLaunderOrifices) = 0.0374742 m
N_SedLaunderOrifices := 2*round((Q_SedBay/N_SedLaunders)/(2*Q_SedLaunderOrifices)) = 30
B_SedLaunderOrificesReal := 2*L_SedActive/N_SedLaunderOrifices = 0.103079 m
# Currently HL.launder is used up and thus the water level in the plant level tank is HL.launder below the sed tank.
# If we round up to the next available drill bit diameter the head loss will drop slightly. We could then calculate a new actual total headloss. For now ...
# Sludge Drain Program
# Here we are assuming that we are willing to use up to 80% of the available energy to get the flow through the valve and discharge it to atmosphere.
HL_Valve := 0.8*HW_SedEst
Q_SedSludgeDrain := W_SedBayActual*L_Sed*HW_SedEst/Ti_SludgeDrain = 0.00951429 m^3/s
# This is the initial drain rate
# There will be a drain orifice in between each manifold port
B_SedSludgeOrifices := B_SedManifoldPort
N_SedSludgeOrifices := floor(L_Sed/B_SedSludgeOrifices) = 30  # per bay
Q_SedSludgeOrifices := Q_SedSludgeDrain/N_SedSludgeOrifices
ND_SedSludgeValve := D_pipeschedule(Q_SedSludgeDrain, EN_PipeSpec, HL_Valve, T_PlantWall, Nu_Water, E_Pvc, K_GateValve + K_PipeExit) = 3 in
# This is the actual head loss through the valve given its diameter
HL_SedDrainValve := h_e(Q_SedSludgeDrain, innerdiameter(ND_SedSludgeValve, EN_PipeSpec), K_GateValve + K_PipeExit) = 0.406509 m
HL_SludgeDrain := HW_SedEst - HL_Valve = 0.4 m
ID_SedSludge := ID_Manifold(Q_SedSludgeDrain, HL_SludgeDrain, L_Sed, Pi_QSludgeOrifices, EN_PipeSpec, Nu_Water, E_Concrete, 0, N_SedSludgeOrifices) = 3.96229 in
# This is the required diameter of the sludge drain if it were circular
HL_SedSludgeEst := HL_Manifold(Q_SedSludgeDrain, ID_SedSludge, L_Sed, 0, Nu_Water, E_Concrete, N_SedSludgeOrifices) = 3.84042 cm
HL_SedSludgeOrificeEst := HL_SludgeDrain - HL_SedSludgeEst = 36.1596 cm
D_SedSludgeOrifice := RoundNearest(D_circle(A_orifice(HL_SedSludgeOrificeEst, Pi_VenaContractaOrifice, Q_SedSludgeOrifices)), D_Drill) = 16 mm
A_SedSludge := π/4*ID_SedSludge^2
W_SedSludge := sqrt(2*A_SedSludge) = 0.126136 m  # Assume sludge drain is twice as wide as it is high (to save depth in the sed tank)
H_SedSludge := A_SedSludge/W_SedSludge = 0.0630682 m
W_SedDrainCover := W_SedSludge + 2*W_SedSludgeSF
# The thickness of the sed sludge is defined to be equal to the quarter of the width of the sed sludge drain cover..
T_SedSludge := 0.25*W_SedDrainCover
Z_SedSludge := T_SedSludge + H_SedSludge = 0.107102 m
W_SedSlope := (W_SedBayActual - W_SedSludge)/2
H_SedSlopeTriangle := W_SedSlope/tan(AN_SedTopInlet)
Z_SedSlopes := Z_SedSludge + max(H_SedSlopeTriangle, outerdiameter(ND_SedManifoldMax) + S_SedManifoldBetween) = 0.435003 m
# This program calculates the height of the water in the sed tank as well as the height of the sed tank
H_SedAbove := outerdiameter(ND_SedLaunder) + HL_SedLaunderBod = 12.89 cm
H_SedBetween = 0
HW_Sed := Z_SedSlopes + H_SedBetween + 2*outerdiameter(ND_SedPlateFrame) + H_SedPlate + H_SedAbove = 1.02665 m
HW_Sed = 1.02665 m
Z_SedSlopes = 0.435003 m
Z_SedSlopes + H_SedBetween + 2*outerdiameter(ND_SedPlateFrame) + H_SedPlate + H_SedAbove = 1.02665 m
H_Sed := HW_Sed + H_PlantFreeboard = 1.12665 m
Z_Mp := HW_Sed - HW_InletChannel = 0.75839 m
Z_SedLaunder := HW_Sed - HL_SedLaunder - outerradius(ND_SedLaunder) = 0.944728 m
ZW_ExitChannel := HW_Sed - HL_SedLaunder = 0.989178 m
H_SedBayDivider := Z_SedSlopes
W_SedBayDivider := T_ChannelWall
Z_MP := HW_Sed - HW_InletChannel
# Launder Cap
# The size of the opening in the cap to allow the inflow of water into the sedimentation tank is determined by the Orifice Equation Q=A*K*(2*g*h)^.5 so that the flow rate through the cap is at most the flow rate out of the other sedimentation tanks.
H_LaunderCap := H_Sed - H_ExitChannel + HW_ExitChannel = 0.986652 m
A_CapOrifice := Q_Sed/(Pi_VenaContractaOrifice*sqrt(2*g*H_LaunderCap)) = 0.00180415 m^2
D_CapOrifice := sqrt(A_CapOrifice/(π/4)) = 0.0479282 m
L_LaunderCouplingPipe := T_PlantWall + CapHeight(ND_SedLaunder)
# Old Weir Pipes
# The weir equation is used to determine the nominal size for the diameter of the weir (Assumes a circular over flow weir)
D_PltWeirEstimated := (3*Q_Plant/(2*Cd_PltWeir*sqrt(2*g)*π*Pi_PltWeir^(3/2)))^(2/5)
# Using the pipe database file, and given the schedule of the pipe, the actual nominal diameter of the pipe is determined
ND_PltWeir := NominalPipeSize(D_PltWeirEstimated) = 8 in
Del_PltWeirH := (3*Q_Plant/(2*Cd_PltWeir*sqrt(2*g)*π*ND_PltWeir))^(2/3)
H_PltWeir := HW_ExitChannel - Del_PltWeirH = 0.185969 m
W_SedInletBottom := (W_SedBayActual - W_SedDrainCover)/2 = 0.374432 m
