# The Basic Inputs file contains simple inputs such as the number of sedimentation tanks. Those inputs don’t require any detailed knowledge in fluid dynamics or in the design of a sedimentation bay and may be specified by anybody via the design tool.
# The Expert Inputs file contains more sophisticated and detailed inputs. As you can see, those inputs contain a rather complicated vocabulary, hence the name of the file: Expert Inputs. Those inputs are no longer specified via the design tool.
# The Design Assumptions file contains assumptions made in order to specify certain data that are needed to be known prior to coding. Those data relate to the thickness of certain walls in the plant, to certain ratios, head losses etc.
# The Fluids Functions will help us determine variables such as flow rates, energy dissipation rates, areas and diameters for different parts of the sedimentation tank.
# The Pipe Database file contains real data about the pipe, drill and fitting sizes.
# The functions found in the Math Functions file help us round down or up the magnitudes calculated through the Fluids Functions so they match the data found in the Pipe Database file
# The Minor Loss Coefficients file gives the value of these variables in different parts, elbows, tees, pipes, etc
# Both these array share similar indexes to those found in an array of inner diameters.
# Sedimentation Influent Manifold Program-1
# Sedimentation Influent Manifold Program-1, Inlet Channel Design-1, Exit Channel Design-1, and Lamella Design-1 are used to calculate a minimum length for a Sedimentation tank to be compared to L.SedEst and if necessary override and reassign N.SedBays and N.SedTanks.
#
# Variable names in "Section Title" are Variable.Name
# Variable names in "Section Title-1" are Variable.Name1
# Example: In "Sedimentation Influent Manifold Program"  L.SedMax
# In "Sedimentation Influent Manifold Program-1" L.SedMax1
# We start off by determining the number of bays in a sed tank. We start off by determining a maximum length for the sed tank based on a maximum nominal diameter for the manifold. We compare it to the number of bays inputted in the design tool. We finally get the actual number of sed bays, the actual diameter of the manifold as well as a minimum length for the sed tank.
# This is the maximum possible length of a sedimentation tank for the maximum pipe size
L_SedMax1 := Q_PipeED(ED_SedInlet, innerD(ND_SedManifoldMax, EN_PipeSpec), Pi_VenaContractaOrifice)/(V_SedUpBod*W_SedBay) = 16.4254 m
Q_Sed1 := Q_Plant/N_SedTanks = 0.15 L/s  # Flow rate through one sed tank
# This is the minimum number of bays required for the entire plant
N_SedBaysTotal1 := ceil(Q_Plant/(V_SedUpBod*W_SedBay*L_SedMax1)) = 1
N_SedBaysMin1 := ceil(N_SedBaysTotal1/N_SedTanks) = 1
# The number of bays per tank is the maximum of the calculated value and the user input
N_SedBays1 := max(N_SedBaysMin1, N_SedBaysEst) = 1
L_SedEst1 := Q_Sed1/(W_SedBay*N_SedBays1*V_SedUpBod) = 0.173611 m
W_Sed1 := N_SedBays1*W_SedBay = 1.08 m
Q_SedBay1 := Q_Sed1/N_SedBays1 = 0.15 L/s
Q_SedManifold1 := Q_SedBay1 = 0.15 L/s  # There is one manifold per bay
ND_SedManifold1 := NominalDiameter(D_PipeED(ED_SedInlet, Q_SedBay1, Pi_VenaContractaOrifice), EN_PipeSpec) = 1.5 in
ID_SedManifoldPipe1 := innerdiameter(ND_SedManifold1, EN_PipeSpec) = 0.0440436 m
OD_SedManifoldPipe1 := outerdiameter(ND_SedManifold1) = 0.04826 m
# Inlet Channel Design-1
L_Channel1 := N_SedTanks*W_Sed1 + (N_SedTanks + 1)*T_PlantWall  # Length of the Inlet Channel. The inlet channel runs along the sed tanks.
# The area of the inlet channel must be large enough not to break up flocs
A_InletChannel1 := A_Channel(Q_Plant, ED_SedInlet, Pi_VenaContractaOrifice)
# We want to make both channels the same depth for ease of construction. The exit channel must be deep enough to receive the launders. So we do a good estimate on the size of the launders and make the channel deep enough to receive the launder pipe (without embedding the launder pipe in the concrete channel floor!)
ND_SedLaunder1 := ND_Manifold(Q_SedBay1/N_SedLaunders, HL_SedLaunderBod, L_SedEst1, Pi_QLaunderOrifices, EN_PipeSpec, Nu_Water, E_Pvc, K_PipeExit, 2*floor(L_SedEst1/B_SedLaunderOrificesEst)) = 1 in
OD_LaunderCoupling1 := 2*ConRadius(vlookup(outerdiameter(ND_SedLaunder1), Pipesizescoupling, 1)[0])
HW_InletChannel1 := max(H_Channel(Q_Plant, sqrt(A_InletChannel1), Pi_VenaContractaOrifice, ED_SedInlet), HL_SedLaunderBod + OD_LaunderCoupling1 + T_ConcreteMin) = 0.142565 m
# This is the required width of the inlet channel in order to prevent floc breakup
W_InletChannelED1 := A_InletChannel1/HW_InletChannel1 = 0.142565 m
# This is the minimum width of the inlet channel in order to fit the coupling of the manifold entrance pipe.  The diameter of a cap is being used as an estimate for the outer diameter of the coupling socket for now
W_InletChannelCoupling1 := 2*ConRadius(vlookup(OD_SedManifoldPipe1, Pipesizescoupling, 1)[0]) + 2*S_SedInletChannelMin = 11.715 cm
W_InletChannelEst1 := max(W_InletChannelED1, W_InletChannelCoupling1) = 0.142565 m
# This value ensures that the inlet channel is wide enough to prevent floc break-up and to fit the manifold coupling. It is an estimated value because the weir may make the channel wider.
EN_InletChannelGeom1 :=
    hl_weir ← Headloss_weir(Q_Plant, W_InletChannelEst1)
    Geom_Channel ← Perpindicular_Weir if (hl_weir ≤ HL_SedWeirMax)
    Geom_Channel ← Parallel_Weir otherwise
    return Geom_Channel
# This function helps us determine the geometry of the weir based on the headloss through it. Hl.SedWeirMax is an expert input. 0-->Perpendicular, 1--> Parallel
W_SedWeirInlet1 :=
    W_InletChannelEst1 if EN_InletChannelGeom1 == Perpindicular_Weir
    L_Channel1 otherwise
# The width of the sed weir inlet is considered in its longitudunal direction. In the case of a perpendicular configuration, its width is the same as the width of the channel. In the parallel case, it is the same as its length.
HL_SedWeirInlet1 := Headloss_weir(Q_Plant, W_SedWeirInlet1) = 0.00161938 m
H_SedWeirInlet1 := HW_InletChannel1 - HL_SedWeirInlet1 = 0.140945 m
W_InletChannel1 :=
    W_SedWeirInlet1 if EN_InletChannelGeom1 == Perpindicular_Weir
    w_minchannelHL(H_SedWeirInlet1, HW_InletChannel1, Q_Plant, L_Channel1, Nu_Water, E_Concrete, 1, HL_SedWeirInlet1) + T_SedWeir + W_InletChannelEst1 if EN_InletChannelGeom1 == Parallel_Weir
H_InletChannel1 := HW_InletChannel1 + H_PlantFreeboard = 0.242565 m
V_InletChannel1 := Q_Plant/(W_InletChannel1*HW_InletChannel1) = 0.0499732 m/s
# Exit Channel Design-1
L_ExitChannel1 := L_Channel1 = 24.75 m
# To ensure uniform distribution of flow between tank bays, head loss in the channel was designed to be twenty times smaller than head loss in the launder. After converting from head loss to flow, the ratio of flow rates in the launders is calculated to be sqrt(20/21)
Π_QSedTanks1 := sqrt(20/21)
H_ExitChannel1 := H_InletChannel1
HW_ExitChannel1 := HW_InletChannel1 - HL_SedLaunderBod
FindSide(Q, L, υ, ε, open) :=
    b ← W_InletChannel1
    w ← b
    error ← 1
    while error > 0.001
        h_temp ← h_frect(Q, w, b, L, υ, ε, open)
        b ← b*(h_temp/HL_SedLaunderBod*Π_QSedTanks1^2/(1 - Π_QSedTanks1^2))^(1/4)
        w ← b
        error ← |h_temp/HL_SedLaunderBod - (1 - Π_QSedTanks1^2)/Π_QSedTanks1^2|
    return w
# The exit channel is designed by assuming the weir geometry is a perpindicular weir, and then the maximum of the the width determined by the headloss in the exit channel and the minimum width to be albe to fit a cap on the launders is chosen
# This should be calculated based on the slip depth in a coupling of the pipe size that is used for the launder + the length of a pipe cap. I am estimating that this is approximately 2*the ND.
W_ExitChannelMin1 := 2*ND_SedLaunder1
W_ExitChannelEst1 := max(FindSide(Q_Plant, L_Channel1, Nu_Water, E_Concrete, 1), W_ExitChannelMin1) = 0.175748 m
Geom_ExitChannel1 :=
    hl_weir ← Headloss_weir(Q_Plant, W_ExitChannelEst1)
    Geom_Channel ← Perpindicular_Weir if (hl_weir ≤ HL_SedWeirMax)
    Geom_Channel ← Parallel_Weir otherwise
    return Geom_Channel
W_SedWeirExit1 :=
    W_ExitChannelEst1 if Geom_ExitChannel1 == Perpindicular_Weir
    L_Channel1 otherwise
HL_SedWeirExit1 := Headloss_weir(Q_Plant, W_SedWeirExit1) = 4.38333 cm
H_SedWeirExit1 := HW_ExitChannel1 - HL_SedWeirExit1 = 5.87313 cm
W_ExitChannel1 :=
    W_SedWeirExit1 if Geom_ExitChannel1 == Perpindicular_Weir
    (W_ExitChannelMin1 + T_SedWeir + w_minchannelHL(H_SedWeirExit1, HW_ExitChannel1, Q_Plant, L_Channel1, Nu_Water, E_Concrete, 1, HL_SedWeirExit1)) otherwise
    = 0.175748 m
# Lamella Design-1
B_SedPlateMin1 := S_SedPlateMin + T_SedPlate  # This is to prevent floc roll up. We should specify this in a more fundamental way. (based on velocity gradients)
# Estimate a length of the lamella based on the estimate of the up velocity and of the height between the top of the the lamella and the bottom of the inlet channel.
H_between := (H_InletChannel1 + T_ChannelWall - (H_PlantFreeboard + HL_SedLaunderBod + outerdiameter(ND_SedLaunder1) + S_LamellaLaunder)) = 0.179164 m
L_SedInactive1 := (H_between/tan(AN_SedPlate) + W_InletChannel1 + W_ExitChannel1 + 2*T_ChannelWall) = 1.00028 m
# This code assumes that the plate settlers touch the bottom of the outlet channel before the touch the end of the sed tank.
V_Up1 := Q_Sed1/(W_Sed1*(L_SedEst1 - L_SedInactive1)) = -0.168011 mm/s
# This code calculates L.SedMin, based on the maximum length of the plate settler that touches the inlet channel, against L.SedEst1 and if necessary overrides the number of tanks and bays.
L_SedPlateMaxA := H_between/cos(90 - AN_SedPlate) = 0.325641 m
L_SedPlateMaxB := (T_ChannelWall + W_InletChannel1)/cos(AN_SedPlate) = 1.14217 m
L_SedPlateMaxTotal := L_SedPlateMaxA + L_SedPlateMaxB = 1.46782 m
L_SedMin := -V_SedCBod*(L_SedPlateMaxTotal*sin(AN_SedPlate)*cos(AN_SedPlate) + S_SedPlateMin)*(L_SedPlateMaxTotal*cos(AN_SedPlate) + W_InletChannel1 + T_ChannelWall)/(V_Up1*B_SedPlateMin1 - V_SedCBod*(L_SedPlateMaxTotal*sin(AN_SedPlate)*cos(AN_SedPlate) + S_SedPlateMin)) = 1.23436 m
Q_SedMin := V_SedUpBod*L_SedMin*W_SedBay = 1.06649 L/s
N_TankFeatures(Num_SedBays, Len_SedMin, Len_SedEst, Num_SedTanks) :=
    if (Len_SedMin > Len_SedEst)
        N_SedBaysMax ← Num_SedBays*Num_SedTanks*Len_SedEst/Len_SedMin
        Num_SedBays ← max(floor(N_SedBaysMax/Num_SedTanks), 1)
        Num_SedTanks ← min(floor(N_SedBaysMax/Num_SedBays), Num_SedTanks)
    return [Num_SedBays, Num_SedTanks]
# If the override is not necessary then the original values for
# N.SedBaysEst, N.SedTanks,
N_TankFeatures(N_SedBays1, L_SedMin, L_SedEst1, N_SedTanks) =  # error: This variable is undefined.
N_SedBaysEstOverride := N_TankFeatures(N_SedBays1, L_SedMin, L_SedEst1, N_SedTanks)[0, 0] = 1
N_SedTanksOverride1 := N_TankFeatures(N_SedBays1, L_SedMin, L_SedEst1, N_SedTanks)[0, 1] = 2
N_SedTanksOverride2 :=
    1 if N_SedTanksOverride1 < 1
    N_SedTanksOverride1 otherwise
    = 2
# Code that checks for sed tank failure and reassign when necessary ends here.
# Sedimentation Influent Manifold Program
# We start off by determining the number of bays in a sed tank. We start off by determining a maximum length for the sed tank based on a maximum nominal diameter for the manifold. We compare it to the number of bays inputted in the design tool. We finally get the actual number of sed bays, the actual diameter of the manifold as well as a minimum length for the sed tank.
# This is the maximum possible length of a sedimentation tank for the maximum pipe size
L_SedMax := Q_PipeED(ED_SedInlet, innerD(ND_SedManifoldMax, EN_PipeSpec), Pi_VenaContractaOrifice)/(V_SedUpBod*W_SedBay) = 16.4254 m
Q_Sed := Q_Plant/N_SedTanksOverride2 = 1.5 L/s  # Flow rate through one sed tank
# This is the minimum number of bays required for the entire plant
N_SedBaysTotal := ceil(Q_Plant/(V_SedUpBod*W_SedBay*L_SedMax)) = 1
N_SedBaysMin := ceil(N_SedBaysTotal/N_SedTanksOverride2) = 1
# The number of bays per tank is the maximum of the calculated value and the user input
N_SedBays := max(N_SedBaysMin, N_SedBaysEstOverride) = 1
# In case of an override to one sed tank with one bay in which L.SedEst is still less than L.SedMin, the design will default to a sed bay length of L.SedMin.
L_SedEst := max(Q_Sed/(W_SedBay*N_SedBays*V_SedUpBod), L_SedMin)
W_Sed := N_SedBays*W_SedBay = 1.08 m
Q_SedBay := Q_Sed/N_SedBays = 1.5 L/s
Q_SedManifold := Q_SedBay = 1.5 L/s  # There is one manifold per bay
ND_SedManifold := NominalDiameter(D_PipeED(ED_SedInlet, Q_SedBay, Pi_VenaContractaOrifice), EN_PipeSpec) = 6 in
ID_SedManifoldPipe := innerdiameter(ND_SedManifold, EN_PipeSpec) = 0.154508 m
OD_SedManifoldPipe := outerdiameter(ND_SedManifold) = 0.168275 m
# Inlet Channel Design
L_Channel := N_SedTanksOverride2*W_Sed + (N_SedTanksOverride2 + 1)*T_PlantWall  # Length of the Inlet Channel. The inlet channel runs along the sed tanks.
# The area of the inlet channel must be large enough not to break up flocs
A_InletChannel := A_Channel(Q_Plant, ED_SedInlet, Pi_VenaContractaOrifice)
# We want to make both channels the same depth for ease of construction. The exit channel must be deep enough to receive the launders. So we do a good estimate on the size of the launders and make the channel deep enough to receive the launder pipe (without embedding the launder pipe in the concrete channel floor!)
# This is a very slightly conservative estimate on the size of the launder. Close enough that there is no need to recalcualte this diameter.
ND_SedLaunder := ND_Manifold(Q_SedBay/N_SedLaunders, HL_SedLaunderBod, L_SedEst, Pi_QLaunderOrifices, EN_PipeSpec, Nu_Water, E_Pvc, K_PipeExit, 2*floor(L_SedEst/B_SedLaunderOrificesEst)) = 3 in
OD_LaunderCoupling := 2*ConRadius(vlookup(outerdiameter(ND_SedLaunder), Pipesizescoupling, 1)[0])
HW_InletChannel := max(H_Channel(Q_Plant, sqrt(A_InletChannel), Pi_VenaContractaOrifice, ED_SedInlet), HL_SedLaunderBod + OD_LaunderCoupling + T_ConcreteMin) = 0.1916 m
# We go from the assumption that the channel is square W=sqrt(A_InletChannel). The inlet channel is high enough to prevent floc breakup and deep enough to allow the launder couplings to fit.
# This is the required width of the inlet channel in order to prevent floc breakup
W_InletChannelED := A_InletChannel/HW_InletChannel = 0.106079 m
# This is the minimum width of the inlet channel in order to fit the coupling of the manifold entrance pipe.  The diameter of a cap is being used as an estimate for the outer diameter of the coupling socket for now
W_InletChannelCoupling := 2*ConRadius(vlookup(OD_SedManifoldPipe, Pipesizescoupling, 1)[0]) + 2*S_SedInletChannelMin = 24.415 cm
W_InletChannelEst := max(W_InletChannelED, W_InletChannelCoupling) = 0.24415 m
# This value ensures that the inlet channel is wide enough to prevent floc break-up and to fit the manifold coupling. It is an estimated value because the weir may make the channel wider.
EN_InletChannelGeom :=
    hl_weir ← Headloss_weir(Q_Plant, W_InletChannelEst)
    Geom_Channel ← Perpindicular_Weir if (hl_weir ≤ HL_SedWeirMax)
    Geom_Channel ← Parallel_Weir otherwise
    return Geom_Channel
# This function helps us determine the geometry of the weir based on the headloss through it. Hl.SedWeirMax is an expert input. 0-->Perpendicular, 1--> Parallel
W_SedWeirInlet :=
    W_InletChannelEst if EN_InletChannelGeom == Perpindicular_Weir
    L_Channel otherwise
# The width of the sed weir inlet is considered in its longitudunal direction. In the case of a perpendicular configuration, its width is the same as the width of the channel. In the parallel case, it is the same as its length.
HL_SedWeirInlet := Headloss_weir(Q_Plant, W_SedWeirInlet) = 0.0352068 m
H_SedWeirInlet := HW_InletChannel - HL_SedWeirInlet = 0.156393 m
W_InletChannel :=
    W_SedWeirInlet if EN_InletChannelGeom == Perpindicular_Weir
    w_minchannelHL(H_SedWeirInlet, HW_InletChannel, Q_Plant, L_Channel, Nu_Water, E_Concrete, 1, HL_SedWeirInlet) + T_SedWeir + W_InletChannelEst if EN_InletChannelGeom == Parallel_Weir
# This is the actual width of the inlet channel.
H_InletChannel := HW_InletChannel + H_PlantFreeboard = 0.2916 m
V_InletChannel := Q_Plant/(W_InletChannel*HW_InletChannel) = 0.0641311 m/s
# Exit Channel Design
L_ExitChannel := L_Channel = 2.61 m
# To ensure uniform distribution of flow between tank bays, head loss in the channel was designed to be twenty times smaller than head loss in the launder. After converting from head loss to flow, the ratio of flow rates in the launders is calculated to be sqrt(20/21)
Π_QSedTanks := sqrt(20/21)
H_ExitChannel := H_InletChannel
HW_ExitChannel := HW_InletChannel - HL_SedLaunderBod
FindSide(Q, L, υ, ε, open) :=
    b ← W_InletChannel
    w ← b
    error ← 1
    while error > 0.001
        h_temp ← h_frect(Q, w, b, L, υ, ε, open)
        b ← b*(h_temp/HL_SedLaunderBod*Π_QSedTanks^2/(1 - Π_QSedTanks^2))^(1/4)
        w ← b
        error ← |h_temp/HL_SedLaunderBod - (1 - Π_QSedTanks^2)/Π_QSedTanks^2|
    return w
# The exit channel is designed by assuming the weir geometry is a perpindicular weir, and then the maximum of the the width determined by the headloss in the exit channel and the minimum width to be albe to fit a cap on the launders is chosen
# This should be calculated based on the slip depth in a coupling of the pipe size that is used for the launder + the length of a pipe cap. I am estimating that this is approximately 2*the ND.
W_ExitChannelMin := 2*ND_SedLaunder
W_ExitChannelEst := max(FindSide(Q_Plant, L_Channel, Nu_Water, E_Concrete, 1), W_ExitChannelMin) = 0.1524 m
Geom_ExitChannel :=
    hl_weir ← Headloss_weir(Q_Plant, W_ExitChannelEst)
    Geom_Channel ← Perpindicular_Weir if (hl_weir ≤ HL_SedWeirMax)
    Geom_Channel ← Parallel_Weir otherwise
    return Geom_Channel
W_SedWeirExit :=
    W_ExitChannelEst if Geom_ExitChannel == Perpindicular_Weir
    L_Channel otherwise
HL_SedWeirExit := Headloss_weir(Q_Plant, W_SedWeirExit) = 4.8203 cm
H_SedWeirExit := HW_ExitChannel - HL_SedWeirExit = 10.3397 cm
W_ExitChannel :=
    W_SedWeirExit if Geom_ExitChannel == Perpindicular_Weir
    (W_ExitChannelMin + T_SedWeir + w_minchannelHL(H_SedWeirExit, HW_ExitChannel, Q_Plant, L_Channel, Nu_Water, E_Concrete, 1, HL_SedWeirExit)) otherwise
    = 0.1524 m
# Lamella Design
B_SedPlateMin := S_SedPlateMin + T_SedPlate  # This is to prevent floc roll up. We should specify this in a more fundamental way. (based on velocity gradients)
# Estimate a length of the lamella based on the estimate of the up velocity and of the height between the top of the the lamella and the bottom of the inlet channel.
H_between := (H_InletChannel + T_ChannelWall - (H_PlantFreeboard + HL_SedLaunderBod + outerdiameter(ND_SedLaunder) + S_LamellaLaunder)) = 0.1727 m
L_SedInactive := (H_between/tan(AN_SedPlate) + W_InletChannel + W_ExitChannel + 2*T_ChannelWall) = 0.796258 m
# This code assumes that the plate settlers touch the bottom of the outlet channel before the touch the end of the sed tank.
V_Up := Q_Sed/(W_Sed*(L_SedEst - L_SedInactive)) = 1.47777 mm/s
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L_SedPlateEst := (B_SedPlateMin*(V_Up/V_SedCBod - 1) + T_SedPlate)/(sin(AN_SedPlate)*cos(AN_SedPlate)) = 0.710138 m
# Calculate the actual length of the lamella
L_SedPlate := L_SedPlateSheet/floor(L_SedPlateSheet/L_SedPlateEst) = 0.7316 m
# This round up to not waste plastic sheeting is significant for small plants that have large inactive zones in the sed tank.
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B_SedPlate := (L_SedPlate*sin(AN_SedPlate)*cos(AN_SedPlate) - T_SedPlate)/(V_Up/V_SedCBod - 1) = 2.78213 cm
S_SedPlate := B_SedPlate - T_SedPlate = 2.58213 cm  # Increase the spacing between the plate settlers given this new length.
# Distance from the wall to the vertical pipe of the main plate settler support frame
B_SedPlateFrameVertical := 10 cm  # These parameters go into the expert inputs. They need to be clearly defined.
# Diameter of Flange
D_Flange := 6 in
H_SedPlate := L_SedPlate*sin(AN_SedPlate) = 0.633584 m
# Launder Hydraulic Calculations
# All of these values are estimates because the length of the sed tank can be varied after introduction of the plate settler modules.
L_SedLaunderEst := L_SedEst - T_ChannelWall - W_InletChannel - W_ExitChannel = 1.18956 m
# There will be two orifices per row along the active length of the launder
N_SedLaunderOrificesEst := 2*floor((L_SedEst - L_SedInactive)/B_SedLaunderOrificesEst) = 18
Q_SedLaunderOrificesEst := (Q_SedBay/N_SedLaunders)/N_SedLaunderOrificesEst = 83.3333 cm^3/s
# This the HL due to major & minor losses loses through the manifold.
HL_SedLaunderEst := HL_Manifold(Q_SedBay/N_SedLaunders, innerdiameter(ND_SedLaunder, EN_PipeSpec), L_SedEst - L_SedInactive, 0, Nu_Water, E_Pvc, N_SedLaunderOrificesEst) + h_f(Q_SedBay/N_SedLaunders, innerdiameter(ND_SedLaunder, EN_PipeSpec), L_SedInactive, Nu_Water, E_Pvc) = 0.00166034 m
HL_SedLaunderOrifice := HL_SedLaunderBod - HL_SedLaunderEst = 0.0383397 m  # This is the headloss through the orifices.
D_SedLaunderOrifice := RoundNearest(D_circle(A_orifice(HL_SedLaunderOrifice, Pi_VenaContractaOrifice, Q_SedLaunderOrificesEst)), D_Drill) = 0.014 m
Q_SedLaunderOrifices := Q_orifice(D_SedLaunderOrifice, HL_SedLaunderOrifice, Pi_VenaContractaOrifice) = 82.7632 mL/s
# This is the actual flow out of the orifices, that allows the headloss to be obrained.
# This is the total headloss through the launder based on the actual diameter of the orifices
HL_SedLaunder := h_orifice(D_SedLaunderOrifice, Pi_VenaContractaOrifice, Q_SedLaunderOrifices) = 0.0383397 m
# H.SedAbove is the height needed above the lamella
H_SedAbove := outerdiameter(ND_SedLaunder) + HL_SedLaunder = 0.12724 m
# Adjustment of the plate settlers
L_SedActiveEst := L_SedEst - L_SedInactive = 0.939853 m
B_SedPlateHorizontal := B_SedPlate/sin(AN_SedPlate) = 0.0321253 m  # The center to center horizontal distance between the lamella sheets
N_SedPlatesEst := floor(L_SedActiveEst/B_SedPlateHorizontal) = 29
# Number of plates. This accounts for the fact that there is a gap of S.SedPlateHorizontal between the last plate and the bottom of the outlet channel.
# This part of the code serves to draw the module pipe for the plate settlers. In order to understand the meaning of each value please refer to the autocad drawing Lamina.Explanation
AN_SedPlate =  # error
90 deg = 1.5708
S_SedModulePipesMin := max(1/2*L_SedPlate, L_SedPlate - L_SedPlateCantilevered) = 0.5316 m
# This ensures that the distance between the top of the lamella and the second pipe is smaller than L.SedPlateCantilevered..
# This is the number of plates per module.
tan(90 deg - AN_SedPlate) =  # error
N_SedModulePlates := floor(((L_SedPlate - S_SedModulePipesMin - 2*S_SedPlateModuleMin)*tan(AN_SedPlate) + S_SedPlate)/B_SedPlate) = 10
L_SedModulePipeIncrement := S_SedPlate - (CapDiameter(NominalPipeSize(ND_SedModulePipeSpace))/2 - outerradius(NominalPipeSize(ND_SedModulePipeSpace))) = 22.4876 mm
# This is the part of the pipe sticking out that the cap is fitted on. The cap will serve as a resting spot for the next module. The modules are identical so they can be interchangeable.
L_SedModulePipe := N_SedModulePlates*B_SedPlate - S_SedPlate + 2*L_SedModulePipeIncrement = 0.297367 m  # This is the length of a sed module pipe.
S_SedModulePipes := max(L_SedPlate - 2*outerdiameter(ND_SedModulePipe) - 2*S_SedPlateModuleMin - (N_SedModulePlates*(T_SedPlate + S_SedPlate) - S_SedPlate)/tan(AN_SedPlate), (L_SedModulePipe - L_SedModulePipeIncrement)*tan(90 deg - AN_SedPlate) + CapDiameter(NominalPipeSize(ND_SedModulePipeSpace))) = 0.503209 m
# This is the actual spacing between the pipes.
L_SedModulePipeCap := min(S_SedPlate, CapHeight(NominalPipeSize(ND_SedModulePipeSpace)) - (CapDiameter(NominalPipeSize(ND_SedModulePipeSpace))/2 - outerradius(NominalPipeSize(ND_SedModulePipeSpace)))) = 2.58213 cm
# The cap should be as long as the spacing between the two modules. If it is longer, we will need to cut it accordingly.
S_SedPlateModule := (L_SedPlate - S_SedModulePipes - (L_SedModulePipe - 2*L_SedModulePipeIncrement)/tan(AN_SedPlate))/2 = 0.041336 m
# This is the new spacing between the bottom of the first plate settler in a module and the first pipe.
.
N_SedModules := ceil(N_SedPlatesEst/N_SedModulePlates) = 3
S_SedModulePipes =  # error
N_SedPlates := N_SedModules*N_SedModulePlates = 30
(L_SedModulePipe - 2*L_SedModulePipeIncrement)*tan(90 deg - AN_SedPlate) + CapDiameter(NominalPipeSize(ND_SedModulePipeSpace)) =  # error
L_SedActive := N_SedPlates*B_SedPlateHorizontal = 0.963759 m
L_Sed := L_SedActive + L_SedInactive = 1.76002 m
# The length of the active sed tank where water actually flow
L_SedActive1 := L_SedActive - N_SedPlates*T_SedPlate/sin(AN_SedPlate) = 0.894477 m  # Subtracts the thickness of the plate settlers
V_SedUp := Q_Sed/(L_Sed*W_Sed) = 68.1811 m/day
V_SedUpActive := Q_Sed/(L_SedActive1*W_Sed) = 134.157 m/day
V_SedC := V_SedUpActive/(1 + L_SedPlate/S_SedPlate*cos(AN_SedPlate)*sin(AN_SedPlate)) = 0.117023 mm/s
# Thickness of Flange | What is this? Appears to be an error.
T_Flange := 1 cm
ND_SedFrameStub := 1/2*in
# Height of stub supporting plate settler modules
H_SedFrameStub := (S_SedPlate/sin(60 deg) - outerdiameter(ND_SedFrameStub))*tan(AN_SedPlate)
B_SedFrameStub := B_SedPlateHorizontal*N_SedModulePlates
# Design paramaters for orifices in launder
# This is the number of rows of orifices.  There are two orifices per row
N_SedLaunderOrificesRow := ceil((Q_SedBay/N_SedLaunders)/(2*Q_SedLaunderOrifices)) = 10
# Total number of orifices on the launder
N_SedLaunderOrifices := N_SedLaunderOrificesRow*2 = 20
B_SedLaunderOrifices := 2*(L_SedActive - CapHeight(ND_SedLaunder))/N_SedLaunderOrifices = 8.8994 cm
T_LaunderCap := (CapDiameter(ND_SedLaunder)/2) - (outerdiameter(ND_SedLaunder)/2)
L_SedLaunder :=
    (L_Sed - W_InletChannel - W_ExitChannel - T_ChannelWall - CouplingLength(ND_SedLaunder) - CouplingLengthFlex(ND_SedLaunder) + SocketDepthFlex(ND_SedLaunder)) - T_LaunderCap if CouplingLength(ND_SedLaunder) ≥ T_ChannelWall
    (L_Sed - W_InletChannel - W_ExitChannel - 2*T_ChannelWall - CouplingLengthFlex(ND_SedLaunder) + SocketDepthFlex(ND_SedLaunder)) - T_LaunderCap otherwise
# Design paramaters for orifices in inlet manifold
# This portion of the code helps us calculate the number of ports in the inlet manifold. The basis is that there is no ports under the elbow socket depth and the first port is spaced B.SedManifoldPorts/2 from the socket depth. Hence the available length for the ports is L.Pipe-SocketDepth-B/2
# It might be better to add ports in the elbow! We want flow in that end of the sed tank too.
L_SedManifoldPipe := L_Sed - W_InletChannelEst/2 - CapHeight(ND_SedManifold) = 1.51094 m
# The number of ports per manifold calculated from the actual sed length
N_SedManifoldPorts := floor(((L_SedManifoldPipe - ElbowRadius(ND_SedManifold) - SocketDepth(ND_SedManifold)) - B_SedManifoldPortEst)/B_SedManifoldPortEst) = 11
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Q_SedManifoldPort := Q_SedBay/N_SedManifoldPorts = 0.136364 L/s
D_SedManifoldPortEst := (Q_SedManifoldPort/(ED_SedInlet^(1/3)*Pi_VenaContractaOrifice^(7/6))*4*0.34/π)^(3/7) = 4.06275 cm
D_SedManifoldPort := CeilNearest(D_SedManifoldPortEst, D_Drill) = 4.2 cm  # The diameter of a single port
A_SedManifoldPort := A_circle(D_SedManifoldPort)  # The area of a single port
D_Diffuser := NominalPipeSize(D_SedManifoldPort + .05 in)
ID_Diffuser := innerdiameter(D_Diffuser, EN_PipeSpec)
Z_SedManifoldLift := 6*ID_Diffuser = 0.331165 m
L_Diffuser := 4.*ID_Diffuser = 0.220777 m
# Calculate the energy dissipation rate created by the port. We will use this to evaluate this design.
ED_SedManifoldPort := ED_Port(Q_SedManifoldPort, D_SedManifoldPort, Pi_VenaContractaOrifice) = 4.75496 mW/kg
B_SedManifoldPort := B_SedManifoldPortEst = 10 cm
S_SedManifoldBetween := max(D_SedManifoldPort/4, ConRadius(ND_SedManifold) - outerradius(ND_SedManifold)) = 1.05 cm
# First constraint ensures that the cylindrical area that the water is flowing through radially has as much area as the port area. The second contraint ensures that the thickness of the hub on the elbow will fit and not have to be embedded in the sludge drain cover.
# Sludge Drain Program
# Here we are assuming that we are willing to use up to 50% of the available energy to get the flow through the valve and discharge it to atmosphere.
HL_Valve := 0.5*HW_SedEst
# This is the initial drain rate
# The factor of two is because the flow rate decreases linearly as the tank drain (for a constant cross section tank). Thus the average drain rate is 1/2 the initial drain rate.
Q_SedSludgeDrain := 2*W_SedBay*L_Sed*HW_SedEst/Ti_SludgeDrain = 0.00422404 m^3/s
# There will be a drain orifice in between each manifold port
B_SedSludgeOrifices := B_SedManifoldPort
N_SedSludgeOrifices := floor(L_Sed/B_SedSludgeOrifices) = 17  # per bay
Q_SedSludgeOrifices := Q_SedSludgeDrain/N_SedSludgeOrifices
ND_SedSludgeValve := D_pipeschedule(Q_SedSludgeDrain, EN_PipeSpec, HL_Valve, 0.01 m, Nu_Water, E_Pvc, K_PipeExit + K_GateValve) = 1.5 in
# The pipe length in this equation is irrelevant. Minor losses dominate
# This is the actual head loss through the valve given its diameter
HL_SedDrainValve := h_e(Q_SedSludgeDrain, innerdiameter(ND_SedSludgeValve, EN_PipeSpec), K_GateValve + K_PipeExit) = 0.544766 m
HL_SludgeDrain := HW_SedEst - HL_SedDrainValve = 1.45523 m
# This is the required diameter of the sludge drain if it were circular
D_SedSludge := D_Manifold(Q_SedSludgeDrain, HL_SludgeDrain, L_Sed, Pi_QSludgeOrifices, Nu_Water, E_Concrete, 0, N_SedSludgeOrifices) = 1.9974 in
HL_SedSludgeEst := HL_Manifold(Q_SedSludgeDrain, D_SedSludge, L_Sed, 0, Nu_Water, E_Concrete, N_SedSludgeOrifices) = 18.1563 cm
HL_SedSludgeOrificeEst := HL_SludgeDrain - HL_SedSludgeEst = 127.367 cm
D_SedSludgeOrifice := RoundNearest(D_circle(A_orifice(HL_SedSludgeOrificeEst, Pi_VenaContractaOrifice, Q_SedSludgeOrifices)), D_Drill) = 10 mm
# The cross sectional area of the drain if it were circular
A_SedSludge := π/4*D_SedSludge^2
# Assume sludge drain is twice as wide as it is high (to save depth in the sed tank)
W_SedSludge := sqrt(2*A_SedSludge) = 6.35857 cm
H_SedSludge := A_SedSludge/W_SedSludge = 3.17929 cm
# The width of the drain cover needs to rest on the ledge created by the drain
W_SedDrainCover := W_SedSludge + 2*T_ConcreteMin
T_SedSludge := T_ConcreteMin
# The elevation of the top of the sludge drain and drain cover
Z_SedSludge := T_SedSludge + H_SedSludge = 0.0817929 m
# Sedimentation Components
# This is the width of the sloped part of the sed tank wall.  It will be used to calculate the elevation of the bay walls
W_SedSlope := (W_SedBay - W_SedDrainCover)/2 - T_ConcreteMin/2
W_SedInletBottom := (W_SedBay - W_SedDrainCover)/2 = 0.458207 m
H_SedSlopeTriangle := tan(AN_SedSlope)*W_SedSlope = 0.750337 m
# The elevation of the center of the manifold includes the minimum space between the outside of the manifold pipe and the drain cover
H_SedBetween := max(H_SedSlopeTriangle, ConRadius(ND_SedManifold) + 2*SocketDepth(ND_SedManifold) + ElbowRadius(ND_SedManifold)) - H_SedSlopeTriangle
Z_SedManifoldPipe := Z_SedSludge + (outerradius(ND_SedManifold) + S_SedManifoldBetween) = 0.17643 m
# The elevation of the top of the sloped walls
Z_SedSlopes := Z_SedSludge + H_SedSlopeTriangle = 0.83213 m
# H.SedBetween is a user specified distance between the top of the sloped walls and the bottom of the pipefram (i.e. additional distance wanted for a floc blanket. The height of water in the sed tank is the sum of all of the heights of the components plus the additional specified space
HW_Sed := Z_SedSlopes + H_SedBetween + outerdiameter(ND_SedPlateFrame) + H_SedPlate + H_SedAbove + T_ConcreteMin + S_LamellaLaunder = 1.73121 m
H_Sed := HW_Sed + H_PlantFreeboard = 1.83121 m
# This was for the height of the "main platform". Is this still used?
Z_Mp := HW_Sed - HW_InletChannel = 1.53961 m
# The elevation of the launder
Z_SedLaunder := HW_Sed - HL_SedLaunder - outerradius(ND_SedLaunder) = 1.64842 m
H_SedBayDivider := Z_SedSlopes + H_SedBetween
Z_SedWeirExit := H_Sed - H_ExitChannel + H_SedWeirExit = 1.64301 m
# Launder Cap
# The size of the opening in the cap to allow the inflow of water into the sedimentation tank is determined by the Orifice Equation Q=A*K*(2*g*h)^.5 so that the flow rate through the cap is at most the flow rate out of the other sedimentation tanks.
HW_LaunderCap := H_Sed - H_ExitChannel + HW_ExitChannel = 1.69121 m
A_LaunderCapOrifice := Q_Sed/(Pi_VenaContractaOrifice*sqrt(2*g*HW_LaunderCap)) = 4.20073 cm^2
D_CapOrifice := RoundNearest(D_circle(A_orifice(h_orifice(sqrt(A_LaunderCapOrifice/(π/4)), Pi_VenaContractaOrifice, Q_SedBay/N_SedLaunders), Pi_VenaContractaOrifice, Q_SedBay/N_SedLaunders)), D_Drill) = 0.024 m
L_LaunderCouplingPipe := T_PlantWall + CapHeight(ND_SedLaunder)
# Using the pipe database file, and given the schedule of the pipe, the nominal diameter of the inlet and exit tank pipes are determined.  The headloss through the pipe is asumed to be the height of the sed tank.  The headloss is halved to be conservative. The inlet tank pipe is assumed to be the same as the exit tank pipe.
ND_PltWeir := D_pipeschedule(Q_Plant, EN_PipeSpec, H_Sed/2, H_Sed + L_Sed, Nu_Water, E_Pvc, 2*K_90 + 2*K_PipeExit) = 2 in
Del_PltWeirH := (3*Q_Plant/(2*Cd_PltWeir*sqrt(2*g)*π*ND_PltWeir))^(2/3) = 1.88031 in
H_PltWeir := HW_ExitChannel + H_PlantFreeboard/2 = 0.2016 m
# Sedimentation Drain Design
# This ensures that the coupling will not be larger than the drain channel
ND_SedDrainAdapter :=
    NominalDiameter(sqrt(1/Ti_SludgeDrain*(16*W_SedBay^1.5*tan(AN_SedPlate)^0.5*L_Sed/(π*3*sqrt(2*g)) + (sqrt(HW_Sed) - sqrt(W_SedBay/2*tan(AN_SedPlate)))/((π/(8*L_Sed*W_SedBay))*sqrt(2*g/(K_GateValve + K_Exp))))), EN_PipeSpec) if NominalDiameter(sqrt(1/Ti_SludgeDrain*(16*W_SedBay^1.5*tan(AN_SedPlate)^0.5*L_Sed/(π*3*sqrt(2*g)) + (sqrt(HW_Sed) - sqrt(W_SedBay/2*tan(AN_SedPlate)))/((π/(8*L_Sed*W_SedBay))*sqrt(2*g/(K_GateValve + K_Exp))))), EN_PipeSpec) ≤ W_SedSludge
    NominalDiameter(2*outerradius(W_SedSludge), EN_PipeSpec) otherwise
D_SedDrainValve := 2*outerradius(ND_SedDrainAdapter) = 1.315 in
# Uses the nominal valve size to calculate the actual valve size for drawing purposes.  D.SedValve is the OD of the coupling and ID of the valve.
H_SedSlope := D_SedDrainValve/2 = 0.0167005 m
D_SedScale := D_SedDrainValve/(1.16 m) = 0.028794
# This scale is due to the size of the orignal valve block that is being inserted and is based on the OUTER radius
L_SedActiveEst - L_SedActive =  # error
L_SedEst - L_Sed =  # error
