Q_Plant := 22*L/s
# [reference: ExpertInputs.xmcd]
# Sedimentation Tank
# [reference: MathFunctions.xmcd]
# [reference: PipeDatabase.xmcd]
# [reference: FluidsFunctions.xmcd]
# Preliminary Dimension and Flow Calculations
ND_SedManifoldMin = 6 in  # so sed tanks not too short
ND_SedManifoldMax = 10 in  # This might be reduced to a smaller pipe size to make the manifolds easier to manage.
Q_SedManifoldMax := Q_PipeED(ED_SedInlet, innerdiameter(ND_SedManifoldMax, PS_Default), Pi_VenaContractaOrifice, Pi_Jet) = 9.76441 L/s
# This is the maximum flow that can be obtained from one maximum size manifold.
Q_SedManifoldMin := Q_PipeED(ED_SedInlet, innerdiameter(ND_SedManifoldMin, PS_Default), Pi_VenaContractaOrifice, Pi_Jet)
N_SedTanksMin := 3
fN_SedBays(Q_Plant) := min(ceil(Q_Plant/(N_SedTanksMin*Q_SedManifoldMax)), 2)
# This calculates the number of bays assuming that it is more economical to have a long sed single bay tank than it is to have a shorter double bay sed tank.
N_SedBaysEst := fN_SedBays(Q_Plant) = 1
# The minimum number of sed tanks is either 1,2,or 3 for very low flow rates. Then the
#
# first take the minimum of the 1,2,3 or the min number of sed tanks.
# then take the maximum of that number and the minimum number of double bay sed tanks required assuming that we are using the maximum manifold size possible.
fN_SedTanks(Q_Plant) := max(min(ceil(Q_Plant/Q_PipeED(ED_SedInlet, innerdiameter(ND_SedManifoldMin, PS_Default), Pi_VenaContractaOrifice, Pi_Jet)), N_SedTanksMin), ceil(Q_Plant/(2*Q_SedManifoldMax)))
N_SedTanks := fN_SedTanks(Q_Plant) = 3
# Notes:
#
# 6 inch manifold is used until plant flow rate exceeds (max flow rate through 6 in pipe) x (min number of sed tanks). Then the number of sed tanks stays at min number of sed tanks (3) with one bay per tank until plant flow rate exceeds (max flow rate through 10 in pipe) x (min number of sed tanks). Then the number of sed bays per tank jumps up to 2 and the number of sed tanks stays at the min number of sed tanks until plant flow rate exceeds 2 x (max flow rate through 10 in pipe) x (min number of sed tanks). Then the number of sed bays per tank is set at 2 and the number of sed tanks is determined by rounding up Q.Plant/(2*Max flow through 10in pipe).
# Maximum length of the upflow section of the sed tank is based on the maximum flow rate through the inlet manifold pipe to stay below the maximum energy dissipation rate to prevent floc breakup and the desired upflow velocity to maintain a floc blanket.
L_SedUpflowMax := Q_PipeED(ED_SedInlet, innerD(ND_SedManifoldMax, PS_Default), Pi_VenaContractaOrifice, Pi_Jet)/(V_SedUpBod*W_SedBay) = 9.15299 m
Q_Sed := Q_Plant/N_SedTanks = 0.00733333 m^3/s  # Flow rate through one sed tank.
# There is a minimum number of total sed bays required to maintain the desired upflow velocity in each sed tank given the maximum length calculated above.
N_SedBaysTotal := ceil(Q_Plant/(V_SedUpBod*W_SedBay*L_SedUpflowMax)) = 3
N_SedBaysMin := ceil(N_SedBaysTotal/N_SedTanks) = 1  # Minimum number of sed bays per sed tank given the minimum total number calculated above.
N_SedBays := max(N_SedBaysMin, N_SedBaysEst) = 1  # The number of bays per tank is the maximum of the calculated value and the user input
W_Sed := N_SedBays*W_SedBay
Q_SedBay := Q_Sed/N_SedBays
Q_SedManifold := Q_SedBay  # There is one manifold per bay
ND_SedManifold := NominalDiameter(D_PipeED(ED_SedInlet, Q_SedBay, Pi_VenaContractaOrifice, Pi_Jet), PS_Default)
L_SedUpflowEst := Q_SedBay/(W_SedBay*V_SedUpBod)
ND_SedLaunder := ND_Manifold(Q_SedBay, HL_SedLaunderBod, L_SedUpflowEst, Pi_QLaunderOrifices, PS_Default, Nu_Water, E_Pvc, K_PipeExit, 2*floor(L_SedUpflowEst/B_SedLaunderOrificesEst))
ND_SedChannelDrain := NominalDiameter(D_PipeTotal(Q_Plant, HW_SedEst, HW_SedEst, Nu_Water, E_Pvc, K_PipeEnt + K_PipeExit + K_El90), PS_Default) = 4 in
# Inlet Channel Design
L_SedChannel := N_SedTanks*W_Sed + (N_SedTanks - 1)*T_PlantWall  # Length of the inlet channel, which runs along the entire width of the sed tanks.
HL_SedWeirExit := Headloss_weir(Q_Plant, L_SedChannel) = 2.2759 cm
# The area of the inlet channel must be large enough not to break up flocs
A_SedInletChannelED := A_Channel(Q_Plant, ED_SedInlet, Pi_VenaContractaOrifice, Pi_Jet)
W_SedInletChannelPlumbing := min(2*ConRadius(ND_SedManifold) + 2*S_Fitting, W_ChannelMin) = 0.15 m
HW_SedInletChannelPlumbing := HL_SedLaunderBod + 2*ConRadius(ND_SedLaunder) + S_Fitting + HL_SedWeirExit = 0.296909 m
W_SedInletChannelPreWeir := min(W_HumanMin, sqrt(A_SedInletChannelED)) = 0.331424 m  # if the width is wider than the human width, make it a full depth channel
HW_SedInletChannelPreWeir := max(A_SedInletChannelED/W_SedInletChannelPreWeir, H_HorizChannel(Q_Plant, W_SedInletChannelPreWeir, HL_ChannelMax, L_SedChannel, Nu_Water, E_Concrete, 1)) = 0.331424 m
EN_InletChannelGeom :=
    Geom_Channel ← Inlet_FullDepth if W_SedInletChannelPreWeir ≥ W_HumanMin
    hl_weir ← Headloss_weir(Q_Plant, W_SedInletChannelPreWeir)
    Geom_Channel ← Perpendicular_Weir if (hl_weir ≤ HL_SedWeirMax)
    Geom_Channel ← Parallel_Weir otherwise
    return Geom_Channel
# This function determines the geometry of the weir based on the headloss through it. Hl.SedWeirMax is an expert input. 0-->Perpendicular, 1--> Parallel, 2 --> Full Depth Preweir Inlet
H_SedInletChannelPreWeir := HW_SedInletChannelPreWeir + H_PlantFreeboard
W_SedWeirInlet :=
    W_SedInletChannelPreWeir if EN_InletChannelGeom == Perpendicular_Weir
    L_SedChannel otherwise
HL_SedWeirInlet := Headloss_weir(Q_Plant, W_SedWeirInlet) = 0.022759 m
# The weir height should be set to maintain the same water depth in the inlet channel when the water is flowing over the weir. MEASURED FROM INLET CHANNEL PREWEIR BOTTOM
H_SedWeirInletBottom := HW_SedInletChannelPreWeir - HL_SedWeirInlet = 0.308665 m
W_SedInletChannelPostWeirPlumbing := max(W_ChannelMin, (ConRadius(ND_SedChannelDrain) + S_Fitting)*2) = 0.228587 m
HW_SedInletChannelPostWeirEst :=
    H_HorizChannel(Q_Plant, W_SedInletChannelPostWeirPlumbing, HL_ChannelMax, L_SedChannel, Nu_Water, E_Concrete, 0) if EN_InletChannelGeom == Inlet_FullDepth
    (HW_SedInletChannelPreWeir - HL_SedWeirInlet - H_Freefall/10) otherwise
    = 0.298665 m
W_SedInletChannelPostWeir := max(W_SedInletChannelPostWeirPlumbing, W_HorizChannel(Q_Plant, HW_SedInletChannelPostWeirEst, HL_ChannelMax, L_SedChannel, Nu_Water, E_Concrete, 0)) = 0.228587 m
HW_SedInletChannelPostWeir := H_HorizChannel(Q_Plant, W_SedInletChannelPostWeir, HL_ChannelMax, L_SedChannel, Nu_Water, E_Concrete, 0) = 0.17073 m
H_SedInletChannelPostWeir :=
    (HW_SedInletChannelPostWeir + HL_SedWeirExit + H_PlantFreeboard) if EN_InletChannelGeom == Inlet_FullDepth
    H_SedInletChannelPreWeir otherwise
    = 0.431424 m
W_SedInletChannel :=
    W_SedInletChannelPreWeir if EN_InletChannelGeom == Perpendicular_Weir
    (W_SedInletChannelPreWeir + T_SedWeir + W_SedInletChannelPostWeir) otherwise
V_SedInletChannel := Q_Plant/(W_SedInletChannelPreWeir*H_SedInletChannelPreWeir) = 0.153863 m/s
# This is the velocity in the part of the channel that delivers the flocs
H_SedInletChannelIncrement := Q_SedBay/(V_SedInletChannel*W_SedInletChannelPreWeir) = 0.143808 m  # increase in channel height between bays
# Outlet Pipe to Filter
L_FiEntrancePipeEst := W_DCWalkway + W_SedInletChannel + 1 m = 2.60001 m
# The extra 1 meter is for the vertical section where the pipe drops down from the sed tank exit channel.
K_FiEntrancePipe := K_El90*(EN_InletChannelGeom ≠ Inlet_FullDepth) + K_PipeEnt + K_PipeExit = 2.4
ND_SedManifold = 10 in
ND_FiEntrancePipeMax := FloorNearest(Pipesizes[index(FloorNearest(W_SedBay/2 - ConRadius(ND_SedManifold) - 2*S_Fitting, Pipesizes[:, 1]), Pipesizes[:, 1]), 0], AvailND) = 8 in
# Previously the size of the filter entrance pipe was calculated based solely on Q.Plant and would not calculate for higher flow rates; now the min function with the Q.PipeTotal calculation avoid that failure.
ND_FiEntrancePipe := min(D_pipeschedule(min(Q_Plant, Q_pipetotal(innerdiameter(AvailND[last(AvailND)], PS_Default), HL_FiEntrancePipeMax, L_FiEntrancePipeEst, Nu_Water, E_Pvc, K_FiEntrancePipe)), PS_Default, HL_FiEntrancePipeMax, L_FiEntrancePipeEst, Nu_Water, E_Pvc, K_FiEntrancePipe), ND_FiEntrancePipeMax) = 8 in
N_FiEntrancePipes := ceil(Q_Plant/Q_pipetotal(innerdiameter(ND_FiEntrancePipe, PS_Default), HL_FiEntrancePipeMax, L_FiEntrancePipeEst, Nu_Water, E_Pvc, K_FiEntrancePipe)) = 1
Q_FiEntrancePipe := Q_Plant/N_FiEntrancePipes = 22 L/s
HL_FiEntrancePipe := h_l(Q_FiEntrancePipe, innerdiameter(ND_FiEntrancePipe, PS_Default), L_FiEntrancePipeEst, K_FiEntrancePipe, Nu_Water, E_Pvc) = 6.4931 cm
# Exit Channel Design
H_SedExitChannel :=
    H_SedInletChannelPostWeir if EN_InletChannelGeom ≠ Inlet_FullDepth
    (H_SedInletChannelPostWeir + T_ChannelWall + (ConRadius(ND_FiEntrancePipe) + S_Fitting)*2) otherwise
# for full depth case, make sure filter pipe can fit under catilevered channel
HW_SedExitChannelPreWeir :=
    (HW_SedInletChannelPreWeir - HL_SedLaunderBod) if EN_InletChannelGeom ≠ Inlet_FullDepth
    (HW_SedInletChannelPostWeir + H_Freefall/10 + HL_SedWeirExit - HL_SedLaunderBod + 2*(ConRadius(ND_FiEntrancePipe) + S_Fitting)) otherwise
H_SedWeirExit := HW_SedExitChannelPreWeir - HL_SedWeirExit = 0.268665 m
HW_SedExitChannelPostWeir := HW_SedExitChannelPreWeir - HL_SedWeirExit - H_Freefall/10
W_SedExitChannelPreWeir := max(W_HorizChannel(Q_Plant, HW_SedExitChannelPreWeir, HL_ChannelMax, L_SedChannel, Nu_Water, E_Concrete, 1), W_ChannelMin, CapHeight(ND_SedLaunder) + 1.05*L_SedLaunderCapExcess) = 0.1585 m
W_SedExitChannelPostWeir := max(2*ConRadius(ND_FiEntrancePipe)*(N_FiEntrancePipes > 1)*(EN_InletChannelGeom ≠ Inlet_FullDepth), W_ChannelMin, W_HorizChannel(Q_Plant, HW_SedExitChannelPostWeir, HL_ChannelMax, L_SedChannel - W_SedBay/2, Nu_Water, E_Concrete, 1)) = 0.15 m
W_SedExitChannel := W_SedExitChannelPreWeir + T_SedWeir + W_SedExitChannelPostWeir
# Upflow Length and Number of Plates
S_SedPlate := S_SedPlateMin
B_SedPlate := S_SedPlate + T_SedPlate
N_SedModulePlatesMax := floor(L_SedPlateCantilevered/B_SedPlate*tan(AN_SedPlate) + 1) = 13
N_SedModulePlatesMin := 8
PlateIndex :=
    for j ∈ N_SedModulePlatesMin .. N_SedModulePlatesMax
        for i ∈ 0 .. 50
            matrix[i, j - N_SedModulePlatesMin] ← j*(i + 1)
    array ← matrix[:, 0]
    for j ∈ N_SedModulePlatesMin + 1 .. N_SedModulePlatesMax
        array ← stack(array, matrix[:, j - N_SedModulePlatesMin])
    array ← sort(array)
    i ← 0
    while i < (last(array) - 1)
        array ← stack(submatrix(array, 0, i, 0, 0), submatrix(array, i + 2, last(array), 0, 0)) if array[i] == array[i + 1]
        array ← submatrix(array, 0, i + 1, 0, 0) if (i + 1 == i + 2 and i + 2 == last(array))
        i ← i + 1
    return array
H_LamellaToLaunder := T_ConcreteMin + CapThickness(ND_SedLaunder)
L_SedUpflow :=
    i ← 0
    L ← 0 m
    while L < L_SedUpflowEst
        i ← i + 1
        L ← (H_SedWeirExit + T_ChannelWall - outerdiameter(ND_SedLaunder) - H_LamellaToLaunder - T_SedPlate*cos(AN_SedPlate))/tan(AN_SedPlate) + T_SedPlate/sin(AN_SedPlate) + (PlateIndex[i] - 1)*B_SedPlate/sin(AN_SedPlate) - 2*T_ConcreteMin
    return L
L_SedChannelToWall := L_SedUpflow + 2*T_ConcreteMin
N_SedPlates := round((L_SedChannelToWall - (H_SedWeirExit + T_ChannelWall - outerdiameter(ND_SedLaunder) - H_LamellaToLaunder - T_SedPlate*cos(AN_SedPlate))/tan(AN_SedPlate) - T_SedPlate/sin(AN_SedPlate))/(B_SedPlate/sin(AN_SedPlate)) + 1) = 224
V_SedUp := Q_SedBay/(L_SedUpflow*W_SedBay)
# Tank and Hopper Length
L_SedHopper :=
    W_SedInletChannelPreWeir + 2*T_ChannelWall + W_SedExitChannel if EN_InletChannelGeom ≠ Inlet_FullDepth
    W_SedExitChannel + T_ChannelWall otherwise
L_Sed := L_SedHopper + L_SedUpflow + (T_ChannelWall + W_SedInletChannelPreWeir)*(EN_InletChannelGeom == Inlet_FullDepth) = 7.94522 m
# Sludge Drain
# This is the initial drain rate
# The factor of two is because the flow rate decreases linearly as the tank drain (for a constant cross section tank). Thus the average drain rate is 1/2 the initial drain rate.
Q_SedSludgeDrain := 2*W_SedBay*L_SedUpflow*HW_SedEst/Ti_SludgeDrain
N_SedSludgeOrificesEst := floor(L_SedUpflow/B_SedSludgeOrificesEst) - 1 = 68
Q_SedSludgeOrificesEst := Q_SedSludgeDrain/N_SedSludgeOrificesEst
# This is the required diameter of the sludge drain if it were circular
# To get the effective "diameter" of the sludge drain manifold (the cross section will actually be a polygon) an approximate length for the portion of the sludge drain which runs under the floc hopper is assumed to be 1m and is entered in the manifold function as if its section had inlet holes as well. Since the effect of the additional length on the calculated "diameter" is very small, the accuracy of these assumptions is not very important.
D_SedSludgeChannel := D_Manifold(Q_SedSludgeDrain, HW_SedEst/3, L_SedUpflow, Pi_QSludgeOrifices, Nu_Water, E_Concrete, 0, N_SedSludgeOrificesEst) = 0.122878 m
ND_SedSludgePipe := NominalDiameter(D_PipeTotal(Q_SedSludgeDrain, HW_SedEst/3, L_SedUpflow + L_SedHopper, Nu_Water, E_Pvc, K_PipeExit + K_GateValve), PS_Default) = 0.1016 m
# Something is wrong with these diameter functions.
HL_SedSludgeEst := HL_Manifold(Q_SedSludgeDrain, D_SedSludgeChannel, L_SedUpflow + L_SedHopper, 0, Nu_Water, E_Concrete, N_SedSludgeOrificesEst) + h_l(Q_SedSludgeDrain, innerdiameter(ND_SedSludgePipe, PS_Default), L_SedHopper + ValveLength(ND_SedSludgePipe) + 10 cm, K_GateValve + K_PipeExit, Nu_Water, E_Pvc)
HL_SedSludgeOrificeEst := HW_SedEst - HL_SedSludgeEst = 1.59656 m
# The cross sectional area of the drain if it were circular
A_SedSludge := π/4*D_SedSludgeChannel^2
# Assume sludge drain square to keep width of sludge drain cover narrow
W_SedSludge := sqrt(A_SedSludge)
H_SedSludge := A_SedSludge/W_SedSludge
Z_SedSludge := H_SedSludge = 0.108898 m  # Elevation of the top of the sludge drain channel (and the bottom of the drain cover).
# Sludge Drain Cover
# The jet reverser is the semi-circular trough in the center of the drain cover into which the jets from the inlet manifold discharge and re-suspend sludge. The concrete semi-circle will be cast using a length of PVC pipe.
#
# Jet reverser diameter should be at least 2x the width of the diffuser port
W_SedDiffuserOutlet = 0.01 m
ND_SedDiffuser = 0.0254 m
ND_SedJetReverser = 0.0254 m
S_ReversedHalfJet := (outerdiameter(ND_SedJetReverser) - W_SedDiffuserOutlet)/2 - (outerradius(ND_SedDiffuser) - innerdiameter(ND_SedDiffuser, PS_Default)/2) = 0.99225 cm
# This is the space between the lip of the jet reverser and the outer wall of the diffuser pipe through which the reversed jet must pass. Compare with the natural width of the reversed jet calculated next.
W_SedJet := W_SedDiffuserOutlet/2*Pi_VenaContractaOrifice^2 = 0.1922 cm
T_SedDrainCoverLedge := max(2 cm, outerradius(ND_SedJetReverser) - W_SedSludge/2)
W_SedDrainCover := max(W_SedSludge + 2*T_SedDrainCoverLedge, outerdiameter(ND_SedJetReverser)) = 5.86211 in
# The drain cover needs to be wide enough to rest on the ledges of the drain channel, and also needs to be at least as wide as the jet reverser.
L_SedDrainCoverSlopes := (W_SedDrainCover - outerdiameter(ND_SedJetReverser))/2
H_SedDrainCoverTotal := T_ConcreteMin + outerradius(ND_SedJetReverser) + L_SedDrainCoverSlopes*tan(AN_SedSlope) = 5.33552 in
A_SedDrainCover := H_SedDrainCoverTotal*W_SedDrainCover - L_SedDrainCoverSlopes*tan(AN_SedSlope)*(2*L_SedDrainCoverSlopes + outerdiameter(ND_SedJetReverser)) - 1/2*π*outerradius(ND_SedJetReverser)^2
ρ_Concrete := 2400*kg/m^3
M_DrainCoverMax := 20 kg
S_SedDrainCoverSegment := 2 mm
L_SedDrainCoverTotal := L_Sed - L_SedHopper = 6.9653 m
# L.SedDraincoverSegment should be modified so it is an integer number of manifold ports long.
B_SedSludgeOrifices := L_SedDrainCoverTotal/trunc(L_SedDrainCoverTotal/B_SedSludgeOrificesEst) = 10.0946 cm
N_SedSludgeOrifices := floor(L_SedDrainCoverTotal/B_SedSludgeOrifices) = 69
D_SedSludgeOrifice := D_circle(A_orifice(HL_SedSludgeOrificeEst, Pi_VenaContractaOrifice, Q_SedSludgeDrain/N_SedSludgeOrifices)) = 0.937143 cm
# No need to round this because they don't drill this hole in concrete!
# Inlet Manifold Design
L_SedManifoldPipeActive := L_SedUpflow + T_ConcreteMin + ConRadius(ND_SedManifold)/tan(AN_SedHopperSlope) - CapThickness(ND_SedManifold)
W_SedDiffuserOutlet = 0.01 m
ND_SedDiffuser = 0.0254 m
OD_Diffuser := outerdiameter(ND_SedDiffuser) = 3.3401 cm
Circ_SedDiffuser := π*innerdiameter(ND_SedDiffuser, PS_Default) = 9.37608 cm  # This analysis doesn't account for thickness of the pipe wall
T_SedDiffuserWall := outerradius(ND_SedDiffuser) - innerdiameter(ND_SedDiffuser, PS_Default)/2 = 0.001778 m
L_SedDiffuserOutlet := 5 cm - 2*T_SedDiffuserWall  # based on the mold
B_SedManifoldPort := L_SedDiffuserOutlet + 2*T_SedDiffuserWall = 5 cm
N_SedManifoldPorts := floor((L_SedUpflow - SocketDepth(ND_SedManifold) - CapThickness(ND_SedManifold))/(L_SedDiffuserOutlet + 2*T_SedDiffuserWall)) = 137
# Subtracting two times the socket depth from the available length allows space for the manifold to be pulled out of its coupling without the diffusers running into the support ledge at the free end.
Q_SedManifoldPort := Q_SedBay/N_SedManifoldPorts = 0.053528 L/s
D_SedManifoldPort := CeilNearest(D_PipeED(ED_SedInlet, Q_SedManifoldPort, Pi_VenaContractaOrifice, Pi_Jet), D_Drill) = 3.175 cm
# We need enough length to give the jet that is coming out of the manifold port to expand to the size of the rectangular slot
V_SedManifoldPort := Q_SedManifoldPort/(π*D_SedManifoldPort^2/4)*1/Pi_VenaContractaOrifice = 0.109047 m/s
V_SedDiffuser := Q_SedManifoldPort/(B_SedManifoldPort*W_SedDiffuserOutlet) = 0.107056 m/s
V_SedManifoldPort/V_SedDiffuser = 1.01859
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L_SedDiffuserRoundjetanalogy := 6.2*V_SedManifoldPort/V_SedDiffuser*D_SedManifoldPort*sqrt(Pi_VenaContractaOrifice) = 0.157882 m  # round jet equation
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L_SedDiffuserPlanejetanalogy := (2.41*V_SedManifoldPort/V_SedDiffuser)^2*D_SedManifoldPort*sqrt(Pi_VenaContractaOrifice) = 0.150652 m  # plane jet
L_SedManifoldDiffuser := max(L_SedDiffuserPlanejetanalogy, L_SedDiffuserRoundjetanalogy)
# Conclusion is that we should keep the manifold as high as possible based on the limitations of the elbow to give as much distance as possible for the jet to expand inside the diffuser pipe.
Z_SedManifoldPipe := Plant_Origin[2] + H_SedSludge + T_ConcreteMin + outerradius(ND_SedJetReverser) + L_SedManifoldDiffuser + innerdiameter(ND_SedManifold, PS_Default)/2 = 0.45888 m
# Side Slopes
W_SedSideSlopes := (W_SedBay - outerradius(ND_SedJetReverser))/2
H_SedSideSlopes := tan(AN_SedSlope)*W_SedSideSlopes = 0.62573 m
Z_SedSideSlopes := Plant_Origin[2] + H_SedSludge + T_ConcreteMin + outerradius(ND_SedJetReverser) + H_SedSideSlopes
# Plate Length
L_SedPlateActive := (N_SedPlates - 1)*S_SedPlate/sin(AN_SedPlate) = 6.43746 m
L_SedPlateEst := (B_SedPlate*Q_SedBay/(W_SedBay*L_SedPlateActive*V_SedCBod) - S_SedPlate)/(sin(AN_SedPlate)*cos(AN_SedPlate)) = 0.497128 m
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N_PlatesPerSheet := floor(L_SedPlateSheet/L_SedPlateEst) = 6
L_SedPlate := L_SedPlateSheet/N_PlatesPerSheet = 0.5 m
L_SedPlateUnderChan := (L_SedPlate*sin(AN_SedPlate) + T_SedPlate*cos(AN_SedPlate) + H_LamellaToLaunder + outerdiameter(ND_SedLaunder) - H_SedWeirExit - T_ChannelWall)/tan(AN_SedPlate) + T_SedPlate/sin(AN_SedPlate) = 14.1774 cm
V_SedActiveUp := Q_SedBay/(W_SedBay*L_SedPlateActive) = 1.06784 mm/s
V_SedCaptureCheck := V_SedActiveUp*B_SedPlate/(L_SedPlateEst*sin(AN_SedPlate)*cos(AN_SedPlate) + S_SedPlate) = 0.12 mm/s
# Floc Weir, Hopper, Hopper Drain, and Tank Height
Z_SedFlocWeir := max(Z_SedManifoldPipe + outerradius(ND_SedManifold) + T_ConcreteMin, Z_SedSideSlopes + H_SedSlopesToFlocWeirMin) = 0.951328 m
Z_SedLamellaBottomMin := Z_SedFlocWeir + H_FlocWeirToLamellaMin = 1.05133 m
Z_SedLaunderMin := Z_SedLamellaBottomMin + (L_SedPlate + T_SedPlate)*sin(AN_SedPlate) + T_ConcreteMin + ConRadius(ND_SedLaunder)
Z_SedExitChannelBottomMin := Z_SedLaunderMin + ConRadius(ND_SedLaunder) - H_SedWeirExit = 1.45156 m
Z_SedInletChannelBottomPreWeirMin :=
    (Z_SedExitChannelBottomMin + 2*(ConRadius(ND_FiEntrancePipe) + S_Fitting) + HW_SedInletChannelPostWeir + H_Freefall/10 + HL_SedWeirInlet - HW_SedInletChannelPreWeir) if EN_InletChannelGeom == Inlet_FullDepth
    Z_SedExitChannelBottomMin otherwise
    = 1.45156 m
Z_SedInletChannelElbowTop := Z_SedManifoldPipe + ElbowRadius(ND_SedManifold) + SocketDepth(ND_SedManifold) = 0.90988 m
EN_SedInletChannelCoupling :=
    0 if Z_SedInletChannelBottomPreWeirMin ≤ Z_SedInletChannelElbowTop
    1 otherwise
Z_SedInletChannelBottomPreWeir := max(Z_SedInletChannelBottomPreWeirMin, Z_SedInletChannelElbowTop + CouplingLength(ND_SedManifold)*(EN_SedInletChannelCoupling == 1)) = 1.45156 m
Z_SedInletChannelBottomPostWeir := Z_SedInletChannelBottomPreWeir + H_SedInletChannelPreWeir - H_SedInletChannelPostWeir = 1.45156 m
Z_SedExitChannelBottom :=
    Z_SedInletChannelBottomPreWeirMin if EN_InletChannelGeom ≠ Inlet_FullDepth
    (Z_SedInletChannelBottomPreWeir + H_SedInletChannelPreWeir - H_SedExitChannel) otherwise
    = 1.45156 m
Z_SedLaunder := Z_SedExitChannelBottom + H_SedWeirExit - ConRadius(ND_SedLaunder) = 1.62815 m
Z_SedLamellaBottom := Z_SedLaunder - outerradius(ND_SedLaunder) - T_ConcreteMin - (L_SedPlate + T_SedPlate)*sin(AN_SedPlate) = 1.05927 m
H_SedFlocWeir := Z_SedFlocWeir - Z_SedSludge = 0.84243 m
Z_SedWeirExit := Z_SedExitChannelBottom + H_SedWeirExit
H_Sed := Z_SedExitChannelBottom + H_SedExitChannel = 1.88298 m
# check:
Z_SedInletChannelBottomPreWeir + H_SedInletChannelPreWeir = 1.88298 m
Z_SedInletChannelBottomPreWeir + HW_SedInletChannelPreWeir + H_PlantFreeboard = 1.88298 m
Z_SedInletChannelBottomPostWeir + H_SedInletChannelPostWeir = 1.88298 m
Z_SedExitChannelBottom + HW_SedExitChannelPreWeir + H_PlantFreeboard + HL_SedLaunderBod = 1.88298 m
Z_SedExitChannelBottom + HW_SedExitChannelPostWeir + H_Freefall/10 + HL_SedWeirExit + HL_SedLaunderBod + H_PlantFreeboard = 1.88298 m
HW_Sed := Z_SedExitChannelBottom + HW_SedExitChannelPreWeir + HL_SedLaunderBod = 1.78298 m
# Exit Launder
B_SedLaunderOrifices := B_SedLaunderOrificesEst
L_SedLaunder :=
    L_SedChannelToWall - CapThickness(ND_SedLaunder) if T_ChannelWall > 2*CouplingLength(ND_SedLaunder)
    L_SedChannelToWall + T_ChannelWall - 2*CouplingLength(ND_SedLaunder) - CapThickness(ND_SedLaunder) if CouplingLength(ND_SedLaunder) < T_ChannelWall < 2*CouplingLength(ND_SedLaunder)
    L_SedChannelToWall + T_ChannelWall - CouplingLength(ND_SedLaunder) - CapThickness(ND_SedLaunder) otherwise
N_SedLaunderOrifices := floor((L_SedLaunder - CapHeight(ND_SedLaunder) + CapThickness(ND_SedLaunder) - SocketDepth(ND_SedLaunder))/B_SedLaunderOrifices) = 68
Q_SedLaunderOrifices := Q_SedBay/N_SedLaunderOrifices
# This the HL due to major & minor losses loses through the manifold.
HL_SedLaunderMajor := HL_Manifold(Q_SedBay, innerdiameter(ND_SedLaunder, PS_Default), L_SedLaunder, 0, Nu_Water, E_Pvc, N_SedLaunderOrifices)
HL_SedLaunderOrificeEst := HL_SedLaunderBod - HL_SedLaunderMajor = 0.0372252 m
D_SedLaunderOrifice := RoundNearest(D_circle(A_orifice(HL_SedLaunderOrificeEst, Pi_VenaContractaOrifice, Q_SedLaunderOrifices)), D_Drill) = 1.5875 cm
# This is the total headloss through the launder based on the actual diameter of the orifices
HL_SedLaunderOrifice := h_orifice(D_SedLaunderOrifice, Pi_VenaContractaOrifice, Q_SedLaunderOrifices) = 3.93746 cm
# Hopper Drain
L_SedHopperDrainPipe := L_SedHopper - T_ConcreteMin + T_PlantWall - CouplingLength(ND_SedHopperDrain) + SocketDepth(ND_SedHopperDrain)
N_SedHopperDrainOrifices := round((L_SedHopper - T_ConcreteMin)/B_SedHopperDrainOrificesEst)
B_SedHopperDrainOrifices := (L_SedHopper - T_ConcreteMin)/N_SedHopperDrainOrifices
A_SedHopperDrainOrificesTot := π*innerdiameter(ND_SedHopperDrain, SDR26)^2/4 = 23.9264 cm^2
D_SedHopperDrainOrifice := sqrt(4/π*A_SedHopperDrainOrificesTot/N_SedHopperDrainOrifices) = 1.83981 cm
H_SedHopperDrainBury := 0.5*D_SedHopperDrainOrifice/tan(asin(D_SedHopperDrainOrifice/innerdiameter(ND_SedHopperDrain, SDR26))) = 2.60188 cm
# additional depth from the pipe centerline that you need to bury the drain pipe into the slopes
# Module Design
N_SedPlates = 224
L_SedPlate = 50 cm
N_SedModules :=
    for i ∈ N_SedModulePlatesMin .. N_SedModulePlatesMax
        N ← N_SedPlates/i
        break if mod(N_SedPlates, i) == 0
    return N
N_SedModulePlates := N_SedPlates/N_SedModules
# This part of the code serves to draw the module pipe for the plate settlers. In order to understand the meaning of each value please refer to the autocad drawing Lamina.Explanation
L_SedModulePipeIncrement := B_SedPlate - T_SedPlate - (CapDiameter(NominalPipeSize(ND_SedModulePipeSpacer))/2 - outerradius(NominalPipeSize(ND_SedModulePipeSpacer)))
# This is the part of the pipe sticking out that the cap is fitted on. The cap will serve as a resting spot for the next module. The modules are identical so they can be interchangeable.
L_SedModulePipe := N_SedModulePlates*B_SedPlate - (B_SedPlate - T_SedPlate) + 2*L_SedModulePipeIncrement = 0.234333 m  # This is the length of a sed module pipe.
S_SedModulePipes := max(L_SedPlate - 2*outerdiameter(ND_SedModulePipe) - 2*S_SedPlateModuleMin - (N_SedModulePlates*(T_SedPlate + (B_SedPlate - T_SedPlate)) - (B_SedPlate - T_SedPlate))/tan(AN_SedPlate), (L_SedModulePipe - L_SedModulePipeIncrement)*tan(90 deg - AN_SedPlate) + CapDiameter(NominalPipeSize(ND_SedModulePipeSpacer))) = 0.307054 m
# This is the actual spacing between the pipes.
L_SedModulePipeCap := min(B_SedPlate - T_SedPlate, CapHeight(NominalPipeSize(ND_SedModulePipeSpacer)) - (CapDiameter(NominalPipeSize(ND_SedModulePipeSpacer))/2 - outerradius(NominalPipeSize(ND_SedModulePipeSpacer))))
# The cap should be as long as the spacing between the two modules. If it is longer, we will need to cut it accordingly.
S_SedPlateModule := (L_SedPlate - S_SedModulePipes - (L_SedModulePipe - 2*L_SedModulePipeIncrement)/tan(AN_SedPlate))/2 = 0.041336 m
# This is the new spacing between the bottom of the first plate settler in a module and the first pipe.
.
L_SedActive := N_SedPlates*B_SedPlate/sin(AN_SedPlate) - T_SedPlate/sin(AN_SedPlate) = 6.98132 m
# Residence Time Estimate
Vol_SedManifoldEst := (L_SedManifoldPipe + π/4*ElbowRadius(ND_SedManifold) + Z_SedChannelBottom - T_ChannelWall - Z_SedManifoldPipe - ElbowRadius(ND_SedManifold))*π*outerradius(ND_SedManifold)^2  # error: This variable is undefined.
Vol_SedPlatesEst := N_SedPlates*L_SedPlate*W_SedPlate*T_SedPlate
Vol_SedChannelsEst := W_SedBay*(W_SedInletChannel + T_ChannelWall)*(H_SedInletChannel + T_ChannelWall) + W_SedBay*(W_SedExitChannel + T_ChannelWall)*(H_SedExitChannel + T_ChannelWall)  # error: This variable is undefined.
Vol_SedBayEst := W_SedBay*L_Sed*HW_Sed - 1/2*L_SedHopper*H_SedHopperFrontSlope*W_SedBay - W_SedSideSlopes*H_SedSideSlopes*L_SedUpflow - Vol_SedManifoldEst - Vol_SedPlatesEst - Vol_SedChannelsEst  # error: This variable is undefined.
Ti_Sed := Vol_SedBayEst/Q_SedBay  # error: This variable is undefined.
H_WalkwayToTankWall := H_SedInletChannelPostWeir
Z_Walkway := Plant_Origin[0] + H_Sed - H_WalkwayToTankWall
