# [reference: BasicInputs.xmcd]
# [reference: ExpertInputs.xmcd]
# [reference: DesignAssumptions.xmcd]
# [reference: MathFunctions.xmcd]
# [reference: PipeDatabase.xmcd]
# [reference: MinorLossCoefficients.xmcd]
# [reference: FluidsFunctions.xmcd]
# [reference: Influent Sed Manifold.xmcd]
HW_Sed := 2 m
# Sludge Drain Program
# There are two ports per plate and thus there are two sludge orifices as well. (not 4)
B_SedSludgeOrifices := W_SedSlopePlate/2
N_SedSludgeOrifices := floor(L_Sed/B_SedSludgeOrifices) = 63  # This is per Sed Cell
# For HL.SludgeManifold use depth of water
# HWSed
# We should set this to drain the tank in 10 minutes That requires an initial flow rate that would give a 5 minute drain time. The Time.SludgeDrain should be a BOD parameter.
ID_SedSludge := ID_Manifold(W_SedBay*L_Sed*HW_Sed/Ti_SludgeDrain/N_SedBays, HW_Sed, L_Sed, Pi_QSludgeOrifices, EN_PipeSpec, Nu_Water, E_Pvc, 0, N_SedSludgeOrifices) = 3.68842 in
# This should return an inner diameter, not a nominal diameter.
A_SludgeOrifices := π/4*ID_SedSludge^2 = 10.6849 in^2
W_SedSludge := A_SludgeOrifices/H_SedSludge = 0.137869 m
A_SedSludgeOrifice := A_SludgeOrifices/N_SedSludgeOrifices
T_SedSludge := T_SedInletSlope*(1 + sin(AN_SedTopInlet))
D_SedSludgeOrifice := RoundNearest(D_circle(A_SedSludgeOrifice), D_Drill) = 0.4375 in
Q_SludgeDrainInitial := Q_orifice(D_SedSludgeOrifice, HW_Sed, Pi_VenaContractaOrifice) = 22.9613 L/min
# Lsed here is equal to the length of the sludgepipe.
# Given the orifice spacing, the number of orifices is determined by dividing the length of the sed tank by the orifice spacing
# The flow rate for draining is calculated given the assumed time for drainage, and the sed tank's dimensions
# It isn't clear what the design constraint is for sizing this pipe.
K_SludgeDrain := K_ChkValveBall = 4.5
# We should set this to drain the tank in 10 minutes That requires an initial flow rate that would give a 5 minute drain time. The Time.SludgeDrain should be a BOD parameter.
HL_SludgeDrain := 1/2*HW_Sed = 1 m
ID_Pipe := RoundNearest(D_circle(A_SludgeOrifices(HL_SludgeDrain, Q_SludgeDrainInitial)), D_Drill)  # error: This value must be a function, but has the form: Length^2.
# Calculate the area based on the ND.Manifold
