T_FiWall := 25 cm
# We could redefine Z_SedWeirExit as zero here for an easier definition for Tamara.
# This line must be removed before using this code to add filters new plants!
# Design References
# Schedule 40 or Schedule 80 for slotted branches????? Schedule 40 has larger ID and that increases the max flow rate it can handle and thus increases the allowable width of the filter. Schedule 40 for strength and servicability. This changes the dimensions of the filter box and the constraints for the entrance and exit boxes.
Q_Plant = L/s
PS_FiBranch := 2
EN_PipeSpecDescription[PS_FiBranch] =  # error: This variable is undefined.
Nu_Air := 12*mm^2/s
SF_FiSiphonNoSuckAir := 10 cm
H_FiFluidizedBedToSiphon := 20 cm
SF_FiBwNoSuckAir := 20 cm
## Constraints
# Max head loss through inlet piping during filtration
# Max head loss through inlet piping during backwash
# Max head loss through outlet piping during filtration
# Max head loss through outlet piping during backwash (siphon)
# Max ratio of head loss in manifold to head loss through filter layer during filtration
# Max ratio of head loss in manifold to head loss through filter layer during filtration
## Filter Bed Sizing
# Select the stacked filter configuration and backwash velocity
V_FiBw := 11*mm/s  # Design guidelines say 11 mm/s. The success of lab-scale backwashing at 10 mm/s suggests that this is a reasonable and conservative value
N_FiLayer := 6
Pi_FiFluidized := 1.3  # Bed expands 30% when fluidized
# Calculate the required filtration velocity and filter area
V_FiLayer := V_FiBw/N_FiLayer = 1.83333 mm/s
# The 1.83 mm/s velocity was tested on the lab scale and seems to work.  It is also within the typical range for filters according to the American Water Works Association (AWWA) guidelines.
V_FiLayer = 158.4 m/day
# Determine the geometry of the filter
# Note: The filter is rectangular for now, but we may consider cylindrical shapes later due to large filter bed sizes.  The filter is not constrained by any underdrains because of the use of manifolds
H_FiLayer := 20 cm  # Depth of each filter layer
H_FiSand := N_FiLayer*H_FiLayer = 1.2 m  # The total depth of sand
# Top View | Side View
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# List the assumed properties of the sand in the filter
# The listed properties include the diameter of sand, density of a sand grain, density of water,
# and the porosity of a sand bed.
D_FiSand := 0.5 mm  # Average estimated diameter of sand
ε_FiSand := 0.4  # Porosity in a sand bed
Rho_Water := 1000*kg/m^3  # Density of sand and water, respectively
Rho_FiSand := 2650*kg/m^3
# Calculate the head loss through the inlet plumbing
# This is for the piping prior to entering the filterbox/manifold
# Calculate the clean-bed head loss during filtration
# The head loss across each layer of the filter must be large compared to losses in the plumbing that distributes water into the sand bed, in order for the water to be distributed uniformly to each layer.  At the beginning of a filtration cycle when the sand bed is clean, the head loss is the smallest.  This minimum head loss during filtration is estimated by the Carman-Kozeny equation.
k_Kozeny := 5  # Carman-Kozeny coefficient
h_lKozeny(L, D, V, ε, ν) := k_Kozeny*L*ν/g*(1 - ε)^2/ε^3*36/D^2*V
HL_FiCleanLayer := h_lKozeny(H_FiLayer, D_FiSand, V_FiLayer, ε_FiSand, Nu_Water)
HL_FiCleanLayer =  # error
# The head loss in the slotted pipes will be small compared with the clean bed head loss. Head loss in the filter media will thus equilibrate the flow.
# Calculate the head loss across the bed during backwashing
# The head loss during backwash is the energy required to fluidize the sand in the filter.
HL_FiBwSS := H_FiSand*(Rho_FiSand - Rho_Water)*(1 - ε_FiSand)/Rho_Water
# The backwash head loss is almost exactly equal  to the sand bed depth. Note that this ignores losses in the plumbing.
HL_FiBwSS = 1.188 m
# This is a design constraint we have chosen so the filter box is not too tall.  It is the additional head loss in the filter media as it becomes full.  Does not include the clean bed head loss.
HL_FiDirty := 30 cm
HL_FiTerminal := HL_FiCleanLayer + HL_FiDirty  # Terminal head loss through the filter; set to be 30 cm more than the clean bed head loss
HL_FiTerminal =  # error
HL_FiBwSF := 40 cm
# This is the extra head we are going to provide to ensure that we can initiate backwash. This may be excessive and it will likely be possible to reduce this in designs after Tamara.
HL_FiBwInitiation := HL_FiBwSF + HL_FiBwSS = 1.588 m
# Pressure recovery dominates major and minor losses, so it will set our manifold and trunk pipe sizes
Pi_FiManifoldHeadLoss := 0.1
# Ratio of head loss through the slotted pipes to the head loss through the clean bed; this is half the total head loss in the manifold, the other half will be in the trunk line.  Due to the sqrt(h) relationship this will lead to about 11% overall variability through the inlet piping.
#
# This constraint is critical and determines all of the pipe sizes related to the filtration cycle.
# Exit and entrance pipes will have additional head loss. We need to verify that this head loss is acceptable. The constraint is that we don't want excessive head loss through these pipes because that head loss will force us to use a deeper filter box or will result in lower water level elevation in the effluent.
HL_FiManifoldTarget := HL_FiCleanLayer*Pi_FiManifoldHeadLoss = 1.51428 cm
# This is our maximum piezometric head variability in the manifold branches. It is set to reduce flow variability
V_FiMaxPR := sqrt(2*g*HL_FiManifoldTarget) = 0.544977 m/s
# This is the maximum velocity in all of the inlet and out pipes set to minimize the effect of pressure recovery. This constraint only applies during the filtration cycle. The backwash manifold system of pipes has a different constraint.
B_FiManifoldBranch := 10 cm
# This is the spacing (center to center) of the manifold branches on the trunk line. Presumably this number scales with the layer thickness. Deeper filter layers could still work well if the spacing increased. Our lab filter is 10 cm in diameter and has one manifold branch per layer and thus the branch spacing was equivalent to 10 cm.
## Max Flow Through 1 Filter
ND_ManBranchMax := 1.5 in  # Why did we set this as a maximum? Is it to ensure that we don't block too much of the filter bed with pipes?
ID_ManBranchMax := innerdiameter(ND_ManBranchMax, PS_FiBranch) = 1.61 in
Q_ManBranchMax := π*ID_ManBranchMax^2/4*V_FiMaxPR = 0.715793 L/s
N_ManBranchMax := 20
# This constraint is arbitrary. However if we assume square filters and given the maximum filter flow rate calculated below, then the maximum filter size would be about 1.7 m x 1.7 m.
Q_FiMaxBranch := Q_ManBranchMax*N_ManBranchMax*N_FiLayer/2 = 42.9476 L/s  # The factor of 2 is because some of the manifolds serve two layers.
ND_FiBwTrunkMax := 12 in  # This constraint is arbitrary. We can bury the backwash trunk line in the floor and thus can accomodate any size backwash trunk line.
ID_FiBwTrunkMax := innerdiameter(ND_FiBwTrunkMax, PS_Default) = 11.71 in
# This doesn't need to be a constraint for backwash because we can use higher head loss through the slots during backwash to help create more uniform flow distribution.
Q_FiBwTrunkMax := π*ID_FiBwTrunkMax^2/4*V_FiMaxPR = 37.866 L/s
ND_FiTrunkMaxOld := Floor(H_FiLayer, 2 in) = 6 in
# We need a function that returns the next size smaller pipe for which the coupling outer diameter is smaller than the layer thickness. This is approximate...
ND_FiTrunkMax := 4 in  # to ensure that the pipes fit
ID_FiTrunkMax := innerdiameter(ND_FiTrunkMax, PS_Default) = 4.134 in
Q_TrunkMax := π*ID_FiTrunkMax^2/4*V_FiMaxPR = 4.71929 L/s
# The trunk lines provide the constraint for the maximum filter flow. Large trunk lines don't fit because they require more height than a filter layer.
Q_FiTrunkMax := Q_TrunkMax*N_FiLayer/2 = 14.1579 L/s
Q_FiMax := min(Q_FiMaxBranch, Q_FiBwTrunkMax, Q_FiTrunkMax) = 14.1579 L/s
# This is the maximum flow that a single stacked filter can handle given the assumption that it is using a single trunk line per layer. Larger filters would require multiple trunk lines.
# If one filter can handle it, this ratio will be less than one
N_Fi :=
    1 if Q_Plant/Q_FiMax < 1
    otherwise
        ceil(Q_Plant/Q_FiMax) if mod(ceil(Q_Plant/Q_FiMax), 2) == 0
        ceil(Q_Plant/Q_FiMax) + 1 otherwise
    = 2
# If the ratio is greater than 1, we want an even number of filters, so we check to see if it already defaulted to an even value.  If not, we add one.
# The flow will be divided evenly between the N_Fi = filters.
Q_Fi := Q_Plant/N_Fi = 9 L/s
A_Fi := Q_Fi/(N_FiLayer*V_FiLayer) = 0.818182 m^2  # This is the required area of each of the N_Fi = filters.
# Jeff explain what the code below is doing. How did you pick the two pipe sizes?
ManBranchSize :=
    ManBranchSize[0] ← Pipesizes[5, 0]
    ManBranchSize[1] ← Pipesizes[7, 0]
    return ManBranchSize  # Pipe sizes listed in order, regardless of PipeSpec
BranchManQ :=
    for i ∈ 0 .. rows(ManBranchSize) - 1
        BranchManQ[i] ← V_FiMaxPR*π*innerdiameter(ManBranchSize[i], PS_FiBranch)^2/4
    return BranchManQ
# Calculates Q in the manifold branch given the Velocity
BranchManL :=
    for i ∈ 0 .. rows(ManBranchSize) - 1
        BranchManL[i] ← BranchManQ[i]/(2*V_FiLayer*B_FiManifoldBranch)
    return BranchManL
# Calculates the length of the manifold branch given the filtration area and filtration velocity
NumBranch :=
    for i ∈ 0 .. rows(ManBranchSize) - 1
        NumBranch[i] ← A_Fi/(BranchManL[i]*B_FiManifoldBranch) if BranchManL[i] ≠ 0
    return NumBranch  # Calculates the number of branches reach the required filtration area
ManBranchSize =  # error
BranchManQ = L/s
BranchManL =  # error
NumBranch =  # error
Index :=
    i ← 0
    while i ≤ rows(ManBranchSize) - 1
        i ← i + 1 if NumBranch[i] > N_ManBranchMax
        return i otherwise
    return i
    = 0
# This returns the index of the smallest diameter pipe that has less than N_ManBranchMax = 20 manifold branches.  This is a constrained value based on what seems reasonable.  For now, there are only 2 pipe sizes we would use (1" and 1.5") for flow rates from 6 L/s to 25 L/s, but in the event we would have larger flow rates for a single filter box, this algorithm will still work once the above arrays are modified.
ND_FiManBranch := ManBranchSize[Index] = 1 in
N_FiManBranch := ceil(NumBranch[Index]) = 10
L_FiManBranchEst := A_Fi/(N_FiManBranch*B_FiManifoldBranch) = 0.818182 m
W_FiActive := L_FiManBranchEst = 0.818182 m
# This is only the active filtration width.  This extends from the edge of the filtration trunk lines to the lip that holds the manfiold branches in place.
L_Fi := N_FiManBranch*B_FiManifoldBranch = 1 m
Q_FiLayer := Q_Fi/N_FiLayer = 1.5 L/s  # This is the flow rate through each filter layer
Q_FiManBranch := Q_FiLayer*2/N_FiManBranch = 0.3 L/s  # This is the branch flow rate in the center inlets and outlets that serve two layers.
# The bottom manifold needs to be designed to handle full filter flow for backwash operation
Q_FiBwManBranch := Q_Fi/N_FiManBranch = 0.9 L/s
# Keypipe
OD_FiKeyPipeLarge := FloorNearest(SocketDepth(ND_FiBwTrunk), AvailOD)  # these are the dimensions of the largest possible keypipe that can fit
ND_FiKeyPipeLarge := NominalPipeSize(OD_FiKeyPipeLarge)  # omg! undefined ahhh!
ND_FiKeyPipe := 1.5 in  # we are just setting this to 1.5in for now
# Manifold Design justification
# Filtration mode constraints
# The inlet manifolds need to have a small piezometric head variation relative to the head loss through a clean sand bed. Given that both the trunk lines and the branches are short manifolds (fL/d < 1), the piezometric head variability is dominated by pressure recovery which is given by V^2/(2*g)*.  where the velocity is the initial velocity in the manifold. Thus the velocity in the trunk and branch lines is limited by this constraint. If we want to relax this constraint we could add head loss through the slots. But we need to be careful to not cause a flow imbalance between the inlets that carry flow for two layers and the inlets that carry flow for only one layer. Perhaps top inlet and bottom inlet should have only one line of slots per pipe instead of two lines. We are currently assuming that the backwash branches will have 1/2 the slot area of the branches in the other layers.
#
# Slot head loss issues
# If we use the slots to generate head loss in an effort to improve flow distribution, we need to account for sand blocking (1-ε) of the slots during filtration. The slots are not blocked during backwash (except perhaps during backwash initiation).
#
# Backwash mode constraints
# The  constraint on the design of the backwash manifold branches is that the flow rate from each slot must be close to the average (perhaps within 20%). We cannot rely on head loss through the filter media to help create uniform flow from the manifold during backwash because the filter bed will be fluidized. Thus we must design the backwash manifold to have uniform flow distribution without any external assistance. We can improve uniformity of flow distribution by decreasing head loss and pressure recovery in the manifold branches and in the trunk line and/or by increasing the head loss through the slots. The backwash system will also be used during filtration and the flow rate in the backwash manifold system will vary by a factor of 6 between those two states. Thus head loss through the slots will vary by a factor of 36 between the two states. We could use a relatively high slot head loss to get uniform flow distribution. The slot head loss must be small enough during filtration mode to not cause a flow inbalance between filter layers. That suggests that the slot head loss must be less than 10% of the clean bed head loss during filtration and thus less than 36 times that amount during backwash.
#
# Flow distribution in a short manifold is quite uniform for the case when the total port area is equal to or less than the manifold area. We have two manifold systems operating in series with trunk line distributing flow to branches and branches distributing flow to slots. Head loss through the slots effectively helps distribute flow between branches as well as between slots. Thus the constraints on both trunk and branch sizes are that they have pressure recovery terms that are small compared with the head loss through the slots.
# Algorithm for trunk, branch, slot design
# Head loss through the slots in the backwash manifold are directly related to the head loss throught the slots during filtration. The flow area during filtration will be reduced due to sand blocking. This results in a factor of ε_FiSand
# Calculate slot area for backwash assuming this head loss.
# Note that the slot area for backwash analysis should not be adjusted for sand porosity.
# Calculate size of branch lines using the rule that their area must exceed the port area.
# Given the area of the branch lines, recalculate the slot area by setting it equal to the branch area.
# Recalculate the actual head loss through the slots given this new slot area.
#
# Calculate the size of the trunk lines using the rule that their area must exceed the port area. Thus branches must have more area than the slots in a branch. Trunk must have more area than the branches.
HL_FiManifoldTarget =  # error
V_FiMaxPR =  # error
HL_FiBwSlotEst := HL_FiManifoldTarget*(Q_Fi*ε_FiSand/Q_FiLayer)^2 = 8.72224 cm
# This is the maximum head loss we can have in the backwash slots. The equation scales the filtration head loss target tot he backwash target taking into account the different flow rates and the assumption that the slots are blocked by sand during filtration (and not during backwash).
A_FiBwLayerSlotsEst := A_orifice(HL_FiBwSlotEst, Pi_VenaContractaOrifice, Q_Fi) = 109.223 cm^2
# Applying the rule that the branch area must be greater than or equal to the slot area
ND_FiBwManBranch := NominalDiameter(CeilNearest(D_circle(A_FiBwLayerSlotsEst/N_FiManBranch), AvailPipeSizes(PS_FiBranch)[:, 0]), PS_FiBranch) = 1.5 in
# Now that we have the backwash branch size we can determine the maximum slot size (to reduce head loss).
A_FiBwManBranches := π/4*innerD(ND_FiBwManBranch, PS_FiBranch)^2*N_FiManBranch
A_FiBwLayerSlots := A_FiBwManBranches = 131.344 cm^2  # Using same size slots as total branch area to get reasonable flow distribution.
HL_FiBwSlot := h_orifice(D_circle(A_FiBwLayerSlots), Pi_VenaContractaOrifice, Q_Fi) = 6.03164 cm
ND_FiBwTrunk := NominalDiameter(CeilNearest(D_circle(A_FiBwManBranches), AvailPipeSizes(PS_Default)[:, 0]), PS_Default) = 6 in
L_FiBwTrunk := L_Fi - 5 cm + outerradius(ND_FiBwManBranch) + ConRadius(ND_FiKeyPipe)
h_e(Q, D, K)
HL_FiBwInletManifold := 1/3*h_f(Q_Fi, innerD(ND_FiBwTrunk, PS_Default), L_Fi, Nu_Water, E_Pvc) + h_e(Q_Fi/N_FiManBranch, innerD(ND_FiBwManBranch, PS_FiBranch), K_PipeEnt) + (1/3*h_f(Q_Fi/N_FiManBranch, innerD(ND_FiBwManBranch, PS_FiBranch), W_FiActive, Nu_Water, E_Pvc) + HL_FiBwSlot) = 7.77125 cm
# Inner manifolds have double the slot area of the upper and lower manifolds
A_FiLayerSlots := 2*A_FiBwLayerSlots = 262.687 cm^2
# A conservative estimate of the head loss through the slots given sand blockage
HL_FiSlot := (2*Q_FiLayer/(Pi_VenaContractaOrifice*A_FiLayerSlots*ε_FiSand))^2*1/(2*g) = 1.04716 cm
HL_FiManifoldTarget =  # error
# This head loss should end up being smaller than HL_FiManifoldTarget.
# Pressure recovery dominates the design for filtration. The constraint on the manifolds is that the pressure recovery term must be small relative to the head loss through the filter bed.
# The ID.Manifold function calculates an ID given a pressure recovery constraint. It is only useful for designs that are dominated by pressure recovery rather than by head loss.
ND_FiTrunk := NominalDiameter(ID_Manifold(2*Q_FiLayer, HL_FiManifoldTarget), PS_Default) = 4 in
HL_FiTrunk := 1/3*h_l(2*Q_FiLayer, innerD(ND_FiTrunk, PS_Default), L_Fi, K_PipeExit, Nu_Water, E_Pvc) = 0.253886 cm
# This is the head loss in the manifold part of the trunk line. This does not include head loss in the rest of the inlet pipe.
ND_FiManBranch =  # error  # This was designed previously.
ShortTeeLength(ND_FiManBranch) =  # error
L_FiManBranchExt := 2 cm  # How far the branch extends into the trunk line
# Active width plus the T.ConcreteMin for the lip on the far side minus the Tee length from the wall plus a distance the branch will extend into the trunk line
L_FiManBranch := L_FiManBranchEst + T_ConcreteMin - ShortTeeLength(ND_FiManBranch) - ConRadius(ND_FiManBranch) + L_FiManBranchExt = 0.830238 m
L_FiBwManBranch := L_FiManBranchEst + T_ConcreteMin - ShortTeeLength(ND_FiBwManBranch) - ConRadius(ND_FiBwManBranch) + L_FiManBranchExt - (outerradius(ND_FiBwTrunk) - outerradius(ND_FiTrunk)) = 0.775469 m
# Same as above but the backwash branches will be shorter by the difference between the radius' of the trunks and backwash trunk
HL_FiInletManifold := 1/3*h_f(2*Q_FiLayer, innerD(ND_FiTrunk, PS_Default), L_Fi, Nu_Water, E_Pvc) + h_e(2*Q_FiLayer/N_FiManBranch, innerD(ND_FiManBranch, PS_FiBranch), K_PipeEnt) + 1/3*h_f(2*Q_FiLayer/N_FiManBranch, innerD(ND_FiManBranch, PS_FiBranch), W_FiActive, Nu_Water, E_Pvc) + HL_FiSlot = 2.37454 cm
# Slotted Pipe Specs
## General specifications
W_Slots := 0.008 in = 0.2032 mm  # A slot thickness of 0.008 in or 0.2 mm is selected so that sand will not enter the slotted pipes.
# These are the possible spacings for the slots that our supplier can fabricate
B_SlotsAvailable := [1/8*in; 3/16*in; 1/4*in] = [3.175; 4.7625; 6.35] mm
## Backwash manifold branches
ND_FiBwManBranch =  # error
N_FiManBranch =  # error
A_FiBwLayerSlots =  # error
# The slots should be configured to provide this total amount of slot area for the
# bottom manifold handling the backwash flow. We will define this as the inner diameter area of the slots
A_FiBwBranchSlots := A_FiBwLayerSlots/N_FiManBranch = 13.1344 cm^2  # This is the amount of slot area that must be available for each length of pipe.
L_FiBwManSlotTotal := A_FiBwBranchSlots/W_Slots = 6.46376 m  # The slots on each pipe must have this total length to provide the required area.
# We select  B_FiBwManSlot := 3/16*in = 4.7625 mm  for the closest slot spacing, and N_FiBwSlotRows := 2  for best structural integrity of these pipes
N_FiBwManSlots := floor(N_FiBwSlotRows*W_FiActive/B_FiBwManSlot) = 343
# Over the active area of the filter, there will be N_FiBwManSlots =slots whose area will effectively
# contribute to the total required slot area
L_FiBwManSlot := L_FiBwManSlotTotal/N_FiBwManSlots = 0.741921 in
C_FiBwManInner := π*innerdiameter(ND_FiBwManBranch, PS_FiBranch) = 5.05796 in  # Check
# SPECIFICATIONS:  we need  N_FiManBranch = pipes of diameter  ND_FiBwManBranch =  with  W_Slots = 0.2032 mm  wide,  L_FiBwManSlot =  long slots spaced at  B_FiBwManSlot = 0.1875 in
USD := ¤
P_FiBwManBranches := N_FiManBranch*1*m*(12*USD/(5 ft)) = 78.7402 USD
## Filtration manifold branches
ND_FiManBranch =  # error
N_FiManBranch =  # error
A_FiLayerSlots =  # error
A_FiBranchSlots := A_FiLayerSlots/N_FiManBranch = 26.2687 cm^2
L_FiManSlotTotal := A_FiBranchSlots/W_Slots = 12.9275 m
# We select  B_FiManSlot := 0.125 in = 3.175 mm  for the closest slot spacing, and N_FiSlotRows := 2  for best structural integrity of these pipes
N_FiManSlots := floor(N_FiSlotRows*W_FiActive/B_FiManSlot) = 515
# Over the active area of the filter, there will be N_FiManSlots =slots whose area will effectively
# contribute to the total required slot area
L_FiManSlot := L_FiManSlotTotal/N_FiManSlots = 0.988267 in
C_FiManInner := π*innerdiameter(ND_FiManBranch, PS_FiBranch) = 3.29553 in  # Check
# SPECIFICATIONS:  we need  N_FiManBranch*(N_FiLayer - 1) = pipes of diameter  ND_FiManBranch =  with  W_Slots = 0.2032 mm  wide,  L_FiManSlot =  long slots spaced at  B_FiManSlot = 0.125 in
P_FiManBranches := N_FiManBranch*(N_FiLayer - 1)*1*m*(9*USD/(5 ft)) = 295.276 USD
HL_FiInletPlumbing := h_l(2*Q_FiLayer, innerD(ND_FiTrunk, PS_Default), 2 m, K_El90 + K_PipeEnt, Nu_Water, E_Pvc) + HL_FiInletManifold = 3.5307 cm
HL_FiBwInletPlumbing := h_l(Q_Fi, innerD(ND_FiBwTrunk, PS_Default), 2 m, K_El90 + K_PipeEnt, Nu_Water, E_Pvc) + HL_FiBwInletManifold = 9.7548 cm
HL_FiOutletPlumbing := HL_FiInletPlumbing = 3.5307 cm
# Active filter area plus the diameter of the coupling in the wall plus  5 cm on the opposite side of the filter for the ledge that holds the man branches in place
W_Fi := W_FiActive + outerradius(ND_FiTrunk) + 0.5*OuterDiameterFittingPVC(ND_FiBwTrunk) + T_ConcreteMin = 1.01741 m
# Ratio of active width to actual width and the bulk backwash velocity
V_FiBw*W_FiActive/(W_Fi - 5 cm) =  # error
W_FiActive/W_Fi =  # error
# Calculate the Z of the backwash channel weir
# Calculate the head loss through the siphon during backwash
# AKA time to drain the filter box of the water above the fluidized bed
Ti_FiBwInitiationBod := 3 min
# Need a flow rate in order to determine HL through the siphon tube
#
# Siphon has to handle the entire flow into the filter plus drain the terminal head in Ti.FiBwInitiation.  This is aapproximately a "hole in a bucket problem" so the average flow rate is half the max flow (hence the factor of 2).  The HL sum corresponds to the height of water that needs to be drained; this ignores HL in the siphon because we don't know it yet, but it should be small...
Q_FiSiphonDesign := Q_Fi + 2*A_Fi*(HL_FiBwInitiation + HL_FiBwInletPlumbing)/Ti_FiBwInitiationBod = 24.3232 L/s
# Minor losses for flow through the siphon; they will be much greater than major losses, making major losses negligible.
#
# 1 is from losses through the branched path of a Tee
K_FiSiphon := K_El90 + K_PipeExit + K_PipeEnt + 1 = 3.4
h_eFiSiphonGuess := 10 cm  # Maximum acceptable head loss through the siphon at SS; used to calculate a Diameter
D_FiSiphonGuess := nthroot(K_FiSiphon*8/(g*π^2)*Q_FiSiphonDesign^2/(HL_FiBwInitiation + HL_FiBwInletPlumbing), 4) = 0.0996579 m
# Minor Loss Equation rearranged to solve for D, not necessarily an available pipe size
D_FiSiphonSSGuess := nthroot(K_FiSiphon*8/(g*π^2)*Q_Fi^2/h_eFiSiphonGuess, 4) = 0.122831 m
# This selects the more limiting case; appears it is SS
ND_FiSiphon := NominalPipeSize(max(D_FiSiphonGuess, D_FiSiphonSSGuess)) = 6 in
HL_FiSiphonSS := h_e(Q_Fi, innerD(ND_FiSiphon, PS_Default), K_FiSiphon) = 3.99418 cm  # Head loss through the siphon
# Washwater troughs
#
# Washwater troughs should be constructed to have
#
# a.  the bottom elevation above the maximum level of expanded media during washing,
#
# b.  a two‑inch freeboard at the maximum rate of wash,
#
# c.  the top edge level and all at the same elevation,
#
# d.  spacing so that each trough serves the same number of square feet of filter area,
#
# e.  maximum horizontal travel of suspended particles to reach the trough not to exceed three feet.
#
# http://10statesstandards.com/waterstandards.html#4.2.1
# Design backwash effluent manifold based on:
Q_Fi/(V_FiBw*π*L_Fi*N_FiManBranch) =  # error  # Zone of influence for a line source: taken to be a 1/2 cylinder
# Use of V.FiBw may be conservative because that is lower than the actual sedimentation velocity of the sand grains. Conservative is good...
# The ten state standards works because they are designing large filters and the backwash water trough is probably close to 30 cm deep. Thus there is a 30 cm vertical distance to the fluidized bed. We will be using
# How much space do we have for this backwash system currently? there is a SF.Fi above the end of the siphon to the water level (at no flow conditions) and SF.Fi between the siphon and the top of the fluidized bed.
#
# The radial flow to a cylinder isn't the correct model (it is VERY conservative) because there is significant head loss through the fluidized filter bed and that causes the flow out of the fluidized bed to be uniform across the entire top of the fluidized bed. The only reason for any departure from that would be if the horizontal velocities cause a significant change in pressure (Bernoulli effect) that would lower the water surface and raise the fluidized bed surface. What is the bulk density of the fluidized bed?
Rho_FiFluidized := (Rho_Water*H_FiSand*ε_FiSand + Rho_Water*H_FiSand*ε_FiSand*(Pi_FiFluidized - 1) + Rho_FiSand*H_FiSand*(1 - ε_FiSand))/(H_FiSand*Pi_FiFluidized) = 1623.08 kg/m^3
H_FiBwSandlift := 0.5 cm
V_FiBwHorizontalMax := sqrt(2*g*H_FiBwSandlift*(Rho_FiFluidized - Rho_Water)/Rho_Water) = 0.24719 m/s
V^2*Rho_Water/2 == g*h*(Rho_FiFluidized - Rho_Water)
# Suppose we only have a line of orifices near the side of a horizontal extension of the siphon.
V_FiBwHorizontal := V_FiBw*W_Fi*1/(SF_FiSiphonNoSuckAir + H_FiFluidizedBedToSiphon) = 0.0373049 m/s  # Yellow can all be deleted eventually.
W_Fi/2 =  # error
V_FiBwHorizontalTenStateStandards := V_FiBw*3*ft/(1 ft) = 0.033 m/s
# This is the velocity that apparently was causing sand suction in the lab. I think that this problem could have been reduced if the flow into the siphon tube had been horizontal rather than vertical.
V_SiphonLab := 5*L/min/(innerD(1 in, PS_Default)^2*π/4) = 0.11912 m/s
B_FiSiphonManOrificesEst := 10 cm
N_FiSiphonManOrifices := 2*floor((L_Fi - 2*ConRadius(ND_FiSiphon))/(2*B_FiSiphonManOrificesEst)) = 8
# This keeps the area of the orifices the same as the siphon area.
D_FiSiphonManOrifices := CeilNearest(innerdiameter(ND_FiSiphon, PS_Default)/sqrt(N_FiSiphonManOrifices), D_Drill) = 0.0546269 m
B_FiSiphonManOrifices := (L_Fi - 2*ConRadius(ND_FiSiphon) - N_FiSiphonManOrifices*D_FiSiphonManOrifices)/N_FiSiphonManOrifices + D_FiSiphonManOrifices
# Calculate the head loss over the weirs
# We are making the exit and backwash weirs as long as the filter is wide because it is a convenient dimension for construction.
ND_DistPipe := D_pipeschedule(Q_Plant, PS_Default, 1 m, 100 m, Nu_Water, E_Pvc, 2) = 6 in
L_FiWeir := max(OuterDiameterFittingPVC(ND_FiBwTrunk) + OuterDiameterFittingPVC(ND_FiTrunk) + OuterDiameterFittingPVC(ND_DistPipe) + 5*T_ConcreteMin, W_HumanMin) = 0.746887 m
# This is used for entrance and exit weirs (not necessarily backwash)
HL_FiBwWeirEst := Headloss_weir(Q_FiSiphonDesign, L_FiWeir) = 6.74259 cm
# Head loss is actually less than this because the weir is longer.  We don;t know what that L is until after the BW box is designed, which is not done until Q.FiSiphonMax is known which requires HL over the weir....its circular
HL_FiWeir := Headloss_weir(Q_Fi, L_FiWeir) = 3.47516 cm  # This is true of the entrance and exit weirs
## Design a pipe to convey flow from the sed tank to the entrance box
HL_FiWeir =  # error  # Head loss over the weir into the entrance box
L_FiInletChannelEst := 1.2*(W_Fi + T_FiWall)*N_Fi  # multiplied just in case
L_FiEntrancePipeEst :=
    (W_DC + (W_FlocChannel + T_PlantWall)*N_FlocChannels - L_FiInletChannelEst + 1.2*max(50 cm, H_SedExitChannel + T_PlantWall) + 3*T_PlantWall + T_Floor + S_Fitting) if (W_FlocChannel + T_PlantWall)*N_FlocChannels - L_FiInletChannelEst > 0
    (W_DC + 1.2*max(50 cm, H_SedExitChannel + T_PlantWall) + T_Floor + S_Fitting + 3*T_PlantWall) otherwise
K_FiEntrancePipe := 2*K_El90  # worst case scenario
# Set a target of  HL_FiEntrancePipeTarget := 5 cm  to keep the level of water in the pipe below the sed weir.  If the pipe ends up being completely submerged, it will
# affect the level of water in the sed tanks.
ND_FiEntrancePipeMax := 8 in
ND_FiEntrancePipe := min(D_pipeschedule(Q_Plant, PS_Default, HL_FiEntrancePipeTarget, L_FiEntrancePipeEst, Nu_Water, E_Pvc, K_FiEntrancePipe), ND_FiEntrancePipeMax)
ND_FiEntrancePipe =  # error
H_WalkwayToTankWall := H_SedExitChannel + CouplingLength(ND_FiEntrancePipe) + SocketDepth(ND_FiEntrancePipe) + ElbowRadius(ND_FiEntrancePipe) - ConRadius(ND_FiEntrancePipe) - S_Fitting - T_Floor
HL_FiEntrancePipe := h_l(Q_Plant, innerdiameter(ND_FiEntrancePipe, PS_Default), L_FiEntrancePipeEst, K_FiEntrancePipe, Nu_Water, E_Pvc)
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# This will be the pipe layout in the entrance and exit boxes to allow for 2 90 degree elbows in  Pipes 2 and 3 coming from the entrance box (on the right)
# Inlet Channel to the Filter
ZW_FiInletChannel := Plant_Origin[2] + Z_SedChannelBottom + HW_SedExitChannel - HL_FiEntrancePipe
Z_FiEntranceWeir := ZW_FiInletChannel - HL_FiWeir
# This is the height of the entrance weir at the inlet of the entrance box and represents the maximum water height in the entrance box
Z_FiBwWeir := Z_FiEntranceWeir - (HL_FiBwInletPlumbing + HL_FiBwInitiation + HL_FiSiphonSS + HL_FiWeir) = 0.121324 m
Z_FiEntranceWeir - Z_FiBwWeir =  # error  # This is the head loss available to drive water through the filter during backwash mode.
# Now calulate the max flow rate through the siphon and check the weir design to make sure the backwash box doesn't overflow at the beginning of backwash.
Q_FiSiphonMax := Q_pipetotal(innerD(ND_FiSiphon, PS_Default), Z_FiEntranceWeir - (Z_FiBwWeir - HL_FiBwWeirEst), 4 m, Nu_Water, E_Pvc, K_FiSiphon) = 57.0158 L/s
# The length of the siphon is estimated here because we don't yet know all the required elevations. Major losses aren't that significant and so the length estimate doesn't cause significant errors.
HL_FiBwWeir := Headloss_weir(Q_FiSiphonMax, L_FiWeir) = 11.8981 cm
Ti_FiBwInitiation := 2*A_Fi*(HL_FiBwInitiation + HL_FiBwInletPlumbing)/(Q_FiSiphonMax - Q_Fi) = 57.4429 s
# This time estimate is approximate. The flow is varying with time. The factor of 2 is an approximate integration constant. (average flow is half the max). But this doesn't account correctly for the influence of the constant filtration flow.
# Calculate the elevation of bottom of the filter box and its height
H_FiFluidizedBed := Pi_FiFluidized*H_FiSand
# This SF is so the end of the pipe is 10 cm under water
Z_FiSiphonInlet := Z_FiBwWeir - SF_FiSiphonNoSuckAir = 0.0213238 m
# Minimum length of the siphon that needs to be submerged in the filter box is set to the SF
Z_FiBottom := Z_FiSiphonInlet - H_FiFluidizedBed - H_FiFluidizedBedToSiphon - ConRadius(ND_FiBwManBranch) = -1.76725 m
H_Fi := Z_FiEntranceWeir + H_PlantFreeboard - Z_FiBottom = 3.74882 m
Z_FiTop := Z_FiBottom + H_Fi = 1.98157 m
H_FiCheck := H_FiFluidizedBed + H_FiFluidizedBedToSiphon + HL_FiBwInitiation + H_PlantFreeboard + SF_FiSiphonNoSuckAir + HL_FiBwInletPlumbing + HL_FiSiphonSS + HL_FiWeir + ConRadius(ND_FiBwManBranch) = 3.74882 m
# Just done to verify that the H.Fi calculation is correct.  See the wiki for a picture.
# Calculate the dimesions of the entrance box
Z_FiExitWeir := Z_FiEntranceWeir - (HL_FiTerminal + HL_FiInletPlumbing + HL_FiOutletPlumbing) = 1.35952 m
# This sets the bottom of the entrance and exit tanks low enough to work for both the entrance tank requirements and the exit tank requirements. SF for not sucking air into the backwash line and for providing a minimum depth of water in the outlet to back up behind the weir. Also, its low enough to not require an extra elbow to pipe from sed tank.
SF_FiMinWaterDepth := 10 cm
Z_FiEntranceBottom := min(Z_FiEntranceWeir - max(HL_FiBwSF, HL_FiDirty) - SF_FiBwNoSuckAir - H_Freefall, Z_FiExitWeir - SF_FiMinWaterDepth - H_Freefall, Plant_Origin[2] + H_Sed - H_WalkwayToTankWall - T_Floor - 2*S_Fitting - 2*ConRadius(ND_FiEntrancePipe)) = 0.940649 m
H_FiEntrance := Z_FiEntranceWeir - Z_FiEntranceBottom + H_PlantFreeboard
HW_FiEntrance := H_FiEntrance - H_PlantFreeboard - H_Freefall
Z_FiEntranceBottom + H_FiEntrance =  # error  # The entrance channel wall opposite and perpendicular the weir is the same height as the filter box
# W.FiEntrance is calculated below (under the overflow box) because we need those dimensions first to ensure any "extra" space is allotted in the entrance box rather than the overflow box
# space between right side of entrance box and baffle:
S_FiEntranceBaffle := (Q_Fi/L_FiWeir)^(3/4)*(1/Pi_JSOptimal)^(1/4)*(K_FlocBaffle*α_ε(Pi_JSOptimal)/(2*ED_Floc))^(1/4)
# allowing the energy dissipation in the flocculator is conservative
H_FiAirRemovalBlock := S_FiEntranceBaffle*Pi_JSOptimal
# gives one-tenth of the capture velocity of the sed tank
W_FiAirRemovalBlock := min(W_SedBay*L_Sed/(L_FiWeir*10), 15 cm)
W_FiOverflow := 2*T_ConcreteMin + OuterDiameterFittingPVC(ND_DistPipe) = 0.28415 m
W_FiEntrance := max(2*T_ConcreteMin + 2*ElbowRadius(ND_FiTrunk) + ConRadius(ND_FiBwTrunk) + 3*ConRadius(ND_FiTrunk) + 2*SocketDepth(ND_FiTrunk), (2*W_Fi + T_FiWall - 2*T_PlantWall - W_FiOverflow)/2) = 0.850332 m
L_FiEntrance := L_FiWeir + 2*S_FiEntranceBaffle + T_ConcreteMin + W_FiAirRemovalBlock
# Calculate the dimensions of the overflow box
ND_FiEntranceOverflow := NominalPipeSize(D_PipeTotal(Q_Fi, 1 m, 1 m, Nu_Water, E_Pvc, K_PipeExit + K_PipeEnt)) = 3 in
L_FiOverflow := L_FiEntrance
H_FiOverflow := H_FiEntrance
Z_FiOverflowBottom := Z_FiEntranceBottom = 0.940649 m
Z_FiOverflowWeir := HW_FiEntrance - HL_FiWeir + Z_FiEntranceBottom
# How much does the filter bed over fluidize when the entrance box level lowers after backwash initiation?
H_FiFluidizedBedVariation := (HL_FiBwInitiation - HL_FiBwSS)*(W_FiEntrance^2 - 3*OuterDiameterFittingPVC(ND_FiTrunk)^2/4*π)/A_Fi = 0.334451 m
HL_FiBwInitiation - HL_FiBwSS = 0.4 m
HL_FiBwInletPlumbing =  # error
Q_Ratio := sqrt((HL_FiBwInitiation - HL_FiBwSS)/HL_FiBwInletPlumbing) = 2.02498
# We will leave the bottom of these tanks at a low elevation (that we have calculated) and add pipe stubs as needed. We need to experiment with free fall in the backwash pipe and with the inevitable entrainment of air to see if that is a problem. There will be a tradeoff between air entrainment and fluidized bed expansion. We may want to include an air vent in the backwash pipe (T with vertical leg returning to above original water height to vent air).
# Calculate the dimensions of the exit box
# Calculate ND for the waste pipe (check this)
ND_FiExitWaste := NominalPipeSize(D_PipeTotal(Q_Fi, 2 m, 1 m, Nu_Water, E_Pvc, K_PipeExit + K_PipeEnt + 2*K_El90)) = 3 in
# This means the water level in the entrance box will actually be 10 cm higher than we assumed in previous calculations to ensure BW initiation (aka we have a 10cm SF for BW initiation)
# The goal is to have water start overflowing from the entrance tank when the filter reaches terminal head loss
Z_SedWeirExit - Z_FiExitWeir =  # error  # This is the energy used to filter water
Z_FiEntranceWeir - Z_FiExitWeir =  # error  # Difference in heights for the Exit and Entrance weirs
# The first two terms determine the height of the water at BW SS.  The additonal terms calculates the additional height to prevent the pressure in the lowest outlet pipe from causing backwash water to flow into the exit box.
Z_FiExitPipeStubMin := Z_FiBwWeir + HL_FiSiphonSS + (HL_FiBwSS*(H_FiFluidizedBed - H_FiLayer)/H_FiFluidizedBed) = 1.19696 m
ZW_FiExit
Z_FiExitBottom := Z_FiEntranceBottom = 0.940649 m
# The bottom of the tank is currently above the minimum stub height in the exit box and thus pipe stubs are not needed in the exit box to prevent flow of water during backwash.
ZW_FiExit := Z_FiExitWeir + HL_FiWeir = 1.39428 m
H_FiExit := ZW_FiExit - Z_FiExitBottom + H_PlantFreeboard = 0.553626 m
L_FiExit := L_FiWeir
W_FiExit := W_FiEntrance = 0.850332 m
W_Fi + OuterDiameterFittingPVC(ND_FiBwTrunk) - (W_FiExit + .5*OuterDiameterFittingPVC(ND_DistPipe)) =  # error
# This is a check to make sure the  entrance/exit boxes in different filters did not overlap
Z_FiInletChannelBottom := Z_FiExitBottom
HW_FiInletChannel := ZW_FiInletChannel - Z_FiInletChannelBottom
H_FiInletChannel := HW_FiInletChannel + H_PlantFreeboard
W_FiInletChannel := max(W_HorizChannelMin(Q_Plant, HW_FiInletChannel, L_FiEntrancePipeEst, Nu_Water, E_Pvc, 0), 2*ConRadius(ND_FiEntrancePipe) + 2*S_Fitting)
# Calculate the dimensions of the backwash box
# Minimum height of water in the filter box during filtration
ZW_FiStart := Z_FiExitWeir + HL_FiOutletPlumbing + HL_FiCleanLayer + HL_FiWeir = 1.58101 m
# This is the center line of the pipe through the wall.  This is a maximum based on zero flow and the goal of wanting to be able to initiate backwash at the beginning of filtration. This constraint could be relaxed if needed.
Z_FiSiphonCouplingMax := Z_FiExitWeir - outerdiameter(ND_FiSiphon)/2 = 1.27539 m
# This is based on the lab constraint that the depth of water above the pipe cannot be longer than the pipe inside the filter
Z_FiSiphonCouplingMinSimplistic := ((Z_FiTop - H_PlantFreeboard) + Z_FiSiphonInlet)/2 + outerdiameter(ND_FiSiphon)/2 = 1.03558 m
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H_FiSiphonMax := Z_FiTop - H_PlantFreeboard - Z_FiBwWeir = 1.76024 m  # Max water elevation difference between filter and backwash tank
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L_FiSiphonTop := L_Fi/2 + ShortTeeLength(ND_FiBwManBranch) + T_PlantWall = 0.70715 m
P_Atm := 1 atm
Z_FiSiphonCouplingMin := Z_FiTop - H_PlantFreeboard - (H_FiSiphonMax - HL_FiSiphonSS)*P_Atm/(Rho_Water*g*(L_FiSiphonTop + H_FiSiphonMax) + 2*P_Atm) + outerdiameter(ND_FiSiphon)/2 = 1.1973 m
Z_FiSiphonCoupling := Z_FiSiphonCouplingMax = 1.27539 m
# This is based on the constraint that we want the siphon to function at half flow rate (and it would actually work at zero flow as well). The siphon is completely submerged if water is flowing across the exit weir.
Z_FiSiphonCouplingMax - Z_FiSiphonCouplingMin =  # error  # Not much room to spare here!
H_FiBwWeir := Z_FiBwWeir - Z_FiBottom = 1.88858 m
# We decided we could simultaneous make the box shallow and the pipe the shortest it could be by raising the bottom of the filter box.  In the event we want to change that constraint, this is the amount of room we have to play with.  For every cm we lower this, we lowert he other end 1 cm plus another 1.5cm to ensure air doesn't leak out.  We can use this to calculate a min
H_FiBw := H_FiBwWeir + H_PlantFreeboard + HL_FiBwWeir = 2.10756 m
Q_FiSiphonMax = L/s  # Just for reference
ND_FiBwWeirDrain := D_pipeschedule(Q_FiSiphonMax, PS_Default, H_FiBwWeir, H_FiBwWeir, Nu_Water, E_Pvc, K_El90 + K_PipeEnt + K_PipeExit) = 6 in
# This means we are using a drain channel
ND_FiBwDrain := 3 in
# This is the drain for the box that holds the water level for backwash and keeps the air trapped in the siphon. Sand may be caught in this box and the drain can be used to empty this box.
W_FiBw := OuterDiameterFittingPVC(ND_FiBwDrain) + 4*T_ConcreteMin + 2*OuterDiameterFittingPVC(ND_FiSiphon) = 0.6699 m
# This is the addition of the two siphon pipes and the drain pipe for the backwash box
L_FiBw := max(2*outerdiameter(ND_FiSiphon) + SocketDepth(ND_FiSiphon) + 5 cm + CouplingLength(ND_FiSiphon) - T_PlantWall, W_HumanMin) = 0.6 m
# 5 cm is for exposed pipe, 1 of the diameters is for the elbow radius
Z_FiBwBottom := Z_FiBottom = -1.76725 m
Z_FiBwTop := Z_FiBwBottom + H_FiBw = 0.340305 m
# Calculate the dimensions of the backwash drain box
W_FiBwWeirDrain := W_FiBw = 0.6699 m
# Make sure the wall thickness for all walls in the BW Box are T.PlantWall, including the weir because the Weir wall goes all the way to the floor
L_FiBwWeirDrain := 2*T_ConcreteMin + OuterDiameterFittingPVC(ND_FiBwWeirDrain)
# This means the depth of the box will scale with flow so that water will flow more smoothly into the pipe leading to the drain channel
Z_FiBwWeirDrainBottom := Z_FiBwWeir - ND_FiBwWeirDrain = -0.0310762 m
H_FiBwWeirDrain := Z_FiBwTop - Z_FiBwWeirDrainBottom = 0.371381 m
# Calculate the dimensions of the drain channel
Q_FiBwDrain := Q_FiSiphonMax = 57.0158 L/s
W_FiOverflow + 2*T_SedWeir - 2*T_PlantWall =  # error
# This is the space between the pipes that are coming down from the entrance and exit boxes and it is tiny...
# Length will be calculated in AutoCAD because having the various origins of the tanks will be helpful for doing so
Pi_Channel := 2/3
# 2/3 as deep as it is wide to keep it narrow.  This can change still.
L_ChannelEst := 2 m
ΔH_Est := 5 cm
W_FiBwDrain := max(W_HorizChannelΠ(Q_FiSiphonMax, Pi_Channel, ΔH_Est, L_ChannelEst, Nu_Water, E_Concrete, 0), OuterDiameterFittingPVC(ND_FiBwWeirDrain)) = 0.346107 m
H_FiBwDrain := H_HorizChannel(Q_FiSiphonMax, W_FiBwDrain, ΔH_Est, L_ChannelEst, Nu_Water, E_Concrete, 0) + H_PlantFreeboard = 0.33075 m
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# Calculate the Z of the top of the pipe stubs in the entrance and exit boxes
ZW_FiStart =  # error
# We are going to set the top one to some level (20cm) below the min water level (at the beginning of filtration) and then have some distance (5 cm) in between them.
Z_FiEntrancePipes :=
    for i ∈ 0 .. 3
        Z_FiEntrancePipes[0] ← ZW_FiStart - 20 cm if i == 0
        Z_FiEntrancePipes[i] ← Z_FiEntrancePipes[i - 1] - 5 cm otherwise
    return Z_FiEntrancePipes
    = [1.38101; 1.33101; 1.28101; 1.23101] m
# This may not be correct for the BW pipe which may need to be shorter, but Monore "really doesn't think so"
Z_FiExitPipes := [
    Z_FiExitWeir - SF_FiMinWaterDepth;
    Z_FiExitWeir - SF_FiMinWaterDepth;
    Z_FiExitWeir - SF_FiMinWaterDepth;
    Z_FiExitPipeStubMin
] = [1.25952; 1.25952; 1.25952; 1.19696] m
# Calculate the Siphon Valve Size
# The available head is equal to the difference between the bottom of the siphon pipe and the steady state water level in the filter.  This is a head available in terms of water.
HL_FiSiphonValveWater := (Z_FiSiphonCoupling - ND_FiSiphon/2) - (Z_FiBwWeir + HL_FiSiphonSS) = 1.03792 m
rho_Water := 998.2*kg/m^3
rho_Air := 1.204*kg/m^3
Vol_FiSiphonAir := (CouplingLength(ND_FiSiphon) + 4*outerdiameter(ND_FiSiphon) + 2*(Z_FiSiphonCoupling - Z_FiBwWeir))*π/4*innerdiameter(ND_FiSiphon, PS_Default)^2 = 58.8734 L
# Goal is to fill siphon tube with air in 1 second. To account for the diminishing head as the siphon tube fills with air we will use 0.5 seconds. This rapid fill is desirable so that the operator can open and then immediately close the valve without having to wait. This is important because the operator won't be able to see the air filling up the siphon tube.
Q_FiSiphonAir := Vol_FiSiphonAir/(0.5 s) = 117.747 L/s
HL_FiSiphonValveAir := HL_FiSiphonValveWater*rho_Water/rho_Air = 860.508 m  # This is the head available in terms of air.
K_FiSiphonValve := 3
# Entrance and Exit loses and ball valve losses
L_FiSiphonBreak := Z_FiBottom + H_Fi - Z_FiSiphonCoupling = 0.706179 m
# Estimated length of the pipe that will be connected to the air valve. Air valve will be at the very top of the filter.
ND_FiSiphonAirValve := NominalPipeSize(D_PipeTotal(Q_FiSiphonAir, HL_FiSiphonValveAir, L_FiSiphonBreak, Nu_Air, E_Pvc, K_FiSiphonValve)) = 2 in
# Piping and Fittings
# The last elbow for the backwash trunk line is replaced with a T.  The oppostie direction from the filter is a valve that goes to the waste channel in the event we want to dewater the filter without de-sanding it.
#
# The de-sanding pipe will be sized based on the volume of the fluidized bed being drained in under 5 minutes.  Predict a 3 in pipe
# There will be a tradeoff between air entrainment and fluidized bed expansion. We may want to include an air vent in the backwash pipe (T with vertical leg returning to above original water height to vent air).  (this should not be needed in the design as of late June 2011 because we are keeping the backwash inlet submerged at all times.)
# Sand removal pipe.
H_FiSandOutlet := 1 m  # to be high enough to dump into a 55 gal drum
# This can't be set any higher because the available head will be insufficient to pump sand unless we figure out a way to maintain a higher water level in the filter during the sand dump. See the small head loss available at the finish of pumping the sand below.
Z_FiSandOutlet := Z_FiBottom + H_FiSandOutlet = -0.767251 m
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Z_FiBwWeir =  # error
Z_FiBottom =  # error
HL_FiSandOutlet := Z_FiBwWeir - Z_FiSandOutlet = 0.888575 m  # This isn't quite right because of the different densities.
# Calculating head loss and density for this problem is a bit complicated. The sand bed has a density of
Rho_FiFluidized = 1623.08 kg/m^3
# This ends up changing Nu.Water, but that doesn't change the results because we are in the very turbulent domain of the Moody diagram. The available head has to take into account the different densities of the fluidized bed and the water above the bed. As the fluidized bed is drained the available head will decrease. Would it be possible to drain the sand out of the bed at the very beginning of the backwash cycle while the water depth above the bed is gradually decreasing? This extra bed depth would provide more head to push the sand through the sand outlet.
# At the beginning of sand pumping the filter box has fluidized sand (and thus a high fluid density) and thus the pressure at the entrance to the sand dump is high. At the end of the sand dump the filter is filled with water and thus the pressure at the entrance to the sand dump is much lower and yet the sand dump pipe is still filled with the high density fluidized sand.
HL_FiSandOutletStart := ((Z_FiBwWeir - Z_FiBottom - H_FiSand*Pi_FiFluidized)*Rho_Water + H_FiSand*Pi_FiFluidized*Rho_FiFluidized + (-H_FiSandOutlet*Rho_FiFluidized))/Rho_FiFluidized = 0.76244 m
HL_FiSandOutletFinish := ((Z_FiBwWeir - Z_FiBottom)*Rho_Water + (-H_FiSandOutlet*Rho_FiFluidized))/Rho_FiFluidized = 0.163577 m
V_FiSand := W_Fi*L_Fi*H_FiSand*Pi_FiFluidized = 1587.15 L  # Total volume of the fluidized bed
# Use the largest pipe that will fit between the branch lines (but not between the backwash branch lines)
ND_FiSandOutlet := LookupFloor(B_FiManifoldBranch - outerdiameter(ND_FiManBranch), AvailOD, AvailND) = 0.0508 m
Q_FiSandOutletStart := Q_pipetotal(innerdiameter(ND_FiSandOutlet, PS_Default), HL_FiSandOutletStart, H_FiSandOutlet, Nu_Water*Rho_Water/Rho_FiFluidized, E_Pvc, K_PipeExit + K_PipeEnt + 2*K_El90) = 4.79316 L/s
Q_FiSandOutletFinish := Q_pipetotal(innerdiameter(ND_FiSandOutlet, PS_Default), HL_FiSandOutletFinish, H_FiSandOutlet, Nu_Water*Rho_Water/Rho_FiFluidized, E_Pvc, K_PipeExit + K_PipeEnt + 2*K_El90) = 2.21697 L/s
Q_FiSandOutlet := (Q_FiSandOutletStart + Q_FiSandOutletFinish)/2  # This isn't quite right, but it is close.
Ti_FiSand := V_FiSand/Q_FiSandOutlet = 452.818 s  # This is the time required to empty the filter of the sand.
Ti_FiSandDrum := 220*L/Q_FiSandOutlet = 62.7663 s
Q_FiSandOutlet/(innerdiameter(ND_FiSandOutlet, PS_Default)^2/4*π) =  # error  # The velocity in the pipe is far greater than the backwash velocity
# Estimate of the flow rate that would allow sand to settle within the vertical pipe. This flow rate is really low and so the valve will need to be almost closed before the sand stops flowing.
Q_Settle := 5*mm/s*(innerdiameter(ND_FiSandOutlet, PS_Default)^2/4*π) = 0.0119632 L/s
