# [reference: MtoATranslators.xmcd]
# The wrapped MtoA translator contains the functions that the user will want to access. These functions will draw pieces with full functionality - specifying the location, dimension, and orientation of the object. Also, it contains layer control and subtraction capabilities for grouped objects.
# [reference: MtoATranslatorsWrapped.xmcd]
TrapezoidWallLayer := layer_new("TrapezoidWall", blue2)
SelectTrapezoidWallLayer := SelectLayer("TrapezoidWall")
TrapezoidWallFrz := FreezeLayer("TrapezoidWall")
ThawTrapezoidWall := ThawMultiple(["TrapezoidWall"])
SideWallLayer := layer_new("SideWall", blue2)
TankBottomLayer := layer_new("TankBottom", blue2)
SelectSideWallLayer := SelectLayer("SideWall")
SelectTankBottomLayer := SelectLayer("TankBottom")
SideWallFrz := FreezeLayer("SideWall")
TankBottomFrz := FreezeLayer("TankBottom")
ThawSideWall := ThawMultiple(["SideWall"])
ThawTankBottom := ThawMultiple(["TankBottom"])
# Trapezoid Face Dimentions: Faces 1 & 2
T_TankWall := 3/16*in
H_TrapezoidShort := 5 cm
H_TrapezoidTall := 10 cm
# L.Tank should be redefined to be the total lenght of the float valve and the safety space we add on the side of the tank that doesn't have the inlet
L_Tank := 15 cm
L_TankBottom := sqrt((H_TrapezoidTall - H_TrapezoidShort)^2 + L_Tank^2)
W_Tank := 3 cm  # This is the total width of the tank including thickness of walls
# Trapezoid Faces
# This origin is on the large trapezoid face of the CHT that is mounted to the Chemical Storage area wall. When this code for the CHT is implemented in the CDC.AC file, the CHT.Origin should be adjusted to be the origin on the wall.
CHT_Origin := [0 m; 0 m; 0 m]
Trapezoid1_Origin := CHT_Origin
Trapezoid2_Origin := Trapezoid1_Origin + [W_Tank - T_TankWall; 0 m; 0 m]
Trapezoid1Box_FarCorner := Trapezoid1_Origin + [T_TankWall; L_Tank; H_TrapezoidShort]
Trapezoid2Box_FarCorner := Trapezoid2_Origin + [T_TankWall; L_Tank; H_TrapezoidShort]
Trapezoid1Wedge_Origin := Trapezoid1_Origin + [0 m; L_Tank; 0 m]
Trapezoid2Wedge_Origin := Trapezoid2_Origin + [0 m; L_Tank; 0 m]
Trapezoid1Wedge_FarCorner := Trapezoid1Wedge_Origin + [-(H_TrapezoidTall - H_TrapezoidShort); -T_TankWall; L_Tank]
Trapezoid2Wedge_FarCorner := Trapezoid2Wedge_Origin + [-(H_TrapezoidTall - H_TrapezoidShort); -T_TankWall; L_Tank]
Trapezoid1Box := Box(Trapezoid1_Origin, Trapezoid1Box_FarCorner)
Trapezoid2Box := Box(Trapezoid2_Origin, Trapezoid2Box_FarCorner)
WedgeF(OriginPoint, FarCorner, AngleVector)
Trapezoid1Wedge := WedgeF(Trapezoid1Wedge_Origin, Trapezoid1Wedge_FarCorner, [270; 180; 270]*deg)
Trapezoid2Wedge := WedgeF(Trapezoid2Wedge_Origin, Trapezoid2Wedge_FarCorner, [270; 180; 270]*deg)
TankTrapezoidFaces_Script := stack(TrapezoidWallLayer, Trapezoid1Box, Trapezoid1Wedge, Union_All, TrapezoidWallFrz, SelectTrapezoidWallLayer, Trapezoid2Box, Trapezoid2Wedge, Union_All, TrapezoidWallFrz)
# Left and RIght Rectanglar Walls
LeftRectangle_Origin := Trapezoid1_Origin + [T_TankWall; 0 m; T_TankWall]
RightRectangle_Origin := Trapezoid1_Origin + [T_TankWall; L_Tank - T_TankWall; -(H_TrapezoidTall - H_TrapezoidShort) + T_TankWall]
LeftRectangle_FarCorner := LeftRectangle_Origin + [W_Tank - 2*T_TankWall; T_TankWall; H_TrapezoidShort - T_TankWall]
RightRectangle_FarCorner := RightRectangle_Origin + [W_Tank - 2*T_TankWall; T_TankWall; H_TrapezoidTall - T_TankWall]
LeftRectangleWall := Box(LeftRectangle_Origin, LeftRectangle_FarCorner)
RightRectangelWall := Box(RightRectangle_Origin, RightRectangle_FarCorner)
LeftWedge := WedgeF(LeftRectangle_Origin + [0 m; T_TankWall; 0 m], LeftRectangle_Origin + [
    T_TankWall;
    -(W_Tank - 3*T_TankWall);
    -T_TankWall*tan(-atan((H_TrapezoidTall - H_TrapezoidShort)/L_Tank))
], [-90; 180; 0]*deg)
RightWedge := WedgeF(RightRectangle_Origin, RightRectangle_Origin + [
    -T_TankWall;
    -(W_Tank - 2*T_TankWall);
    T_TankWall*tan(-atan((H_TrapezoidTall - H_TrapezoidShort)/L_Tank))
], [90; 0; 180]*deg)
RemoveWedge := SubtractF(["SideWall"], "DeleteMe")
GroupDelete, RemovePipeFit
TankLeftRightWalls_Script := stack(SideWallLayer, LeftRectangleWall, LeftWedge, Union_All, SideWallFrz, SelectSideWallLayer, RightRectangelWall, SideWallFrz, SelectSideWallLayer, RightWedge, GroupDelete, RemoveWedge, SideWallFrz)
# Bottom
TankBottom_Origin := LeftRectangle_Origin
TankBottom_FarCorner := TankBottom_Origin + [W_Tank - 2*T_TankWall; sqrt((H_TrapezoidTall - H_TrapezoidShort)^2 + L_Tank^2); -T_TankWall]
TankBottom := Box(TankBottom_Origin, TankBottom_FarCorner)
Rotate3D_TankBottom := Rotate3DLast(TankBottom_Origin, "x", -atan((H_TrapezoidTall - H_TrapezoidShort)/L_Tank))
TankBottom_Script := stack(TankBottomLayer, view("t"), TankBottom, Rotate3D_TankBottom, view("t"), TankBottomFrz)
CHT_Script := stack(TankTrapezoidFaces_Script, TankLeftRightWalls_Script, TankBottom_Script)
# [component: inputs CHT_Script]
