# References
Q_Plant := 40*L/s
HL_FlocMax := 40 cm
H_SedSlopesToFlocWeirMin := 25 cm
T_FlocSlab := 15 cm
T_SedWall := 15 cm
T_SedDividingWall := 15 cm
T_SedChannelWall := 15 cm
T_FlocWall := 15 cm
T_FlocDividingWall := 15 cm
T_FiWall := 25 cm
T_FiBoxWall := 15 cm
T_PlantWall := 15 cm
T_PlantFloor := 20 cm
T_ChemSlab := 15 cm
T_DrainChannelWall := 15 cm
C_CoagDoseMax := 40*mg/L
C_ChlorDoseAve := 1*mg/L
# Mathcad to AutoCAD translators:
# [reference: MtoATranslators.xmcd]
# The wrapped MtoA translator contains the functions that the user will want to access. These functions will draw pieces with full functionality - specifying the location, dimension, and orientation of the object. Also, it contains layer control and subtraction capabilities for grouped objects.
# [reference: MtoATranslatorsWrapped.xmcd]
# Plant design calculations:
# [reference: ExpertInputs.xmcd]
# [reference: MathFunctions.xmcd]
# [reference: PipeDatabase.xmcd]
# [reference: MaterialsDatabase.xmcd]
# [reference: FluidsFunctions.xmcd]
# [reference: SedimentationTank.xmcd]
# [reference: LFOM.xmcd]
# [reference: FlocculatorEntranceTank.xmcd]
# [reference: StackedRapidSandFilter.xmcd]
# [reference: ChemicalDoseController_st587.xmcd]
# AutoCAD drawing functions:
# [reference: ChannelF.xmcd]
# [reference: PlumbingF.xmcd]
# [reference: TankF.xmcd]
# [reference: StairsF.xmcd]
# [reference: DrainChannelF.xmcd]
# AutoCAD script files:
# [reference: FlocculatorAC.xmcd]
# [reference: SedimentationTankAC.xmcd]
# [reference: EntranceTankCompactAC.xmcd]
# [reference: StackedRapidSandFilterAC.xmcd]
# [reference: ChemStockTanksAC.xmcd]
# [reference: OperatorAccessAC.xmcd]
# Width and length of the chemical platform are defined in ChemStockTanksAC
ChemPlatform_Origin := [
    CoagTank_Origin[0] + R_CoagTank + T_ChemTankWall + S_ChemTankBorder - L_ChemPlatform;
    Et_Origin[1] + W_Et + T_PlantWall - W_ChemPlatform;
    CoagTank_Origin[2] - T_ChemTankWall - T_PlantWall
]
ChemPlatform_Dimensions := [L_ChemPlatform; W_ChemPlatform; T_PlantWall]
# Chemical Dose Controller
# Layers
# Lever Arm
MakeCdcLayer := layer_new("CdcLayer", ltgrey)
FreezeCdcLayer := FreezeLayer("CdcLayer")
ThawCdcLayer := ThawMultiple(["CdcLayer"])
CdcLeverLayer := layer_new("CdcLever", ltgrey)
SelectCdcLever := SelectLayer("CdcLever")
CdcLeverFrz := FreezeLayer("CdcLever")
CdcFloatLayer := layer_new("CdcFloat", red)
SelectCdcFloat := SelectLayer("CdcFloat")
CdcFloatFrz := FreezeLayer("CdcFloat")
CdcCoagManifoldPluLayer := layer_new("CdcCoagManifoldPlu", blue)
SelectCdcCoagManifoldPlu := SelectLayer("CdcCoagManifoldPlu")
CdcCoagManifoldPluFrz := FreezeLayer("CdcCoagManifoldPlu")
CdcCoagManifoldPluLongLayer := layer_new("CdcCoagManifoldPluLong", blue)
SelectCdcCoagManifoldPluLong := SelectLayer("CdcCoagManifoldPluLong")
CdcCoagManifoldPluLongFrz := FreezeLayer("CdcCoagManifoldPluLong")
CdcChlorManifoldPluLayer := layer_new("CdcChlorManifoldPlu", blue)
SelectCdcCoagManifoldPlu := SelectLayer("CdcChlorManifoldPlu")
CdcChlorManifoldPluFrz := FreezeLayer("CdcChlorManifoldPlu")
CdcManifoldFittingsLayer := layer_new("CdcManifoldFittings", green)
SelectCdcManifoldFittings := SelectLayer("CdcManifoldFittings")
CdcManifoldFittingsFrz := FreezeLayer("CdcManifoldFittings")
CdcCoagTeesLayer := layer_new("CdcCoagTees", green)
SelectCdcCoagTees := SelectLayer("CdcCoagTees")
CoagTeesFrz := FreezeLayer("CdcCoagTees")
CdcChlorTeesLayer := layer_new("CdcChlorTees")
SelectCdcChlorTees := SelectLayer("CdcChlorTees")
CdcChlorTeesFrz := FreezeLayer("CdcChlorTees")
CdcCoagManifoldValvesLayer := layer_new("CdcCoagManifoldValves", ltgrey)
SelectCdcCoagManifoldValves := SelectLayer("CdcCoagManifoldValves")
CdcCoagManifoldValvesFrz := FreezeLayer("CdcCoagManifoldValves")
CdcChlorManifoldValvesLayer := layer_new("CdcChlorManifoldValves", ltgrey)
SelectCdcChlorManifoldValves := SelectLayer("CdcChlorManifoldValves")
CdcChlorManifoldValvesFrz := FreezeLayer("CdcChlorManifoldValves")
# Dimensions
# Length of the float pipe must fill both caps plus some.
L_CdcFloat := 2*(CapHeight(ND_EtFloat) - CapThickness(ND_EtFloat)) + 1 in
Z_FloatTop := Z_Walkway - HL_Lfom + 1/2*L_CdcFloat + CapThickness(ND_EtFloat) = 1.20821 m  # this is used in the future.  not sure why it cant be this
# The elevation of the float with the center of the float being at the bottom row of orifices of the LFOM.
# five gallons bucket dimensions for constant head tanks
D_CHT := 30/3*cm
H_CHT := 37/3*cm
T_CHTwall := 1/3*cm
ND_DeliveryPipe := 1 in  # based on measurements in the lab and the system in Atima
PS_FlexTube := 2
L_PVCBallValve := .1625 m/2
B_DosingTubes := max(TeeLength(ND_DeliveryPipe) + 2*SocketDepth(ND_DeliveryPipe), 2*ElbowRadius(ND_DeliveryPipe) + 2*SocketDepth(ND_DeliveryPipe))
T_MountingBoard := 1.5 in
L_CoagDeliveryPipe := L_CoagTube + 2*L_PVCBallValve + 2*ShortTeeLength(ND_DeliveryPipe) + ElbowRadius(ND_DeliveryPipe) + OR_Fitting(ND_DeliveryPipe)
L_ChlorineDeliveryPipe := L_ChlorTube + 2*L_PVCBallValve + 2*ShortTeeLength(ND_DeliveryPipe) + ElbowRadius(ND_DeliveryPipe) + OR_Fitting(ND_DeliveryPipe)
L_DosingConnectors := L_PVCBallValve + SocketDepth(ND_DeliveryPipe)
# Lever Arm Dimensions
L_CdcLeverArm := 0.5 m
L_CdcLeverArmExtended := 8.5 cm
# Perpendicular distance from LeverArm.Origin to the Float Cable
L_CdcLeverHoriz := ((L_CdcLeverArm + L_CdcLeverArmExtended)^2 - HL_Lfom^2)^.5 = 0.52889 m
L_CdcLeverVert := HL_Lfom = 0.25 m  # Distance from the top most part of the Lever Arm on an angle to the height of the Lever Arm Pivot
AN_LA := asin(HL_Lfom/L_CdcLever)/deg = 30
D_CdcLeverCylinder1 := 1 in
D_CdcLeverCylinder4 := 2 in
D_CdcLeverCylinder2 := 0.5 in
L_CdcLeverPivottoCylinder2 := 6 cm  # Should be moved to expert inputs
L_CdcLeverCylinder2to3 := 9.5 cm
L_CdcLeverPivotBox := 2 in
T_CdcLeverArm := 1/8*in
L_CdcLeverMountingPlate := 6 in
W_CdcLeverPivotBox := 1 in
W_CdcLeverMountingPlate := 0.5 cm
H_CdcLeverArm := 1 in
H_CdcLeverMountingPlate := 2 in
H_CdcLeverPivotBox := 1 in
L_CdcLeverInnerBar := 7 in
# Origin Points
# Lever Arm Origin Points
CdcLeverArm_Origin := [
    Et_Origin[0] - L_Et + L_EtFrontWallToFloat + OR_Fitting(ND_EtFloat) - OR_Fitting(ND_EtFloat) + S_Fitting;
    Et_Origin[1] + W_Et + T_FlocWall;
    Z_EtTop + D_LABOrigintoLAOriginZ/2
] = [-5.76903; 10.75; 2.62087] m  # the x and y coordinates of LA.Origin were changed to those of the DosingSubBox.Origin
CdcLeverArm2_Origin := [CdcLeverArm_Origin[0] + OR_Fitting(ND_EtFloat); CdcLeverArm_Origin[1]; CdcLeverArm_Origin[2]] = [-5.65076; 10.75; 2.62087] m
CdcFloat_Origin := [
    (CdcLeverArm_Origin[0] + CdcLeverArm2_Origin[0])/2;
    CdcLeverArm_Origin[1] - L_CdcLeverHoriz;
    ZW_EtMax - T_EtFloat/2
] = [-5.70989; 10.2211; 2.48317] m
CdcLeverSlider1_Origin := [
    CdcLeverArm_Origin[0] - H_Slider + W_Slider;
    CdcLeverArm_Origin[1] + L_LAOriginToDtY/2 - H_Slider - zc;
    CdcLeverArm_Origin[2] + H_LeverArm + W_Slider
] = [-5.7817; 11.1147; 2.64947] m
CdcLeverSlider2_Origin := [
    CdcLeverArm2_Origin[0] - H_Slider + W_Slider;
    CdcLeverArm2_Origin[1] + L_LAOriginToDtY/2 - H_Slider - zc;
    CdcLeverArm2_Origin[2] + H_LeverArm + W_Slider
]
CdcLeverPivotBox_Origin := [
    CdcLeverArm_Origin[0] + OR_Fitting(ND_EtFloat)/3 - T_LeverArm;
    CdcLeverArm_Origin[1] + W_PivotBox/2;
    CdcLeverArm_Origin[2] + H_PivotBox
]
CdcLeverDropTube_Origin := [
    CdcLeverArm_Origin[0] - L_LAOriginToDtCenterX;
    CdcLeverArm_Origin[1] + L_LAOriginToDtY/2;
    CdcLeverArm_Origin[2] + L_LAOriginToDtZ + H_LeverArm
]
[
    LA_Origin[0] - L_LAOriginToDtCenterX;
    LA_Origin[1] + L_LAOriginToDtY/2;
    LA_Origin[2] + L_LAOriginToDtZ + H_LeverArm
]
CdcLeverDropTube2_Origin := [
    CdcLeverArm_Origin[0] + L_LAOriginToDtCenterX;
    CdcLeverArm_Origin[1] + L_LAOriginToDtY/2;
    CdcLeverArm_Origin[2] + L_LAOriginToDtZ + H_LeverArm
]
CHT_Origin := [
    ChemPlatform_Origin[0] + ChemPlatform_Dimensions[0] + T_PlantWall + 1/2*D_CHT;
    ChemPlatform_Origin[1] - 1/2*D_CHT + ChemPlatform_Dimensions[1] - T_PlantWall;
    ZW_CdcCht
] = [-7.78802; 10.55; 2.67587] m
CHT2_Origin := [CHT_Origin[0]; CHT_Origin[1] - 1.5*D_CHT; CHT_Origin[2]]
CHT3_Origin := [CHT_Origin[0]; CHT2_Origin[1] - 1.5*D_CHT; CHT_Origin[2]]
CHT4_Origin := [CHT_Origin[0]; CHT3_Origin[1] - 1.5*D_CHT; CHT_Origin[2]]
N_TubesTriggerStack := 2
# The first case triggers when both N values are equalt to 1, in other words when there are
# two Coag dosing tubes and two Chlor dosing tubes. This case will stack the dosing manifolds.
ChlorDeliveryPipe_Origin :=
    if N_CoagTubes + N_ChlorTubes ≤ N_TubesTriggerStack
        [
            EtLeverArm_Origin[0] + L_ChlorineDeliveryPipe + 2*(ElbowRadius(ND_DeliveryPipe) + SocketDepth(ND_DeliveryPipe));
            Et_Origin[1] - T_PlantWall - OR_Fitting(ND_DeliveryPipe);
            Z_Walkway + 1.5*OR_Fitting(ND_DeliveryPipe) + (N_CoagTubes + 2)*B_DosingTubes + ElbowRadius(ND_DeliveryPipe) + SocketDepth(ND_DeliveryPipe)
        ]
    if L_CoagDeliveryPipe ≤ L_ChlorineDeliveryPipe
        [
            EtLeverArm_Origin[0] + L_ChlorineDeliveryPipe;
            Et_Origin[1] - T_PlantWall - OR_Fitting(ND_DeliveryPipe);
            Z_Walkway + 1.5*OR_Fitting(ND_DeliveryPipe)
        ]
    otherwise
        [
            EtLeverArm_Origin[0] + L_ChlorineDeliveryPipe;
            Et_Origin[1] - T_PlantWall - OR_Fitting(ND_DeliveryPipe);
            Z_Walkway + 1.5*OR_Fitting(ND_DeliveryPipe) - ((-ElbowRadius(ND_DeliveryPipe) - OR_Fitting(ND_DeliveryPipe)/2 + 2*SocketDepth(ND_DeliveryPipe) + .5*TeeLength(ND_DeliveryPipe)) - S_Fitting - 2*OR_Fitting(ND_DeliveryPipe))
        ]
# The second case will nest the dosing manifolds with the chlorine delivery pipe on the bottom.
# The third case will nest the dosing manifolds with the coagulant delivery pipe on the bottom.
ChlorDosingTube_Origin :=
    if N_CoagTubes + N_ChlorTubes ≤ N_TubesTriggerStack
        ChlorDeliveryPipe_Origin + [
            -L_PVCBallValve - SocketDepth(ND_DeliveryPipe);
            0 m;
            ElbowRadius(ND_DeliveryPipe) + 2*SocketDepth(ND_DeliveryPipe) + .5*TeeLength(ND_DeliveryPipe)
        ]
    otherwise
        ChlorDeliveryPipe_Origin + [
            -L_PVCBallValve - SocketDepth(ND_DeliveryPipe);
            0 m;
            ElbowRadius(ND_DeliveryPipe) + 2*SocketDepth(ND_DeliveryPipe) + .5*TeeLength(ND_DeliveryPipe) + (N_CoagTubes + 1)*B_DosingTubes + L_PVCBallValve
        ]
OffsetCoagChlor :=
    if N_CoagTubes + N_ChlorTubes ≤ N_TubesTriggerStack
        [
            0 m;
            0 m;
            -((N_CoagTubes + 2)*B_DosingTubes + ElbowRadius(ND_DeliveryPipe) + SocketDepth(ND_DeliveryPipe))
        ]
    if L_CoagDeliveryPipe ≤ L_ChlorineDeliveryPipe
        [
            S_Fitting + OR_Fitting(ND_DeliveryPipe)/2;
            0 m;
            (ElbowRadius(ND_DeliveryPipe) + OR_Fitting(ND_DeliveryPipe)/2 + 2*SocketDepth(ND_DeliveryPipe) + .5*TeeLength(ND_DeliveryPipe)) - S_Fitting - 2*OR_Fitting(ND_DeliveryPipe)
        ]
    otherwise
        [
            -S_Fitting - OR_Fitting(ND_DeliveryPipe)/2;
            0 m;
            (-ElbowRadius(ND_DeliveryPipe) - OR_Fitting(ND_DeliveryPipe)/2 + 2*SocketDepth(ND_DeliveryPipe) + .5*TeeLength(ND_DeliveryPipe)) - S_Fitting - 2*OR_Fitting(ND_DeliveryPipe)
        ]
CoagDeliveryPipe_Origin := OffsetCoagChlor + [
    EtLeverArm_Origin[0] + L_CoagDeliveryPipe;
    Et_Origin[1] - T_PlantWall - OR_Fitting(ND_DeliveryPipe);
    ChlorDeliveryPipe_Origin[2]
]
LeaveSpaceForChlor :=
    2*SocketDepth(ND_DeliveryPipe) if N_CoagTubes + N_ChlorTubes ≤ N_TubesTriggerStack or L_CoagDeliveryPipe ≤ L_ChlorineDeliveryPipe
    3*SocketDepth(ND_DeliveryPipe) otherwise
CoagDosingTube_Origin := CoagDeliveryPipe_Origin + [
    -L_PVCBallValve - SocketDepth(ND_DeliveryPipe);
    0 m;
    ElbowRadius(ND_DeliveryPipe) + LeaveSpaceForChlor + .5*TeeLength(ND_DeliveryPipe)
]
# Lever Arms, Drop Tubes and Sliders
EtLeverArm1 := BoxF([EtLeverArm_Origin[0] + 1/8*in; EtLeverArm_Origin[1] - L_CdcLever; EtLeverArm_Origin[2]], [EtLeverArm_Origin[0]; EtLeverArm_Origin[1] + L_CdcLever; EtLeverArm_Origin[2] + H_LeverArm], [0; 0; 0]*deg)
# The L brackets which connect the lever arms to the entrance tank are drawn here.
[
    LA_Origin[0] - L_LArmBar/2;
    LA_Origin[1] + L_LArmBar/2;
    LA_Origin[2] + L_LBracket/2 - L_LBracket/8 - 3/4*L_LBracket
]
EtLeverDropTube1 := PipeF(LADt_Center, L_DropTube, [-AN_LA; -90]*deg, ND_DropTube, SDR_13.5)
EtLeverArm2 := BoxF([EtLeverArm2_Origin[0] + 1/8*in; EtLeverArm2_Origin[1] - L_CdcLever; EtLeverArm2_Origin[2]], [EtLeverArm2_Origin[0]; EtLeverArm2_Origin[1] + L_CdcLever; EtLeverArm2_Origin[2] + H_LeverArm], [0; 0; 0]*deg)
EtLeverDropTube2 := PipeF(LA2Dt_Center, L_DropTube, [-AN_LA; -90]*deg, ND_DropTube, SDR_13.5)
[
    LA2_Origin[0] - L_LArmBar/2;
    LA2_Origin[1] + L_LArmBar/2;
    LA_Origin[2] + L_LBracket/2 - L_LBracket/8 - 3/4*L_LBracket
] =  # error: This variable is undefined.
Rotate3D_EtLeverArm := Rotate3DLast([EtLeverArm_Origin[1]; EtLeverArm_Origin[2]; EtLeverArm_Origin[0]], "z", -AN_LA*deg)
EtLeverArmDropTube_Script := stack(MakeCdcLayer, EtLeverArm1, EtLeverArm2, EtLeverDropTube1, EtLeverDropTube2, FreezeCdcLayer, ThawCdcLayer, view("r"), Rotate3D_EtLeverArm, view("t"), FreezeCdcLayer)
EtLeverArmDropTube_Script := stack(MakeCdcLayer, EtLeverArm1, EtLeverDropTube1, FreezeCdcLayer, ThawCdcLayer, view("r"), Rotate3D_EtLeverArm, view("t"), FreezeCdcLayer)
EtLeverSlider2FirstSide := BoxF(EtLeverSlider2_Origin, [
    EtLeverSlider2_Origin[0] + L_Slider;
    EtLeverSlider2_Origin[1] + W_Slider;
    EtLeverSlider2_Origin[2] - H_Slider
], [90; 0; 0]*deg)
EtLeverSlider1FirstSide := BoxF(EtLeverSlider1_Origin, [
    EtLeverSlider1_Origin[0] + L_Slider;
    EtLeverSlider1_Origin[1] + W_Slider;
    EtLeverSlider1_Origin[2] - H_Slider
], [90; 0; 0]*deg)
EtLeverSlider1TopSide := BoxF(EtLeverSlider1_Origin, [
    EtLeverSlider1_Origin[0] + H_Slider;
    EtLeverSlider1_Origin + L_Slider;
    EtLeverSlider1_Origin[2] - W_Slider
], [0; 0; 0]*deg)
EtLeverSlider2TopSide := BoxF(EtLeverSlider2_Origin, [
    EtLeverSlider2_Origin[0] + H_Slider;
    EtLeverSlider2_Origin[1] + L_Slider;
    EtLeverSlider2_Origin[2] - W_Slider
], [0; 0; 0]*deg)
EtLeverSlider1SecondSide := BoxF([EtLeverSlider1_Origin[0] + H_Slider; EtLeverSlider1_Origin[1]; EtLeverSlider1_Origin[2]], [
    EtLeverSlider1_Origin[0] + H_Slider + W_Slider;
    EtLeverSlider1_Origin[1] + L_Slider;
    EtLeverSlider1_Origin[2] - H_Slider
], [0; 0; 0]*deg)
EtLeverSlider2SecondSide := BoxF([EtLeverSlider2_Origin[0] + H_Slider; EtLeverSlider2_Origin[1]; EtLeverSlider2_Origin[2]], [
    EtLeverSlider2_Origin[0] + H_Slider + W_Slider;
    EtLeverSlider2_Origin[1] + L_Slider;
    EtLeverSlider2_Origin[2] - H_Slider
], [0; 0; 0]*deg)
EtLeverSliders2_Script := stack(SliderLayer, Slider1FirstSide, Slider2FirstSide, Slider1TopSide, Slider2TopSide, Slider1SecondSide, Slider2SecondSide, FreezeSliders, ThawSliders, view("r"), Rotate3D_EtLeverArm, view("t"), FreezeSliders)
EtLeverSliders1_Script := stack(SliderLayer, Slider1FirstSide, Slider1TopSide, Slider1SecondSide, FreezeSliders)
# Connecting bars, Cylinders and Float Cable
EtLeverConnectingCylinder1 := CylinderSUBF([
    EtLeverArm_Origin[0] + T_LeverArmBar;
    EtLeverArm_Origin[1] - L_CdcLever + D_LeverArmConnectingCylinder1/2;
    EtLeverArm_Origin[2] + H_LeverArm/2
], D_LeverArmConnectingCylinder1/2, OR_Fitting(ND_EtFloat), [0; 180]*deg, ["CdcLayer"])
# Top most cylinder. Connected to float. Thickest
# Bottom most cylinder.
EtLeverConnectingCylinder4 := CylinderSUBF([
    EtLeverArm_Origin[0] + T_LeverArmBar;
    EtLeverArm_Origin[1] + L_CdcLever - D_LeverArmConnectingCylinder4/2;
    EtLeverArm_Origin[2] + H_LeverArm/2
], D_LeverArmConnectingCylinder4/2, OR_Fitting(ND_EtFloat), [0; 180]*deg, ["CdcLayer"])
[LA_Origin[0] + L_LArmBar/2; LA_Origin[1] + L_LArmBar/2 - W_LBracket/2; LA_Origin[2] + L_LBracket/2]
EtLeverConnectingCylinder2 := CylinderSUBF([
    EtLeverArm_Origin[0] + T_LeverArmBar;
    EtLeverArm_Origin[1] + L_LeverArmPivottoConnectingCylinder2;
    EtLeverArm_Origin[2] + H_LeverArm/2
], D_LeverArmConnectingCylinder2/2, OR_Fitting(ND_EtFloat), [0; 180]*deg, ["CdcLayer"])
# Cylinder closest to the pivot point
# lambars are the bars that connect the lever arms to the L-brackets
EtLeverConnectingCylinder3 := CylinderSUBF([
    EtLeverArm_Origin[0] + T_LeverArmBar;
    EtLeverArm_Origin[1] + L_LeverArmPivottoConnectingCylinder2 + L_LeverArmConnectingCylinder2toConnectingCylinder3;
    EtLeverArm_Origin[2] + H_LeverArm/2
], D_LeverArmConnectingCylinder2/2, OR_Fitting(ND_EtFloat), [0; 180]*deg, ["CdcLayer"])
[
    LA2_Origin[0] + L_LArmBar/2;
    (LA2_Origin[1] + L_LArmBar/2) - W_LBracket/2;
    LA2_Origin[2] + L_LBracket/2
]
EtLeverPivotBox := BoxF(PivotBox_Origin, [PivotBox_Origin[0] + L_PivotBox; PivotBox_Origin[1] - W_PivotBox; PivotBox_Origin[2] - H_PivotBox], [0; 0; AN_LA]*deg)
[LA_Origin[0] + H_LeverArm; LA2_Origin[1] + L_CdcLever - 4*zc; LA_Origin[2] + 4*W_LeverArm]
EtLeverMountingPlate := BoxF(PivotBox_Origin, [
    PivotBox_Origin[0] + H_LeverArmMountingPlate;
    PivotBox_Origin[1] + W_LeverArmMountingPlate;
    PivotBox_Origin[2] - L_LeverArmMountingPlate
], [0; 0; AN_LA]*deg)
EtLeverInnerBar1 := BoxF([PivotBox_Origin[0]; PivotBox_Origin[1] - W_PivotBox; PivotBox_Origin[2]], [
    PivotBox_Origin[0] - T_LeverArmBar;
    PivotBox_Origin[1] + L_LeverArmInnerBar;
    PivotBox_Origin[2] - H_LeverArmBar
], [0; 0; 0]*deg)
EtLeverInnerBar2 := BoxF([PivotBox_Origin[0] + L_PivotBox; PivotBox_Origin[1] - W_PivotBox; PivotBox_Origin[2]], [
    PivotBox_Origin[0] + L_PivotBox + T_LeverArmBar;
    PivotBox_Origin[1] + L_LeverArmInnerBar;
    PivotBox_Origin[2] - H_LeverArmBar
], [0; 0; 0]*deg)
L_Cable := (EtLeverArm_Origin[2] - EtFloat_Origin[2]) - T_EtFloat + L_CdcLeverVert
EtFloatCable := CylinderF([
    EtLeverArm_Origin[0] + OR_Fitting(ND_EtFloat)/2;
    EtLeverArm_Origin[1] - L_CdcLever + D_LeverArmConnectingCylinder1/2;
    EtLeverArm_Origin[2] + H_LeverArmBar/2
], L_Cable, [-AN_LA; -90]*deg)
ConnectCyl2_Script := stack(ConnectCylinderLayer, EtLeverConnectingCylinder1, EtLeverPivotBox, EtLeverMountingPlate, EtLeverInnerBar1, EtLeverInnerBar2, EtLeverConnectingCylinder2, EtLeverConnectingCylinder3, EtLeverConnectingCylinder4, EtFloatCable, FreezeConnectCylinderLayer, ThawConnectCylinderLayer, view("r"), Rotate3D_EtLeverArm, view("t"), FreezeConnectCylinderLayer)
ConnectCyl1_Script := stack(ConnectCylinderLayer, LarmBar1, FloatCable, FreezeConnectCylinderLayer)
# Sliders
EtLeverSlider1FirstSide := BoxF(EtLeverSlider1_Origin, [
    EtLeverSlider1_Origin[0] + L_Slider;
    EtLeverSlider1_Origin[1] + W_Slider;
    EtLeverSlider1_Origin[2] - H_Slider
], [90; 0; 0]*deg)
EtLeverSlider2FirstSide := BoxF(EtLeverSlider2_Origin, [
    EtLeverSlider2_Origin[0] + L_Slider;
    EtLeverSlider2_Origin[1] + W_Slider;
    EtLeverSlider2_Origin[2] - H_Slider
], [90; 0; 0]*deg)
EtLeverSlider1TopSide := BoxF(EtLeverSlider1_Origin, [
    EtLeverSlider1_Origin[0] + H_Slider;
    EtLeverSlider1_Origin + L_Slider;
    EtLeverSlider1_Origin[2] - W_Slider
], [0; 0; 0]*deg)
EtLeverSlider2TopSide := BoxF(EtLeverSlider2_Origin, [
    EtLeverSlider2_Origin[0] + H_Slider;
    EtLeverSlider2_Origin[1] + L_Slider;
    EtLeverSlider2_Origin[2] - W_Slider
], [0; 0; 0]*deg)
EtLeverSlider1SecondSide := BoxF([EtLeverSlider1_Origin[0] + H_Slider; EtLeverSlider1_Origin[1]; EtLeverSlider1_Origin[2]], [
    EtLeverSlider1_Origin[0] + H_Slider + W_Slider;
    EtLeverSlider1_Origin[1] + L_Slider;
    EtLeverSlider1_Origin[2] - H_Slider
], [0; 0; 0]*deg)
EtLeverSlider2SecondSide := BoxF([EtLeverSlider2_Origin[0] + H_Slider; EtLeverSlider2_Origin[1]; EtLeverSlider2_Origin[2]], [
    EtLeverSlider2_Origin[0] + H_Slider + W_Slider;
    EtLeverSlider2_Origin[1] + L_Slider;
    EtLeverSlider2_Origin[2] - H_Slider
], [0; 0; 0]*deg)
Sliders2_Script := stack(SliderLayer, Slider1FirstSide, Slider2FirstSide, Slider1TopSide, Slider2TopSide, Slider1SecondSide, Slider2SecondSide, FreezeSliders, ThawSliders, view("r"), Rotate3D_EtLeverArm, view("t"), FreezeSliders)
Sliders1_Script := stack(SliderLayer, Slider1FirstSide, Slider1TopSide, Slider1SecondSide, FreezeSliders)
# Float
EtFloat := CylinderF(EtFloat_Origin, OR_Fitting(ND_EtFloat), T_EtFloat, [0; 90]*deg)
EtFloatScript := stack(EtFloatLayer, EtFloat, EtFloatFrz)
Cdc2_Script := stack(LeverArmCHT2_Script, ConnectCyl2_Script, Sliders2_Script, EtFloatScript)
leverwithbars := stack(LeverArmCHT2_Script, ConnectCyl2_Script, Sliders2_Script)
Cdc1_Script := stack(LeverArmCHT1_Script, ConnectCyl1_Script, Sliders1_Script, EtFloatScript)
# [component: inputs leverwithbars]
CoagConnectorPipe := PipeF(CoagDosingTube_Origin + [L_DosingConnectors + ShortTeeLength(ND_DeliveryPipe); 0 m; 0.5*TeeLength(ND_DeliveryPipe)], 2*SocketDepth(ND_DeliveryPipe), [0; 90]*deg, ND_DeliveryPipe, SDR_13.5)
ArrayCoagConnectorPipe := ArrayLast(N_CoagTubes + 1, 1, B_DosingTubes)
MirrorCoagConnectorPipe := Mirror3dAll("yz", [
    CoagDosingTube_Origin[0] - .5*L_TubeStockToCHEst;
    CoagDosingTube_Origin[1];
    CoagDosingTube_Origin[2] + 1/4*H_Et + ShortTeeLength(ND_DeliveryPipe) + .5*ND_DeliveryPipe
], "n")
CoagDeliveryConnectorPipe := PipeF(CoagDosingTube_Origin + [
    L_DosingConnectors + ShortTeeLength(ND_DeliveryPipe);
    0 m;
    -0.5*TeeLength(ND_DeliveryPipe) - 2*SocketDepth(ND_DeliveryPipe)
], 2*SocketDepth(ND_DeliveryPipe), [0; 90]*deg, ND_DeliveryPipe, SDR_13.5)
CoagDeliveryPipe := PipeF(CoagDeliveryPipe_Origin, L_CoagDeliveryPipe, [0; 0]*deg, ND_DeliveryPipe, SDR_13.5)
L_CoagLongConnectorPipe := CoagDosingTube_Origin[2] - CoagDeliveryPipe_Origin[2] - .5*TeeLength(ND_DeliveryPipe) - ElbowRadius(ND_DeliveryPipe)
CoagConnectorPipeLong := PipeF(CoagDosingTube_Origin + [L_DosingConnectors + ShortTeeLength(ND_DeliveryPipe); 0 m; -.5*TeeLength(ND_DeliveryPipe)], L_CoagLongConnectorPipe, [0; -90]*deg, ND_DeliveryPipe, SDR_13.5)
ChlorConnectorPipe := PipeF(ChlorDosingTube_Origin + [L_DosingConnectors + ShortTeeLength(ND_DeliveryPipe); 0 m; .5*TeeLength(ND_DeliveryPipe)], 2*SocketDepth(ND_DeliveryPipe), [0; 90]*deg, ND_DeliveryPipe, SDR_13.5)
ArrayChlorConnectorPipe := ArrayLast(N_ChlorTubes + 1, 1, B_DosingTubes)
MirrorChlorConnectorPipe := Mirror3dAll("yz", [
    ChlorDosingTube_Origin[0] - .5*L_ChlorTube;
    ChlorDosingTube_Origin[1];
    ChlorDosingTube_Origin[2] + 1/4*H_Et + ShortTeeLength(ND_DeliveryPipe) + .5*ND_DeliveryPipe
], "n")
L_ChlorLongConnectorPipe :=
    2*SocketDepth(ND_DeliveryPipe) if N_CoagTubes + N_ChlorTubes ≤ N_TubesTriggerStack
    ChlorDosingTube_Origin[2] - ChlorDeliveryPipe_Origin[2] - .5*TeeLength(ND_DeliveryPipe) - ElbowRadius(ND_DeliveryPipe) if L_ChlorineDeliveryPipe > L_CoagDeliveryPipe + 2*(ElbowRadius(ND_DeliveryPipe) + SocketDepth(ND_DeliveryPipe))
    max(ChlorDosingTube_Origin[2] - ChlorDeliveryPipe_Origin[2] - .5*TeeLength(ND_DeliveryPipe) - ElbowRadius(ND_DeliveryPipe) - (2*sin(45 deg)*(2*ElbowRadius(ND_DeliveryPipe) + 2*SocketDepth(ND_DeliveryPipe)) + (N_ChlorTubes + 1)*B_DosingTubes + sin(45 deg)*(1 - tan(22.5 deg))*ElbowRadius(ND_DeliveryPipe) + SocketDepth(ND_DeliveryPipe)), 2*SocketDepth(ND_DeliveryPipe)) otherwise
ChlorConnectorPipeLong := PipeF(ChlorDosingTube_Origin + [L_DosingConnectors + ShortTeeLength(ND_DeliveryPipe); 0 m; -.5*TeeLength(ND_DeliveryPipe)], L_ChlorTube, [0; -90]*deg, ND_DeliveryPipe, SDR_13.5)
ChlorElbowConnectorPipeBottom := PipeF(ChlorDeliveryPipe_Origin + [
    ElbowRadius(ND_DeliveryPipe);
    -sin(45 deg)*ElbowRadius(ND_DeliveryPipe);
    sin(45 deg)*ElbowRadius(ND_DeliveryPipe)
], 2*SocketDepth(ND_DeliveryPipe), [45; 90]*deg, ND_DeliveryPipe, SDR_13.5)
L_ChlorBridgeConnectorPipe := ChlorDosingTube_Origin[2] - ChlorDeliveryPipe_Origin[2] - .5*TeeLength(ND_DeliveryPipe) - L_ChlorTube - sin(45 deg)*(4*ElbowRadius(ND_DeliveryPipe) + 4*SocketDepth(ND_DeliveryPipe) + (1 - tan(22.5 deg))*ElbowRadius(ND_DeliveryPipe))
ChlorBridgeConnectorPipe := PipeF(ChlorDeliveryPipe_Origin + [
    ElbowRadius(ND_DeliveryPipe);
    -(sin(45 deg)*(ElbowRadius(ND_DeliveryPipe) + 2*SocketDepth(ND_DeliveryPipe)) + (1 - sin(45 deg))*ElbowRadius(ND_DeliveryPipe));
    sin(45 deg)*(ElbowRadius(ND_DeliveryPipe) + 2*SocketDepth(ND_DeliveryPipe)) + sin(45 deg)*ElbowRadius(ND_DeliveryPipe)
], L_ChlorBridgeConnectorPipe, [0; 90]*deg, ND_DeliveryPipe, SDR_13.5)
ChlorElbowConnectorPipeTop := PipeF(ChlorDosingTube_Origin + [
    L_DosingConnectors + ShortTeeLength(ND_DeliveryPipe);
    -sin(45 deg)*(2*SocketDepth(ND_DeliveryPipe) + (1 - tan(22.5 deg))*ElbowRadius(ND_DeliveryPipe)) - (1 - sin(45 deg))*ElbowRadius(ND_DeliveryPipe);
    -.5*TeeLength(ND_DeliveryPipe) - L_ChlorTube - sin(45 deg)*(2*SocketDepth(ND_DeliveryPipe) + (1 - tan(22.5 deg))*ElbowRadius(ND_DeliveryPipe) + ElbowRadius(ND_DeliveryPipe))
], 2*SocketDepth(ND_DeliveryPipe) + (1 - tan(22.5 deg))*ElbowRadius(ND_DeliveryPipe), [-45; 90]*deg, ND_DeliveryPipe, SDR_13.5)
ChlorDeliveryConnectorPipe := PipeF(ChlorDosingTube_Origin + [
    L_DosingConnectors + ShortTeeLength(ND_DeliveryPipe);
    0 m;
    -0.5*TeeLength(ND_DeliveryPipe) - 2*SocketDepth(ND_DeliveryPipe)
], 2*SocketDepth(ND_DeliveryPipe), [0; 90]*deg, ND_DeliveryPipe, SDR_13.5)
ChlorineDeliveryPipe := PipeF(ChlorDeliveryPipe_Origin, L_ChlorineDeliveryPipe, [0; 0]*deg, ND_DeliveryPipe, SDR_13.5)
ElbowCoagCHT := ElbowF(CoagDeliveryPipe_Origin + [-L_CoagDeliveryPipe; 0 m; 0 m], [90; 0; -90]*deg, ND_DeliveryPipe, SDR_13.5)
ElbowChlorCHT := ElbowF(ChlorDeliveryPipe_Origin + [-L_ChlorineDeliveryPipe; 0 m; 0 m], [90; 0; -90]*deg, ND_DeliveryPipe, SDR_13.5)
ElbowCoagDosing := ElbowF(CoagDeliveryPipe_Origin, [-90; 0; 90]*deg, ND_DeliveryPipe, SDR_13.5)
Angle_Elbow90ChlorDosing :=
    [-90; 0; 90]*deg if N_CoagTubes + N_ChlorTubes ≤ N_TubesTriggerStack or L_ChlorineDeliveryPipe > L_CoagDeliveryPipe + 2*(ElbowRadius(ND_DeliveryPipe) + SocketDepth(ND_DeliveryPipe))
    [-90; 0; 135]*deg otherwise
Elbow90ChlorDosing := ElbowF(ChlorDeliveryPipe_Origin, Angle_Elbow90ChlorDosing, ND_DeliveryPipe, SDR_13.5)
Elbow45ChlorDosingBottom := Elbow45F(ChlorDeliveryPipe_Origin + [
    ElbowRadius(ND_DeliveryPipe);
    -(ElbowRadius(ND_DeliveryPipe) + 2*sin(45 deg)*SocketDepth(ND_DeliveryPipe));
    sin(45 deg)*(2*ElbowRadius(ND_DeliveryPipe) + 2*SocketDepth(ND_DeliveryPipe))
], [0; 90; -90]*deg, ND_DeliveryPipe, SDR_13.5)
Elbow45ChlorDosingMiddle := Elbow45F(ChlorDosingTube_Origin + [
    L_DosingConnectors + ShortTeeLength(ND_DeliveryPipe);
    -sin(45 deg)*(2*SocketDepth(ND_DeliveryPipe) + (1 - tan(22.5 deg))*ElbowRadius(ND_DeliveryPipe)) - (1 - sin(45 deg))*ElbowRadius(ND_DeliveryPipe);
    -.5*TeeLength(ND_DeliveryPipe) - L_ChlorTube - sin(45 deg)*(2*SocketDepth(ND_DeliveryPipe) + (1 - tan(22.5 deg))*ElbowRadius(ND_DeliveryPipe) + ElbowRadius(ND_DeliveryPipe))
], [-135; 90; 0]*deg, ND_DeliveryPipe, SDR_13.5)
Elbow45ChlorDosingTop := Elbow45F(ChlorDosingTube_Origin + [
    L_DosingConnectors + ShortTeeLength(ND_DeliveryPipe);
    0 m;
    -.5*TeeLength(ND_DeliveryPipe) - L_ChlorTube
], [90; -90; 0]*deg, ND_DeliveryPipe, SDR_13.5)
# Option 1:Eliminate the top right elbow and modify the tee code and add a ball valve on top
# option 2: repla90 the top right elbow with a tee and ball valve without changing the tee code
ElbowCoagDosingBottomLeft := ElbowF(CoagDosingTube_Origin + [-L_CoagTube - L_DosingConnectors; 0 m; 0 m], [90; 0; -90]*deg, ND_DeliveryPipe, SDR_13.5)
ElbowChlorDosingBottomLeft := ElbowF(ChlorDosingTube_Origin + [-L_ChlorTube - L_DosingConnectors; 0 m; 0 m], [90; 0; -90]*deg, ND_DeliveryPipe, SDR_13.5)
TeeCoagDosingTopRight := TeeF(CoagDosingTube_Origin + [L_DosingConnectors; 0 m; B_DosingTubes*N_CoagTubes], [90; 0; -90]*deg, ND_DeliveryPipe, SDR_13.5)
TeeChlorDosingTopRight := TeeF(ChlorDosingTube_Origin + [L_DosingConnectors; 0 m; B_DosingTubes*N_ChlorTubes], [90; 0; -90]*deg, ND_DeliveryPipe, SDR_13.5)
CoagTees :=
    CoagTeeStack ← layer_new("CdcCoagTees", green)
    for i ∈ 0 .. max(N_CoagTubes - 1, 0)
        CoagTeeStack ← stack(CoagTeeStack, TeeF(CoagDosingTube_Origin + [L_DosingConnectors; 0 m; B_DosingTubes*i], [90; 0; 90]*deg, ND_DeliveryPipe, SDR_13.5))
        CoagTeeStack ← stack(CoagTeeStack, TeeF(CoagDosingTube_Origin + [-L_CoagTube - L_DosingConnectors; 0 m; B_DosingTubes*(i + 1)], [-90; 0; 90]*deg, ND_DeliveryPipe, SDR_13.5))
        i ← i + 1
    return CoagTeeStack
# Changed from N.CdcCoagTubes-2 to N.CdcCoagTubes-1
ChlorTees :=
    ChlorTeeStack ← layer_new("CdcChlorTees", green)
    for i ∈ 0 .. max(N_ChlorTubes - 1, 0)
        ChlorTeeStack ← stack(ChlorTeeStack, TeeF(ChlorDosingTube_Origin + [L_DosingConnectors; 0 m; B_DosingTubes*i], [90; 0; 90]*deg, ND_DeliveryPipe, SDR_13.5))
        ChlorTeeStack ← stack(ChlorTeeStack, TeeF(ChlorDosingTube_Origin + [-L_ChlorTube - L_DosingConnectors; 0 m; B_DosingTubes*(i + 1)], [-90; 0; 90]*deg, ND_DeliveryPipe, SDR_13.5))
        i ← i + 1
    return ChlorTeeStack
CdcCoagBallValve := insertdwg("https://confluence.cornell.edu/download/attachments/173604905/PvcBallValve+Scaled.dwg", CoagDosingTube_Origin + [L_PVCBallValve; 0 m; 0 m], ND_DeliveryPipe/(2 in), ND_DeliveryPipe/(2 in), 0 deg)
RotateCdcCoagBallValve := Rotate3DLast(CoagDosingTube_Origin + [L_PVCBallValve; 0 m; 0 m], "y", -90 deg)
ArrayCoagBallValve := ArrayLast(N_CoagTubes + 1, 1, B_DosingTubes)
MirrorCoagValves := Mirror3dAll("yz", [
    CoagDosingTube_Origin[0] - .5*L_CoagTube;
    CoagDosingTube_Origin[1];
    CoagDosingTube_Origin[2] + 1/4*H_Et + ShortTeeLength(ND_DeliveryPipe) + .5*ND_DeliveryPipe
], "n")
CdcCoagBallValveAir := insertdwg("https://confluence.cornell.edu/download/attachments/173604905/PvcBallValve+Scaled.dwg", CoagDosingTube_Origin + [
    L_PVCBallValve + ShortTeeLength(ND_DeliveryPipe) + SocketDepth(ND_DeliveryPipe);
    0 m;
    (N_CoagTubes + 1)*TeeLength(ND_DeliveryPipe) + ((2*N_CoagTubes + 1)*SocketDepth(ND_DeliveryPipe)) - ShortTeeLength(ND_DeliveryPipe)
], ND_DeliveryPipe/(2 in), ND_DeliveryPipe/(2 in), 90 deg)
CdcChlorineBallValve := insertdwg("https://confluence.cornell.edu/download/attachments/173604905/PvcBallValve+Scaled.dwg", ChlorDosingTube_Origin + [L_PVCBallValve; 0 m; 0 m], ND_DeliveryPipe/(2 in), ND_DeliveryPipe/(2 in), 0 deg)
RotateCdcChlorineBallValve := Rotate3DLast(ChlorDosingTube_Origin + [L_PVCBallValve; 0 m; 0 m], "y", -90 deg)  # Chlorine ball valves not showing up --> done
# All the choosing between max(N-1,1) are changed to N+1 to ensure that an extra tube is drawn in all cases. But some indices may have been messed up
ArrayChlorineBallValve := ArrayLast(N_ChlorTubes + 1, 1, B_DosingTubes)
# There is an extra tee being drawn on the top right side for both chlorine and coagulant, need to figure out how to get rid of it --> done
MirrorChlorineValves := Mirror3dAll("yz", [
    ChlorDosingTube_Origin[0] - .5*L_ChlorTube;
    ChlorDeliveryPipe_Origin[1];
    ChlorDeliveryPipe_Origin[2]
], "n")
CdcChlorineBallValveAir := insertdwg("https://confluence.cornell.edu/download/attachments/173604905/PvcBallValve+Scaled.dwg", ChlorDosingTube_Origin + [
    L_PVCBallValve + ShortTeeLength(ND_DeliveryPipe) + SocketDepth(ND_DeliveryPipe);
    0 m;
    (N_ChlorTubes + 1)*TeeLength(ND_DeliveryPipe) + ((2*N_ChlorTubes + 1)*SocketDepth(ND_DeliveryPipe)) - ShortTeeLength(ND_DeliveryPipe)
], ND_DeliveryPipe/(2 in), ND_DeliveryPipe/(2 in), 90 deg)
# Air removal ball valves position not right
ManifoldFitting_Script :=
    stack(CoagManifoldPluLayer, CoagConnectorPipe, view("f"), ArrayCoagConnectorPipe, MirrorCoagConnectorPipe, view("t"), CoagDeliveryConnectorPipe, CoagDeliveryPipe, FreezeCoagManifoldPlu, CoagManifoldPluLongLayer, CoagConnectorPipeLong, FreezeCoagManifoldPluLongLayer, ChlorManifoldPluLayer, ChlorConnectorPipe, view("f"), ArrayChlorConnectorPipe, MirrorChlorConnectorPipe, view("t"), ChlorConnectorPipeLong, ChlorDeliveryConnectorPipe, ChlorineDeliveryPipe, FreezeChlorManifoldPlu, ManifoldFittingsLayer, ElbowCoagCHT, ElbowChlorCHT, ElbowCoagDosing, Elbow90ChlorDosing, TeeCoagDosingTopRight, TeeChlorDosingTopRight, ElbowCoagDosingBottomLeft, ElbowChlorDosingBottomLeft, FreezeFittings, CoagTees, FreezeCoagTees, ChlorTees, FreezeChlorTees) if N_CoagTubes + N_ChlorTubes ≤ N_TubesTriggerStack or L_ChlorineDeliveryPipe > L_CoagDeliveryPipe + 2*(ElbowRadius(ND_DeliveryPipe) + SocketDepth(ND_DeliveryPipe))
    stack(CoagManifoldPluLayer, CoagConnectorPipe, view("f"), ArrayCoagConnectorPipe, MirrorCoagConnectorPipe, view("t"), CoagDeliveryConnectorPipe, CoagDeliveryPipe, FreezeCoagManifoldPlu, CoagManifoldPluLongLayer, CoagConnectorPipeLong, FreezeCoagManifoldPluLongLayer, ChlorManifoldPluLayer, ChlorConnectorPipe, view("f"), ArrayChlorConnectorPipe, MirrorChlorConnectorPipe, view("t"), ChlorConnectorPipeLong, ChlorElbowConnectorPipeBottom, ChlorBridgeConnectorPipe, ChlorElbowConnectorPipeTop, ChlorDeliveryConnectorPipe, ChlorineDeliveryPipe, FreezeChlorManifoldPlu, ManifoldFittingsLayer, ElbowCoagCHT, ElbowChlorCHT, ElbowCoagDosing, Elbow90ChlorDosing, Elbow45ChlorDosingBottom, Elbow45ChlorDosingMiddle, Elbow45ChlorDosingTop, TeeCoagDosingTopRight, TeeChlorDosingTopRight, ElbowCoagDosingBottomLeft, ElbowChlorDosingBottomLeft, FreezeFittings, CoagTees, FreezeCoagTees, ChlorTees, FreezeChlorTees) otherwise
ManifoldValve_Script := stack(ManifoldCoagValveLayer, CdcCoagBallValve, RotateCdcCoagBallValve, view("f"), ArrayCoagBallValve, MirrorCoagValves, view("t"), CdcCoagBallValveAir, FreezeCoagValvesLayer, ManifoldChlorValveLayer, CdcChlorineBallValve, RotateCdcChlorineBallValve, view("f"), ArrayChlorineBallValve, MirrorChlorineValves, view("t"), CdcChlorineBallValveAir, FreezeChlorValvesLayer)
Manifold_Script := stack(ManifoldFitting_Script, ManifoldValve_Script)
# Manifold
# Dosing Tubes
L_CoagTube = 0.981625 m
D_CoagTubeStockToCHEst = 0.140364 in
N_CoagTubes = 4
L_ChlorTube = 1.34767 m
D_ChlorTubeStockToCHEst = 0.139736 in
N_ChlorTubes = 4
DosingTubesLayer := layer_new("CdcDosingPlu", red)
CoagTube := PipeF(CoagDosingTube_Origin, L_CoagTube, [0; 0]*deg, D_CoagTubeStockToCHEst, PS_FlexTube)
ViewFront := view("f")
ArrayCoagTube := ArrayLast(max(N_CoagTubes, 2), 1, B_DosingTubes)
ArrayCoagTube_test := ArrayLast(N_CoagTubes + 1, 1, B_DosingTubes)
ViewTop := view("t")
ChlorineTube := PipeF(ChlorDosingTube_Origin, L_ChlorTube, [0; 0]*deg, D_ChlorTubeStockToCHEst, PS_FlexTube)
ArrayChlorineTube := ArrayLast(max(N_ChlorTubes, 2), 1, B_DosingTubes)
ArrayChlorineTube_test := ArrayLast(N_ChlorTubes + 1, 1, B_DosingTubes)
FreezeDosingTubes := FreezeLayer("CdcDosingPlu")
Dosing_Script := stack(DosingTubesLayer, CoagTube, ViewFront, ArrayCoagTube_test, ViewTop, ChlorineTube, ViewFront, ArrayChlorineTube_test, ViewTop, FreezeDosingTubes)
# Calibration Column Definitions
SF_CalCol := 1.25
Ti_Res := 1.25*min
H_CalCol := 30 cm
Q_CoagCalColMax := SF_CalCol*Q_CoagMax
Vol_CoagCalCol := Ti_Res*Q_CoagCalColMax
D_inCoagCCMin := sqrt(4*Vol_CoagCalCol/(π*H_CalCol)) = 2.49048 in
ND_CoagCalCol := ND(D_inCoagCCMin, Sch40)
D_inCoagCalCol := ID(ND_CoagCalCol, Sch40) = 0.269 in
Q_ChlorCalColMax := SF_CalCol*Q_ChlorMax
Vol_ChlorCalCol := Ti_Res*Q_ChlorCalColMax
D_inChlorCCMin := sqrt(4*Vol_ChlorCalCol/(π*H_CalCol)) = 2.47354 in
ND_ChlorCalCol := ND(D_inChlorCCMin, Sch40)
D_inChlorCalCol := ID(ND_ChlorCalCol, Sch40) = 0.269 in
Q_FCCalColMax := SF_CalCol*Q_CoagMax
Vol_FCCalCol := Ti_Res*Q_FCCalColMax
D_inFCCCMin := sqrt(4*Vol_FCCalCol/(π*H_CalCol)) = 2.49048 in
ND_FCCalCol := ND(D_inFCCCMin, Sch40)
D_inFCCalCol := ID(ND_FCCalCol, Sch40) = 0.269 in
R_Cylinder := .5 cm
# Calibration Column Origin Points
# Z_CoagulantOutlet | was set equal to Z.FloatTop
CoagCalCol_Origin := [
    ChemPlatform_Origin[0] + ChemPlatform_Dimensions[0] + T_PlantWall + OR_Fitting(ND_CoagCalCol);
    CHT2_Origin[1] - 2*OR_Fitting(ND_CoagCalCol) - 1/2*D_CHT - 2*zc;
    Z_FloatTop
]
CoagTopCap_Origin := [CoagCalCol_Origin[0]; CoagCalCol_Origin[1]; CoagCalCol_Origin[2] + H_CalCol]
ChlorCalCol_Origin := [
    CoagCalCol_Origin[0] - OR_Fitting(ND_CoagCalCol) + OR_Fitting(ND_ChlorCalCol);
    CoagCalCol_Origin[1] - 2*zc - 2*OR_Fitting(ND_CoagCalCol) - OR_Fitting(ND_ChlorCalCol);
    Z_FloatTop
]
ChlorTopCap_Origin := [ChlorCalCol_Origin[0]; ChlorCalCol_Origin[1]; ChlorCalCol_Origin[2] + H_CalCol]
# To draw the hole in the top cap, we are subtracting a cylinder from the top cap layer
CoagCylinder_Origin := [CoagCalCol_Origin[0]; CoagCalCol_Origin[1]; CoagCalCol_Origin[2] + H_CalCol/2]
ChlorCylinder_Origin := [ChlorCalCol_Origin[0]; ChlorCalCol_Origin[1]; ChlorCalCol_Origin[2] + H_CalCol/2]
# Calibration Column and Constant Head Tanks
MakeCalColLayer := layer_new("CdcCalColumnPlu", ltpurple)
MainCoagCalCol := PipeF(CoagCalCol_Origin, H_CalCol, [0; 90]*deg, ND_CoagCalCol, Sch40)
MainChlorCalCol := PipeF(ChlorCalCol_Origin, H_CalCol, [0; 90]*deg, ND_ChlorCalCol, Sch40)
CHT1 := ConstantHeadTankF(CHT_Origin, [90; 0; 90]*deg, D_CHT/2, H_CHT, T_CHTwall, .75*H_CHT, 1/3*in, 1/3*in, 1/3*in, 1/3*in)
CHT2 := ConstantHeadTankF(CHT2_Origin, [90; 0; 90]*deg, D_CHT/2, H_CHT, T_CHTwall, .75*H_CHT, 1/3*in, 1/3*in, 1/3*in, 1/3*in)
CHT3 := ConstantHeadTankF(CHT3_Origin, [90; 0; 90]*deg, D_CHT/2, H_CHT, T_CHTwall, .75*H_CHT, 1/3*in, 1/3*in, 1/3*in, 1/3*in)
CHT4 := ConstantHeadTankF(CHT4_Origin, [90; 0; 90]*deg, D_CHT/2, H_CHT, T_CHTwall, .75*H_CHT, 1/3*in, 1/3*in, 1/3*in, 1/3*in)
FreezeCalCol := FreezeLayer("CdcCalColumnPlu")
MakeCapsLayer := layer_new("CdcColumnCapsPlu", blue2)
CoagTopCap := CapF(CoagTopCap_Origin, [0; -90]*deg, ND_CoagCalCol)
CoagBottomCap := CapF(CoagTopCap_Origin - [0 m; 0 m; H_CalCol], [0; 90]*deg, ND_CoagCalCol)
ChlorTopCap := CapF(ChlorTopCap_Origin, [0; -90]*deg, ND_ChlorCalCol)
ChlorBottomCap := CapF(ChlorTopCap_Origin - [0 m; 0 m; H_CalCol], [0; 90]*deg, ND_ChlorCalCol)
FreezeCapsLayer := FreezeLayer("CdcColumnCapsPlu")
DrawCoagCylinder := CylinderF(CoagCylinder_Origin, R_Cylinder, H_CalCol, [0; 90]*deg)
DrawChlorCylinder := CylinderF(ChlorCylinder_Origin, R_Cylinder, H_CalCol, [0; 90]*deg)
LayCylinder := GroupAll("DeleteMe")
MakeHole := SubtractF(["CdcColumnCapsPlu"], "DeleteMe")
CdcCalColumn2_Script := stack(MakeCalColLayer, MainCoagCalCol, MainChlorCalCol, CHT1, CHT2, CHT3, CHT4, FreezeCalCol, MakeCapsLayer, CoagTopCap, CoagBottomCap, ChlorTopCap, ChlorBottomCap, FreezeCapsLayer, DrawCoagCylinder, DrawChlorCylinder, LayCylinder, MakeHole)
CdcCalColumn1_Script := stack(MakeCalColLayer, MainChlorCalCol, CHT1, FreezeCalCol, MakeCapsLayer, ChlorTopCap, ChlorBottomCap, FreezeCapsLayer, DrawChlorCylinder, CHT2, LayCylinder, MakeHole)
drawthelever := stack(AC_EntranceTank, LeverArmCHT2_Script)
AC_Cdc2 := stack(Cdc2_Script, Dosing_Script, Manifold_Script, CdcCalColumn2_Script)
# [component: inputs drawthelever]
AC_Cdc1 := stack(Cdc1_Script, Dosing_Script, Manifold_Script, CdcCalColumn1_Script)
AC_Cdc := AC_Cdc2
drawmenow := stack(AC_EntranceTank, AC_Cdc)
AC_OperatorAccess
Drawing := stack(EtTankScript, AC_Cdc, AC_ChemTanks)  # AC_ChemTanks
AC_ChemTanks
AltDrawing := stack(EtTankScript, AC_Cdc1, AC_ChemTanks)
AC_OperatorAccess
# [component: inputs drawmenow]
