# [reference: ChemStockTanksACmrf.xmcd]
ChemPlatformFloor_Origin = [-8.17896; 9.25; 2.94339] m
CoagCCElbow1_Origin = [-8.01507; 8; 2.61314] m
# Chemical Dose Controller
# Layers
# Lever Arm Layers
CdcLeverLayer := layer_new("CdcLever", ltgrey)
SelectCdcLever := SelectLayer("CdcLever")
CdcLeverFrz := FreezeLayer("CdcLever")
ThawCdcLever := ThawMultiple(["CdcLever"])
CdcLeverMountingLayer := layer_new("CdcLeverMounting", ltgrey)
SelectCdcLeverMounting := SelectLayer("CdcLeverMounting")
CdcLeverMountingFrz := FreezeLayer("CdcLeverMounting")
CdcLeverSliderLayer := layer_new("CdcLeverSlider", ltgrey)
SelectCdcSliderLever := SelectLayer("CdcLeverSlider")
CdcLeverSliderFrz := FreezeLayer("CdcLeverSlider")
ThawCdcLeverSlider := ThawMultiple(["CdcLeverSlider"])
CdcFloatLayer := layer_new("CdcFloat", red)
SelectCdcFloat := SelectLayer("CdcFloat")
CdcFloatFrz := FreezeLayer("CdcFloat")
CdcLeverFittingsLayer := layer_new("CdcLeverFittings", green)
SelectCdcLeverFittings := SelectLayer("CdcLeverFittings")
CdcLeverFittingsFrz := FreezeLayer("CdcLeverFittings")
ThawCdcLeverFittings := ThawMultiple(["CdcLeverFittings"])
CdcLeverPluLayer := layer_new("CdcLeverPlu", blue)
SelectCdcLeverPlu := SelectLayer("CdcLeverPlu")
CdcLeverPluFrz := FreezeLayer("CdcLeverPlu")
ThawCdcLeverPlu := ThawMultiple(["CdcLeverPlu"])
# Manifold Layers
CdcCoagManifoldPluLayer := layer_new("CdcCoagManifoldPlu", blue)
SelectCdcCoagManifoldPlu := SelectLayer("CdcCoagManifoldPlu")
CdcCoagManifoldPluFrz := FreezeLayer("CdcCoagManifoldPlu")
CdcChlorManifoldPluLayer := layer_new("CdcChlorManifoldPlu", blue)
SelectCdcChlorManifoldPlu := SelectLayer("CdcChlorManifoldPlu")
CdcChlorManifoldPluFrz := FreezeLayer("CdcChlorManifoldPlu")
CdcManifoldFittingsLayer := layer_new("CdcManifoldFittings", green)
SelectCdcManifoldFittings := SelectLayer("CdcManifoldFittings")
CdcManifoldFittingsFrz := FreezeLayer("CdcManifoldFittings")
CdcCoagTeesLayer := layer_new("CdcCoagTees", green)
SelectCdcCoagTees := SelectLayer("CdcCoagTees")
CdcCoagTeesFrz := FreezeLayer("CdcCoagTees")
CdcChlorTeesLayer := layer_new("CdcChlorTees", green)
SelectCdcChlorTees := SelectLayer("CdcChlorTees")
CdcChlorTeesFrz := FreezeLayer("CdcChlorTees")
CdcCoagManifoldValvesLayer := layer_new("CdcCoagManifoldValves", ltgrey)
SelectCdcCoagManifoldValves := SelectLayer("CdcCoagManifoldValves")
CdcCoagManifoldValvesFrz := FreezeLayer("CdcCoagManifoldValves")
CdcChlorManifoldValvesLayer := layer_new("CdcChlorManifoldValves", ltgrey)
SelectCdcChlorManifoldValves := SelectLayer("CdcChlorManifoldValves")
CdcChlorManifoldValvesFrz := FreezeLayer("CdcChlorManifoldValves")
CdcDosingTubesLayer := layer_new("CdcDosingPlu", red)
SelectCdcDosingTubes := SelectLayer("CdcDosingPlu")
CdcDosingTubesFrz := FreezeLayer("CdcDosingPlu")
# Constant Head Tank Layers | mrf222 Spring 2016
CdcCHTLayer := layer_new("CdcCHT", purple)
SelectCdcCHT := SelectLayer("CdcCHT")
CdcCHTFrz := FreezeLayer("CdcCHT")
ThawCdcCHT := ThawMultiple(["CdcCHT"])
CdcCalColPluLayer := layer_new("CdcCalColPlu", blue)
SelectCdcCalColPlu := SelectLayer("CdcCalColPlu")
CdcCalColPluFrz := FreezeLayer("CdcCalColPlu")
ThawCdcCalColPlu := ThawMultiple(["CdcCalColPlu"])
CdcCalColFittingsLayer := layer_new("CdcCalColFittings", green)
SelectCdcCalColFittings := SelectLayer("CdcCalColFittings")
CdcCalColFittingsFrz := FreezeLayer("CdcCalColFittings")
ThawCdcCalColFittings := ThawMultiple(["CdcCalColFittings"])
CdcCalColDeleteLayer := layer_new("CdcCalColDelete", purple)
SelectCdcCalColDelete := SelectLayer("CdcCalColDelete")
CdcCalColDeleteFrz := FreezeLayer("CdcCalColDelete")
# Dimensions
L_PVCBallValveOLD := .1625 m/2
B_DosingTubes := max(TeeLength(ND_DeliveryPipe) + 2*SocketDepth(ND_DeliveryPipe), 2*ElbowRadius(ND_DeliveryPipe) + 2*SocketDepth(ND_DeliveryPipe))
# This needs to be changed in the entire code bc this is confusing
L_CoagDeliveryPipe.Old := L_CoagTube + 2*L_PVCBallValve + 2*ShortTeeLength(ND_DeliveryPipe) + ElbowRadius(ND_DeliveryPipe) + OR_Fitting(ND_DeliveryPipe)
L_ChlorDeliveryPipeOLD := L_ChlorTube + 2*L_PVCBallValve + 2*ShortTeeLength(ND_DeliveryPipe) + ElbowRadius(ND_DeliveryPipe) + OR_Fitting(ND_DeliveryPipe)
L_DosingConnectors := L_PVCBallValve + SocketDepth(ND_DeliveryPipe)
CdcLeverArm_Origin[0] + S_CdcLevertoManifold + OR_Fitting(ND_DeliveryPipe) + 2*ShortTeeLength(ND_DeliveryPipe) + 2*L_PVCBallValve + L_ChlorTube + 2*SocketDepth(ND_DeliveryPipe) - ElbowRadius(ND_DeliveryPipe)
# Lever Dimensions
# Perpendicular distance from LeverArm.Origin to the Float Cable
L_CdcLeverHoriz := (L_CdcLeverArm^2 - HL_Lfom^2)^.5 = 0.458258 m
# Maybe I can delete these since the lever is rotated
L_CdcLeverVert := HL_Lfom = 0.2 m  # Distance from the top most part of the Lever Arm on an angle to the height of the Lever Arm Pivot
AN_CdcLever := asin(HL_Lfom/L_CdcLever)/deg = 23.5782
L_CdcLeverArmExtended := L_CdcLeverSlider + D_CdcLeverCylinder4 - L_CdcLeverSliderOriginToScrew = 4 in
L_CoagDeliveryConnectorPipeLong := SocketDepth(ND_DeliveryPipe) + S_Fitting + ElbowRadius(ND_DeliveryPipe) + OR(ND_DeliveryPipe) = 0.092418 m
# Calibration Column Definitions | mrf222 Spring 2016
SF_CalCol := 1.25
Ti_Res := 1.25*min
H_CalCol := 30 cm
# Modified March 2016 by mrf222
H_FlowCalCol := 50 cm
Z_ChlorCalColTop := ChlorineTank_Origin[2] + H_ChlorTank = 3.79929 m
Z_CoagCalColTop := CoagTank_Origin[2] + H_CoagTank = 3.96839 m
Q_CoagCalColMax := SF_CalCol*Q_CoagMax
Vol_CoagCalCol := Ti_Res*Q_CoagCalColMax
D_inCoagCCMin := sqrt(4*Vol_CoagCalCol/(π*H_CalCol)) = 2.10723 in
# This diameter of pipe does not have fittings associated wiht it; therefore the plumbing needs to be the lowest diameter that has tee and elbow radii associated with it. The same is true for the coagulant ND.
ND_CoagCalColTrue := ND(D_inCoagCCMin, Sch40) = 0.125 in
ND_CoagCalCol :=
    ND ← ND_CoagCalColTrue
    while TeeLength(ND) == 0
        ND ← ND + .125 in
    return ND
D_inCoagCalCol := ID(ND_CoagCalCol, Sch40) = 0.622 in
Q_ChlorCalColMax := SF_CalCol*Q_ChlorMax
Vol_ChlorCalCol := Ti_Res*Q_ChlorCalColMax
D_inChlorCCMin := sqrt(4*Vol_ChlorCalCol/(π*H_CalCol)) = 1.74154 in
ND_ChlorCalColTrue := ND(D_inChlorCCMin, Sch40)
ND_ChlorCalCol :=
    ND ← ND_ChlorCalColTrue
    while TeeLength(ND) == 0
        ND ← ND + .125 in
    return ND
D_inChlorCalCol := ID(ND_ChlorCalCol, Sch40) = 0.622 in
Q_FCCalColMax := SF_CalCol*Q_CoagMax
Vol_FCCalCol := Ti_Res*Q_FCCalColMax
D_inFCCCMin := sqrt(4*Vol_FCCalCol/(π*H_CalCol)) = 2.10723 in
ND_FCCalCol := ND(D_inFCCCMin, Sch40)
D_inFCCalCol := ID(ND_FCCalCol, Sch40) = 0.269 in
R_Cylinder := .5 cm
# Lever and Dosing Origin Points
# Lever Origin Points
# the x and y coordinates of LA.Origin were changed to those of the DosingSubBox.Origin
CdcLeverArm_Origin := [
    DosingSubBox_Origin[0] + OR(ND_EtFloat) - L_CdcLeverCylinder/2 - T_CdcLeverArm;
    Et_Origin[1] + W_Et + T_FlocWall - W_CdcLeverPivotBox/2;
    Z_EtTop + S_LeverToEtZTop
] = [-6.07232; 7.7373; 2.64069] m
CdcLeverArm2_Origin := [
    CdcLeverArm_Origin[0] + L_CdcLeverCylinder + T_CdcLeverArm;
    CdcLeverArm_Origin[1];
    CdcLeverArm_Origin[2]
] = [-5.91675; 7.7373; 2.64069] m
CdcLeverDropTubeScrew_Origin := [
    CdcLeverArm_Origin[0] - T_CdcLeverSlider;
    CdcLeverArm_Origin[1] + L_CdcLeverArm;
    CdcLeverArm_Origin[2] + H_CdcLeverArm/2
] = [-6.07867; 8.2373; 2.65339] m
CdcLeverDropTubeScrew2_Origin := [
    CdcLeverDropTubeScrew_Origin[0] + T_CdcLeverSlider + T_CdcLeverArm + L_CdcLeverCylinder + T_CdcLeverArm + T_CdcLeverSlider;
    CdcLeverDropTubeScrew_Origin[1];
    CdcLeverDropTubeScrew_Origin[2]
] = [-5.90722; 8.2373; 2.65339] m
CdcLeverDropTubeTee_Origin := [
    CdcLeverDropTubeScrew_Origin[0] - OD(ND_DropTube)/2 - T_CdcLeverSlider - ShortTeeLength(ND_DropTube) + (OD_Fitting(ND_DeliveryPipe)/2 - OD(ND_DeliveryPipe)/2);
    CdcLeverDropTubeScrew_Origin[1];
    CdcLeverDropTubeScrew_Origin[2] - SocketDepth(ND_DropTube) - TeeLength(ND_DropTube)/2
] = [-6.10722; 8.2373; 2.62164] m
CdcLeverDropTube2Tee_Origin := [
    CdcLeverDropTubeScrew2_Origin[0] + OD(ND_DropTube)/2 + T_CdcLeverSlider + ShortTeeLength(ND_DropTube) - (OD_Fitting(ND_DeliveryPipe)/2 - OD(ND_DeliveryPipe)/2);
    CdcLeverDropTubeScrew2_Origin[1];
    CdcLeverDropTubeScrew2_Origin[2] - SocketDepth(ND_DropTube) - TeeLength(ND_DropTube)/2
]
CdcLeverDropTube_Origin := [
    CdcLeverDropTubeTee_Origin[0] + ShortTeeLength(ND_DropTube);
    CdcLeverDropTubeTee_Origin[1];
    CdcLeverDropTubeTee_Origin[2]
]
CdcLeverDropTube2_Origin := [
    CdcLeverDropTube2Tee_Origin[0] - ShortTeeLength(ND_DropTube);
    CdcLeverDropTube2Tee_Origin[1];
    CdcLeverDropTube2Tee_Origin[2]
]
CdcLeverSlider2_Origin := [
    CdcLeverDropTubeScrew2_Origin[0];
    CdcLeverDropTubeScrew2_Origin[1] - L_CdcLeverSliderOriginToScrew;
    CdcLeverDropTubeScrew2_Origin[2] + H_CdcLeverSlider/2
] = [-5.90722; 8.2119; 2.67244] m
CdcLeverSlider1_Origin := [
    CdcLeverDropTubeScrew_Origin[0];
    CdcLeverDropTubeScrew_Origin[1] - L_CdcLeverSliderOriginToScrew;
    CdcLeverDropTubeScrew_Origin[2] + H_CdcLeverSlider/2
] = [-6.07867; 8.2119; 2.67244] m
CdcLeverSliderMiddleTop_Origin := [CdcLeverSlider1_Origin[0] + T_CdcLeverSlider; CdcLeverSlider1_Origin[1]; CdcLeverSlider1_Origin[2]] = [-6.07232; 8.2119; 2.67244] m
CdcLeverSliderMiddleTop2_Origin := [CdcLeverSlider2_Origin[0] - T_CdcLeverSlider; CdcLeverSlider2_Origin[1]; CdcLeverSlider2_Origin[2]] = [-5.91357; 8.2119; 2.67244] m
CdcLeverSliderMiddleBot_Origin := [
    CdcLeverSliderMiddleTop_Origin[0];
    CdcLeverSliderMiddleTop_Origin[1];
    CdcLeverSliderMiddleTop_Origin[2] - H_CdcLeverSlider + T_CdcLeverSlider
] = [-6.07232; 8.2119; 2.64069] m
CdcLeverSliderMiddleBot2_Origin := [
    CdcLeverSliderMiddleTop2_Origin[0];
    CdcLeverSliderMiddleTop2_Origin[1];
    CdcLeverSliderMiddleTop2_Origin[2] - H_CdcLeverSlider + T_CdcLeverSlider
] = [-5.91357; 8.2119; 2.64069] m
CdcLeverSliderInnerTop_Origin := [
    CdcLeverSliderMiddleTop_Origin[0] + T_CdcLeverArm;
    CdcLeverSliderMiddleTop_Origin[1];
    CdcLeverSliderMiddleTop_Origin[2]
] = [-6.06915; 8.2119; 2.67244] m
CdcLeverSliderInnerTop2_Origin := [
    CdcLeverSliderMiddleTop2_Origin[0] - T_CdcLeverArm;
    CdcLeverSliderMiddleTop2_Origin[1];
    CdcLeverSliderMiddleTop2_Origin[2]
] = [-5.91675; 8.2119; 2.67244] m
CdcLeverSliderInnerBot_Origin := [
    CdcLeverSliderInnerTop_Origin[0];
    CdcLeverSliderInnerTop_Origin[1];
    CdcLeverSliderInnerTop_Origin[2] - H_CdcLeverSlider + 2*T_CdcLeverSlider
] = [-6.06915; 8.2119; 2.64704] m
CdcLeverSliderInnerBot2_Origin := [
    CdcLeverSliderInnerTop2_Origin[0];
    CdcLeverSliderInnerTop2_Origin[1];
    CdcLeverSliderInnerTop2_Origin[2] - H_CdcLeverSlider + 2*T_CdcLeverSlider
] = [-5.91675; 8.2119; 2.64704] m
CdcLeverPivotBox_Origin := [
    (CdcLeverArm_Origin[0] + L_CdcLeverCylinder/3) + T_CdcLeverArm;
    CdcLeverArm_Origin[1] + W_CdcLeverPivotBox/2;
    Z_EtTop + H_CdcLeverPivotBox
]
CdcFloat_Origin := [
    DosingSubBox_Origin[0] + OR(ND_EtFloat);
    CdcLeverArm_Origin[1] - L_CdcLeverHoriz - D_CdcLeverCylinder1/4;
    ZW_EtMax - T_CdcFloat/2
] = [-5.99295; 7.27269; 2.50569] m
# Dosing Tube Origins
N_TubesTriggerStack := 2
L_CoagDeliveryPipe := S_CdcLevertoManifold + OR_Fitting(ND_DeliveryPipe) + 2*ShortTeeLength(ND_DeliveryPipe) + 2*L_PVCBallValve + L_CoagTube + 2*SocketDepth(ND_DeliveryPipe) - 2*ElbowRadius(ND_DeliveryPipe) + (OR(ND_DeliveryPipe) + ShortTeeLength(ND_DeliveryPipe) + SocketDepth(ND_DeliveryPipe) + L_PVCBallValve + S_Fitting) + (OR(ND_DeliveryPipe) + S_Fitting + ElbowRadius(ND_DeliveryPipe))
L_ChlorDeliveryPipe := S_CdcLevertoManifold + OR_Fitting(ND_DeliveryPipe) + 2*ShortTeeLength(ND_DeliveryPipe) + 2*L_PVCBallValve + L_ChlorTube + 2*SocketDepth(ND_DeliveryPipe) - 2*ElbowRadius(ND_DeliveryPipe)
# The first case triggers when both N values are equalt to 1, in other words when there are
# two Coag dosing tubes and two Chlor dosing tubes. This case will stack the dosing manifolds.
ChlorDeliveryPipe_Origin :=
    if N_CoagTubes + N_ChlorTubes ≤ N_TubesTriggerStack
        [
            L_ChlorDeliveryPipe;
            CdcLeverArm_Origin[1] + OR_Fitting(ND_DeliveryPipe);
            Z_Walkway + 1.5*OR_Fitting(ND_DeliveryPipe) + (N_CoagTubes + 2)*B_DosingTubes + ElbowRadius(ND_DeliveryPipe) + SocketDepth(ND_DeliveryPipe)
        ]
    if L_CoagDeliveryPipe ≤ L_ChlorDeliveryPipe
        [
            DosingSubBox_Origin[0] - ElbowRadius(ND_DeliveryPipe) + 2*OR_Fitting(ND_EtFloat) + L_ChlorDeliveryPipe;
            CdcLeverArm_Origin[1] + OR_Fitting(ND_DeliveryPipe);
            Z_Walkway + OR_Fitting(ND_DeliveryPipe) + S_Fitting
        ]
    otherwise
        [
            DosingSubBox_Origin[0] - ElbowRadius(ND_DeliveryPipe) + OR_Fitting(ND_EtFloat) + L_ChlorDeliveryPipe;
            CdcLeverArm_Origin[1] + OR_Fitting(ND_DeliveryPipe);
            Z_Walkway + 1.5*OR_Fitting(ND_DeliveryPipe) - ((-ElbowRadius(ND_DeliveryPipe) - OR_Fitting(ND_DeliveryPipe)/2 + 2*SocketDepth(ND_DeliveryPipe) + .5*TeeLength(ND_DeliveryPipe)) - S_Fitting - 2*OR_Fitting(ND_DeliveryPipe))
        ]
# The second case will nest the dosing manifolds with the chlorine delivery pipe on the bottom.
# The third case will nest the dosing manifolds with the coagulant delivery pipe on the bottom.
ChlorDosingTube_Origin :=
    if N_CoagTubes + N_ChlorTubes ≤ N_TubesTriggerStack
        ChlorDeliveryPipe_Origin + [
            ElbowRadius(ND_DeliveryPipe) - L_ChlorTube - L_PVCBallValve - SocketDepth(ND_DeliveryPipe) - ShortTeeLength(ND_DeliveryPipe);
            0 m;
            L_CoagDeliveryConnectorPipeLong + ElbowRadius(ND_DeliveryPipe) + 2*SocketDepth(ND_DeliveryPipe) + .5*TeeLength(ND_DeliveryPipe) + 2*OR_Fitting(ND_DeliveryPipe)
        ]
    otherwise
        ChlorDeliveryPipe_Origin + [
            ElbowRadius(ND_DeliveryPipe) - L_ChlorTube - L_PVCBallValve - SocketDepth(ND_DeliveryPipe) - ShortTeeLength(ND_DeliveryPipe);
            0 m;
            2*OR(ND_DeliveryPipe) + 2*S_Fitting + 2*ElbowRadius(ND_DeliveryPipe) + L_CoagDeliveryConnectorPipeLong + N_CoagTubes*(TeeLength(ND_DeliveryPipe) + 2*SocketDepth(ND_DeliveryPipe))
        ]
2*OR(ND_DeliveryPipe) + S_Fitting + 2*ElbowRadius(ND_DeliveryPipe) + L_CoagDeliveryConnectorPipeLong + N_CoagTubes*(TeeLength(ND_DeliveryPipe) + 2*SocketDepth(ND_DeliveryPipe))
L_CoagDeliveryConnectorPipeLong + ElbowRadius(ND_DeliveryPipe) + S_Fitting + N_CoagTubes*(TeeLength(ND_DeliveryPipe) + 2*SocketDepth(ND_DeliveryPipe)) + 2*SocketDepth(ND_DeliveryPipe) + 2*OR(ND_DeliveryPipe)
OffsetCoagChlor :=
    if N_CoagTubes + N_ChlorTubes ≤ N_TubesTriggerStack
        [
            0 m;
            0 m;
            -((N_CoagTubes + 2)*B_DosingTubes + ElbowRadius(ND_DeliveryPipe) + SocketDepth(ND_DeliveryPipe) - 2*OR_Fitting(ND_DeliveryPipe))
        ]
    if L_CoagDeliveryPipe ≤ L_ChlorDeliveryPipe
        [
            OR(ND_DeliveryPipe) + L_PVCBallValve + SocketDepth(ND_DeliveryPipe) + ShortTeeLength(ND_DeliveryPipe) + S_Fitting;
            0 m;
            -S_Fitting - ElbowRadius(ND_DeliveryPipe) - N_CoagTubes*(TeeLength(ND_DeliveryPipe) + 2*SocketDepth(ND_DeliveryPipe)) + 0.5*TeeLength(ND_DeliveryPipe)
        ]
    otherwise
        [
            OR(ND_DeliveryPipe) + L_PVCBallValve + SocketDepth(ND_DeliveryPipe) + ShortTeeLength(ND_DeliveryPipe) + S_Fitting;
            0 m;
            (-S_Fitting - ElbowRadius(ND_DeliveryPipe) - N_CoagTubes*(TeeLength(ND_DeliveryPipe) + 2*SocketDepth(ND_DeliveryPipe))) + 0.5*TeeLength(ND_DeliveryPipe)
        ]
CdcLeverArm_Origin = [-6.07232; 7.7373; 2.64069] m
CoagDosingTube_Origin := OffsetCoagChlor + ChlorDosingTube_Origin
CoagDeliveryPipe_Origin := CoagDosingTube_Origin + [
    -ElbowRadius(ND_DeliveryPipe) + ShortTeeLength(ND_DeliveryPipe) + SocketDepth(ND_DeliveryPipe) + L_PVCBallValve + L_CoagTube;
    0 m;
    -ElbowRadius(ND_DeliveryPipe) - L_CoagDeliveryConnectorPipeLong - .5*TeeLength(ND_DeliveryPipe)
] = [-3.81368; 7.75119; 1.43061] m
# Calibration Origin Points | mrf222 Spring 2016
# Fluid Level Columns
CoagFluidCol_Origin := CoagCCElbow2_Origin
ChlorFluidCol_Origin := ChlorCCElbow1_Origin
CoagFlowTee_Origin := [
    CoagCCElbow1_Origin[0];
    CoagCCElbow1_Origin[1] + ShortTeeLength(ND_CoagPipe);
    CoagCCElbow1_Origin[2] + 2*SocketDepth(ND_CoagPipe) + TeeLength(ND_CoagPipe)/2
]
ChlorFlowTee_Origin := [
    ChlorCCElbow2_Origin[0];
    ChlorCCElbow2_Origin[1] - ShortTeeLength(ND_CoagPipe);
    ChlorCCElbow2_Origin[2] + 2*SocketDepth(ND_CoagPipe) + TeeLength(ND_CoagPipe)/2
]
CoagFlowCol_Origin := [
    CoagCCElbow1_Origin[0];
    CoagCCElbow1_Origin[1];
    CoagCCElbow1_Origin[2] + 2*SocketDepth(ND_CoagPipe) + TeeLength(ND_CoagPipe)
]
ChlorFlowCol_Origin := [
    ChlorCCElbow2_Origin[0];
    ChlorCCElbow2_Origin[1];
    ChlorCCElbow2_Origin[2] + 2*SocketDepth(ND_CoagPipe) + TeeLength(ND_ChlorPipe)
]
CoagFlowCoupling_Origin := □  # error: This placeholder is empty.
# Calibration Column and Constant Head Tanks
# Connections to Constant Head Tank Fittings
# 1. Ititial Fittings
CoagTee1_Origin := [
    ChemPlatform_Origin[0] + ChemPlatform_Dimensions[0] + T_PlantWall + OR_Fitting(ND_CoagCalCol);
    CHT2_Origin[1] - 2*OR_Fitting(ND_CoagCalCol) - 1/2*D_CHT - S_Fitting;
    CHT_Origin[2] + 2*S_Fitting + ShortTeeLength(ND_CoagCalCol)
]
ChlorElbow1_Origin := [
    CoagTee1_Origin[0] - OR_Fitting(ND_CoagCalCol) + OR_Fitting(ND_ChlorCalCol);
    CoagTee1_Origin[1] - S_Fitting - OR_Fitting(ND_CoagCalCol) - OR_Fitting(ND_ChlorCalCol);
    CHT_Origin[2] + 3*S_Fitting
]
ChlorTee1_Origin := [
    ChlorElbow1_Origin[0];
    ChlorElbow1_Origin[1] - S_Fitting - OR_Fitting(ND_CoagCalCol) - OR_Fitting(ND_ChlorCalCol);
    CHT_Origin[2] + 3*S_Fitting + ShortTeeLength(ND_ChlorCalCol)
]
CoagElbow1_Origin := [
    CoagTee1_Origin[0];
    ChlorTee1_Origin[1] - 4*SocketDepth(ND_ChlorCalCol) - (ElbowRadius(ND_ChlorCalCol) + TeeLength(ND_ChlorCalCol)/2);
    CHT_Origin[2] + 2*S_Fitting
]
# 2. Valves leading up to the calibration columns (vertically oriented)
# MAYBE y spacing should be: to follow the pattern
ChlorCalCol2_Origin[1] - S_Fitting - OR_Fitting(ND_CoagCalCol) - OR_Fitting(ND_ChlorCalCol)
CoagValve1_Origin := [CoagTee1_Origin[0]; CoagTee1_Origin[1]; ChlorTee1_Origin[2] + 2*SocketDepth(ND_CoagCalCol)]
ChlorValve1_Origin := [
    ChlorElbow1_Origin[0];
    ChlorElbow1_Origin[1] + ElbowRadius(ND_ChlorCalCol);
    ChlorElbow1_Origin[2] + ElbowRadius(ND_ChlorCalCol) + 2*SocketDepth(ND_ChlorCalCol)
]
ChlorValve2_Origin := [ChlorTee1_Origin[0]; ChlorTee1_Origin[1]; ChlorTee1_Origin[2] + 2*SocketDepth(ND_ChlorCalCol)]
CoagValve2_Origin := [
    CoagElbow1_Origin[0];
    CoagElbow1_Origin[1] + ElbowRadius(ND_CoagCalCol);
    CoagTee1_Origin[2] + ElbowRadius(ND_CoagCalCol) + 2*SocketDepth(ND_CoagCalCol)
]
# 3. 45 degree elbow bridge of Chlor over Coag plumbing
Chlor45a_Origin := [
    ChlorTee1_Origin[0];
    ChlorTee1_Origin[1] - TeeLength(ND_ChlorCalCol)/2 - 2*SocketDepth(ND_ChlorCalCol);
    ChlorTee1_Origin[2] - ShortTeeLength(ND_ChlorCalCol)
]
# This needs to be rotated backwards
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Chlor45b_Origin := [
    Chlor45a_Origin[0] + 2*(ElbowRadius(ND_ChlorCalCol)*(sin(45 deg)/sin(67.5 deg))*cos(67.5 deg) + 2*(SocketDepth(ND_ChlorCalCol)*cos(45 deg)));
    Chlor45a_Origin[1] - 2*(ElbowRadius(ND_ChlorCalCol)*(sin(45 deg)/sin(67.5 deg))*sin(67.5 deg) + 2*SocketDepth(ND_ChlorCalCol)*cos(45 deg));
    Chlor45a_Origin[2]
]
Chlor45c_Origin := [Chlor45b_Origin[0]; Chlor45b_Origin[1] - (2*SocketDepth(ND_ChlorCalCol)); Chlor45a_Origin[2]]
Chlor45d_Origin := [
    Chlor45a_Origin[0];
    Chlor45c_Origin[1] - 2*((ElbowRadius(ND_ChlorCalCol)*(sin(45 deg)/sin(67.5 deg)))*sin(67.5 deg) + 2*(SocketDepth(ND_ChlorCalCol)*cos(45 deg)));
    Chlor45a_Origin[2]
]
# This also needs to be rotated backwards
# 4. Tees and valvues connecting flexible tubing to Calibration Column plumbing
ChlorTee2_Origin := [
    Chlor45d_Origin[0];
    Chlor45d_Origin[1] - 2*S_Fitting - TeeLength(ND_ChlorCalCol)/2 - 2*SocketDepth(ND_ChlorCalCol);
    Chlor45d_Origin[2] - SocketDepth(ND_ChlorCalCol)
]
ChlorValve3_Origin := [
    ChlorTee2_Origin[0];
    ChlorTee2_Origin[1] - TeeLength(ND_ChlorCalCol)/2 - 2*SocketDepth(ND_ChlorCalCol);
    ChlorTee2_Origin[2] + ShortTeeLength(ND_ChlorCalCol)
]
ChlorValve4_Origin := [ChlorTee2_Origin[0]; ChlorTee2_Origin[1]; ChlorTee2_Origin[2] - 2*SocketDepth(ND_ChlorCalCol)]
CoagTee2_Origin := [
    CoagTee1_Origin[0];
    CoagTee1_Origin[1] + 2*SocketDepth(ND_CoagCalCol) + TeeLength(ND_CoagCalCol)/2;
    CoagTee1_Origin[2] - 2*SocketDepth(ND_CoagCalCol)
]
CoagValve3_Origin := [
    CoagTee2_Origin[0];
    CoagTee2_Origin[1] + TeeLength(ND_CoagCalCol)/2 + 2*SocketDepth(ND_CoagCalCol);
    CoagTee2_Origin[2] + ShortTeeLength(ND_CoagCalCol)
]
CoagValve4_Origin := [CoagTee2_Origin[0]; CoagTee2_Origin[1]; CoagTee2_Origin[2] - 2*SocketDepth(ND_CoagCalCol)]
# Connections to Constant Head Tank Plumbing
CoagCalPipe1a_Origin := CoagValve1_Origin  # These would all have to be oriented down if the origin point is inside the valve socket (-90)
ChlorCalPipe1a_Origin := ChlorValve1_Origin
ChlorCalPipe1b_Origin := ChlorValve2_Origin
CoagCalPipe1b_Origin := CoagValve2_Origin
CoagCalPipe1c_Origin := CoagElbow1_Origin
ChlorCalPipe1c_Origin := ChlorElbow1_Origin
# Plumbing related to the 45 degree Elbow Chlorine bridge
ChlorCalPipe2_Origin := [Chlor45a_Origin[0]; ChlorTee1_Origin[1] - TeeLength(ND_ChlorCalCol)/2; Chlor45a_Origin[2]]
ChlorCalPipe3_Origin := [
    Chlor45a_Origin[0] + ((ElbowRadius(ND_ChlorCalCol)*(sin(45 deg)/sin(67.5 deg)))*cos(67.5 deg));
    Chlor45a_Origin[1] - (ElbowRadius(ND_ChlorCalCol)*(sin(45 deg)/sin(67.5 deg)))*sin(67.5 deg);
    Chlor45a_Origin[2]
]
ChlorCalPipe4_Origin := [Chlor45b_Origin[0]; Chlor45b_Origin[1] + SocketDepth(ND_ChlorCalCol); Chlor45a_Origin[2]]  # MOVE THESE
ChlorCalPipe5_Origin := [
    Chlor45d_Origin[0] + ((ElbowRadius(ND_ChlorCalCol)*(sin(45 deg)/sin(67.5 deg)))*cos(67.5 deg));
    Chlor45d_Origin[1] + (ElbowRadius(ND_ChlorCalCol)*(sin(45 deg)/sin(67.5 deg)))*sin(67.5 deg);
    Chlor45a_Origin[2]
]
ChlorCalPipe6_Origin := [Chlor45d_Origin[0]; Chlor45d_Origin[1] + SocketDepth(ND_ChlorCalCol); Chlor45a_Origin[2]]
# Plumbing connecting CalCols to distribution to CHTs
ChlorCalPipe7_Origin := [
    ChlorTee2_Origin[0];
    ChlorTee2_Origin[1] - TeeLength(ND_ChlorCalCol);
    ChlorTee2_Origin[2] + ShortTeeLength(ND_ChlorCalCol)
]
ChlorCalPipe8_Origin := ChlorTee2_Origin
CoagCalPipe2_Origin := [
    CoagTee2_Origin[0];
    CoagTee2_Origin[1] + TeeLength(ND_CoagCalCol)/2;
    CoagTee2_Origin[2] + ShortTeeLength(ND_CoagCalCol)
]
CoagCalPipe3_Origin := CoagTee2_Origin
CoagCalPipe4_Origin := [
    CoagTee2_Origin[0];
    CoagTee2_Origin[1] - TeeLength(ND_CoagCalCol)/2;
    CoagTee2_Origin[2] + ShortTeeLength(ND_CoagCalCol)
]
# Calibration Columns
# 1. Level (Flow) Columns
# Z_CoagulantOutlet | was set equal to Z.FloatTop
CoagCalCol1_Origin := [CoagValve1_Origin[0]; CoagValve1_Origin[1]; CoagValve1_Origin[2] + L_PVCBallValve]
ChemPlatform_Origin[0] + ChemPlatform_Dimensions[0] + T_PlantWall + 1/2*D_CHT
ChlorCalCol1_Origin := [ChlorValve1_Origin[0]; ChlorValve1_Origin[1]; ChlorValve1_Origin[2] + L_PVCBallValve]
ChlorCalCol2_Origin := [CoagTee1_Origin[0]; CoagTee1_Origin[1]; ChlorValve2_Origin[2] + L_PVCBallValve]
CoagCalCol2_Origin := [ChlorTee1_Origin[0]; ChlorTee1_Origin[1]; CoagValve2_Origin[2] + L_PVCBallValve]
ChemPlatform_Origin[1] - 1/2*D_CHT + ChemPlatform_Dimensions[1] - T_PlantWall - 1.5*D_CHT
ZW_CdcCht
CoagTopCap1_Origin := [CoagCalCol1_Origin[0]; CoagCalCol1_Origin[1]; CoagCalCol1_Origin[2] + H_CalCol]
CoagTopCap2_Origin := [CoagCalCol2_Origin[0]; CoagCalCol2_Origin[1]; CoagCalCol2_Origin[2] + H_CalCol]
ChlorTopCap1_Origin := [ChlorCalCol1_Origin[0]; ChlorCalCol1_Origin[1]; ChlorCalCol1_Origin[2] + H_CalCol]
ChlorTopCap2_Origin := [ChlorCalCol2_Origin[0]; ChlorCalCol2_Origin[1]; ChlorCalCol2_Origin[2] + H_CalCol]
# To draw the hole in the top cap, we are subtracting a cylinder from the top cap layer
CoagCylinder1_Origin := [CoagCalCol1_Origin[0]; CoagCalCol1_Origin[1]; CoagCalCol1_Origin[2] + H_CalCol - S_Fitting]
CoagCylinder2_Origin := [CoagCalCol2_Origin[0]; CoagCalCol2_Origin[1]; CoagCalCol2_Origin[2] + H_CalCol - S_Fitting]
ChlorCylinder1_Origin := [ChlorCalCol1_Origin[0]; ChlorCalCol1_Origin[1]; ChlorCalCol1_Origin[2] + H_CalCol - S_Fitting]
ChlorCylinder2_Origin := [ChlorCalCol2_Origin[0]; ChlorCalCol2_Origin[1]; ChlorCalCol2_Origin[2] + H_CalCol - S_Fitting]
# Constant Head Tank Origins
CHT_Origin := [
    ChemPlatform_Origin[0] + ChemPlatform_Dimensions[0] + T_PlantWall + 1/2*D_CHT;
    ChemPlatform_Origin[1] - 1/2*D_CHT + ChemPlatform_Dimensions[1] - T_PlantWall;
    ZW_CdcCht
] = [-7.97396; 7.55; 2.69839] m
CHT2_Origin := [CHT_Origin[0]; CHT_Origin[1] - 1.5*D_CHT; CHT_Origin[2]]
CHT3_Origin := [
    CHT_Origin[0];
    CHT2_Origin[1] - 1.5*D_CHT - S_Fitting*4 - 2*(ND_ChlorCalCol + ND_CoagCalCol);
    CHT_Origin[2]
]
CHT4_Origin := [CHT_Origin[0]; CHT3_Origin[1] - 1.5*D_CHT; CHT_Origin[2]]
# Connections between dosing tubes and CHTs
# Lever
# Lever Arms
CdcLeverArm1 := BoxF([
    CdcLeverArm_Origin[0] + T_CdcLeverArm;
    CdcLeverArm_Origin[1] - L_CdcLeverArm - D_CdcLeverCylinder1/2;
    CdcLeverArm_Origin[2]
], [
    CdcLeverArm_Origin[0];
    CdcLeverArm_Origin[1] + L_CdcLeverArm + L_CdcLeverArmExtended;
    CdcLeverArm_Origin[2] + H_CdcLeverArm
], [0; 0; 0]*deg)
CdcLeverArm2 := BoxF([
    CdcLeverArm2_Origin[0] + T_CdcLeverArm;
    CdcLeverArm2_Origin[1] - L_CdcLeverArm - D_CdcLeverCylinder1/2;
    CdcLeverArm2_Origin[2]
], [
    CdcLeverArm2_Origin[0];
    CdcLeverArm2_Origin[1] + (L_CdcLeverArm + L_CdcLeverArmExtended);
    CdcLeverArm2_Origin[2] + H_CdcLeverArm
], [0; 0; 0]*deg)
CdcLeverArm_Script := stack(CdcLeverLayer, CdcLeverArm1, CdcLeverArm2, CdcLeverFrz)
# Connecting Cylinder
CdcLeverConnectingCylinder1 := CylinderSUBF([
    CdcLeverArm_Origin[0] + T_CdcLeverArm;
    (CdcLeverArm_Origin[1] - L_CdcLeverArm) - D_CdcLeverCylinder1/2;
    CdcLeverArm_Origin[2] + H_LeverArm/2
], D_CdcLeverCylinder1/2, L_CdcLeverCylinder, [0; 180]*deg, ["CdcLayer"])  # Top most cylinder. Connected to float. Thickest
CdcLeverConnectingCylinder4 := CylinderSUBF([
    CdcLeverArm_Origin[0] + T_CdcLeverArm;
    CdcLeverArm_Origin[1] + L_CdcLeverArm + L_CdcLeverArmExtended - D_CdcLeverCylinder4/2;
    CdcLeverArm_Origin[2] + H_LeverArm/2
], D_CdcLeverCylinder4/2, L_CdcLeverCylinder, [0; 180]*deg, ["CdcLayer"])  # Bottom most cylinder.
CdcLeverConnectingCylinder2 := CylinderSUBF([
    CdcLeverArm_Origin[0] + T_CdcLeverArm;
    CdcLeverArm_Origin[1] + L_CdcLeverPivottoCylinder2;
    CdcLeverArm_Origin[2] + H_LeverArm/2
], D_CdcLeverCylinder2/2, L_CdcLeverCylinder, [0; 180]*deg, ["CdcLayer"])
# Cylinder closest to the pivot point
CdcLeverConnectingCylinder3 := CylinderSUBF([
    CdcLeverArm_Origin[0] + T_CdcLeverArm;
    CdcLeverArm_Origin[1] + L_CdcLeverPivottoCylinder2 + L_CdcLeverCylinder2to3;
    CdcLeverArm_Origin[2] + H_LeverArm/2
], D_CdcLeverCylinder2/2, L_CdcLeverCylinder, [0; 180]*deg, ["CdcLayer"])
CdcLeverInnerBar1 := BoxF([
    CdcLeverPivotBox_Origin[0];
    CdcLeverPivotBox_Origin[1] - W_CdcLeverPivotBox;
    CdcLeverPivotBox_Origin[2]
], [
    CdcLeverPivotBox_Origin[0] - T_CdcLeverArm;
    CdcLeverPivotBox_Origin[1] + L_CdcLeverInnerBar;
    CdcLeverPivotBox_Origin[2] - H_CdcLeverArm
], [0; 0; 0]*deg)
CdcLeverInnerBar2 := BoxF([
    CdcLeverPivotBox_Origin[0] + L_CdcLeverPivotBox;
    CdcLeverPivotBox_Origin[1] - W_CdcLeverPivotBox;
    CdcLeverPivotBox_Origin[2]
], [
    CdcLeverPivotBox_Origin[0] + L_CdcLeverPivotBox + T_CdcLeverArm;
    CdcLeverPivotBox_Origin[1] + L_CdcLeverInnerBar;
    CdcLeverPivotBox_Origin[2] - H_CdcLeverArm
], [0; 0; 0]*deg)
CdcLeverConnectingCylinder_Script := stack(SelectCdcLever, CdcLeverConnectingCylinder1, CdcLeverInnerBar1, CdcLeverInnerBar2, CdcLeverConnectingCylinder2, CdcLeverConnectingCylinder3, CdcLeverConnectingCylinder4, CdcLeverFrz)
# Mounting Plate and Pivot Box
CdcLeverPivotBox := BoxF(CdcLeverPivotBox_Origin, [
    CdcLeverPivotBox_Origin[0] + L_CdcLeverPivotBox;
    CdcLeverPivotBox_Origin[1] - W_CdcLeverPivotBox;
    CdcLeverPivotBox_Origin[2] - H_CdcLeverPivotBox
], [0; 0; 0]*deg)
CdcLeverMountingPlate := BoxF(CdcLeverPivotBox_Origin, [
    CdcLeverPivotBox_Origin[0] + H_CdcLeverMountingPlate;
    CdcLeverPivotBox_Origin[1] + W_CdcLeverMountingPlate;
    CdcLeverPivotBox_Origin[2] - L_CdcLeverMountingPlate
], [0; 0; 0]*deg)
CdcLeverMounting := stack(CdcLeverMountingLayer, CdcLeverPivotBox, CdcLeverMountingPlate, CdcLeverMountingFrz)
# Float Cable
L_CdcFloatCable := (CdcLeverArm_Origin[2] - CdcFloat_Origin[2]) - T_EtFloat + L_CdcLeverVert + H_CdcLeverArm/2 = 0.2977 m
CdcFloatCable := CylinderF([CdcFloat_Origin[0]; CdcFloat_Origin[1]; CdcFloat_Origin[2] + T_EtFloat], D_CdcFloatCable, -L_CdcFloatCable, [0; -90]*deg)
CdcLeverFloatCable_Script := stack(SelectCdcLever, CdcFloatCable, CdcLeverFrz)
# Lever Drop Tubes/Tees
# Drop Tube Tees
CdcDropTubeTee := TeeF(CdcLeverDropTubeTee_Origin, [90; 0; 90 + AN_CdcLever]*deg, ND_DropTube, SDR_13.5)
CdcDropTube2Tee := TeeF(CdcLeverDropTube2Tee_Origin, [-90; 0; 90 + AN_CdcLever]*deg, ND_DropTube, SDR_13.5)
CdcLeverFittings_Script := stack(CdcLeverFittingsLayer, CdcDropTubeTee, CdcDropTube2Tee, CdcLeverFittingsFrz)
# DropPlumbing
CdcLeverDropTube1 := PipeF(CdcLeverDropTube_Origin, L_DropTube, [-AN_CdcLever; -90]*deg, ND_DropTube, SDR_13.5)
CdcLeverDropTube2 := PipeF(CdcLeverDropTube2_Origin, L_DropTube, [-AN_CdcLever; -90]*deg, ND_DropTube, SDR_13.5)
CdcLeverPlu_Script := stack(CdcLeverPluLayer, CdcLeverDropTube1, CdcLeverDropTube2, CdcLeverPluFrz)
# Lever Sliders
CdcLeverSliderOutsideBox := BoxF(CdcLeverSlider1_Origin, [
    CdcLeverSlider1_Origin[0] + T_CdcLeverSlider;
    CdcLeverSlider1_Origin[1] + L_CdcLeverSlider;
    CdcLeverSlider1_Origin[2] - H_CdcLeverSlider
], [0; 0; 0]*deg)
CdcLeverSliderOutside2Box := BoxF(CdcLeverSlider2_Origin, [
    CdcLeverSlider2_Origin[0] - T_CdcLeverSlider;
    CdcLeverSlider2_Origin[1] + L_CdcLeverSlider;
    CdcLeverSlider2_Origin[2] - H_CdcLeverSlider
], [0; 0; 0]*deg)
CdcLeverSliderMiddleTop2Box := BoxF(CdcLeverSliderMiddleTop2_Origin, [
    CdcLeverSliderMiddleTop2_Origin[0] - T_CdcLeverArm;
    CdcLeverSliderMiddleTop2_Origin[1] + L_CdcLeverSlider;
    CdcLeverSliderMiddleTop2_Origin[2] - T_CdcLeverSlider
], [0; 0; 0]*deg)
CdcLeverSliderMiddleTopBox := BoxF(CdcLeverSliderMiddleTop_Origin, [
    CdcLeverSliderMiddleTop_Origin[0] + T_CdcLeverArm;
    CdcLeverSliderMiddleTop_Origin[1] + L_CdcLeverSlider;
    CdcLeverSliderMiddleTop_Origin[2] - T_CdcLeverSlider
], [0; 0; 0]*deg)
CdcLeverSliderMiddleBot2Box := BoxF(CdcLeverSliderMiddleBot2_Origin, [
    CdcLeverSliderMiddleBot2_Origin[0] - T_CdcLeverArm;
    CdcLeverSliderMiddleBot2_Origin[1] + L_CdcLeverSlider;
    CdcLeverSliderMiddleBot2_Origin[2] - T_CdcLeverSlider
], [0; 0; 0]*deg)
CdcLeverSliderMiddleBotBox := BoxF(CdcLeverSliderMiddleBot_Origin, [
    CdcLeverSliderMiddleBot_Origin[0] + T_CdcLeverArm;
    CdcLeverSliderMiddleBot_Origin[1] + L_CdcLeverSlider;
    CdcLeverSliderMiddleBot_Origin[2] - T_CdcLeverSlider
], [0; 0; 0]*deg)
CdcLeverSliderInnerTop2Box := BoxF(CdcLeverSliderInnerTop2_Origin, [
    CdcLeverSliderInnerTop2_Origin[0] - T_CdcLeverSlider;
    CdcLeverSliderInnerTop2_Origin[1] + L_CdcLeverSlider;
    CdcLeverSliderInnerTop2_Origin[2] - 2*T_CdcLeverSlider
], [0; 0; 0]*deg)
CdcLeverSliderInnerTopBox := BoxF(CdcLeverSliderInnerTop_Origin, [
    CdcLeverSliderInnerTop_Origin[0] + T_CdcLeverSlider;
    CdcLeverSliderInnerTop_Origin[1] + L_CdcLeverSlider;
    CdcLeverSliderInnerTop_Origin[2] - 2*T_CdcLeverSlider
], [0; 0; 0]*deg)
CdcLeverSliderInnerBotBox := BoxF(CdcLeverSliderInnerBot_Origin, [
    CdcLeverSliderInnerBot_Origin[0] + T_CdcLeverSlider;
    CdcLeverSliderInnerBot_Origin[1] + L_CdcLeverSlider;
    CdcLeverSliderInnerBot_Origin[2] - 2*T_CdcLeverSlider
], [0; 0; 0]*deg)
CdcLeverSliderInnerBot2Box := BoxF(CdcLeverSliderInnerBot2_Origin, [
    CdcLeverSliderInnerBot2_Origin[0] - T_CdcLeverSlider;
    CdcLeverSliderInnerBot2_Origin[1] + L_CdcLeverSlider;
    CdcLeverSliderInnerBot2_Origin[2] - 2*T_CdcLeverSlider
], [0; 0; 0]*deg)
CdcLeverSlider_Script := stack(CdcLeverSliderLayer, CdcLeverSliderOutsideBox, CdcLeverSliderOutside2Box, CdcLeverSliderMiddleTopBox, CdcLeverSliderMiddleTop2Box, CdcLeverSliderMiddleBotBox, CdcLeverSliderMiddleBot2Box, CdcLeverSliderInnerTopBox, CdcLeverSliderInnerTop2Box, CdcLeverSliderInnerBotBox, CdcLeverSliderInnerBot2Box, Union_All, CdcLeverSliderFrz)
# Float
CdcFloat := CylinderF(CdcFloat_Origin, OR_Fitting(ND_EtFloat), T_CdcFloat, [0; 90]*deg)
CdcFloat_Script := stack(CdcFloatLayer, CdcFloat, CdcFloatFrz)
# Lever Rotation
Rotate3D_CdcLever := Rotate3DLast([CdcLeverArm_Origin[1]; CdcLeverArm_Origin[2]; CdcLeverArm_Origin[0]], "z", -AN_CdcLever*deg)
RotateCdcLever_Script := stack(ThawCdcLever, view("r"), Rotate3D_CdcLever, view("t"), CdcLeverFrz)
RotateCdcLeverSlider_Script := stack(ThawCdcLeverSlider, view("r"), Rotate3D_CdcLever, view("t"), CdcLeverSliderFrz)
RotateCdcLeverFittings_Script := stack(ThawCdcLeverFittings, view("r"), Rotate3D_CdcLever, view("t"), CdcLeverFittingsFrz)
RotateCdcLeverPlu_Script := stack(ThawCdcLeverPlu, view("r"), Rotate3D_CdcLever, view("t"), CdcLeverPluFrz)
CdcLever_Script := stack(CdcFloat_Script, CdcLeverArm_Script, CdcLeverConnectingCylinder_Script, RotateCdcLever_Script, CdcLeverSlider_Script, RotateCdcLeverSlider_Script, CdcLeverFittings_Script, RotateCdcLeverFittings_Script, CdcLeverPlu_Script, RotateCdcLeverPlu_Script, CdcLeverFloatCable_Script, CdcLeverMounting)
CdcLever_ScriptNoRotation := stack(CdcFloat_Script, CdcLeverArm_Script, CdcLeverConnectingCylinder_Script, CdcLeverSlider_Script, CdcLeverFittings_Script, CdcLeverPlu_Script)
LeverandET_Script := stack(AC_EntranceTank, CdcLever_Script)
# Manifold
# Manifold Pipes
# Coagulant Connector and Delivery Pipes
CoagConnectorPipe := PipeF(CoagDosingTube_Origin + [
    -L_PVCBallValve - ShortTeeLength(ND_DeliveryPipe) - SocketDepth(ND_DeliveryPipe);
    0 m;
    .5*TeeLength(ND_DeliveryPipe)
], 2*SocketDepth(ND_DeliveryPipe), [0; 90]*deg, ND_DeliveryPipe, SDR_13.5)
ArrayCoagConnectorPipe := ArrayLast(N_CoagTubes, 1, B_DosingTubes)
MirrorCoagConnectorPipe := Mirror3dAll("yz", [
    CoagDosingTube_Origin[0] + .5*L_CoagTube;
    CoagDosingTube_Origin[1];
    CoagDosingTube_Origin[2] + 1/4*H_Et + ShortTeeLength(ND_DeliveryPipe) + .5*ND_DeliveryPipe
], "n")
CoagDeliveryPipe := PipeF(CoagDeliveryPipe_Origin, L_CoagDeliveryPipe, [0; 0]*deg, ND_DeliveryPipe, SDR_13.5)
CoagDeliveryConnectorPipeLong := PipeF(CoagDosingTube_Origin + [
    L_PVCBallValve + ShortTeeLength(ND_DeliveryPipe) + SocketDepth(ND_DeliveryPipe) + L_CoagTube;
    0 m;
    -.5*TeeLength(ND_DeliveryPipe)
], L_CoagDeliveryConnectorPipeLong, [0; -90]*deg, ND_DeliveryPipe, SDR_13.5)
CoagAirReleaseConnectorBottomRightPipe := PipeF(CoagDosingTube_Origin + [
    -L_PVCBallValve - ShortTeeLength(ND_DeliveryPipe) - SocketDepth(ND_DeliveryPipe);
    (ElbowRadius(ND_DeliveryPipe)*(sin(45 deg)/sin(67.5 deg)))*cos(67.5 deg) + 2*(SocketDepth(ND_DeliveryPipe)*cos(45 deg));
    ((N_CoagTubes - 1)*(TeeLength(ND_DeliveryPipe) + 2*SocketDepth(ND_DeliveryPipe)) + .5*TeeLength(ND_DeliveryPipe) + 2*SocketDepth(ND_DeliveryPipe)) + (ElbowRadius(ND_DeliveryPipe)*(sin(45 deg)/sin(67.5 deg)))*sin(67.5 deg) + 2*(SocketDepth(ND_DeliveryPipe)*cos(45 deg))
], 2*SocketDepth(ND_DeliveryPipe), [45; -90]*deg, ND_DeliveryPipe, SDR_13.5)
CoagAirReleaseConnectorBottomLeftPipe := PipeF(CoagDosingTube_Origin + [
    L_CoagTube + L_PVCBallValve + ShortTeeLength(ND_DeliveryPipe) + SocketDepth(ND_DeliveryPipe);
    (ElbowRadius(ND_DeliveryPipe)*(sin(45 deg)/sin(67.5 deg)))*cos(67.5 deg) + 2*(SocketDepth(ND_DeliveryPipe)*cos(45 deg));
    ((N_CoagTubes - 1)*(TeeLength(ND_DeliveryPipe) + 2*SocketDepth(ND_DeliveryPipe)) + .5*TeeLength(ND_DeliveryPipe) + 2*SocketDepth(ND_DeliveryPipe)) + (ElbowRadius(ND_DeliveryPipe)*(sin(45 deg)/sin(67.5 deg)))*sin(67.5 deg) + 2*(SocketDepth(ND_DeliveryPipe)*cos(45 deg))
], 2*SocketDepth(ND_DeliveryPipe), [45; -90]*deg, ND_DeliveryPipe, SDR_13.5)
L_CoagAirReleaseConnectorMiddleRightPipe := (N_ChlorTubes - 1)*(2*SocketDepth(ND_DeliveryPipe) + TeeLength(ND_DeliveryPipe)) + TeeLength(ND_DeliveryPipe)
CoagAirReleaseConnectorMiddleRightPipe := PipeF(CoagDosingTube_Origin + [
    -L_PVCBallValve - ShortTeeLength(ND_DeliveryPipe) - SocketDepth(ND_DeliveryPipe);
    2*(ElbowRadius(ND_DeliveryPipe)*(sin(45 deg)/sin(67.5 deg)))*cos(67.5 deg) + 2*(SocketDepth(ND_DeliveryPipe)*cos(45 deg));
    ((N_CoagTubes - 1)*(TeeLength(ND_DeliveryPipe) + 2*SocketDepth(ND_DeliveryPipe)) + .5*TeeLength(ND_DeliveryPipe) + 2*SocketDepth(ND_DeliveryPipe)) + 2*(ElbowRadius(ND_DeliveryPipe)*(sin(45 deg)/sin(67.5 deg)))*sin(67.5 deg) + 2*(SocketDepth(ND_DeliveryPipe)*cos(45 deg))
], L_CoagAirReleaseConnectorMiddleRightPipe, [0; 90]*deg, ND_DeliveryPipe, SDR_13.5)
CoagAirReleaseConnectorMiddleLeftPipe := PipeF(CoagDosingTube_Origin + [
    L_CoagTube + L_PVCBallValve + ShortTeeLength(ND_DeliveryPipe) + SocketDepth(ND_DeliveryPipe);
    2*(ElbowRadius(ND_DeliveryPipe)*(sin(45 deg)/sin(67.5 deg)))*cos(67.5 deg) + 2*(SocketDepth(ND_DeliveryPipe)*cos(45 deg));
    ((N_CoagTubes - 1)*(TeeLength(ND_DeliveryPipe) + 2*SocketDepth(ND_DeliveryPipe)) + .5*TeeLength(ND_DeliveryPipe) + 2*SocketDepth(ND_DeliveryPipe)) + 2*(ElbowRadius(ND_DeliveryPipe)*(sin(45 deg)/sin(67.5 deg)))*sin(67.5 deg) + 2*(SocketDepth(ND_DeliveryPipe)*cos(45 deg))
], L_CoagAirReleaseConnectorMiddleRightPipe, [0; 90]*deg, ND_DeliveryPipe, SDR_13.5)
CoagAirReleaseConnectorTopRightPipe := PipeF(CoagDosingTube_Origin + [
    -L_PVCBallValve - ShortTeeLength(ND_DeliveryPipe) - SocketDepth(ND_DeliveryPipe);
    (ElbowRadius(ND_DeliveryPipe)*(sin(45 deg)/sin(67.5 deg)))*cos(67.5 deg) + 2*(SocketDepth(ND_DeliveryPipe)*cos(45 deg));
    ((N_CoagTubes - 1)*(TeeLength(ND_DeliveryPipe) + 2*SocketDepth(ND_DeliveryPipe)) + .5*TeeLength(ND_DeliveryPipe) + 2*SocketDepth(ND_DeliveryPipe)) + 3*(ElbowRadius(ND_DeliveryPipe)*(sin(45 deg)/sin(67.5 deg)))*sin(67.5 deg) + 2*(SocketDepth(ND_DeliveryPipe)*cos(45 deg)) + L_CoagAirReleaseConnectorMiddleRightPipe
], 2*SocketDepth(ND_DeliveryPipe), [45; 90]*deg, ND_DeliveryPipe, SDR_13.5)
CoagAirReleaseConnectorTopLeftPipe := PipeF(CoagDosingTube_Origin + [
    L_CoagTube + L_PVCBallValve + ShortTeeLength(ND_DeliveryPipe) + SocketDepth(ND_DeliveryPipe);
    (ElbowRadius(ND_DeliveryPipe)*(sin(45 deg)/sin(67.5 deg)))*cos(67.5 deg) + 2*(SocketDepth(ND_DeliveryPipe)*cos(45 deg));
    ((N_CoagTubes - 1)*(TeeLength(ND_DeliveryPipe) + 2*SocketDepth(ND_DeliveryPipe)) + .5*TeeLength(ND_DeliveryPipe) + 2*SocketDepth(ND_DeliveryPipe)) + 3*(ElbowRadius(ND_DeliveryPipe)*(sin(45 deg)/sin(67.5 deg)))*sin(67.5 deg) + 2*(SocketDepth(ND_DeliveryPipe)*cos(45 deg)) + L_CoagAirReleaseConnectorMiddleRightPipe
], 2*SocketDepth(ND_DeliveryPipe), [45; 90]*deg, ND_DeliveryPipe, SDR_13.5)
CoagAirReleaseRightPipe := PipeF(CoagDosingTube_Origin + [
    -L_PVCBallValve - ShortTeeLength(ND_DeliveryPipe) - SocketDepth(ND_DeliveryPipe);
    0 m;
    ((N_CoagTubes - 1)*(TeeLength(ND_DeliveryPipe) + 2*SocketDepth(ND_DeliveryPipe)) + .5*TeeLength(ND_DeliveryPipe) + 2*SocketDepth(ND_DeliveryPipe)) + 4*(ElbowRadius(ND_DeliveryPipe)*(sin(45 deg)/sin(67.5 deg)))*sin(67.5 deg) + 4*(SocketDepth(ND_DeliveryPipe)*cos(45 deg)) + L_CoagAirReleaseConnectorMiddleRightPipe
], L_ChlorAirReleasePipe - ((ElbowRadius(ND_DeliveryPipe)*(sin(45 deg)/sin(67.5 deg)))*sin(67.5 deg) + 2*(SocketDepth(ND_DeliveryPipe)*cos(45 deg))), [0; 90]*deg, ND_DeliveryPipe, SDR_13.5)
CoagAirReleaseLeftPipe := PipeF(CoagDosingTube_Origin + [
    L_CoagTube + L_PVCBallValve + ShortTeeLength(ND_DeliveryPipe) + SocketDepth(ND_DeliveryPipe);
    0 m;
    ((N_CoagTubes - 1)*(TeeLength(ND_DeliveryPipe) + 2*SocketDepth(ND_DeliveryPipe)) + .5*TeeLength(ND_DeliveryPipe) + 2*SocketDepth(ND_DeliveryPipe)) + 4*(ElbowRadius(ND_DeliveryPipe)*(sin(45 deg)/sin(67.5 deg)))*sin(67.5 deg) + 4*(SocketDepth(ND_DeliveryPipe)*cos(45 deg)) + L_CoagAirReleaseConnectorMiddleRightPipe
], L_ChlorAirReleasePipe - ((ElbowRadius(ND_DeliveryPipe)*(sin(45 deg)/sin(67.5 deg)))*sin(67.5 deg) + 2*(SocketDepth(ND_DeliveryPipe)*cos(45 deg))), [0; 90]*deg, ND_DeliveryPipe, SDR_13.5)
# Chlorine Connector and Delivery Pipes
# connects tees closest to the
# ET
ChlorConnectorPipe := PipeF(ChlorDosingTube_Origin + [
    -L_PVCBallValve - ShortTeeLength(ND_DeliveryPipe) - SocketDepth(ND_DeliveryPipe);
    0 m;
    .5*TeeLength(ND_DeliveryPipe)
], 2*SocketDepth(ND_DeliveryPipe), [0; 90]*deg, ND_DeliveryPipe, SDR_13.5)
ArrayChlorConnectorPipe := ArrayLast(N_ChlorTubes - 1, 1, B_DosingTubes)
MirrorChlorConnectorPipe := Mirror3dAll("yz", [
    ChlorDosingTube_Origin[0] + .5*L_ChlorTube;
    ChlorDosingTube_Origin[1];
    ChlorDosingTube_Origin[2] + 1/4*H_Et + ShortTeeLength(ND_DeliveryPipe) + .5*ND_DeliveryPipe
], "n")
L_ChlorDeliveryConnectorPipeLong :=
    2*SocketDepth(ND_DeliveryPipe) if N_CoagTubes + N_ChlorTubes ≤ N_TubesTriggerStack
    ChlorDosingTube_Origin[2] - ChlorDeliveryPipe_Origin[2] - .5*TeeLength(ND_DeliveryPipe) - ElbowRadius(ND_DeliveryPipe) if L_ChlorDeliveryPipe > L_CoagDeliveryPipe + 2*(ElbowRadius(ND_DeliveryPipe) + SocketDepth(ND_DeliveryPipe))
    max(ChlorDosingTube_Origin[2] - ChlorDeliveryPipe_Origin[2] - .5*TeeLength(ND_DeliveryPipe) - ElbowRadius(ND_DeliveryPipe) - (2*sin(45 deg)*(2*ElbowRadius(ND_DeliveryPipe) + 2*SocketDepth(ND_DeliveryPipe)) + (N_ChlorTubes + 1)*B_DosingTubes + sin(45 deg)*(1 - tan(22.5 deg))*ElbowRadius(ND_DeliveryPipe) + SocketDepth(ND_DeliveryPipe)), 2*SocketDepth(ND_DeliveryPipe)) otherwise
    = 0.467754 m
ChlorDeliveryConnectorPipeLong := PipeF(ChlorDosingTube_Origin + [
    L_PVCBallValve + ShortTeeLength(ND_DeliveryPipe) + SocketDepth(ND_DeliveryPipe) + L_ChlorTube;
    0 m;
    -.5*TeeLength(ND_DeliveryPipe)
], -L_ChlorDeliveryConnectorPipeLong, [0; 90]*deg, ND_DeliveryPipe, SDR_13.5)
ChlorDosingTube_Origin + [
    L_PVCBallValve + ShortTeeLength(ND_DeliveryPipe) + SocketDepth(ND_DeliveryPipe) + L_ChlorTube;
    0 m;
    -.5*TeeLength(ND_DeliveryPipe) - L_ChlorDeliveryConnectorPipeLong
] = [-3.44525; 7.75119; 1.37403] m
ChlorElbowConnectorPipeBottom := PipeF(ChlorDeliveryPipe_Origin + [
    -ElbowRadius(ND_DeliveryPipe) + (L_PVCBallValve + ShortTeeLength(ND_DeliveryPipe) + SocketDepth(ND_DeliveryPipe) + L_ChlorTube + L_PVCBallValve);
    -sin(45 deg)*ElbowRadius(ND_DeliveryPipe);
    sin(45 deg)*ElbowRadius(ND_DeliveryPipe)
], 2*SocketDepth(ND_DeliveryPipe), [45; -90]*deg, ND_DeliveryPipe, SDR_13.5)
L_ChlorBridgeConnectorPipe := ChlorDosingTube_Origin[2] - ChlorDeliveryPipe_Origin[2] - .5*TeeLength(ND_DeliveryPipe) - L_ChlorTube - sin(45 deg)*(4*ElbowRadius(ND_DeliveryPipe) + 4*SocketDepth(ND_DeliveryPipe) + (1 - tan(22.5 deg))*ElbowRadius(ND_DeliveryPipe))
ChlorBridgeConnectorPipe := PipeF(ChlorDeliveryPipe_Origin + [
    ElbowRadius(ND_DeliveryPipe);
    -(sin(45 deg)*(ElbowRadius(ND_DeliveryPipe) + 2*SocketDepth(ND_DeliveryPipe)) + (1 - sin(45 deg))*ElbowRadius(ND_DeliveryPipe));
    sin(45 deg)*(ElbowRadius(ND_DeliveryPipe) + 2*SocketDepth(ND_DeliveryPipe)) + sin(45 deg)*ElbowRadius(ND_DeliveryPipe)
], L_ChlorBridgeConnectorPipe, [0; 90]*deg, ND_DeliveryPipe, SDR_13.5)
ChlorElbowConnectorPipeTop := PipeF(ChlorDosingTube_Origin + [
    -L_DosingConnectors - ShortTeeLength(ND_DeliveryPipe) - SocketDepth(ND_DeliveryPipe);
    -sin(45 deg)*(2*SocketDepth(ND_DeliveryPipe) + (1 - tan(22.5 deg))*ElbowRadius(ND_DeliveryPipe)) - (1 - sin(45 deg))*ElbowRadius(ND_DeliveryPipe);
    -.5*TeeLength(ND_DeliveryPipe) - L_ChlorTube - sin(45 deg)*(2*SocketDepth(ND_DeliveryPipe) + (1 - tan(22.5 deg))*ElbowRadius(ND_DeliveryPipe) + ElbowRadius(ND_DeliveryPipe))
], 2*SocketDepth(ND_DeliveryPipe) + (1 - tan(22.5 deg))*ElbowRadius(ND_DeliveryPipe), [-45; 90]*deg, ND_DeliveryPipe, SDR_13.5)
ChlorDeliveryPipe := PipeF(ChlorDeliveryPipe_Origin, L_ChlorDeliveryPipe, [0; 0]*deg, ND_DeliveryPipe, SDR_13.5)
ChlorAirReleaseRightPipe := PipeF(ChlorDosingTube_Origin + [
    -L_PVCBallValve - ShortTeeLength(ND_DeliveryPipe) - SocketDepth(ND_DeliveryPipe);
    0 m;
    (N_ChlorTubes - 1)*(TeeLength(ND_DeliveryPipe) + 2*SocketDepth(ND_DeliveryPipe)) + .5*TeeLength(ND_DeliveryPipe)
], L_ChlorAirReleasePipe, [0; 90]*deg, ND_DeliveryPipe, SDR_13.5)
ChlorAirReleaseLeftPipe := PipeF(ChlorDosingTube_Origin + [
    L_ChlorTube + L_PVCBallValve + ShortTeeLength(ND_DeliveryPipe) + SocketDepth(ND_DeliveryPipe);
    0 m;
    (N_ChlorTubes - 1)*(TeeLength(ND_DeliveryPipe) + 2*SocketDepth(ND_DeliveryPipe)) + .5*TeeLength(ND_DeliveryPipe)
], L_ChlorAirReleasePipe, [0; 90]*deg, ND_DeliveryPipe, SDR_13.5)
# Manifold Fittings
# Coag and Chlor Elbows
ElbowCoagDosing, ElbowCoagDosingBottomLeft, ElbowChlorDosingBottomLeft
ElbowCoagCHT := ElbowF(CoagDeliveryPipe_Origin + [-L_CoagDeliveryPipe; 0 m; 0 m], [90; 0; 90]*deg, ND_DeliveryPipe, SDR_13.5)
ElbowChlorCHT := ElbowF(ChlorDeliveryPipe_Origin + [-L_ChlorDeliveryPipe; 0 m; 0 m], [90; 0; 90]*deg, ND_DeliveryPipe, SDR_13.5)
ElbowCoagDeliveryLeft := ElbowF(CoagDeliveryPipe_Origin, [-90; 0; 90]*deg, ND_DeliveryPipe, SDR_13.5)
ElbowChlorDeliveryLeft := ElbowF(ChlorDeliveryPipe_Origin, [-90; 0; 90]*deg, ND_DeliveryPipe, SDR_13.5)
ElbowCoagDeliveryCutOut := ElbowF(CoagDeliveryPipe_Origin - [L_CoagDeliveryPipe; 0 m; 0 m], [0; 0; 0], ND_DeliveryPipe, SDR_13.5)
2*sin(45 deg)*SocketDepth(ND_DeliveryPipe) = 0.0240416 m
ElbowChlorDeliveryCutOut := ElbowF(ChlorDeliveryPipe_Origin - [L_ChlorDeliveryPipe; 0 m; 0 m], [90; 0; 90], ND_DeliveryPipe, SDR_13.5)
[-135; 90; 0]
# Option 1:Eliminate the top right elbow and modify the tee code and add a ball valve on top
# option 2: repla90 the top right elbow with a tee and ball valve without changing the tee code
# Coag 45 deg Elbows
Elbow45CoagDosingBottomRight := Elbow45F(CoagDosingTube_Origin + [
    -L_PVCBallValve - ShortTeeLength(ND_DeliveryPipe) - SocketDepth(ND_DeliveryPipe);
    0 m;
    (N_CoagTubes - 1)*(TeeLength(ND_DeliveryPipe) + 2*SocketDepth(ND_DeliveryPipe)) + .5*TeeLength(ND_DeliveryPipe) + 2*SocketDepth(ND_DeliveryPipe)
], [0; -90; 90]*deg, ND_DeliveryPipe, SDR_13.5)
Elbow45CoagDosingMiddleRight := Elbow45F(CoagDosingTube_Origin + [
    -L_PVCBallValve - ShortTeeLength(ND_DeliveryPipe) - SocketDepth(ND_DeliveryPipe);
    (ElbowRadius(ND_DeliveryPipe)*(sin(45 deg)/sin(67.5 deg)))*cos(67.5 deg) + 2*(SocketDepth(ND_DeliveryPipe)*cos(45 deg));
    ((N_CoagTubes - 1)*(TeeLength(ND_DeliveryPipe) + 2*SocketDepth(ND_DeliveryPipe)) + .5*TeeLength(ND_DeliveryPipe) + 2*SocketDepth(ND_DeliveryPipe)) + (ElbowRadius(ND_DeliveryPipe)*(sin(45 deg)/sin(67.5 deg)))*sin(67.5 deg) + 2*(SocketDepth(ND_DeliveryPipe)*cos(45 deg))
], [45; 90; 0]*deg, ND_DeliveryPipe, SDR_13.5)
Elbow45CoagDosingMiddleTopRight := Elbow45F(CoagDosingTube_Origin + [
    -L_PVCBallValve - ShortTeeLength(ND_DeliveryPipe) - SocketDepth(ND_DeliveryPipe);
    2*(ElbowRadius(ND_DeliveryPipe)*(sin(45 deg)/sin(67.5 deg)))*cos(67.5 deg) + 2*(SocketDepth(ND_DeliveryPipe)*cos(45 deg));
    ((N_CoagTubes - 1)*(TeeLength(ND_DeliveryPipe) + 2*SocketDepth(ND_DeliveryPipe)) + .5*TeeLength(ND_DeliveryPipe) + 2*SocketDepth(ND_DeliveryPipe)) + 2*(ElbowRadius(ND_DeliveryPipe)*(sin(45 deg)/sin(67.5 deg)))*sin(67.5 deg) + 2*(SocketDepth(ND_DeliveryPipe)*cos(45 deg)) + L_CoagAirReleaseConnectorMiddleRightPipe
], [90; 90; 0]*deg, ND_DeliveryPipe, SDR_13.5)
Elbow45CoagDosingTopRight := Elbow45F(CoagDosingTube_Origin + [
    -L_PVCBallValve - ShortTeeLength(ND_DeliveryPipe) - SocketDepth(ND_DeliveryPipe);
    0 m;
    ((N_CoagTubes - 1)*(TeeLength(ND_DeliveryPipe) + 2*SocketDepth(ND_DeliveryPipe)) + .5*TeeLength(ND_DeliveryPipe) + 2*SocketDepth(ND_DeliveryPipe)) + 4*(ElbowRadius(ND_DeliveryPipe)*(sin(45 deg)/sin(67.5 deg)))*sin(67.5 deg) + 4*(SocketDepth(ND_DeliveryPipe)*cos(45 deg)) + L_CoagAirReleaseConnectorMiddleRightPipe
], [-90; 90; 0]*deg, ND_DeliveryPipe, SDR_13.5)
Elbow45CoagDosingBottomLeft := Elbow45F(CoagDosingTube_Origin + [
    L_CoagTube + L_PVCBallValve + ShortTeeLength(ND_DeliveryPipe) + SocketDepth(ND_DeliveryPipe);
    0 m;
    (N_CoagTubes - 1)*(TeeLength(ND_DeliveryPipe) + 2*SocketDepth(ND_DeliveryPipe)) + .5*TeeLength(ND_DeliveryPipe) + 2*SocketDepth(ND_DeliveryPipe)
], [0; -90; 90]*deg, ND_DeliveryPipe, SDR_13.5)
Elbow45CoagDosingMiddleLeft := Elbow45F(CoagDosingTube_Origin + [
    L_CoagTube + L_PVCBallValve + ShortTeeLength(ND_DeliveryPipe) + SocketDepth(ND_DeliveryPipe);
    (ElbowRadius(ND_DeliveryPipe)*(sin(45 deg)/sin(67.5 deg)))*cos(67.5 deg) + 2*(SocketDepth(ND_DeliveryPipe)*cos(45 deg));
    ((N_CoagTubes - 1)*(TeeLength(ND_DeliveryPipe) + 2*SocketDepth(ND_DeliveryPipe)) + .5*TeeLength(ND_DeliveryPipe) + 2*SocketDepth(ND_DeliveryPipe)) + (ElbowRadius(ND_DeliveryPipe)*(sin(45 deg)/sin(67.5 deg)))*sin(67.5 deg) + 2*(SocketDepth(ND_DeliveryPipe)*cos(45 deg))
], [45; 90; 0]*deg, ND_DeliveryPipe, SDR_13.5)
Elbow45CoagDosingMiddleTopLeft := Elbow45F(CoagDosingTube_Origin + [
    L_CoagTube + L_PVCBallValve + ShortTeeLength(ND_DeliveryPipe) + SocketDepth(ND_DeliveryPipe);
    2*(ElbowRadius(ND_DeliveryPipe)*(sin(45 deg)/sin(67.5 deg)))*cos(67.5 deg) + 2*(SocketDepth(ND_DeliveryPipe)*cos(45 deg));
    ((N_CoagTubes - 1)*(TeeLength(ND_DeliveryPipe) + 2*SocketDepth(ND_DeliveryPipe)) + .5*TeeLength(ND_DeliveryPipe) + 2*SocketDepth(ND_DeliveryPipe)) + 2*(ElbowRadius(ND_DeliveryPipe)*(sin(45 deg)/sin(67.5 deg)))*sin(67.5 deg) + 2*(SocketDepth(ND_DeliveryPipe)*cos(45 deg)) + L_CoagAirReleaseConnectorMiddleRightPipe
], [90; 90; 0]*deg, ND_DeliveryPipe, SDR_13.5)
Elbow45CoagDosingTopLeft := Elbow45F(CoagDosingTube_Origin + [
    L_CoagTube + L_PVCBallValve + ShortTeeLength(ND_DeliveryPipe) + SocketDepth(ND_DeliveryPipe);
    0 m;
    ((N_CoagTubes - 1)*(TeeLength(ND_DeliveryPipe) + 2*SocketDepth(ND_DeliveryPipe)) + .5*TeeLength(ND_DeliveryPipe) + 2*SocketDepth(ND_DeliveryPipe)) + 4*(ElbowRadius(ND_DeliveryPipe)*(sin(45 deg)/sin(67.5 deg)))*sin(67.5 deg) + 4*(SocketDepth(ND_DeliveryPipe)*cos(45 deg)) + L_CoagAirReleaseConnectorMiddleRightPipe
], [-90; 90; 0]*deg, ND_DeliveryPipe, SDR_13.5)
# Manifold Tees
TeeCoagDosingTopRight := TeeF(CoagDosingTube_Origin + [-L_PVCBallValve - SocketDepth(ND_DeliveryPipe); 0 m; B_DosingTubes*(N_CoagTubes - 1)], [-90; 0; -90]*deg, ND_DeliveryPipe, SDR_13.5)
TeeChlorDosingTopRight := TeeF(ChlorDosingTube_Origin + [-L_PVCBallValve - SocketDepth(ND_DeliveryPipe); 0 m; B_DosingTubes*(N_ChlorTubes - 1)], [-90; 0; -90]*deg, ND_DeliveryPipe, SDR_13.5)
CoagTees :=
    CoagTeeStack ← layer_new("CdcCoagTees", green)
    for i ∈ 0 .. max(N_CoagTubes - 1, 0)
        CoagTeeStack ← stack(CoagTeeStack, TeeF(CoagDosingTube_Origin + [-L_PVCBallValve - SocketDepth(ND_DeliveryPipe); 0 m; B_DosingTubes*i], [-90; 0; 90]*deg, ND_DeliveryPipe, SDR_13.5))
        CoagTeeStack ← stack(CoagTeeStack, TeeF(CoagDosingTube_Origin + [L_CoagTube + L_PVCBallValve + SocketDepth(ND_DeliveryPipe); 0 m; B_DosingTubes*i], [90; 0; 90]*deg, ND_DeliveryPipe, SDR_13.5))
        i ← i + 1
    return CoagTeeStack
ChlorTees :=
    ChlorTeeStack ← layer_new("CdcChlorTees", green)
    for i ∈ 0 .. max(N_ChlorTubes - 1, 0)
        ChlorTeeStack ← stack(ChlorTeeStack, TeeF(ChlorDosingTube_Origin + [-L_PVCBallValve - SocketDepth(ND_DeliveryPipe); 0 m; B_DosingTubes*i], [-90; 0; 90]*deg, ND_DeliveryPipe, SDR_13.5))
        ChlorTeeStack ← stack(ChlorTeeStack, TeeF(ChlorDosingTube_Origin + [L_ChlorTube + L_PVCBallValve + SocketDepth(ND_DeliveryPipe); 0 m; B_DosingTubes*i], [90; 0; 90]*deg, ND_DeliveryPipe, SDR_13.5))
        i ← i + 1
    return ChlorTeeStack
# Air Release Caps
ChlorAirReleaseRightCap := CapF(ChlorDosingTube_Origin + [
    -L_PVCBallValve - ShortTeeLength(ND_DeliveryPipe) - SocketDepth(ND_DeliveryPipe);
    0 m;
    (N_ChlorTubes - 1)*(TeeLength(ND_DeliveryPipe) + 2*SocketDepth(ND_DeliveryPipe)) + .5*TeeLength(ND_DeliveryPipe) + L_ChlorAirReleasePipe
], [0; -90]*deg, ND_DeliveryPipe)
ChlorAirReleaseLeftCap := CapF(ChlorDosingTube_Origin + [
    (L_ChlorTube + L_PVCBallValve) + ShortTeeLength(ND_DeliveryPipe) + SocketDepth(ND_DeliveryPipe);
    0 m;
    (N_ChlorTubes - 1)*(TeeLength(ND_DeliveryPipe) + 2*SocketDepth(ND_DeliveryPipe)) + .5*TeeLength(ND_DeliveryPipe) + L_ChlorAirReleasePipe
], [0; -90]*deg, ND_DeliveryPipe)
CoagAirReleaseRightCap := CapF(CoagDosingTube_Origin + [
    -L_PVCBallValve - ShortTeeLength(ND_DeliveryPipe) - SocketDepth(ND_DeliveryPipe);
    0 m;
    ((N_CoagTubes - 1)*(TeeLength(ND_DeliveryPipe) + 2*SocketDepth(ND_DeliveryPipe)) + .5*TeeLength(ND_DeliveryPipe) + 2*SocketDepth(ND_DeliveryPipe)) + 4*(ElbowRadius(ND_DeliveryPipe)*(sin(45 deg)/sin(67.5 deg)))*sin(67.5 deg) + 4*(SocketDepth(ND_DeliveryPipe)*cos(45 deg)) + L_CoagAirReleaseConnectorMiddleRightPipe + (L_ChlorAirReleasePipe - ((ElbowRadius(ND_DeliveryPipe)*(sin(45 deg)/sin(67.5 deg)))*sin(67.5 deg) + 2*(SocketDepth(ND_DeliveryPipe)*cos(45 deg))))
], [0; -90]*deg, ND_DeliveryPipe)
CoagAirReleaseLeftCap := CapF(CoagDosingTube_Origin + [
    L_CoagTube + L_PVCBallValve + ShortTeeLength(ND_DeliveryPipe) + SocketDepth(ND_DeliveryPipe);
    0 m;
    ((N_CoagTubes - 1)*(TeeLength(ND_DeliveryPipe) + 2*SocketDepth(ND_DeliveryPipe)) + .5*TeeLength(ND_DeliveryPipe) + 2*SocketDepth(ND_DeliveryPipe)) + 4*(ElbowRadius(ND_DeliveryPipe)*(sin(45 deg)/sin(67.5 deg)))*sin(67.5 deg) + 4*(SocketDepth(ND_DeliveryPipe)*cos(45 deg)) + L_CoagAirReleaseConnectorMiddleRightPipe + (L_ChlorAirReleasePipe - ((ElbowRadius(ND_DeliveryPipe)*(sin(45 deg)/sin(67.5 deg)))*sin(67.5 deg) + 2*(SocketDepth(ND_DeliveryPipe)*cos(45 deg))))
], [0; -90]*deg, ND_DeliveryPipe)
# Ball Valves
CdcCoagBallValve := insertdwg("https://confluence.cornell.edu/download/attachments/173604905/PvcBallValve+Scaled.dwg", CoagDosingTube_Origin + [-L_PVCBallValve; 0 m; 0 m], ND_DeliveryPipe/(2 in), ND_DeliveryPipe/(2 in), 180 deg)
RotateCdcCoagBallValve := Rotate3DLast(CoagDosingTube_Origin + [-L_PVCBallValve; 0 m; 0 m], "y", 90 deg)
ArrayCoagBallValve := ArrayLast(N_CoagTubes, 1, B_DosingTubes)
MirrorCoagValves := Mirror3dAll("yz", [
    CoagDosingTube_Origin[0] + .5*L_CoagTube;
    CoagDosingTube_Origin[1];
    CoagDosingTube_Origin[2] + 1/4*H_Et + ShortTeeLength(ND_DeliveryPipe) + .5*ND_DeliveryPipe
], "n")
CdcCoagBallValveAir := insertdwg("https://confluence.cornell.edu/download/attachments/173604905/PvcBallValve+Scaled.dwg", CoagDosingTube_Origin + [
    -L_PVCBallValve - ShortTeeLength(ND_DeliveryPipe) - SocketDepth(ND_DeliveryPipe);
    0 m;
    (N_CoagTubes + 1)*TeeLength(ND_DeliveryPipe) + ((2*N_CoagTubes + 1)*SocketDepth(ND_DeliveryPipe)) - ShortTeeLength(ND_DeliveryPipe)
], ND_DeliveryPipe/(2 in), ND_DeliveryPipe/(2 in), -90 deg)
CdcChlorineBallValve := insertdwg("https://confluence.cornell.edu/download/attachments/173604905/PvcBallValve+Scaled.dwg", ChlorDosingTube_Origin + [-L_PVCBallValve; 0 m; 0 m], ND_DeliveryPipe/(2 in), ND_DeliveryPipe/(2 in), 180 deg)
RotateCdcChlorineBallValve := Rotate3DLast(ChlorDosingTube_Origin + [-L_PVCBallValve; 0 m; 0 m], "y", 90 deg)
ArrayChlorineBallValve := ArrayLast(N_ChlorTubes, 1, B_DosingTubes)
MirrorChlorineValves := Mirror3dAll("yz", [
    ChlorDosingTube_Origin[0] + .5*L_ChlorTube;
    ChlorDeliveryPipe_Origin[1];
    ChlorDeliveryPipe_Origin[2]
], "n")
CdcChlorineBallValveAir := insertdwg("https://confluence.cornell.edu/download/attachments/173604905/PvcBallValve+Scaled.dwg", ChlorDosingTube_Origin + [
    -L_PVCBallValve - ShortTeeLength(ND_DeliveryPipe) - SocketDepth(ND_DeliveryPipe);
    0 m;
    (N_ChlorTubes + 1)*TeeLength(ND_DeliveryPipe) + ((2*N_ChlorTubes + 1)*SocketDepth(ND_DeliveryPipe)) - ShortTeeLength(ND_DeliveryPipe)
], ND_DeliveryPipe/(2 in), ND_DeliveryPipe/(2 in), -90 deg)
CdcManifoldCoagPipe_Script := stack(CdcCoagManifoldPluLayer, CoagConnectorPipe, view("f"), ArrayCoagConnectorPipe, MirrorCoagConnectorPipe, view("t"), CoagDeliveryConnectorPipeLong, CoagDeliveryPipe, CdcCoagManifoldPluFrz)
CdcManifoldChlorPipe_Script := stack(CdcChlorManifoldPluLayer, ChlorConnectorPipe, view("f"), ArrayChlorConnectorPipe, MirrorChlorConnectorPipe, view("t"), ChlorDeliveryConnectorPipeLong, ChlorDeliveryPipe, CdcChlorManifoldPluFrz)
CdcManifoldCoagAirReleasePipe_Script := stack(SelectCdcCoagManifoldPlu, CoagAirReleaseConnectorBottomRightPipe, CoagAirReleaseConnectorBottomLeftPipe, CoagAirReleaseConnectorMiddleRightPipe, CoagAirReleaseConnectorMiddleLeftPipe, CoagAirReleaseConnectorTopRightPipe, CoagAirReleaseConnectorTopLeftPipe, CoagAirReleaseRightPipe, CoagAirReleaseLeftPipe, CdcCoagManifoldPluFrz)
CdcManifoldChlorAirReleasePipe_Script := stack(SelectCdcChlorManifoldPlu, ChlorAirReleaseRightPipe, ChlorAirReleaseLeftPipe, CdcChlorManifoldPluFrz)
CdcManifoldFitting_Script := stack(CdcManifoldFittingsLayer, ElbowCoagCHT, ElbowChlorCHT, ElbowCoagDeliveryLeft, ElbowChlorDeliveryLeft, CoagAirReleaseRightCap, CoagAirReleaseLeftCap, ChlorAirReleaseRightCap, ChlorAirReleaseLeftCap, CdcManifoldFittingsFrz, CdcCoagTeesLayer, CoagTees, CdcCoagTeesFrz, CdcChlorTeesLayer, ChlorTees, CdcChlorTeesFrz)
CdcCoagAirRelease45Elbow_Script := stack(SelectCdcManifoldFittings, Elbow45CoagDosingBottomRight, Elbow45CoagDosingBottomLeft, Elbow45CoagDosingMiddleRight, Elbow45CoagDosingMiddleLeft, Elbow45CoagDosingMiddleTopRight, Elbow45CoagDosingMiddleTopLeft, Elbow45CoagDosingTopRight, Elbow45CoagDosingTopLeft, CdcManifoldFittingsFrz)
CdcManifoldTees2_Script := stack(CdcCoagTeesLayer, CoagTees, CdcCoagTeesFrz, ChlorTees, CdcChlorTeesFrz)
CdcManifoldValve_Script := stack(CdcCoagManifoldValvesLayer, CdcCoagBallValve, RotateCdcCoagBallValve, view("f"), ArrayCoagBallValve, MirrorCoagValves, view("t"), CdcCoagManifoldValvesFrz, CdcChlorManifoldValvesLayer, CdcChlorineBallValve, RotateCdcChlorineBallValve, view("f"), ArrayChlorineBallValve, MirrorChlorineValves, view("t"), CdcChlorManifoldValvesFrz)
CdcManifold_Script := stack(CdcManifoldCoagPipe_Script, CdcManifoldChlorPipe_Script, CdcManifoldCoagAirReleasePipe_Script, CdcManifoldChlorAirReleasePipe_Script, CdcManifoldFitting_Script, CdcCoagAirRelease45Elbow_Script, CdcManifoldValve_Script)
CdcChlorineBallValveAir
# Dosing Tubes
L_CoagTube = 1.40483 m
D_CoagTubeStockToCHEst = 0.126711 in
N_CoagTubes = 4
L_ChlorTube = 1.89156 m
D_ChlorTubeStockToCHEst = 0.137273 in
N_ChlorTubes = 3
CoagTube := PipeF(CoagDosingTube_Origin, L_CoagTube, [180; 0]*deg, D_CoagTubeStockToCHEst, PS_FlexTube)
ArrayCoagTube := ArrayLast(max(N_CoagTubes - 1, 2), 1, B_DosingTubes)
ChlorineTube := PipeF(ChlorDosingTube_Origin, L_ChlorTube, [180; 0]*deg, D_ChlorTubeStockToCHEst, PS_FlexTube)
ArrayChlorineTube := ArrayLast(max(N_ChlorTubes, 2), 1, B_DosingTubes)
CoagDosingPipe := PipeF(CoagDosingTube_Origin + [
    -L_PVCBallValve - SocketDepth(ND_DeliveryPipe) - ShortTeeLength(ND_DeliveryPipe);
    0 m;
    -0.5*TeeLength(ND_DeliveryPipe) - SocketDepth(ND_DeliveryPipe)
], 3*SocketDepth(ND_DeliveryPipe), [0; -90]*deg, ND_DeliveryPipe, SDR_13.5)
ChlorDosingPipe := PipeF(ChlorDosingTube_Origin + [
    -L_PVCBallValve - SocketDepth(ND_DeliveryPipe) - ShortTeeLength(ND_DeliveryPipe);
    0 m;
    -0.5*TeeLength(ND_DeliveryPipe) - SocketDepth(ND_DeliveryPipe)
], 3*SocketDepth(ND_DeliveryPipe), [0; -90]*deg, ND_DeliveryPipe, SDR_13.5)
CdcDosing_Script := stack(CdcDosingTubesLayer, CoagTube, view("f"), ArrayCoagTube, view("t"), ChlorineTube, view("f"), ArrayChlorineTube, view("t"), CoagDosingPipe, ChlorDosingPipe, CdcDosingTubesFrz)
# Calibration Column Dependent Pipe Length Calculations | mrf222 Spring 2016
L_CoagCalPipe1 := 2*SocketDepth(ND_CoagCalCol)
L_ChlorCalPipe1 := 2*SocketDepth(ND_ChlorCalCol)
L_CoagCalPipe1c := CoagTee1_Origin[1] - CoagElbow1_Origin[1] - TeeLength(ND_CoagCalCol)/2
L_ChlorCalPipe1c := ChlorElbow1_Origin[1] - ChlorTee1_Origin[1] - TeeLength(ND_ChlorCalCol)/2
L_ChlorCalPipe2 := 2*SocketDepth(ND_ChlorCalCol)
L_ChlorCalPipe3 := 2*SocketDepth(ND_ChlorCalCol)
L_ChlorCalPipe4 := 2*SocketDepth(ND_ChlorCalCol)
L_ChlorCalPipe5 := 2*SocketDepth(ND_ChlorCalCol)
L_ChlorCalPipe6 := Chlor45d_Origin[1] - ChlorTee2_Origin[1] + TeeLength(ND_ChlorCalCol)/2 = 0.1635 m
L_ChlorCalPipe7 := 2*SocketDepth(ND_ChlorCalCol)
L_ChlorCalPipe8 := 2*SocketDepth(ND_ChlorCalCol)
L_CoagCalPipe2 := 2*SocketDepth(ND_CoagCalCol)
L_CoagCalPipe3 := 2*SocketDepth(ND_CoagCalCol)
L_CoagCalPipe4 := 2*SocketDepth(ND_CoagCalCol)
# Calibration Column Drawing | mrf222 Spring 2016
CHT1 := ConstantHeadTankF(CHT_Origin, [90; 0; 90]*deg, D_CHT/2, H_CHT, T_CHTwall, .75*H_CHT, 1/3*in, 1/3*in, 1/3*in, 1/3*in)
CHT2 := ConstantHeadTankF(CHT2_Origin, [90; 0; 90]*deg, D_CHT/2, H_CHT, T_CHTwall, .75*H_CHT, 1/3*in, 1/3*in, 1/3*in, 1/3*in)
CHT3 := ConstantHeadTankF(CHT3_Origin, [90; 0; 90]*deg, D_CHT/2, H_CHT, T_CHTwall, .75*H_CHT, 1/3*in, 1/3*in, 1/3*in, 1/3*in)
CHT4 := ConstantHeadTankF(CHT4_Origin, [90; 0; 90]*deg, D_CHT/2, H_CHT, T_CHTwall, .75*H_CHT, 1/3*in, 1/3*in, 1/3*in, 1/3*in)
CoagTee1 := TeeF(CoagTee1_Origin, [0; -90; 0]*deg, ND_CoagCalCol, SDR_13.5)
ChlorTee1 := TeeF(ChlorTee1_Origin, [0; -90; 0]*deg, ND_ChlorCalCol, SDR_13.5)
CoagElbow1 := ElbowF(CoagElbow1_Origin, [0; 90; 0]*deg, ND_CoagCalCol, SDR_13.5)
ChlorElbow1 := ElbowF(ChlorElbow1_Origin, [0; 90; 0]*deg, ND_ChlorCalCol, SDR_13.5)
Chlor45a := Elbow45F(Chlor45a_Origin, [0; 90; 0]*deg, ND_ChlorCalCol, SDR_13.5)
Chlor45b := Elbow45F(Chlor45b_Origin, [90; 90; 0]*deg, ND_ChlorCalCol, SDR_13.5)
Chlor45c := Elbow45F(Chlor45c_Origin, [0; -90; 0]*deg, ND_ChlorCalCol, SDR_13.5)
Chlor45d := Elbow45F(Chlor45d_Origin, [0; -90; 0]*deg, ND_ChlorCalCol, SDR_13.5)
ChlorTee2 := TeeF(ChlorTee2_Origin, [0; 90; 0]*deg, ND_ChlorCalCol, SDR_13.5)
CoagTee2 := TeeF(CoagTee2_Origin, [0; 90; 0]*deg, ND_ChlorCalCol, SDR_13.5)
CoagTopCap1 := CapF(CoagTopCap1_Origin, [0; -90]*deg, ND_CoagCalCol)
CoagTopCap2 := CapF(CoagTopCap2_Origin, [0; -90]*deg, ND_CoagCalCol)
ChlorTopCap1 := CapF(ChlorTopCap1_Origin, [0; -90]*deg, ND_CoagCalCol)
ChlorTopCap2 := CapF(ChlorTopCap2_Origin, [0; -90]*deg, ND_CoagCalCol)
# What is the diameter of the holes drilled into the caps of the calibration columns? For now, assume that they are ND.cap/1.5 or 2/3 of the ND of the cap.
CoagCylinder1 := CylinderF(CoagCylinder1_Origin, ND_CoagCalCol/3, S_Fitting, [0; -90]*deg)
CoagCylinder2 := CylinderF(CoagCylinder2_Origin, ND_CoagCalCol/3, S_Fitting, [0; -90]*deg)
ChlorCylinder1 := CylinderF(ChlorCylinder1_Origin, ND_ChlorCalCol/3, S_Fitting, [0; -90]*deg)
ChlorCylinder2 := CylinderF(ChlorCylinder2_Origin, ND_ChlorCalCol/3, S_Fitting, [0; -90]*deg)
CoagCalPipe1a := PipeF(CoagCalPipe1a_Origin, L_CoagCalPipe1, [0; 90]*deg, ND_CoagCalCol, SDR_13.5)
CoagCalPipe1b := PipeF(CoagCalPipe1b_Origin, L_CoagCalPipe1, [0; 90]*deg, ND_CoagCalCol, SDR_13.5)
ChlorCalPipe1a := PipeF(ChlorCalPipe1a_Origin, L_ChlorCalPipe1, [0; 90]*deg, ND_CoagCalCol, SDR_13.5)
ChlorCalPipe1b := PipeF(ChlorCalPipe1b_Origin, L_ChlorCalPipe1, [0; 90]*deg, ND_CoagCalCol, SDR_13.5)
CoagCalPipe1c := PipeF(CoagCalPipe1c_Origin, L_CoagCalPipe1c, [-90; 0]*deg, ND_CoagCalCol, SDR_13.5)
ChlorCalPipe1c := PipeF(ChlorCalPipe1c_Origin, L_ChlorCalPipe1c, [90; 0]*deg, ND_CoagCalCol, SDR_13.5)
ChlorCalPipe2 := PipeF(ChlorCalPipe2_Origin, L_ChlorCalPipe2, [-90; 0]*deg, ND_CoagCalCol, SDR_13.5)
ChlorCalPipe3 := PipeF(ChlorCalPipe3_Origin, L_ChlorCalPipe3, [-90; 45]*deg, ND_CoagCalCol, SDR_13.5)
ChlorCalPipe4 := PipeF(ChlorCalPipe4_Origin, L_ChlorCalPipe4, [-90; 0]*deg, ND_CoagCalCol, SDR_13.5)
ChlorCalPipe5 := PipeF(ChlorCalPipe5_Origin, L_ChlorCalPipe5, [-90; -45]*deg, ND_CoagCalCol, SDR_13.5)
ChlorCalPipe6 := PipeF(ChlorCalPipe6_Origin, L_ChlorCalPipe6, [-90; 0]*deg, ND_CoagCalCol, SDR_13.5)
ChlorCalPipe7 := PipeF(ChlorCalPipe7_Origin, L_ChlorCalPipe7, [-90; 0]*deg, ND_CoagCalCol, SDR_13.5)
ChlorCalPipe8 := PipeF(ChlorCalPipe8_Origin, L_ChlorCalPipe8, [0; -90]*deg, ND_CoagCalCol, SDR_13.5)
CoagCalPipe2 := PipeF(CoagCalPipe2_Origin, L_CoagCalPipe2, [90; 0]*deg, ND_CoagCalCol, SDR_13.5)
CoagCalPipe3 := PipeF(CoagCalPipe3_Origin, L_CoagCalPipe3, [0; -90]*deg, ND_CoagCalCol, SDR_13.5)
CoagCalPipe4 := PipeF(CoagCalPipe4_Origin, L_CoagCalPipe4, [-90; 0]*deg, ND_CoagCalCol, SDR_13.5)
CdcCalColValveScript := ""
CdcCalColFittingScript := stack(CoagTee1, ChlorTee1, CoagElbow1, ChlorElbow1, Chlor45a, Chlor45b, Chlor45c, Chlor45d, ChlorTee2, CoagTee2, CoagTopCap1, CoagTopCap1, CoagTopCap2, ChlorTopCap1, ChlorTopCap2)
CdcSubtractCapHoles := SubtractF(["CdcCalColFittings"], "DeleteMe")
CdcCalColSubCapsScript := stack(CdcCalColDeleteLayer, SelectCdcCalColDelete, CoagCylinder1, CoagCylinder2, ChlorCylinder1, ChlorCylinder2, GroupDelete, CdcSubtractCapHoles, CdcCalColDeleteFrz)
CdcCalColPluScript := stack(CoagCalPipe1a, CoagCalPipe1b, CoagCalPipe1c, CoagCalPipe2, CoagCalPipe3, CoagCalPipe4, ChlorCalPipe1a, ChlorCalPipe1b, ChlorCalPipe1c, ChlorCalPipe2, ChlorCalPipe3, ChlorCalPipe4, ChlorCalPipe5, ChlorCalPipe6, ChlorCalPipe7, ChlorCalPipe8)
CdcCHT_Script := stack(CdcCHTLayer, SelectCdcCHT, CHT1, CHT2, CHT3, CHT4, CdcCHTFrz)
CdcCalCol_Script := stack(CdcCalColPluLayer, SelectCdcCalColPlu, CdcCalColPluScript, CdcCalColPluFrz, CdcCalColFittingsLayer, SelectCdcCalColFittings, CdcCalColValveScript, CdcCalColFittingScript, CdcCalColFittingsFrz, CdcCalColSubCapsScript)
justfits := stack(CdcCalColFittingsLayer, SelectCdcCalColFittings, CoagTee1, ChlorTee1, CoagElbow1, ChlorElbow1, CdcCalColFittingsFrz)
AC_Cdc := stack(CdcLever_Script, CdcDosing_Script, CdcManifold_Script)  # Currently not drawing calibration columns
drawme := stack(CdcCHT_Script, justfits)
# [component: inputs drawme]
