# Entrance Tank
# Rapid mix
D_RMOrifice := D_PipeED(E_MaxRM, Q_Plant, Pi_VenaContractaOrifice, Pi_JetRound)
HL_RMMicroOrifice := h_orifice(D_RMOrifice, Pi_VenaContractaOrifice, Q_Plant)
HL_RMPipe := h_l(Q_Plant, innerdiameter(ND_RMPipe, PS_Default), 4 m + W_EtWalkway, K_El90 + K_PipeExit, Nu_Water, E_Pvc)
# Elevations
Z_EtBottom := Z_Walkway
ZW_EtMax := ZW_FlocMax + HL_RMMicroOrifice + HL_RMPipe + H_Freefall + HL_Lfom
Z_EtTop := ZW_EtMax + H_PlantFreeboard
H_Et := Z_EtTop - Z_EtBottom
HW_EtMax := ZW_EtMax - Z_EtBottom
Z_EtHopperTop := ZW_EtMax - HL_Lfom - 2*S_Fitting
H_EtHopper := Z_EtHopperTop - Z_EtBottom
L_EtDrainStub := H_Et - H_PlantFreeboard/2 + SocketDepth(ND_EtDrain)
# Flow control drain
# This feature is a pipe with a gate valve draining into the entrance tank drain channel from a pipe out of the entrance tank's first hopper. The purpose is to control the plant flow by wasting a certain amount of the influent. The operator will need to learn empirically how many turns of the valve handle will give the desired flow rates, which he will read off of a scale in the entrance tank.
HW_EtEst := 0.8 m
L_EtFlowControlPipeEst := 2 m
ND_EtFlowControl := D_pipeschedule(Q_Plant/2, PS_Default, HW_EtEst, L_EtFlowControlPipeEst, Nu_Water, E_Pvc, K_PipeExit + K_PipeEnt + K_GateValve + 2*K_El90)
ND_EtFlowControl := 4 in
# Tank length and width
L_EtMax := L_Sed - W_Door
L_EtFirstHopper := S_Fitting + 2*ConRadius(ND_EtDrain) + H_EtHopper/tan(AN_EtSlope)
W_EtHuman := W_HumanMin
W_EtRMChannelFit := W_EtDCMin + T_PlantWall + 2*ConRadius(ND_RMPipe) + S_Fitting
W_EtFloatDrainLFOM := 2*ConRadius(ND_EtFloat) + 2*S_EtFloat + 2*ConRadius(ND_EtDrain) + T_PlantWall + 2*ConRadius(ND_RMPipe) + S_Fitting
W_EtCapture := Q_Plant/(V_EtCapture*(L_EtMax - L_EtFirstHopper))
W_Et := max(W_EtRMChannelFit, W_EtFloatDrainLFOM, W_EtCapture, W_EtHuman)
L_EtCapture := Q_Plant/(V_EtCapture*W_Et) + L_EtFirstHopper
L_Et :=
    L_EtCapture if EN_Grit == 0
    2*L_EtFirstHopper + S_Fitting/2 otherwise
# Drain channel
L_EtDC := L_Et - 2*(S_Fitting + ConRadius(ND_RMPipe))
W_EtDC := W_Et - S_Fitting - 2*ConRadius(ND_RMPipe) - T_PlantWall
H_EtDCMinFittings := OuterDiameterFittingPVC(ND_EtFlowControl)
H_EtDCMinCapacity := H_HorizChannelMin(Q_Plant, W_EtDC, L_EtDC, Nu_Water, E_Concrete, 1)
H_EtDCMinConstruction := 50 cm  # For ease of construction, so that wood can be removed after flocculator slab is poured above it.
H_EtDCMin := max(H_EtDCMinFittings, H_EtDCMinCapacity, H_EtDCMinConstruction)
H_EtDCMaxRMPass := Z_EtBottom - T_PlantWall - (Z_FlocBottom + S_Fitting + 2*ConRadius(ND_RMPipe) + T_PlantWall)
H_EtDC := min(H_EtDCMin, H_EtDCMaxRMPass)
# Hoppers
L_EtHopperMax := 2*H_EtHopper/tan(AN_EtSlope) + 2*ConRadius(ND_EtDrain)
N_EtFullHoppers := ceil((L_Et - 2*L_EtFirstHopper - W_EtHopperPeak)/(L_EtHopperMax + W_EtHopperPeak))
# The max function in the denominator is just to avoid a divide by zero error in the case where there are no full hoppers (EN.Grit = 1). This calculation has no meaning in that case.
L_EtFullHopper := (L_Et - 2*L_EtFirstHopper - (N_EtFullHoppers + 1)*W_EtHopperPeak)/max(1, N_EtFullHoppers)
L_EtFullHopperSideSlope := (L_EtFullHopper - 2*ConRadius(ND_EtDrain))/2
L_EtWallToDrain := min(L_EtWallToDrainMax, W_EtDC - ConRadius(ND_EtDrain))
L_EtBackSlope := W_Et - L_EtWallToDrain - ConRadius(ND_EtDrain)
H_EtBackSlopeMax := L_EtBackSlope*tan(AN_EtSlope)
H_EtBackSlope := min(H_EtBackSlopeMax, H_EtHopper)
L_EtFrontSlope := L_EtWallToDrain - ConRadius(ND_EtDrain)
H_EtFrontSlope := L_EtFrontSlope*tan(AN_EtSlope)
# Rapid mix culvert calculations for super high flow
L_RMChannel := W_EtWalkway
# Based on the assumption that the LFOM channel will be square.
HL_ChannelMax =  # error: This variable is undefined.
K_RMGate := 1
HW_LfomChannel == H_HorizChannelΠ(Q_Plant, 1, HL_ChannelMax, L_LfomChannel, Nu_Water, E_Concrete, 0)
K_RMChannel := K_90 + 2*K_RmLfom + K_RMGate
H_LfomChannel == HW_LfomChannel + HL_Lfom + H_PlantFreeboard
fW_RMChannel(Q_Plant, HL_RMChannel, K_RMChannel) := sqrt(Q_Plant*(K_RMChannel/(HL_RMChannel*2*g))^(1/2))
W_LfomChannel == W_HorizChannelΠ(Q_Plant, 1, HL_ChannelMax, L_LfomChannel, Nu_Water, E_Concrete, 0)
HW_RMChannel == HW_LfomChannel - HL_ChannelMax
W_RMChannelMin := fW_RMChannel(Q_Plant/2, HL_ChannelMax, K_RMChannel)
W_RMChannel := max(W_RMChannelMin, W_HumanMin)
H_RMChannel := W_RMChannel
Z_RMChannelBottom := Z_Walkway - Z_Walkway
Z_LfomChannelBottom := Z_RMChannelBottom
W_RMCulvertMax := S_FlocBaffle[0]  # error: This value must be a vector.
# Micro Mix Gate
V_RMChannel(Q_Plant) := Q_Plant/W_RMChannel^2
V_RMGate(Q_Plant) := 1/ε_RMGate*V_RMChannel(Q_Plant)
S_RMGate(ED, Q_Plant) := (Pi_JetPlane*V_RMGate(Q_Plant))^3/ED
S_RMGateMax := S_RMGate(E_MaxRM, Q_Plant/2)
N_SpacesRMGate := ceil(W_RMChannel*ε_RMGate/S_RMGateMax)
N_PipesRMGate := N_SpacesRMGate - 1
# Based on McMaster Carr availability. Need to use aluminum rods if diameter calculated is less than 0.5 in. Lowest available PVC is 0.5in
OD_AlumRodsAvail := [.25; 3/8; .5; .75]*in
# PVC Pipes will never be able to be used. The outer diameter of a 0.5 in pipe is 0.84 in which is never reached (i.e. 1000 L/s = 0.5in OD). Aluminum rods will always need to be used
D_PipesRMGate := W_RMChannel*ε_RMGate/N_PipesRMGate
OD_RMRod := FloorNearest(D_PipesRMGate, OD_AlumRodsAvail)
N_RMRods := ceil(W_RMChannel*ε_RMGate/OD_RMRod)
N_RMPipeSpaces := N_RMRods + 1
S_RMGate := (W_RMChannel - OD_RMRod*N_RMRods)/N_RMPipeSpaces  # This number should be less than S.RMGateMax
S_RMGateMax =  # error
HL_RMChannel := h_lrect(Q_Plant/2, W_RMChannel, H_RMChannel, L_RMChannel, K_90, Nu_Water, E_Concrete, 0)
HL_RMGate := (V_RMChannel(Q_Plant/2)/ε_RMGate)^2/(2*g)
HL_RapidMix := HL_RMChannel + HL_RMGate
# LFOM channel calculations for high flow
N_LfomChannels := 1  # This was added 6/26/14 by mrf222
L_LfomChannelOrifices := (D_LfomOrifices + S_LfomOrificesMin)*(N_LfomOrifices[0] + 1) + 2*T_ConcreteMin
L_LfomChannelHopper := □  # error: This placeholder is empty.
L_LfomChannel := max(L_LfomChannelOrifices)
D_LfomChannelOrifice := D_PipeED(E_MaxRM, Q_Plant/2, Pi_VenaContractaOrifice, Pi_JetRound)
# A orifice will be added in the channel before the 90 degree bend to ensure macromixing occurs. This will be a orifice in a ferrocement/concrete sheet.
# Should the ED be the same as the micro mix gate?
HL_LfomChannelOrifice := h_orifice(D_LfomChannelOrifice, Pi_VenaContractaOrifice, Q_Plant/2)
ZW_LfomChannel := HW_Sed + HL_Floc + HL_RapidMix + HL_LfomChannelOrifice
Z_LfomChannelBottom := Z_RMChannelBottom
HW_LfomChannel := ZW_LfomChannel - Z_LfomChannelBottom
W_LfomChannel := W_HumanMin
H_LfomChannel := HW_LfomChannel + H_Freefall20 + HL_Lfom + H_PlantFreeboard
Z_LfomChannelOrifice := HW_LfomChannel - HL_LfomChannelOrifice
HL_LfomChannel := h_frect(Q_Plant/2, W_LfomChannel, HW_LfomChannel, L_LfomChannel, Nu_Water, E_Concrete, 1)
# Doser elevations
ZW_CdcCht == (Z_EtTop + H_DoserAssembly)  # End of doser tube elevation at zero flow. (also fluid level in constant head tank)
ZW_CdcCht := Z_EtTop + H_DoserAssembly
Z_CdcFloatValveOrifice := ZW_CdcCht + H_CdcFloatvalve
Z_CoagulantOutlet := Z_CdcFloatValveOrifice + H_CoagTankAboveHeadTank  # This is the height of the outlet from the stock tanks
Z_CoagulantTankBottom := Z_CoagulantOutlet - B_StockOutlet  # This is the height of the coagulant stock tank base
# Coagulant stock tank elevation
Z_CoagTank := Z_EtTop + H_CoagTankAboveHeadTank + H_DoserAssembly - B_StockOutlet
Z_CoagTankOutlet := Z_CoagTank + B_StockOutlet
# Trash rack
D_EtTrashRackHole := 1/2*in
S_EtTrashRackHoleMin := 1/4*in
N_EtTrashRackHolesHoriz := floor((W_Et - S_EtTrashRackHoleMin)/(D_EtTrashRackHole + S_EtTrashRackHoleMin))
S_EtTrashRackHole := (W_Et - N_EtTrashRackHolesHoriz*D_EtTrashRackHole)/(N_EtTrashRackHolesHoriz + 1)
N_EtTrashRackHolesVert := floor((H_Et - H_EtHopper - S_EtTrashRackHole)/(D_EtTrashRackHole + S_EtTrashRackHole))
