W_SedPlate := 106 cm
T_FlocSlab := 12 cm
AN_FlocSlope := atan(1 %)
S_EtPlate := S_SedPlate
ND_EtDrainLF := 2 in
# Entrance Tank
ND_FlocDrain := 2 in
ED_FlocMax := 10*mW/kg
V_cGrit := 8*mm/s
AN_EtPlate := 50 deg
B_EtPlate := S_EtPlate + T_SedPlate
# Entrance tank and flocculator width
W_Et := W_SedPlate/2 = 0.53 m
W_Floc := W_Et
# Plate settlers
N_EtPlates := ceil(sqrt(Q_Plant/((S_EtPlate + T_SedPlate)*W_Et*V_cGrit*sin(AN_EtPlate)*cos(AN_EtPlate))))
# Number of plates that minimizes total length of the plate settler unit.
L_EtPlate := Ceil(Q_Plant/(N_EtPlates*W_Et*V_cGrit*cos(AN_EtPlate)) - S_EtPlate*tan(AN_EtPlate), 10 cm)
# Et and flocculator lengths
L_EtTopPlateExtension := HL_Lfom/sin(AN_EtPlate) + 5 cm
L_EtWallToPlate := ConRadius(ND_EtDrain) + S_Fitting + outerradius(ND_EtDrain)
L_EtFrontWallToLfom := L_EtWallToPlate + (L_EtPlate + L_EtTopPlateExtension)*cos(AN_EtPlate) + T_SedPlate*sin(AN_EtPlate)
L_EtBackWallToLfom := max(2*S_Fitting, ElbowRadius(ND_RMPipe) + SocketDepth(ND_RMPipe) + CouplingLength(ND_RMPipe) - T_PlantWall - outerradius(ND_RMPipe))
L_Et := L_EtFrontWallToLfom + outerdiameter(ND_RMPipe) + L_EtBackWallToLfom
L_EtSlope1 := -(ConRadius(ND_EtDrain) - outerradius(ND_EtDrain)) + N_EtPlates*B_EtPlate*sin(AN_EtPlate) + L_EtPlate*cos(AN_EtPlate)
L_EtSlope2 := L_Et - L_EtSlope1 - L_EtWallToPlate - (ConRadius(ND_EtDrain) - outerradius(ND_EtDrain))
L_Floc := L_Sed - L_Et - T_PlantWall
# Flocculator head loss and parameters
α_ε := 2  # Assume efficient geometry (conservative for head loss)
ED_FlocAve := ED_FlocMax/α_ε
HL_Floc :=
    HL_old ← 45 cm
    HL_new ← 10 cm
    while |HL_new - HL_old| > 1 mm
        HL_old ← HL_new
        HL_new ← ED_FlocAve/(Q_Plant*g)*L_Floc*W_Floc*(Z_Sed - T_FlocSlab - L_Floc*tan(AN_FlocSlope)/2 - H_PlantFreeboard - HL_old/2)
    return HL_new
HL_Floc =  # error: This variable is undefined.
Vol_Floc := L_Floc*W_Floc*(Z_Sed - T_FlocSlab - L_Floc*tan(AN_FlocSlope)/2 - H_PlantFreeboard - HL_Floc/2)
Ti_Floc := Vol_Floc/Q_Plant
CP_Floc := (1/α_ε)^(1/6)*Ti_Floc*ED_FlocAve^(1/3)
# Elevations
D_RMOrifice := D_PipeED(E_MaxRM, Q_Plant, Pi_VenaContractaOrifice, Pi_JetRound)
HL_RMMicroOrifice := h_orifice(D_RMOrifice, Pi_VenaContractaOrifice, Q_Plant)
HL_RMPipe := h_l(Q_Plant, innerdiameter(ND_RMPipe, PS_Default), 2 m, K_El90 + K_PipeExit, Nu_Water, E_Pvc)
Z_FlocBottom := T_FlocSlab = 0.12 m
ZW_FlocMax := ZW_Sed + HL_Floc
Z_FlocTop := ZW_FlocMax + H_PlantFreeboard
H_Floc := Z_FlocTop - Z_FlocBottom
Z_LfomBottom := ZW_FlocMax + HL_RMMicroOrifice + HL_RMPipe + H_Freefall
ZW_EtMax := Z_LfomBottom + HL_Lfom
Z_EtTop := ZW_EtMax + H_PlantFreeboard
H_Et := Z_EtTop - Z_FlocBottom
# This is not apparent depth, but if the entrance tank and flocculator share a slab it's the distance from the slab (lowest point on the slope) to the top of the wall. The base of the entrance tank is then filled in with concrete and stone.
Z_EtDrain := Z_LfomBottom - L_EtPlate*sin(AN_EtPlate) - (N_EtPlates*S_EtPlate + T_SedPlate*(N_EtPlates - 1))/cos(AN_EtPlate)
H_EtDrain := Z_EtDrain - Z_FlocBottom
H_EtSlope1 := L_EtSlope1*tan(AN_EtPlate)
H_EtSlope2 := min(Z_LfomBottom - Z_EtDrain - H_EtSlope1, L_EtSlope2*tan(AN_EtPlate))
# Doser Elevations
ZW_CdcCht == (Z_EtTop + H_DoserAssembly)  # End of doser tube elevation at zero flow. (also fluid level in constant head tank)
ZW_CdcCht := Z_EtTop + H_DoserAssembly
Z_CdcFloatValveOrifice := ZW_CdcCht + H_CdcFloatvalve
Z_CoagulantOutlet := Z_CdcFloatValveOrifice + H_CoagTankAboveHeadTank  # This is the height of the outlet from the stock tanks
Z_CoagulantTankBottom := Z_CoagulantOutlet - B_StockOutlet  # This is the height of the coagulant stock tank base
# Coagulant Stock Tank Elevation
Z_CoagTank := Z_EtTop + H_CoagTankAboveHeadTank + H_DoserAssembly - B_StockOutlet
Z_CoagTankOutlet := Z_CoagTank + B_StockOutlet
