Q_Plant := 30*L/s
# [reference: ExpertInputs.xmcd]
# [reference: MathFunctions.xmcd]
# [reference: PipeDatabase.xmcd]
# [reference: MaterialsDatabase.xmcd]
# [reference: FluidsFunctions.xmcd]
# [reference: CdcFunctions.xmcd]
# [reference: SedimentationTank.xmcd]
# [reference: LFOM.xmcd]
# [reference: FlocculatorEntranceTank_HighE abh35 2.xmcd]
# [reference: StackedRapidSandFilter.xmcd]
# [reference: LinearCdc.xmcd]
# [reference: ChemStorageTanks.xmcd]
# Mathcad to AutoCAD translators:
# [reference: MtoATranslators.xmcd]
# The wrapped MtoA translator contains the functions that the user will want to access. These functions will draw pieces with full functionality - specifying the location, dimension, and orientation of the object. Also, it contains layer control and subtraction capabilities for grouped objects.
# [reference: MtoATranslatorsWrapped.xmcd]
# [reference: ChannelF.xmcd]
# [reference: PlumbingF_ST587final.xmcd]
# [reference: TankF.xmcd]
# [reference: StairsF.xmcd]
# [reference: DrainChannelF.xmcd]
# [reference: FlocculatorAC.xmcd]
# [reference: SedimentationTankAC.xmcd]
ND_EtMod := ND_SedMod
ND_EtModSpacer := ND_SedModSpacer
# Entrance Tank (In floc channel)
S_EtLaminaPipeToEdge := 5 cm
ND_ConductionLine := 3 in
# Layers
EtConLayer := layer_new("EtCon", grey)
SelectEtCon := SelectLayer("EtCon")
EtConFrz := FreezeLayer("EtCon")
EtPipeLayer := layer_new("EtPipePlu", blue)
SelectEtPipes := SelectLayer("EtPipePlu")
EtPipeFrz := FreezeLayer("EtPipePlu")
EtFittingLayer := layer_new("EtFittingPlu", green)
SelectEtFittings := SelectLayer("EtFittingPlu")
EtFittingFrz := FreezeLayer("EtFittingPlu")
EtRemovableLayer := layer_new("EtRemovablePlu", red)
SelectEtRemovable := SelectLayer("EtRemovablePlu")
EtRemovableFrz := FreezeLayer("EtRemovablePlu")
EtModPlateLayer := layer_new("EtModPlate", purple)
SelectEtModPlate := SelectLayer("EtModPlate")
EtModPlateFrz := FreezeLayer("EtModPlate")
EtModPipeLayer := layer_new("EtModPipePlu", blue3)
SelectEtModPipe := SelectLayer("EtModPipePlu")
EtModPipeFrz := FreezeLayer("EtModPipePlu")
EtModSpacerLayer := layer_new("EtModSpacerPlu", blue)
SelectEtModSpacer := SelectLayer("EtModSpacerPlu")
EtModSpacerFrz := FreezeLayer("EtModSpacerPlu")
EtModCapLayer := layer_new("EtModCapPlu", red)
SelectEtModCap := SelectLayer("EtModCapPlu")
EtModCapFrz := FreezeLayer("EtModCapPlu")
EtRMPipeLayer := layer_new("EtRMPipePlu", blue)
SelectEtRMPipe := SelectLayer("EtRMPipePlu")
EtRMPipeFrz := FreezeLayer("EtRMPipePlu")
SubtractFromEtRMPipe := SubtractF(["EtRMPipePlu"], "DeleteMe")
EtRMFittingLayer := layer_new("EtRMFittingPlu", green)
SelectEtRMFitting := SelectLayer("EtRMFittingPlu")
EtRMFittingFrz := FreezeLayer("EtRMFittingPlu")
EtRMPlateLayer := layer_new("EtRMPlate", red)
SelectEtRMPlate := SelectLayer("EtRMPlate")
EtRMPlateFrz := FreezeLayer("EtRMPlate")
SubtractFromEtRMPlate := SubtractF(["EtRMPlate"], "DeleteMe")
EtEntPipeLayer := layer_new("EtEntPipePlu", blue)
SelectEtEntPipe := SelectLayer("EtEntPipePlu")
EtEntPipeFrz := FreezeLayer("EtEntPipePlu")
EtEntFittingLayer := layer_new("EtEntFittingPlu", green)
SelectEtEntFitting := SelectLayer("EtEntFittingPlu")
EtEntFittingFrz := FreezeLayer("EtEntFittingPlu")
# Entrance tank masonry
Et_Origin := Plant_Origin + [
    -L_Floc + L_Et;
    N_SedTanks*(W_Sed + T_PlantWall) + (N_FlocChannels - 1)*(W_FlocChannel + T_PlantWall);
    Z_FlocBottom
]
Et_Dim := [L_Et; W_Et; H_Et]
EntranceTank := Tank(Et_Origin, Et_Dim, T_PlantWall)
Et_BaseBox1 := BoxF(Et_Origin, Et_Origin + [-L_Et; W_Et; H_EtDrain], [0; 0; 0]*deg)
Et_BaseBox2 := BoxF(Et_Origin + [
    -L_Et + L_EtWallToPlate + (ConRadius(ND_EtDrain) - outerradius(ND_EtDrain)) + L_EtSlope1;
    0 m;
    H_EtDrain
], Et_Origin + [0 m; W_Et; H_EtDrain + H_EtSlope1], [0; 0; 0]*deg)
Et_Slope1 := WedgeF(Et_Origin + [
    -L_Et + L_EtWallToPlate + (ConRadius(ND_EtDrain) - outerradius(ND_EtDrain)) + L_EtSlope1;
    0 m;
    H_EtDrain
], Et_Origin + [
    -L_Et + L_EtWallToPlate + (ConRadius(ND_EtDrain) - outerradius(ND_EtDrain));
    W_Et;
    H_EtDrain + H_EtSlope1
], [0; 0; 0]*deg)
Et_Slope2 := WedgeF(Et_Origin + [0 m; 0 m; H_EtDrain + H_EtSlope1], Et_Origin + [-L_EtSlope2; W_Et; H_EtDrain + H_EtSlope1 + H_EtSlope2], [0; 0; 0]*deg)
[Et_Origin[0] - L_Et; Et_Origin[1]; Et_Origin[2] + H_EtDrain] + [0 m; 0 m; -zc]
EtSideSlopePline := Pline3D([
    [Et_Origin[0] - L_Et; Et_Origin[1]; Et_Origin[2] + H_EtDrain] + [0 m; 0 m; -zc];
    [Et_Origin[0] - L_Et; Et_Origin[1]; Et_Origin[2] + H_EtDrain] + [
        0 m;
        0 m;
        (N_EtPlates*B_EtPlate*sin(AN_EtPlate) - (ConRadius(ND_EtDrain) - outerradius(ND_EtDrain)))*tan(AN_EtPlate) + S_EtPlate*cos(AN_EtPlate)
    ];
    [Et_Origin[0] - L_Et; Et_Origin[1]; Et_Origin[2] + H_EtDrain] + [0 m; W_Et/2 - ConRadius(ND_EtDrain); 0 m];
    [Et_Origin[0] - L_Et; Et_Origin[1]; Et_Origin[2] + H_EtDrain] + [0 m; W_Et/2 + ConRadius(ND_EtDrain); 0 m];
    [Et_Origin[0] - L_Et; Et_Origin[1]; Et_Origin[2] + H_EtDrain] + [
        0 m;
        W_Et;
        (N_EtPlates*B_EtPlate*sin(AN_EtPlate) - (ConRadius(ND_EtDrain) - outerradius(ND_EtDrain)))*tan(AN_EtPlate) + S_EtPlate*cos(AN_EtPlate)
    ];
    [Et_Origin[0] - L_Et; Et_Origin[1]; Et_Origin[2] + H_EtDrain] + [0 m; W_Et; -zc];
    [Et_Origin[0] - L_Et; Et_Origin[1]; Et_Origin[2] + H_EtDrain] + [0 m; 0 m; -zc]
])
ExtrudeEtSides := ExtrudeLast(L_Et)
EtConScript := stack(EtConLayer, EntranceTank, Et_BaseBox1, Et_BaseBox2, Et_Slope1, Et_Slope2, EtSideSlopePline, ExtrudeEtSides, Union_All, EtConFrz)
# Entrance tank drain
EtDrainCoupling_Origin := Et_Origin + [
    -L_Et + S_Fitting + ConRadius(ND_EtDrain);
    W_Et/2;
    H_EtDrain - CouplingLength(ND_EtDrain) + SocketDepth(ND_EtDrain)
]
EtDrainVertPipe_Origin := EtDrainCoupling_Origin
EtDrainElbow_Origin := [
    EtDrainCoupling_Origin[0] - ElbowRadius(ND_EtDrain);
    EtDrainCoupling_Origin[1];
    Plant_Origin[2] - ConRadius(ND_EtDrain)
]
L_EtDrainVertPipe := EtDrainCoupling_Origin[2] - EtDrainElbow_Origin[2] - ElbowRadius(ND_EtDrain)
EtDrainHorizPipe_Origin := EtDrainElbow_Origin
L_EtDrainHorizPipe := Et_Origin[0] - EtDrainElbow_Origin[0] + T_PlantWall
EtDrainStub_Origin := EtDrainCoupling_Origin + [0 m; 0 m; CouplingLength(ND_EtDrain) - 2*SocketDepth(ND_EtDrain)]
EtDrainVertPipe := PipeSUBF(EtDrainVertPipe_Origin, L_EtDrainVertPipe, [0; -90]*deg, ND_EtDrain, PS_Default, ["EtCon"])
EtDrainHorizPipe := PipeSUBF(EtDrainHorizPipe_Origin, L_EtDrainHorizPipe, [0; 0]*deg, ND_EtDrain, PS_Default, ["EtCon"])
EtDrainCoupling := CouplingSUBF(EtDrainCoupling_Origin, [0; 90]*deg, ND_EtDrain, PS_Default, ["EtCon"])
EtDrainElbow := ElbowSUBF(EtDrainElbow_Origin, [-90; 0; 90]*deg, ND_EtDrain, PS_Default, ["EtCon"])
EtDrainStub := PipeF(EtDrainStub_Origin, Z_EtTop + 30 cm - EtDrainStub_Origin[2], [0; 90]*deg, ND_EtDrain, PS_Default)
EtDrainScript := stack(EtPipeLayer, EtDrainVertPipe, EtDrainHorizPipe, EtPipeFrz, EtFittingLayer, EtDrainCoupling, EtDrainElbow, EtFittingFrz, EtRemovableLayer, EtDrainStub, EtRemovableFrz)
# Plate settler module
EtPlate_Origin := Et_Origin + [
    -L_Et + L_EtWallToPlate + (T_SedPlate*N_EtPlates + S_EtPlate*(N_EtPlates - 1))*sin(AN_EtPlate);
    0 m;
    H_EtDrain + (N_EtPlates*B_EtPlate*sin(AN_EtPlate) + CapHeight(ND_EtMod) - S_EtPlate - (ConRadius(ND_EtDrain) - outerradius(ND_EtDrain)))*tan(AN_EtPlate) + CapHeight(ND_EtMod)*cos(AN_EtPlate)
]
EtPlateLast_Origin := EtPlate_Origin + [-(N_EtPlates - 1)*B_EtPlate; 0 m; 0 m]
EtModCap1_Origin := EtPlate_Origin + [
    CapHeight(ND_EtMod) - CapThickness(ND_EtMod);
    S_EtLaminaPipeToEdge + outerradius(ND_EtMod);
    S_EtLaminaPipeToEdge + outerradius(ND_EtMod)
]
EtModCap2_Origin := EtModCap1_Origin + [
    -N_EtPlates*T_SedPlate - (N_EtPlates - 1)*S_EtPlate - 2*(CapHeight(ND_EtMod) - CapThickness(ND_EtMod));
    0 m;
    0 m
]
EtModPipe_Origin := EtModCap1_Origin
L_EtModPipe := N_EtPlates*T_SedPlate + (N_EtPlates - 1)*S_EtPlate + 2*(CapHeight(ND_EtMod) - CapThickness(ND_EtMod))
EtModSpacer_Origin := EtModCap1_Origin + [-(CapHeight(ND_EtMod) - CapThickness(ND_EtMod)) - T_SedPlate; 0 m; 0 m]
EtPlate := BoxF(EtPlate_Origin, EtPlate_Origin + [-T_SedPlate; W_Et; L_EtPlate], [0; 0; 0]*deg)
EtPlateLast := BoxF(EtPlateLast_Origin, EtPlateLast_Origin + [-T_SedPlate; W_Et; L_EtPlate + L_EtTopPlateExtension], [0; 0; 0]*deg)
EtModCap1 := CapF(EtModCap1_Origin, [0; 0; 0]*deg, ND_EtMod)
EtModCap2 := CapF(EtModCap2_Origin, [180; 0; 0]*deg, ND_EtMod)
EtModPipe := PipeF(EtModPipe_Origin, L_EtModPipe, [0; 0]*deg, ND_EtMod, PS_Modules)
EtModSpacer := PipeF(EtModSpacer_Origin, S_EtPlate, [0; 0]*deg, ND_EtModSpacer, PS_Modules)
ArrayEtPlates := ArrayLast(1, N_EtPlates - 1, -B_EtPlate)
ArrayEtModSpacers := ArrayLast(1, N_EtPlates - 1, -B_SedPlate)
ArrayEtModPlu1 := array_all(2, 1, L_EtPlate - 2*S_EtLaminaPipeToEdge - outerdiameter(ND_EtMod))
ArrayEtModPlu2 := array_all(1, 3, (W_Et - 2*S_EtLaminaPipeToEdge + outerdiameter(ND_EtMod))/2)
RotateEtMod := Rotate_All([EtPlate_Origin[0]; EtPlate_Origin[2]; EtPlate_Origin[1]], -(90 deg - AN_EtPlate))
ThawEtModPlu := ThawMultiple(["EtMod*Plu"])
FreezeEt := FreezeMultiple(["Et*"])
ThawEtMod := ThawMultiple(["EtMod*"])
EtModArrayScript := stack(ThawEtModPlu, view("r"), ArrayEtModPlu1, ArrayEtModPlu2, FreezeEt, ThawEtMod, view("f"), RotateEtMod, view("t"), FreezeEt)
EtModScript := stack(EtModPlateLayer, EtPlate, ArrayEtPlates, EtPlateLast, EtModPlateFrz, EtModCapLayer, EtModCap1, EtModCap2, EtModCapFrz, EtModPipeLayer, EtModPipe, EtModPipeFrz, EtModSpacerLayer, EtModSpacer, ArrayEtModSpacers, EtModSpacerFrz, EtModArrayScript)
# Rapid mix/LFOM
# Rapid mix pipe and fittings
RMCoupling_Origin := Et_Origin + [T_PlantWall - SocketDepth(ND_RMPipe); W_Et/2; S_Fitting + ConRadius(ND_RMPipe)]
RMNipple_Origin := RMCoupling_Origin + [-CouplingLength(ND_RMPipe) + 2*SocketDepth(ND_RMPipe); 0 m; 0 m]
RMElbow_Origin := RMCoupling_Origin + [
    SocketDepth(ND_RMPipe) - T_PlantWall - L_EtBackWallToLfom - outerradius(ND_RMPipe);
    0 m;
    ElbowRadius(ND_RMPipe)
]
RMPipe_Origin := RMElbow_Origin
EtRMPipe := PipeSUBF(RMPipe_Origin, Z_EtTop - RMElbow_Origin[2], [0; 90]*deg, ND_RMPipe, PS_Default, ["EtCon"])
EtRMNipple := PipeSUBF(RMNipple_Origin, RMNipple_Origin[0] - RMElbow_Origin[0] - ElbowRadius(ND_RMPipe), [0; 0]*deg, ND_RMPipe, PS_Default, ["EtCon"])
EtRMCoupling := CouplingSUBF(RMCoupling_Origin, [0; 0]*deg, ND_RMPipe, PS_Default, ["EtCon"])
EtRMElbow := ElbowSUBF(RMElbow_Origin, [180; 0; 90]*deg, ND_RMPipe, PS_Default, ["EtCon"])
LFOM_Origin := [RMPipe_Origin[0]; RMPipe_Origin[1]; Plant_Origin[2] + Z_LfomBottom]
LfomOrifices :=
    Local ← EtRMPipeFrz
    for h ∈ 0 .. last(H_LfomOrifices)
        if N_LfomOrifices[h] ≠ 0
            Local ← stack(Local, CylinderF([LFOM_Origin[0]; LFOM_Origin[1]; LFOM_Origin[2] + H_LfomOrifices[h]], D_LfomOrifices/2, outerradius(ND_RMPipe) + zc, [
                90 deg + (asin(0.5*S_LfomOrificesMin/(2*outerradius(ND_RMPipe))) + asin(D_LfomOrifices/(2*outerradius(ND_RMPipe))))*(mod(h, 2) == 0);
                0 deg
            ]))
        Local ← stack(Local, ArrayLastPolar([LFOM_Origin[0]; LFOM_Origin[1]; LFOM_Origin[2] + H_LfomOrifices[h]], N_LfomOrifices[h], (N_LfomOrifices[h] - 1)*(2*asin(D_LfomOrifices/(2*outerradius(ND_RMPipe))) + 2*asin(S_LfomOrificesMin/(2*outerradius(ND_RMPipe)))))) if N_LfomOrifices[h] > 1
    return Local
RMPlumbingScript := stack(EtRMFittingLayer, EtRMCoupling, EtRMElbow, EtRMFittingFrz, EtRMPipeLayer, EtRMPipe, EtRMNipple, LfomOrifices, GroupDelete, SubtractFromEtRMPipe)
# Rapid Mix Orifice
RMOrificePlate := CylinderF(RMCoupling_Origin, outerradius(ND_RMPipe), T_RMOrificePlate, [180; 0; 0]*deg)
RMOrifice := CylinderF(RMCoupling_Origin, D_RMOrifice/2, T_RMOrificePlate, [180; 0; 0]*deg)
RMOrificePlateScript := stack(EtRMPlateLayer, RMOrificePlate, EtRMPlateFrz, RMOrifice, GroupDelete, SubtractFromEtRMPlate)
RMScript := stack(RMPlumbingScript, RMOrificePlateScript)
# Entrance pipe
EntElbow_Origin := [
    Et_Origin[0] - L_Et + ConRadius(ND_ConductionLine);
    Et_Origin[1] + S_Fitting + ConRadius(ND_ConductionLine);
    Z_EtTop + ConRadius(ND_ConductionLine) - ElbowRadius(ND_ConductionLine)
]
EntVertPipe_Origin := EntElbow_Origin + [0 m; 0 m; -Z_EtTop + Z_LfomBottom]
EntHorizPipe_Origin := EntElbow_Origin + [-ElbowRadius(ND_ConductionLine); 0 m; ElbowRadius(ND_ConductionLine)]
EntElbow := ElbowF(EntElbow_Origin, [0; 0; 90]*deg, ND_ConductionLine, PS_Default)
EntVertPipe := PipeF(EntVertPipe_Origin, EntElbow_Origin[2] - EntVertPipe_Origin[2], [0; 90]*deg, ND_ConductionLine, PS_Default)
EntHorizPipe := PipeF(EntHorizPipe_Origin, 0.5 m, [0; 0]*deg, ND_ConductionLine, PS_Default)
EntrancePipeScript := stack(EtEntPipeLayer, EntVertPipe, EntHorizPipe, EtEntPipeFrz, EtEntFittingLayer, EntElbow, EtEntFittingFrz)
AC_EntranceTank := stack(EtConScript, EtDrainScript, EtModScript, RMScript, EntrancePipeScript)
# [component: inputs AC_EntranceTank]
