ND_EtMod := ND_SedMod
ND_EtModSpacer := ND_SedModSpacer
# Entrance Tank Low Flow (In floc channel)
S_EtLaminaPipeToEdge := 5 cm
# Layers
EtConLayer := layer_new("EtCon", grey)
EtConFrz := FreezeLayer("EtCon")
EtPipeLayer := layer_new("EtPipePlu", blue)
SelectEtPipes := SelectLayer("EtPipePlu")
EtPipeFrz := FreezeLayer("EtPipePlu")
EtFittingLayer := layer_new("EtFittingPlu", green)
SelectEtFittings := SelectLayer("EtFittingPlu")
EtFittingFrz := FreezeLayer("EtFittingPlu")
EtRemovableLayer := layer_new("EtRemovablePlu", red)
EtRemovableFrz := FreezeLayer("EtRemovablePlu")
EtPlateLayer := layer_new("EtModPlates", purple)
EtPlateFrz := FreezeLayer("EtModPlates")
EtModPipeLayer := layer_new("EtModPipePlu", blue3)
EtModPipeFrz := FreezeLayer("EtModPipePlu")
EtModSpacerLayer := layer_new("EtModSpacerPlu", blue)
EtModSpacerFrz := FreezeLayer("EtModSpacerPlu")
EtModCapLayer := layer_new("EtModCapPlu", red)
EtModCapFrz := FreezeLayer("EtModCapPlu")
EtRMPipeLayer := layer_new("EtRMPipePlu", blue)
EtRMPipeFrz := FreezeLayer("EtRMPipePlu")
EtRMFittingLayer := layer_new("EtRMFittingPlu", green)
EtRMFittingFrz := FreezeLayer("EtRMFittingPlu")
# Entrance tank masonry
Et_Origin := Plant_Origin + [0 m; W_Sed + T_PlantWall; Z_FlocBottom]
Et_Dim := [L_Et; W_Et; H_Et]
EntranceTank := Tank(Et_Origin, Et_Dim, T_PlantWall)
Et_BaseBox1 := BoxF(Et_Origin, Et_Origin + [-L_Et; W_Et; H_EtDrain], [0; 0; 0]*deg)
Et_BaseBox2 := BoxF(Et_Origin + [-L_EtWallToPlate - (ConRadius(ND_EtDrain) - outerradius(ND_EtDrain)) - L_EtSlope1; 0 m; H_EtDrain], Et_Origin + [-L_Et; W_Et; H_EtDrain + H_EtSlope1], [0; 0; 0]*deg)
Et_Slope1 := WedgeF(Et_Origin + [-L_EtWallToPlate - (ConRadius(ND_EtDrain) - outerradius(ND_EtDrain)) - L_EtSlope1; 0 m; H_EtDrain], Et_Origin + [-L_EtWallToPlate - (ConRadius(ND_EtDrain) - outerradius(ND_EtDrain)); W_Et; H_EtDrain + H_EtSlope1], [0; 0; 0]*deg)
Et_Slope2 := WedgeF(Et_Origin + [-L_Et; 0 m; H_EtDrain + H_EtSlope1], Et_Origin + [-L_Et + L_EtSlope2; W_Et; H_EtDrain + H_EtSlope1 + H_EtSlope2], [0; 0; 0]*deg)
EtConScript := stack(EtConLayer, EntranceTank, Et_BaseBox1, Et_BaseBox2, Et_Slope1, Et_Slope2, Union_All, EtConFrz)
# Entrance tank drain
EtDrainCoupling_Origin := Et_Origin + [
    -S_Fitting - ConRadius(ND_EtDrain);
    W_Et/2;
    H_EtDrain - CouplingLength(ND_EtDrain) + SocketDepth(ND_EtDrain)
]
EtDrainVertPipe_Origin := EtDrainCoupling_Origin
EtDrainElbow_Origin := [
    EtDrainCoupling_Origin[0] + ElbowRadius(ND_EtDrain);
    EtDrainCoupling_Origin[1];
    Plant_Origin[2] - outerradius(ND_EtDrain)
]
L_EtDrainVertPipe := EtDrainCoupling_Origin[2] - EtDrainElbow_Origin[2] - ElbowRadius(ND_EtDrain)
EtDrainHorizPipe_Origin := EtDrainElbow_Origin
L_EtDrainHorizPipe := Et_Origin[0] - EtDrainElbow_Origin[0] + T_PlantWall
EtDrainStub_Origin := EtDrainCoupling_Origin + [0 m; 0 m; CouplingLength(ND_EtDrain) - 2*SocketDepth(ND_EtDrain)]
EtDrainVertPipe := PipeSUBF(EtDrainVertPipe_Origin, L_EtDrainVertPipe, [0; -90]*deg, ND_EtDrain, PS_Default, ["EtCon"])
EtDrainHorizPipe := PipeSUBF(EtDrainHorizPipe_Origin, L_EtDrainHorizPipe, [180; 0]*deg, ND_EtDrain, PS_Default, ["EtCon"])
EtDrainCoupling := CouplingSUBF(EtDrainCoupling_Origin, [0; 90]*deg, ND_EtDrain, PS_Default, ["EtCon"])
EtDrainElbow := ElbowSUBF(EtDrainElbow_Origin, [90; 0; -90]*deg, ND_EtDrain, PS_Default, ["EtCon"])
EtDrainStub := PipeF(EtDrainStub_Origin, Z_EtTop - EtDrainStub_Origin[2], [0; 90]*deg, ND_EtDrain, PS_Default)
EtDrainScript := stack(EtPipeLayer, EtDrainVertPipe, EtDrainHorizPipe, EtPipeFrz, EtFittingLayer, EtDrainCoupling, EtDrainElbow, EtFittingFrz, EtRemovableLayer, EtDrainStub, EtRemovableFrz)
# Plate settler module
EtPlate_Origin := Et_Origin + [
    -L_EtWallToPlate - (T_SedPlate*N_EtPlates + S_EtPlate*(N_EtPlates - 1))*sin(AN_EtPlate);
    0 m;
    H_EtDrain + (N_EtPlates*B_EtPlate*sin(AN_EtPlate) - (ConRadius(ND_EtDrain) - outerradius(ND_EtDrain)))*tan(AN_EtPlate) + S_EtPlate*cos(AN_EtPlate)
]
EtPlateLast_Origin := EtPlate_Origin + [(N_EtPlates - 1)*B_EtPlate; 0 m; 0 m]
EtModCap1_Origin := EtPlate_Origin + [
    -CapHeight(ND_EtMod) + CapThickness(ND_EtMod);
    S_EtLaminaPipeToEdge + outerradius(ND_EtMod);
    S_EtLaminaPipeToEdge + outerradius(ND_EtMod)
]
EtModCap2_Origin := EtModCap1_Origin + [
    N_EtPlates*T_SedPlate + (N_EtPlates - 1)*S_EtPlate + 2*(CapHeight(ND_EtMod) - CapThickness(ND_EtMod));
    0 m;
    0 m
]
EtModPipe_Origin := EtModCap1_Origin
L_EtModPipe := N_EtPlates*T_SedPlate + (N_EtPlates - 1)*S_EtPlate + 2*(CapHeight(ND_EtMod) - CapThickness(ND_EtMod))
EtModSpacer_Origin := EtModCap1_Origin + [(CapHeight(ND_EtMod) - CapThickness(ND_EtMod)) + T_SedPlate; 0 m; 0 m]
EtPlate := BoxF(EtPlate_Origin, EtPlate_Origin + [T_SedPlate; W_Et; L_EtPlate], [0; 0; 0]*deg)
L_EtSlope1 =  # error: This variable is undefined.
H_EtSlope1 =  # error
EtPlateLast := BoxF(EtPlateLast_Origin, EtPlateLast_Origin + [T_SedPlate; W_Et; L_EtPlate + L_EtTopPlateExtension], [0; 0; 0]*deg)
EtModCap1 := CapF(EtModCap1_Origin, [180; 0; 0]*deg, ND_EtMod)
EtModCap2 := CapF(EtModCap2_Origin, [0; 0; 0]*deg, ND_EtMod)
EtModPipe := PipeF(EtModPipe_Origin, L_EtModPipe, [180; 0]*deg, ND_EtMod, PS_Modules)
EtModSpacer := PipeF(EtModSpacer_Origin, S_EtPlate, [180; 0]*deg, ND_EtModSpacer, PS_Modules)
ArrayEtPlates := ArrayLast(1, N_EtPlates - 1, B_EtPlate)
ArrayEtModSpacers := ArrayLast(1, N_EtPlates - 1, B_SedPlate)
ArrayEtModPlu1 := array_all(2, 1, L_EtPlate - 2*S_EtLaminaPipeToEdge - outerdiameter(ND_EtMod))
ArrayEtModPlu2 := array_all(1, 3, (W_Et - 2*S_EtLaminaPipeToEdge - outerdiameter(ND_EtMod))/2)
RotateEtMod := Rotate_All([EtPlate_Origin[0]; EtPlate_Origin[2]; EtPlate_Origin[1]], 90 deg - AN_EtPlate)
ThawEtModPlu := ThawMultiple(["EtMod*Plu"])
FreezeEt := FreezeMultiple(["Et*"])
ThawEtMod := ThawMultiple(["EtMod*"])
EtModArrayScript := stack(ThawEtModPlu, view("r"), ArrayEtModPlu1, ArrayEtModPlu2, FreezeEt, ThawEtMod, view("f"), RotateEtMod, FreezeEt)
EtModScript := stack(EtPlateLayer, EtPlate, ArrayEtPlates, EtPlateLast, EtPlateFrz, EtModCapLayer, EtModCap1, EtModCap2, EtModCapFrz, EtModPipeLayer, EtModPipe, EtModPipeFrz, EtModSpacerLayer, EtModSpacer, ArrayEtModSpacers, EtModSpacerFrz, EtModArrayScript)
# Rapid Mix/LFOM
RMCoupling_Origin := Et_Origin + [
    -L_Et - T_PlantWall + SocketDepth(ND_RMPipe);
    W_Et/2;
    L_Floc*tan(AN_FlocSlope) + ConRadius(ND_RMPipe)
]
RMNipple_Origin := RMCoupling_Origin + [CouplingLength(ND_RMPipe) - 2*SocketDepth(ND_RMPipe); 0 m; 0 m]
RMElbow_Origin := RMCoupling_Origin + [
    -SocketDepth(ND_RMPipe) + T_PlantWall + L_EtBackWallToLfom + outerradius(ND_RMPipe);
    0 m;
    ElbowRadius(ND_RMPipe)
]
RMPipe_Origin := RMElbow_Origin
EtRMPipe := PipeSUBF(RMPipe_Origin, Z_EtTop - RMElbow_Origin[2], [0; 90]*deg, ND_RMPipe, PS_Default, ["EtCon"])
EtRMNipple := PipeSUBF(RMNipple_Origin, RMElbow_Origin[0] - RMNipple_Origin[0] - ElbowRadius(ND_RMPipe), [180; 0]*deg, ND_RMPipe, PS_Default, ["EtCon"; "FlocTankCon"])
EtRMCoupling := CouplingSUBF(RMCoupling_Origin, [180; 0]*deg, ND_RMPipe, PS_Default, ["EtCon"; "FlocTankCon"])
EtRMElbow := ElbowSUBF(RMElbow_Origin, [0; 0; -90]*deg, ND_RMPipe, PS_Default, ["EtCon"])
RMPipeScript := stack(EtRMPipeLayer, EtRMPipe, EtRMNipple, EtRMPipeFrz, EtRMFittingLayer, EtRMCoupling, EtRMElbow, EtRMFittingFrz)
AC_EntranceTank := stack(EtConScript, EtDrainScript, EtModScript, RMPipeScript)
# [component: inputs stack(EtConScript, EtDrainScript, EtModScript)]
L_EtPlate*cos(AN_EtPlate) =  # error
AN_EtPlate =  # error
H_EtSlope2 := min(Z_LfomBottom - Z_EtDrain - H_EtSlope1, L_EtSlope2*tan(AN_EtPlate))
atan(H_EtSlope1/L_EtSlope1) =  # error
Z_LfomBottom - Z_EtDrain - H_EtSlope1 =  # error
L_EtSlope2*tan(AN_EtPlate) =  # error
H_EtSlope1 =  # error
L_EtSlope1 =  # error
L_EtSlope2 =  # error
