# It is time for a new design algorithm for flocculators. For the past 10 years we designed flocculators knowing that 2 m deep vertical flocculators had very high H/S ratios especially for low flow rates and thus were inherently inefficient. We designed to accommodate that inefficiency because the plan view area of the vertical flocculators was smaller than any other design options. We recently obtained experimental confirmation that operating at higher energy dissipation rates in the flocculator should be acceptable. If we increase the energy dissipation rate it will make the H/S ratio even higher. By increasing the energy dissipation rate and simultaneously increasing the efficiency we can produce much smaller flocculators. The design that I propose (40 cm of head loss and collision potential of 70 m^2/3) below only increases the maximum energy dissipation rate from 10 mW/kg up to 22 mW/kg. The residence time is reduced to 6.1 minutes. It is important to note that at this time we are not proposing to reduce the collision potential. We have experimental results suggesting that 1 minute flocculation is viable when coupled with a floc blanket. The cost of the flocculators will already be a very small fraction of the overall plant cost and thus further reductions in flocculator volume will not have as significant an impact on the plant cost.
# We assume a reasonable head loss as the starting point for this design. Our earlier designs began with a max energy dissipation rate as the primary constraint. Here we use head loss to recognize that cost optimization is an important parameter. Our cost analysis suggested that increasing the head loss to between 40 and 60 cm would be economical with the most cost effective head loss increasing with flow rate. For simplicity we will use a constant head loss for our designs with the option of having expert users adjust the head loss if a hydraulic design requires less head loss to achieve a viable gravity powered plant design.
HL_Floc := 40 cm
# This is a significant increase from our current designs. We will need to ensure that the increased static load on the baffles can be handled without difficulty. This may require more closely spaced pipe spacers.
# This is the new design target that will produce the same collision potential as the old targer of 75 m^2/3. The new system of equations estimates the flocculation efficiency to be slighly lower than what we had calculated prior to 2014. Thus the two changes cancel out and produce similar collision potential.
ψ_Floc := 70 m^(2/3)
H_FlocEnd := 2 m
Q := 50*L/s  # random flow rate for calculation checks
Π_VC := 0.62
Π_PlaneJet := 0.225
Π_VCBaffle := Π_VC^2
W_PCSheet := 42 in = 1.0668 m
W_FlocMinBod := W_PCSheet/2 = 0.5334 m
W_FlocMaxBod := W_PCSheet
ν_Water := 1*mm^2/s
K_B := (1/Π_VCBaffle - 1)^2 = 2.56466
V_SedUp := 1*mm/s
# This is an estimate based on a 5 L/s sed tank. Currently I am assuming that we only build one size of sed tank between 10 L/s and 100 L/s. We might opt for a longer sed tank for high flow rates to accommodate the filters that would be placed along the length of the last sed tank for parallel treatment trains above approximately 100 L/s. That functional dependency on Q can be added here if needed. The sed tank for low flow rates also needs to be reviewed. I've estimated it here assuming low flow channel width for sed tank inlet is 0.6m. When this file is implemented in the design tool it will come after the sed tank design and thus these values will be known.
fL_Sed(Q) := min(Q/(2*V_SedUp*W_PCSheet) + 0.6 m, 5.7 m)
Π_HSMin := 3
Π_HSMax := Π_VCBaffle^4*K_B/Π_PlaneJet^3 = 4.91605
# It might be reasonable to allow for some Π.HS values that are greater than 5, but then the assumption that we are at a constant efficiency begins to fail. I think we need to have
Π_HSMax := 6
# What is the inefficiency of flocculation?
fα_ε(Π_HS) := max(Π_PlaneJet^3/Π_VCBaffle^4*2*Π_HS/K_B, 2)
α_ε := 2
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fε_Ave(HL_Floc, ψ) := (g*HL_Floc/(ψ*α_ε^(1/6)))^(3/2)
ε_Max := fε_Ave(HL_Floc, ψ_Floc)*α_ε = 22.3098 mW/kg
# We can compare this design to traditional design values.
G_Ave := sqrt(fε_Ave(HL_Floc, ψ_Floc)/ν_Water) = 105.617 1/s
Q_Max := (2*H_FlocEnd*fε_Ave(HL_Floc, ψ_Floc)/K_B)^(1/3)*W_FlocMaxBod*H_FlocEnd/Π_HSMin = 184.285 L/s
# This is the maximum flow rate that we can handle with a vertical flow flocculator given the depth and max channel width.
Q_Graph := 5*L/s, 10*L/s .. Q_Max  # This is the range of designs I'm exploring in this worksheet. Lower flow rates will have shorter sed tanks and this
Π_HSGraph := 3, 4 .. 40
fα_ψ(Π_HS) := 1/fα_ε(Π_HS)^(1/6)
fα_ψ(Π_HSMin) = 0.890899
fα_ψ(Π_HSMax) = 0.861799
α_ψ := fα_ψ(Π_HSMax)
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fθ_Floc(ψ, HL_Floc) := ψ/(fε_Ave(HL_Floc, ψ)^(1/3)*α_ψ)
# The residence time is no longer a function of flow rate because all flocculators will be designed for full efficiency.
θ_Floc := fθ_Floc(ψ_Floc, HL_Floc)  # We can get a good enough estimate by assuming any optimal Π.HS
θ_Floc = 6.05878 min
# This residence time is shorter than traditional design guidelines, but it doesn't make any sense to compare mechanical and hydraulic flocculators because mechanical flocculators most likely have their performance limited by short circuiting. Mechanical flocculators are arbitrary flow reactors that too often approach completely mixed flow reactors. Thus mechanical flocculators will always require a high residence time to reduce the effect of this short circuiting. Hydraulic flocculators are only limited by their ability to produce collisions. Our new design algorithm achieves very uniform energy dissipation rates and thus the AguaClara design can have the smallest flocculators and still achieve high performance.
Vol_Floc := Q*fθ_Floc(ψ_Floc, HL_Floc) = 18176.4 L
fW_FlocTotal(Q, ψ, HL_Floc) := Q*fθ_Floc(ψ, HL_Floc)/(H_FlocEnd*fL_Sed(Q))
W_FlocTotal := fW_FlocTotal(Q, ψ_Floc, HL_Floc) = 1.59442 m
# Find the minimum possible channel width.
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# The channel width must be greater than 1/2 of the plate width and greater than the minimum width to achieve a Π.HS>3.
fW_FlocMin(H_FlocEnd, K_B, Q, HL_Floc, ψ) := max(Π_HSMin*(K_B/(2*H_FlocEnd*fε_Ave(HL_Floc, ψ)))^(1/3)*Q/H_FlocEnd, W_FlocMinBod)
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# The envelope created by these two curves represents the possible efficient designs. Now we can optimize the channel width based on the length and the target flocculator volume.
#
# The number of channels calculation will need to modified if part of the first flocculator channel is used for grit removal.
fN_ChannelsMin(H_FlocEnd, K_B, Q, HL_Floc, ψ) := ceil(fW_FlocTotal(Q, ψ, HL_Floc)/W_FlocMaxBod)
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# This analysis is okay as long as we are using full efficiency designs. Otherwise the results will be a function of the actual Π.HS for each flow rate.
fW_Floc(H_FlocEnd, K_B, Q, HL_Floc, ψ) := max(fW_FlocTotal(Q, ψ, HL_Floc)/fN_ChannelsMin(H_FlocEnd, K_B, Q, HL_Floc, ψ), W_FlocMinBod)
# The max function is required to make sure that we don't specify a channel narrower than the minimum width for the very low flow rates where the length of the sedimentation tank is longer than is required for the flocculator.
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# Our design falls in the middle of the available design envelope. It is possible that for low flow rates plants the flocculator wouldn't even need to be as long as one sed tank. We will get some design failures for very high flow rates where the minimum and the maximum channel widths converge because the number of channels must be an integer.
# Find the minimum flow rate that doesn't require obstacles
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fQ_MinNoObstacles(H_FlocEnd, K_B, HL_Floc, ψ) := (2*H_FlocEnd*fε_Ave(HL_Floc, ψ)/K_B)^(1/3)*fW_Floc(H_FlocEnd, K_B, Q, HL_Floc, ψ)*H_FlocEnd/Π_HSMax
Q_MinNoObstacles := fQ_MinNoObstacles(H_FlocEnd, K_B, HL_Floc, ψ_Floc) = 68.8572 L/s
# For all flows below Q.MinNoObstacles it will be necessary to use additional flow contractions to maintain a high efficiency flocculator.
# Find the maximum distance between obstacles.
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fH_FlocObstacleMax(K_B, Q, HL_Floc, ψ) := (K_B/(2*fε_Ave(HL_Floc, ψ)))^(1/4)*(Π_HSMax*Q/fW_Floc(H_FlocEnd, K_B, Q, HL_Floc, ψ))^(3/4)
fH_FlocObstacleMax(K_B, Q_MinNoObstacles, HL_Floc, ψ_Floc) = 2.13238 m
# Find the number of expansions per baffle
fN_Obstacles(K_B, Q, HL_Floc, ψ) := ceil(H_FlocEnd/fH_FlocObstacleMax(K_B, Q, HL_Floc, ψ))
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# This number of obstacles includes the expansion created by the baffle. Calculate the distance between expansions.
fH_Obstacles(K_B, Q, HL_Floc, ψ) := H_FlocEnd/fN_Obstacles(K_B, Q, HL_Floc, ψ)
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# All plants with less than Q_MinNoObstacles = 68.8572 L/s will have obstacles to improve flocculation efficiency.
# What does it mean that the functions below are dependent on Π.HSMax?
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fS_Floc(H_FlocEnd, K_B, Q, HL_Floc, ψ) := (K_B/(2*fH_Obstacles(K_B, Q, HL_Floc, ψ)*fε_Ave(HL_Floc, ψ)))^(1/3)*(Q/fW_Floc(H_FlocEnd, K_B, Q, HL_Floc, ψ))
S_Floc := fS_Floc(H_FlocEnd, K_B, Q, HL_Floc, ψ_Floc) = 0.30496 m
fW_FlocObstacle(H_FlocEnd, K_B, Q_Graph, HL_Floc, ψ) := fS_Floc(H_FlocEnd, K_B, Q_Graph, HL_Floc, ψ)*(1 - Π_VCBaffle)
Q_Obstacle := 10*L/s, 15*L/s .. Q_MinNoObstacles
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# This graph shows the channel width, the spacing between baffles, and the amount of the spacing that must be blocked by the obstacle (this includes any vena contracta effect).
# What are these obstacles made of? If the obstacles create wakes that are larger than the obstacle, then we need to account for that in the design. The obstacle should be against one of the baffles so that only one contraction is produced by each obstacle. This maximizes the distance for the expansion and thus minimizes the number of obstacles needed. The obstacles should shed flocs. Thus the obstacles must have a slope of at least 45 degrees.
# Next calculate the collision potential per obstacle.
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fψ_Obstacle(K_B, Q, HL_Floc, ψ) := (K_B^2*fH_Obstacles(K_B, Q, HL_Floc, ψ)^4/(4*α_ε))^(1/6)
# The function below calculates the number of baffles required given the collision potential constraint.
fN_BafflesSpaces(H_FlocEnd, K_B, Q, HL_Floc, ψ) := ψ_Floc/(fψ_Obstacle(K_B, Q, HL_Floc, ψ)*fN_Obstacles(K_B, Q, HL_Floc, ψ))
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# The number of baffles required is substantially fewer than with our previous design. We are getting much more collision potential per baffle with this new design.
fV_Floc(H_FlocEnd, K_B, Q, HL_Floc, ψ) := Q/(fS_Floc(H_FlocEnd, K_B, Q, HL_Floc, ψ)*fW_Floc(H_FlocEnd, K_B, Q, HL_Floc, ψ))
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# The graph above shows the ten state standards for velocity of water. This shows that we aren't close to the maximum velocity guidelines and this suggests that we aren't yet using energy dissipation rates that exceed the traditional guidelines.
# Head loss calculations to confirm that we are getting the head loss that we set initially.
fHL_Floc(H_FlocEnd, K_B, Q, HL_Floc, ψ) := K_B*(Q/(fS_Floc(H_FlocEnd, K_B, Q, HL_Floc, ψ)*fW_Floc(H_FlocEnd, K_B, Q, HL_Floc, ψ)))^2/(2*g)*fN_BafflesSpaces(H_FlocEnd, K_B, Q, HL_Floc, ψ)*fN_Obstacles(K_B, Q, HL_Floc, ψ)
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# All of the designs generate the target head loss.
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HL := ψ_Floc*fε_Ave(HL_Floc, ψ_Floc)^(2/3)*α_ε^(1/6)/g = 0.4 m
fL_Floc(H_FlocEnd, K_B, Q, HL_Floc, ψ) := fN_BafflesSpaces(H_FlocEnd, K_B, Q, HL_Floc, ψ)*fS_Floc(H_FlocEnd, K_B, Q, HL_Floc, ψ)
# The graph below shows the number of channels required for each flow rate. The very lowest flow rates require less than one full channel. This analysis will need to be updated if some of the first flocculator channel is used for grit removal.
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# Now we check to see if the design contraints meet the H/S ratio.
fΠ_HSCheck(H_FlocEnd, K_B, Q, HL_Floc, ψ) := fH_Obstacles(K_B, Q, HL_Floc, ψ)/fS_Floc(H_FlocEnd, K_B, Q, HL_Floc, ψ)
# Below is the equation for H/S based on the channel depth. This is for comparison with our previous designs when we didn't use obstacles.
fΠ_HWaterSCheck(H_FlocEnd, K_B, Q, HL_Floc, ψ) := H_FlocEnd/fS_Floc(H_FlocEnd, K_B, Q, HL_Floc, ψ)
y := 0 .. 20  # Used to create the vertical line for the division between with and without obstacles.
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# The H/S ratio based on the water depth is still very high for small flow rate flocculators. However, if we use H defined as the distance between flow expansions, then most of the designs fall between 3 and 6.
# The vertical line is the minimum flow that doesn't require obstacles. The maximum flow rate plotted is the maximum flow rate that can be handled given the depth and width of the flocculator channel.
