S_FlocModPipeToEdge := 10 cm
# Flocculator AutoCAD
# Layers
FlocTankLayer := layer_new("FlocTankCon", grey)
SelectFlocTank := SelectLayer("FlocTankCon")
FlocTankFrz := FreezeLayer("FlocTankCon")
SubtractFromFlocTank := SubtractF(["FlocTankCon"], "DeleteMe")
FlocDrainPipeLayer := layer_new("FlocDrainPipePlu", blue)
SelectFlocDrainPipe := SelectLayer("FlocDrainPipePlu")
FlocDrainPipeFrz := FreezeLayer("FlocDrainPipePlu")
FlocDrainFittingLayer := layer_new("FlocDrainFittingPlu", green)
SelectFlocDrainFitting := SelectLayer("FlocDrainFittingPlu")
FlocDrainFittingFrz := FreezeLayer("FlocDrainFittingPlu")
FlocDrainRemovableLayer := layer_new("FlocDrainRemovablePlu", red)
SelectFlocDrainRemovable := SelectLayer("FlocDrainRemovablePlu")
FlocDrainRemovableFrz := FreezeLayer("FlocDrainRemovablePlu")
FlocBaffleLayer := layer_new("FlocModBaffles", ltpurple)
SelectFlocBaffle := SelectLayer("FlocModBaffles")
FlocBaffleFrz := FreezeLayer("FlocModBaffles")
FlocModHorizPipeLayer := layer_new("FlocModHorizPipePlu", blue)
SelectFlocModHorizPipe := SelectLayer("FlocModHorizPipePlu")
FlocModHorizPipeFrz := FreezeLayer("FlocModHorizPipePlu")
FlocModVertPipeLayer := layer_new("FlocModVertPipe", blue)
SelectFlocModVertPipe := SelectLayer("FlocModVertPipe")
FlocModVertPipeFrz := FreezeLayer("FlocModVertPipe")
FlocModSpacerLayer := layer_new("FlocModSpacerPlu", blue3)
SelectFlocModSpacer := SelectLayer("FlocModSpacerPlu")
FlocModSpacerFrz := FreezeLayer("FlocModSpacerPlu")
FlocModFittingLayer := layer_new("FlocModFittingPlu", green)
SelectFlocModFitting := SelectLayer("FlocModFittingPlu")
FlocModFittingFrz := FreezeLayer("FlocModFittingPlu")
FlocObsDownLayer := layer_new("FlocObsDownPipe", blue2)
SelectFlocObsDown := SelectLayer("FlocObsDownPipe")
FlocObsDownFrz := FreezeLayer("FlocObsDownPipe")
SubtractFromFlocObsDown := SubtractF(["FlocObsDownPipe"], "DeleteMe")
FlocObsUpLayer := layer_new("FlocObsUpPipe", blue2)
SelectFlocObsUp := SelectLayer("FlocObsUpPipe")
FlocObsUpFrz := FreezeLayer("FlocObsUpPipe")
SubtractFromFlocObsUp := SubtractF(["FlocObsUpPipe"], "DeleteMe")
# Origin Points
FlocCoupling_Origin := [
    Floc_Origin[0] + ConRadius(ND_RMPipe) + S_Fitting - L_Sed;
    Floc_Origin[1] + N_FlocChannels*W_FlocChannel + T_FlocChannelWall*(N_FlocChannels - 1) + SocketDepth(ND_RMPipe) - L_FlocCouplingExt;
    Floc_Origin[2] + outerradius(ND_RMPipe) + S_Fitting
]
FlocPort_Origin :=
    for i ∈ 0 .. (N_FlocChannels - 2)
        if mod(i, 2) == 1
            FlocPort_Origin[0, i] ← [
                Floc_Origin[0] - TotalFloc_Dim[0];
                Floc_Origin[1] + (W_FlocChannel*(1 + i)) + T_FlocChannelWall*i - zc;
                Floc_Origin[2] + H_FlocPort[i]
            ]
        otherwise
            FlocPort_Origin[0, i] ← [
                Floc_Origin[0] - W_FlocPort[N_FlocChannels - 2 - i];
                Floc_Origin[1] + (W_FlocChannel*(1 + i)) + T_FlocChannelWall*i - zc;
                Floc_Origin[2] + H_FlocPort[i]
            ]
    return FlocPort_Origin
# The flocport origins were set to start at the top height of the ports themselves (added to the origin otherwise it disappears).  This changes the flocports to be at the bottom of the channel dividing walls instead of at the top (more structurally sound).
ChannelOpening_Origin := [Floc_Origin[0] - L_Sed; Floc_Origin[1] - T_PlantWall; Z_SedChannelBottom]
# The Channel Opening was changed in the z-direction so that the bottom opening aligned with the bottom of the tank (for the same reason as the flocports).
# Flocculator Masonry
# Origins
Floc_Origin := [Plant_Origin[0]; Plant_Origin[1] + N_SedTanks*(W_Sed + T_PlantWall); Z_FlocBottom]
Floc_Dim := [L_Sed; N_FlocChannels*(W_FlocChannel + T_PlantWall) - T_PlantWall; H_Floc]
FlocChannelWall_Origin := [Floc_Origin[0] - L_Sed - T_PlantWall; Floc_Origin[1] + W_FlocChannel; Floc_Origin[2]]
FlocChannelWall_Dim := [L_Sed + 2*T_PlantWall; T_PlantWall; H_Floc]
FlocPort1_Origin := Floc_Origin + [-W_FlocPort; W_FlocChannel; 0 m]
FlocPort2_Origin := Floc_Origin + [-L_Sed; 2*W_FlocChannel + T_PlantWall; 0 m]
FlocPort_Dim := [W_FlocPort; T_PlantWall; H_FlocPort]
SedChannelOpening_Origin := Floc_Origin + [-L_Sed; 0 m; H_Floc]
SedChannelOpening_Dim := [W_SedInletChannelPreWeir; -T_PlantWall; Z_SedChannelBottom - Z_FlocTop]
FlocSlabCut_Origin := Floc_Origin + [T_PlantWall; -T_PlantWall; -T_FlocSlab]
FlocSlabCut_Dim := [-2*T_PlantWall - L_Sed; T_PlantWall + N_FlocChannels*(W_FlocChannel + T_PlantWall); -T_PlantWall]
# Masonry
FlocTank := Tank(Floc_Origin, Floc_Dim, T_PlantWall)
FlocChannelWall := BoxF(FlocChannelWall_Origin, FlocChannelWall_Origin + FlocChannelWall_Dim, [0; 0; 0]*deg)
ArrayFlocWall := ArrayLast(N_FlocChannels - 1, 1, W_FlocChannel + T_PlantWall)
FlocTankScript := stack(FlocTankLayer, FlocTank, FlocChannelWall, ArrayFlocWall, Union_All, FlocTankFrz)
# Masonry cuts
FlocPort1 := BoxF(FlocPort1_Origin, FlocPort1_Origin + FlocPort_Dim, [0; 0; 0]*deg)
ArrayFlocPort1 := ArrayLast(N_FlocChannels/2, 1, 2*(W_FlocChannel + T_PlantWall))
FlocPort2 := BoxF(FlocPort2_Origin, FlocPort2_Origin + FlocPort_Dim, [0; 0; 0]*deg)
ArrayFlocPort2 := ArrayLast(N_FlocChannels/2 - 1, 1, 2*(W_FlocChannel + T_PlantWall))
SedChannelOpening := BoxF(SedChannelOpening_Origin, SedChannelOpening_Origin + SedChannelOpening_Dim, [0; 0; 0]*deg)
FlocSlabCut := BoxF(FlocSlabCut_Origin, FlocSlabCut_Origin + FlocSlabCut_Dim, [0; 0; 0]*deg)
FlocMasonryCutScript :=
    stack(FlocPort1, ArrayFlocPort1, FlocPort2, ArrayFlocPort2, SedChannelOpening, FlocSlabCut, GroupDelete, SubtractFromFlocTank) if N_FlocChannels > 2
    stack(FlocPort1, ArrayFlocPort1, SedChannelOpening, FlocSlabCut, GroupDelete, SubtractFromFlocTank) otherwise
FlocMasonryScript := stack(FlocTankScript, FlocMasonryCutScript)
FlocRMCut := CylinderF(FlocCoupling_Origin, outerradius(ND_RMPipe), T_PlantWall, [270; 0]*deg)
RMRodLayer := layer_new("FlocRMRods", grey)
RMRods := CylinderF([
    Floc_Origin[0] - L_Sed + S_RMGate + OD_RMRod/2;
    Floc_Origin[1] + TotalFloc_Dim[1] + 5 cm;
    -zc + Floc_Origin[2]
], OD_RMRod/2, H_RMChannel + 2*zc, [0; 0]*deg)
RotateRod := Rotate3DLast([
    Floc_Origin[0] - L_Sed + S_RMGate + OD_RMRod/2;
    Floc_Origin[1] + TotalFloc_Dim[1] + 5 cm;
    -zc + Floc_Origin[2]
], "y", 90 deg)
ArrayRods := ArrayLast(1, N_RMRods, S_RMGate + OD_RMRod)
# Baffles
# Baffle origins and dimensions
FlocBaffleLow_Origin(N) := Floc_Origin + [-S_FlocBaffle; N*(W_FlocChannel + T_PlantWall); 0 m]
FlocBaffleLow_Dim := [-T_SedPlate; W_FlocChannel; H_FlocBaffleLow]
FlocBaffleHigh_Origin(N) := Floc_Origin + [-2*S_FlocBaffle - T_SedPlate; N*(W_FlocChannel + T_PlantWall); Pi_FlocBaffle*S_FlocBaffle]
FlocBaffleHigh_Dim := [-T_SedPlate; W_FlocChannel; H_FlocBaffleHigh]
# Draw and array baffles
FlocBafflesLow :=
    Local ← view("t")
    for i ∈ 0 .. N_FlocChannels - 1
        Baffle ← BoxF(FlocBaffleLow_Origin(i), FlocBaffleLow_Origin(i) + FlocBaffleLow_Dim, [0; 0; 0]*deg)
        Array ←
            ArrayLast(1, N_FlocLastChannelBaffles/2, -2*B_FlocBaffle) if i == 0
            ArrayLast(1, (N_FlocFirstChannelBaffles + 1)/2, -2*B_FlocBaffle) if i == (N_FlocChannels - 1)
            ArrayLast(1, (N_FlocChannelBaffles + 1)/2, -2*B_FlocBaffle) otherwise
        Local ← stack(Local, Baffle, Array)
    return Local
FlocBafflesHigh :=
    Local ← view("t")
    for i ∈ 0 .. N_FlocChannels - 1
        Baffle ← BoxF(FlocBaffleHigh_Origin(i), FlocBaffleHigh_Origin(i) + FlocBaffleHigh_Dim, [0; 0; 0]*deg)
        Array ←
            ArrayLast(1, N_FlocLastChannelBaffles/2, -2*B_FlocBaffle) if i == 0
            ArrayLast(1, (N_FlocFirstChannelBaffles - 1)/2, -2*B_FlocBaffle) if i == (N_FlocChannels - 1)
            ArrayLast(1, (N_FlocChannelBaffles - 1)/2, -2*B_FlocBaffle) otherwise
        Local ← stack(Local, Baffle, Array)
    return Local
FlocBaffleScript := stack(FlocBaffleLayer, FlocBafflesLow, FlocBafflesHigh, FlocBaffleFrz)
# Module connector pipes
# Origins and lengths
FlocModConnectorLowA_Origin := Floc_Origin + [
    -S_FlocBaffle + SocketDepth(ND_FlocMod) + max(0 m, ShortTeeLength(ND_FlocMod) - ElbowRadius(ND_FlocMod));
    S_Fitting + outerradius(ND_FlocMod);
    min(S_FlocModPipeToEdge, Pi_FlocBaffle*S_FlocBaffle/2)
]  # A refers to even-numbered channels. C refers to the first channel. B are odd-numbered channels that are not the first channel.
L_FlocModConnectorLowA := L_Sed - S_FlocBaffle - ConRadius(ND_FlocMod) - ElbowRadius(ND_FlocMod) + SocketDepth(ND_FlocMod) + (ShortTeeLength(ND_FlocMod) - ElbowRadius(ND_FlocMod))
FlocModConnectorLowC_Origin := Floc_Origin + [
    -ConRadius(ND_FlocMod) - ElbowRadius(ND_FlocMod);
    S_Fitting + outerradius(ND_FlocMod) + (N_FlocChannels - 1)*(W_FlocChannel + T_PlantWall);
    min(S_FlocModPipeToEdge, Pi_FlocBaffle*S_FlocBaffle/2)
]
L_FlocModConnectorLowC := L_FlocModConnectorLowA - B_FlocBaffle*(N_FlocChannelBaffles - N_FlocFirstChannelBaffles)
FlocModConnectorMidA_Origin := Floc_Origin + [
    -S_FlocBaffle + SocketDepth(ND_FlocMod) + max(0 m, ElbowRadius(ND_FlocMod) - ShortTeeLength(ND_FlocMod));
    S_Fitting + outerradius(ND_FlocMod);
    (Pi_FlocBaffle*S_FlocBaffle + FlocBaffleLow_Dim[2])/2
]
L_FlocModConnectorMidA := L_Sed - S_FlocBaffle - ConRadius(ND_FlocMod) - ShortTeeLength(ND_FlocMod) + SocketDepth(ND_FlocMod)
FlocModConnectorMidC_Origin := Floc_Origin + [
    -ConRadius(ND_FlocMod) - ShortTeeLength(ND_FlocMod);
    S_Fitting + outerradius(ND_FlocMod) + (N_FlocChannels - 1)*(W_FlocChannel + T_PlantWall);
    (Pi_FlocBaffle*S_FlocBaffle + FlocBaffleLow_Dim[2])/2
]
L_FlocModConnectorMidC := L_FlocModConnectorMidA - B_FlocBaffle*(N_FlocChannelBaffles - N_FlocFirstChannelBaffles)
FlocModConnectorHighA_Origin := [FlocModConnectorLowA_Origin[0]; FlocModConnectorLowA_Origin[1]; Z_FlocTop - H_PlantFreeboard]
L_FlocModConnectorHighA := L_FlocModConnectorLowA
FlocModConnectorHighC_Origin := [FlocModConnectorLowC_Origin[0]; FlocModConnectorLowC_Origin[1]; Z_FlocTop - H_PlantFreeboard]
L_FlocModConnectorHighC := L_FlocModConnectorLowC
FlocModVertPipeLowA_Origin := FlocModConnectorLowA_Origin + [ElbowRadius(ND_FlocMod); 0 m; ElbowRadius(ND_FlocMod)]
FlocModVertPipeLowC_Origin := FlocModConnectorLowC_Origin + [ElbowRadius(ND_FlocMod); 0 m; ElbowRadius(ND_FlocMod)]
L_FlocModVertPipeLow := FlocModConnectorMidA_Origin[2] - FlocModConnectorLowA_Origin[2] - ElbowRadius(ND_FlocMod) - TeeLength(ND_FlocMod)/2
FlocModVertPipeHighA_Origin := FlocModConnectorMidA_Origin + [ShortTeeLength(ND_FlocMod); 0 m; TeeLength(ND_FlocMod)/2]
FlocModVertPipeHighC_Origin := FlocModConnectorMidC_Origin + [ShortTeeLength(ND_FlocMod); 0 m; TeeLength(ND_FlocMod)/2]
L_FlocModVertPipeHigh := FlocModConnectorHighA_Origin[2] - FlocModConnectorMidA_Origin[2] - ElbowRadius(ND_FlocMod) - TeeLength(ND_FlocMod)/2
# Connector pipes in odd-numbered channels (B)
ArrayFlocModYB := ArrayLast(max(N_FlocChannels/2 - 1, 1), 1, 2*(W_FlocChannel + T_PlantWall))
FlocModConnectorsB :=
    local ← view("t")
    for i ∈ 0 .. 2
        PipeLow ← PipeF(FlocModConnectorLowA_Origin + [
            0 m;
            i*(W_FlocChannel - 2*S_Fitting - outerdiameter(ND_FlocMod))/2 + W_FlocChannel + T_PlantWall;
            0 m
        ], L_FlocModConnectorLowA, [0; 0]*deg, ND_FlocMod, PS_Modules)
        PipeMid ← PipeF(FlocModConnectorMidA_Origin + [
            0 m;
            i*(W_FlocChannel - 2*S_Fitting - outerdiameter(ND_FlocMod))/2 + W_FlocChannel + T_PlantWall;
            0 m
        ], L_FlocModConnectorMidA, [0; 0]*deg, ND_FlocMod, PS_Modules)
        PipeHigh ← PipeF(FlocModConnectorHighA_Origin + [
            0 m;
            i*(W_FlocChannel - 2*S_Fitting - outerdiameter(ND_FlocMod))/2 + W_FlocChannel + T_PlantWall;
            0 m
        ], L_FlocModConnectorHighA, [0; 0]*deg, ND_FlocMod, PS_Modules)
        local ← stack(local, PipeLow, ArrayFlocModYB, PipeMid, ArrayFlocModYB, PipeHigh, ArrayFlocModYB)
    return local
FlocModVertPipesB :=
    local ← view("t")
    for i ∈ 0 .. 2
        PipeLow1 ← PipeF(FlocModVertPipeLowA_Origin + [
            0 m;
            i*(W_FlocChannel - 2*S_Fitting - outerdiameter(ND_FlocMod))/2 + W_FlocChannel + T_PlantWall;
            0 m
        ], L_FlocModVertPipeLow, [0; 90]*deg, ND_FlocMod, PS_Modules)
        PipeLow2 ← PipeF(FlocModVertPipeLowA_Origin + [
            -L_FlocModConnectorLowA - 2*ElbowRadius(ND_FlocMod);
            i*(W_FlocChannel - 2*S_Fitting - outerdiameter(ND_FlocMod))/2 + W_FlocChannel + T_PlantWall;
            0 m
        ], L_FlocModVertPipeLow, [0; 90]*deg, ND_FlocMod, PS_Modules)
        PipeHigh1 ← PipeF(FlocModVertPipeHighA_Origin + [
            0 m;
            i*(W_FlocChannel - 2*S_Fitting - outerdiameter(ND_FlocMod))/2 + W_FlocChannel + T_PlantWall;
            0 m
        ], L_FlocModVertPipeHigh, [0; 90]*deg, ND_FlocMod, PS_Modules)
        PipeHigh2 ← PipeF(FlocModVertPipeHighA_Origin + [
            -L_FlocModConnectorLowA - 2*ElbowRadius(ND_FlocMod);
            i*(W_FlocChannel - 2*S_Fitting - outerdiameter(ND_FlocMod))/2 + W_FlocChannel + T_PlantWall;
            0 m
        ], L_FlocModVertPipeHigh, [0; 90]*deg, ND_FlocMod, PS_Modules)
        local ← stack(local, PipeLow1, ArrayFlocModYB, PipeLow2, ArrayFlocModYB, PipeHigh1, ArrayFlocModYB, PipeHigh2, ArrayFlocModYB)
    return local
MirrorFlocModX := MirrorAll([Floc_Origin[0] - L_Sed/2; Floc_Origin[1]], [Floc_Origin[0] - L_Sed/2; Floc_Origin[1] + zc], "y")
FlocModConnectorBScript :=
    stack(FlocModConnectorsB, FlocModVertPipesB, MirrorFlocModX) if N_FlocChannels > 2
    view("t") otherwise
# Connector pipes in first channel (C)
FlocModConnectorsC :=
    local ← view("t")
    for i ∈ 0 .. 2
        PipeLow ← PipeF(FlocModConnectorLowC_Origin + [0 m; i*(W_FlocChannel - 2*S_Fitting - outerdiameter(ND_FlocMod))/2; 0 m], L_FlocModConnectorLowC, [0; 0]*deg, ND_FlocMod, PS_Modules)
        PipeMid ← PipeF(FlocModConnectorMidC_Origin + [0 m; i*(W_FlocChannel - 2*S_Fitting - outerdiameter(ND_FlocMod))/2; 0 m], L_FlocModConnectorMidC, [0; 0]*deg, ND_FlocMod, PS_Modules)
        PipeHigh ← PipeF(FlocModConnectorHighC_Origin + [0 m; i*(W_FlocChannel - 2*S_Fitting - outerdiameter(ND_FlocMod))/2; 0 m], L_FlocModConnectorHighC, [0; 0]*deg, ND_FlocMod, PS_Modules)
        local ← stack(local, PipeLow, PipeMid, PipeHigh)
    return local
FlocModVertPipesC :=
    local ← view("t")
    for i ∈ 0 .. 2
        PipeLow1 ← PipeF(FlocModVertPipeLowC_Origin + [0 m; i*(W_FlocChannel - 2*S_Fitting - outerdiameter(ND_FlocMod))/2; 0 m], L_FlocModVertPipeLow, [0; 90]*deg, ND_FlocMod, PS_Modules)
        PipeLow2 ← PipeF(FlocModVertPipeLowC_Origin + [
            -L_FlocModConnectorLowC - 2*ElbowRadius(ND_FlocMod);
            i*(W_FlocChannel - 2*S_Fitting - outerdiameter(ND_FlocMod))/2;
            0 m
        ], L_FlocModVertPipeLow, [0; 90]*deg, ND_FlocMod, PS_Modules)
        PipeHigh1 ← PipeF(FlocModVertPipeHighC_Origin + [0 m; i*(W_FlocChannel - 2*S_Fitting - outerdiameter(ND_FlocMod))/2; 0 m], L_FlocModVertPipeHigh, [0; 90]*deg, ND_FlocMod, PS_Modules)
        PipeHigh2 ← PipeF(FlocModVertPipeHighC_Origin + [
            -L_FlocModConnectorLowC - 2*ElbowRadius(ND_FlocMod);
            i*(W_FlocChannel - 2*S_Fitting - outerdiameter(ND_FlocMod))/2;
            0 m
        ], L_FlocModVertPipeHigh, [0; 90]*deg, ND_FlocMod, PS_Modules)
        local ← stack(local, PipeLow1, PipeLow2, PipeHigh1, PipeHigh2)
    return local
FlocModConnectorCScript := stack(FlocModConnectorsC, FlocModVertPipesC)
# Connector pipes in even-numbered channels (A)
ArrayFlocModYA := ArrayLast(N_FlocChannels/2, 1, 2*(W_FlocChannel + T_PlantWall))
FlocModConnectorsA :=
    local ← view("t")
    for i ∈ 0 .. 2
        PipeLow ← PipeF(FlocModConnectorLowA_Origin + [0 m; i*(W_FlocChannel - 2*S_Fitting - outerdiameter(ND_FlocMod))/2; 0 m], L_FlocModConnectorLowA, [0; 0]*deg, ND_FlocMod, PS_Modules)
        PipeMid ← PipeF(FlocModConnectorMidA_Origin + [0 m; i*(W_FlocChannel - 2*S_Fitting - outerdiameter(ND_FlocMod))/2; 0 m], L_FlocModConnectorMidA, [0; 0]*deg, ND_FlocMod, PS_Modules)
        PipeHigh ← PipeF(FlocModConnectorHighA_Origin + [0 m; i*(W_FlocChannel - 2*S_Fitting - outerdiameter(ND_FlocMod))/2; 0 m], L_FlocModConnectorHighA, [0; 0]*deg, ND_FlocMod, PS_Modules)
        local ← stack(local, PipeLow, ArrayFlocModYA, PipeMid, ArrayFlocModYA, PipeHigh, ArrayFlocModYA)
    return local
FlocModVertPipesA :=
    local ← view("t")
    for i ∈ 0 .. 2
        PipeLow1 ← PipeF(FlocModVertPipeLowA_Origin + [0 m; i*(W_FlocChannel - 2*S_Fitting - outerdiameter(ND_FlocMod))/2; 0 m], L_FlocModVertPipeLow, [0; 90]*deg, ND_FlocMod, PS_Modules)
        PipeLow2 ← PipeF(FlocModVertPipeLowA_Origin + [
            -L_FlocModConnectorLowA - 2*ElbowRadius(ND_FlocMod);
            i*(W_FlocChannel - 2*S_Fitting - outerdiameter(ND_FlocMod))/2;
            0 m
        ], L_FlocModVertPipeLow, [0; 90]*deg, ND_FlocMod, PS_Modules)
        PipeHigh1 ← PipeF(FlocModVertPipeHighA_Origin + [0 m; i*(W_FlocChannel - 2*S_Fitting - outerdiameter(ND_FlocMod))/2; 0 m], L_FlocModVertPipeHigh, [0; 90]*deg, ND_FlocMod, PS_Modules)
        PipeHigh2 ← PipeF(FlocModVertPipeHighA_Origin + [
            -L_FlocModConnectorLowA - 2*ElbowRadius(ND_FlocMod);
            i*(W_FlocChannel - 2*S_Fitting - outerdiameter(ND_FlocMod))/2;
            0 m
        ], L_FlocModVertPipeHigh, [0; 90]*deg, ND_FlocMod, PS_Modules)
        local ← stack(local, PipeLow1, ArrayFlocModYA, PipeLow2, ArrayFlocModYA, PipeHigh1, ArrayFlocModYA, PipeHigh2, ArrayFlocModYA)
    return local
FlocModConnectorAScript := stack(FlocModConnectorsA, FlocModVertPipesA)
FlocModConnectorScript := stack(FlocModHorizPipeLayer, FlocModConnectorBScript, FlocModConnectorCScript, FlocModConnectorAScript, FlocModHorizPipeFrz)
# Module fittings
# Origins
FlocModElbowLowA_Origin := FlocModConnectorLowA_Origin
FlocModElbowHighA_Origin := FlocModConnectorHighA_Origin
FlocModTeeA_Origin := FlocModConnectorMidA_Origin
FlocModElbowLowC_Origin := FlocModConnectorLowC_Origin
FlocModElbowHighC_Origin := FlocModConnectorHighC_Origin
FlocModTeeC_Origin := FlocModConnectorMidC_Origin
# Floc fittings B (odd-numbered channels not first)
FlocElbowsLowB :=
    local ← view("t")
    for i ∈ 0 .. 2
        Elbow1 ← ElbowF(FlocModElbowLowA_Origin + [
            0 m;
            i*(W_FlocChannel - 2*S_Fitting - outerdiameter(ND_FlocMod))/2 + W_FlocChannel + T_PlantWall;
            0 m
        ], [-90; 0; 90]*deg, ND_FlocMod, PS_Modules)
        Elbow2 ← ElbowF(FlocModElbowLowA_Origin + [
            -L_FlocModConnectorLowA;
            i*(W_FlocChannel - 2*S_Fitting - outerdiameter(ND_FlocMod))/2 + W_FlocChannel + T_PlantWall;
            0 m
        ], [90; 0; -90]*deg, ND_FlocMod, PS_Modules)
        local ← stack(local, Elbow1, ArrayFlocModYB, Elbow2, ArrayFlocModYB)
    return local
FlocTeesB :=
    local ← view("t")
    for i ∈ 0 .. 2
        Tee1 ← TeeF(FlocModTeeA_Origin + [
            0 m;
            i*(W_FlocChannel - 2*S_Fitting - outerdiameter(ND_FlocMod))/2 + W_FlocChannel + T_PlantWall;
            0 m
        ], [90; 0; 90]*deg, ND_FlocMod, PS_Modules)
        Tee2 ← TeeF(FlocModTeeA_Origin + [
            -L_FlocModConnectorMidA;
            i*(W_FlocChannel - 2*S_Fitting - outerdiameter(ND_FlocMod))/2 + W_FlocChannel + T_PlantWall;
            0 m
        ], [-90; 0; 90]*deg, ND_FlocMod, PS_Modules)
        local ← stack(local, Tee1, ArrayFlocModYB, Tee2, ArrayFlocModYB)
    return local
FlocElbowsHighB :=
    local ← view("t")
    for i ∈ 0 .. 2
        Elbow1 ← ElbowF(FlocModElbowHighA_Origin + [
            0 m;
            i*(W_FlocChannel - 2*S_Fitting - outerdiameter(ND_FlocMod))/2 + W_FlocChannel + T_PlantWall;
            0 m
        ], [-90; 0; 90]*deg, ND_FlocMod, PS_Modules)
        Elbow2 ← ElbowF(FlocModElbowHighA_Origin + [
            -L_FlocModConnectorHighA;
            i*(W_FlocChannel - 2*S_Fitting - outerdiameter(ND_FlocMod))/2 + W_FlocChannel + T_PlantWall;
            0 m
        ], [90; 0; 90]*deg, ND_FlocMod, PS_Modules)
        local ← stack(local, Elbow1, ArrayFlocModYB, Elbow2, ArrayFlocModYB)
    return local
FlocFittingBScript :=
    stack(FlocElbowsLowB, FlocTeesB, FlocElbowsHighB, MirrorFlocModX) if N_FlocChannels > 2
    view("t") otherwise
# Floc fittings C (first channel)
FlocElbowsLowC :=
    local ← view("t")
    for i ∈ 0 .. 2
        Elbow1 ← ElbowF(FlocModElbowLowC_Origin + [0 m; i*(W_FlocChannel - 2*S_Fitting - outerdiameter(ND_FlocMod))/2; 0 m], [-90; 0; 90]*deg, ND_FlocMod, PS_Modules)
        Elbow2 ← ElbowF(FlocModElbowLowC_Origin + [-L_FlocModConnectorLowC; i*(W_FlocChannel - 2*S_Fitting - outerdiameter(ND_FlocMod))/2; 0 m], [90; 0; -90]*deg, ND_FlocMod, PS_Modules)
        local ← stack(local, Elbow1, Elbow2)
    return local
FlocTeesC :=
    local ← view("t")
    for i ∈ 0 .. 2
        Tee1 ← TeeF(FlocModTeeC_Origin + [0 m; i*(W_FlocChannel - 2*S_Fitting - outerdiameter(ND_FlocMod))/2; 0 m], [90; 0; 90]*deg, ND_FlocMod, PS_Modules)
        Tee2 ← TeeF(FlocModTeeC_Origin + [-L_FlocModConnectorMidC; i*(W_FlocChannel - 2*S_Fitting - outerdiameter(ND_FlocMod))/2; 0 m], [-90; 0; 90]*deg, ND_FlocMod, PS_Modules)
        local ← stack(local, Tee1, Tee2)
    return local
FlocElbowsHighC :=
    local ← view("t")
    for i ∈ 0 .. 2
        Elbow1 ← ElbowF(FlocModElbowHighC_Origin + [0 m; i*(W_FlocChannel - 2*S_Fitting - outerdiameter(ND_FlocMod))/2; 0 m], [-90; 0; -90]*deg, ND_FlocMod, PS_Modules)
        Elbow2 ← ElbowF(FlocModElbowHighC_Origin + [-L_FlocModConnectorHighC; i*(W_FlocChannel - 2*S_Fitting - outerdiameter(ND_FlocMod))/2; 0 m], [90; 0; 90]*deg, ND_FlocMod, PS_Modules)
        local ← stack(local, Elbow1, Elbow2)
    return local
FlocFittingCScript := stack(FlocElbowsLowC, FlocTeesC, FlocElbowsHighC)
# Floc fittings A (even-numbered channels)
FlocElbowsLowA :=
    local ← view("t")
    for i ∈ 0 .. 2
        Elbow1 ← ElbowF(FlocModElbowLowA_Origin + [0 m; i*(W_FlocChannel - 2*S_Fitting - outerdiameter(ND_FlocMod))/2; 0 m], [-90; 0; 90]*deg, ND_FlocMod, PS_Modules)
        Elbow2 ← ElbowF(FlocModElbowLowA_Origin + [-L_FlocModConnectorLowA; i*(W_FlocChannel - 2*S_Fitting - outerdiameter(ND_FlocMod))/2; 0 m], [90; 0; -90]*deg, ND_FlocMod, PS_Modules)
        local ← stack(local, Elbow1, ArrayFlocModYA, Elbow2, ArrayFlocModYA)
    return local
FlocTeesA :=
    local ← view("t")
    for i ∈ 0 .. 2
        Tee1 ← TeeF(FlocModTeeA_Origin + [0 m; i*(W_FlocChannel - 2*S_Fitting - outerdiameter(ND_FlocMod))/2; 0 m], [90; 0; 90]*deg, ND_FlocMod, PS_Modules)
        Tee2 ← TeeF(FlocModTeeA_Origin + [-L_FlocModConnectorMidA; i*(W_FlocChannel - 2*S_Fitting - outerdiameter(ND_FlocMod))/2; 0 m], [-90; 0; 90]*deg, ND_FlocMod, PS_Modules)
        local ← stack(local, Tee1, ArrayFlocModYA, Tee2, ArrayFlocModYA)
    return local
FlocElbowsHighA :=
    local ← view("t")
    for i ∈ 0 .. 2
        Elbow1 ← ElbowF(FlocModElbowHighA_Origin + [0 m; i*(W_FlocChannel - 2*S_Fitting - outerdiameter(ND_FlocMod))/2; 0 m], [-90; 0; -90]*deg, ND_FlocMod, PS_Modules)
        Elbow2 ← ElbowF(FlocModElbowHighA_Origin + [-L_FlocModConnectorHighA; i*(W_FlocChannel - 2*S_Fitting - outerdiameter(ND_FlocMod))/2; 0 m], [90; 0; 90]*deg, ND_FlocMod, PS_Modules)
        local ← stack(local, Elbow1, ArrayFlocModYA, Elbow2, ArrayFlocModYA)
    return local
FlocFittingAScript := stack(FlocElbowsLowA, FlocTeesA, FlocElbowsHighA)
FlocModFittingScript := stack(FlocModFittingLayer, FlocFittingBScript, FlocFittingCScript, FlocFittingAScript, FlocModFittingFrz)
# Rapid Mix Components
FlocRMLayer := layer_new("FlocRMCouplingPlu", green)
DrawFlocRMCoupling := CouplingSUBF(FlocCoupling_Origin, [270; 0]*deg, ND_RMPipe, PS_Default, ["FlocTankCon"])  # FlocModPipeFrz
FreezeFlocRMCoupling := FreezeLayer("FlocRMCouplingPlu")
# Orifice Plate
LayerRMOrificePlate := layer_new("FlocRmOrificePlate", red)
D_RMOrifice := D_PipeED(E_MaxRM, Q_Plant, Pi_VenaContractaOrifice, Pi_JetRound)
RMOrificePlate := CylinderF([
    FlocCoupling_Origin[0];
    Floc_Origin[1] + N_FlocChannels*W_FlocChannel + (N_FlocChannels - 1)*T_FlocChannelWall - L_FlocCouplingExt + SocketDepth(ND_RMPipe);
    FlocCoupling_Origin[2]
], outerradius(ND_RMPipe), T_RMOrificePlate, [90; 0; 0]*deg)
FreezeRMOrificePlate := FreezeLayer("FlocRmOrificePlate")
RMOrifice := CylinderF([
    FlocCoupling_Origin[0];
    Floc_Origin[1] + N_FlocChannels*W_FlocChannel + (N_FlocChannels - 1)*T_FlocChannelWall - L_FlocCouplingExt + SocketDepth(ND_RMPipe);
    FlocCoupling_Origin[2]
], D_RMOrifice/2, T_RMOrificePlate, [90; 0; 0]*deg)
SubtractRMOrifice := SubtractF(["FlocRmOrificePlate"], "DeleteMe")
RMOrificePlateScript := stack(LayerRMOrificePlate, RMOrificePlate, FreezeRMOrificePlate, RMOrifice, GroupDelete, SubtractRMOrifice)
FlocRMPlateHolderLayer := layer_new("FlocRmPlateHolder", red)
RMOrificePlateHolderStub := PipeF([
    FlocCoupling_Origin[0];
    Floc_Origin[1] + N_FlocChannels*W_FlocChannel + (N_FlocChannels - 1)*T_FlocChannelWall - L_FlocCouplingExt + SocketDepth(ND_RMPipe) - T_RMOrificePlate;
    FlocCoupling_Origin[2]
], SocketDepth(ND_RMPipe), [90; 0; 0]*deg, ND_RMPipe, PS_Default)
FlocRmPlateHolderFrz := FreezeLayer("FlocRmPlateHolder")
# Orifice Plate Rod
D_RMOrificePlateRod := 3/8*in
OrificePlateRodLayer := layer_new("FlocOrificePlateRod", black)
OrificePlateRod := CylinderF([
    FlocCoupling_Origin[0];
    Floc_Origin[1] + N_FlocChannels*W_FlocChannel + (N_FlocChannels - 1)*T_FlocChannelWall - L_FlocCouplingExt/2;
    FlocCoupling_Origin[2] + ConRadius(ND_RMPipe) + zc
], D_RMOrificePlateRod, OuterDiameterFittingPVC(ND_RMPipe) + 2*zc, [0; 270; 0]*deg)
FreezeOrificePlateRod := FreezeLayer("FlocOrificePlateRod")
SubtractOrificePlateRodCoupling := SubtractF(["FlocRMCouplingPlu"], "DeleteMe")
SubtractOrificePlateRodPipe := SubtractF(["FlocRmPlateHolder"], "DeleteMe")
OrificePlateRodScript := stack(OrificePlateRod, GroupDelete, SubtractOrificePlateRodCoupling, OrificePlateRod, GroupDelete, SubtractOrificePlateRodPipe, OrificePlateRodLayer, OrificePlateRod, FreezeOrificePlateRod)
FlocRMScript := stack(FlocRMLayer, DrawFlocRMCoupling, FreezeFlocRMCoupling, RMOrificePlateScript, FlocRMPlateHolderLayer, RMOrificePlateHolderStub, FlocRmPlateHolderFrz, OrificePlateRodScript)
W_TrainWalkway := 1.5 m
ThawAll := ThawMultiple(["Floc*Con"])
MirrorFlocTank := Mirror3dAll("yz", [Floc_Origin[0] - L_Floc - W_PlantDC/2 - T_PlantWall; 0 m], "n")
FreezeAll := FreezeMultiple(["Floc*Con"])
AC_FlocTank := stack(FlocMasonryScript, FlocBaffleScript, FlocModConnectorScript, FlocModFittingScript)
# [component: inputs AC_FlocTank]
