Q_Plant := 30*L/s
# [reference: ExpertInputs.xmcd]
# [reference: MathFunctions.xmcd]
# [reference: PipeDatabase.xmcd]
# [reference: MaterialsDatabase.xmcd]
# [reference: FluidsFunctions.xmcd]
# [reference: CdcFunctions.xmcd]
# [reference: SedimentationTank.xmcd]
# [reference: LFOM.xmcd]
# Design Algorithm steps
# Calculate the total volume of flocculator given head loss and collision potential
# Calculate the number of channels by taking the total width and dividing by the maximum channel width
# Calculate the channel width (total width over number of channels)
# Calculate the minimum number of obstacles and spacing between obstacles by assuming a maximum H/S ratio
# Use the actual H/S ratio based on obstacle spacing to calculate the spacing between baffles
# Calculate the obstacle width to obtain the same jet expansion conditions as produced by the 180 degree bend.
#
# This algorithm does not yet handle the integer number of baffles in a channel or the thickness of the baffles.
Pi_VCBaffle := 1/(sqrt(K_FlocBaffle) + 1) = 0.387426
W_FlocChannelMinBod := W_SedPlate/2
W_FlocChannelMaxBod := W_SedPlate
T_FlocBaffle := T_SedPlate
# Entrance tank
S_EtPlate := S_SedPlate
# The design of the plate settler unit is a function of the channel width. Here the entrance tank lengths are defined in terms of the channel width. The flocculator design then uses the worst case of the minimum flocculator channel width in its preliminary assumption of how much volume the entrance tank will take up.
# Single drain pipe diameter
ND_EtDrain := D_pipeschedule(Q_Plant, PS_Default, 2 m, 2 m, Nu_Water, E_Pvc, K_PipeEnt + K_PipeExit + K_El90) = 4 in
# Plate settler unit
N_EtPlates(W_Channel) := ceil(sqrt(Q_Plant/((S_EtPlate + T_SedPlate)*W_Channel*V_EtCapture*sin(AN_EtPlate))))
# Number of plates that minimizes total length of the plate settler unit.
L_EtPlate(W_Channel) := Ceil(Q_Plant/(N_EtPlates(W_Channel)*W_Channel*V_EtCapture*cos(AN_EtPlate)) - S_EtPlate*tan(AN_EtPlate), 10 cm)
# Length calculations
L_EtTopPlateExtension := HL_Lfom/sin(AN_EtPlate) + 5 cm = 0.28094 m
L_EtWallToPlate := ConRadius(ND_EtDrain) + S_Fitting + outerradius(ND_EtDrain) = 0.171444 m
L_EtBackWallToLfom := max(2*S_Fitting, ElbowRadius(ND_RMPipe) + SocketDepth(ND_RMPipe) + CouplingLength(ND_RMPipe) - T_PlantWall - outerradius(ND_RMPipe)) = 0.432041 m
L_EtFrontWallToLfom(W_Channel) := L_EtWallToPlate + (L_EtPlate(W_Channel) + L_EtTopPlateExtension)*cos(AN_EtPlate) + T_SedPlate*sin(AN_EtPlate)
L_Et(W_Channel) := L_EtFrontWallToLfom(W_Channel) + outerdiameter(ND_RMPipe) + L_EtBackWallToLfom
# Flocculator efficiency
# It might be reasonable to allow for some Π.HS values that are greater than the value calculated above especially since the efficiency won't be affected that quickly. I think we need to have a slighly higher maximum H/S ratio so that creating a viable design is always possible.
Π_HSMin := 3
Π_HSMax := 6
α_ε := 2  # Define this for all subsequent analysis because we are assuming that our design will be in the high efficiency range.
α_ψ := 1/α_ε^(1/6) = 0.890899
# Required volume based on target head loss and collision potential
HL_Floc := 40 cm
# Calculate average energy dissipation rate from the target head loss.
ε_Ave := (g*HL_Floc/(CP_FlocBod*α_ε^(1/6)))^(3/2)
ε_Max := ε_Ave*α_ε
θ_FlocMin := CP_FlocBod/(ε_Ave^(1/3)*α_ψ) = 6.49992 min
Vol_FlocMin := Q_Plant*θ_FlocMin
# We can compare this design to traditional design values.
G_Ave := sqrt(ε_Ave/Nu_Water) = 100.291 1/s
Z_FlocBottom := Plant_Origin[2] + T_FlocSlab
HW_FlocEnd := ZW_SedInletChannel - Z_FlocBottom
# The channel width is contrained by the minimum constructable width (1/2 sheet), the maximum width (full baffle sheet) and by the minimum width that achieves an H/S ratio greater than 3.
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# The channel width must be greater than 1/2 of the plate width and greater than the minimum width to achieve a Π.HS>3.
W_FlocChannelMin := max(Π_HSMin*(K_FlocBaffle/(2*HW_FlocEnd*ε_Ave))^(1/3)*Q_Plant/HW_FlocEnd, W_FlocChannelMinBod) = 0.53 m
# The envelope created by these two curves represents the possible design space. Now we can optimize the channel width based on the length and the target flocculator volume.
#
# We determined years ago with cost analysis that it makes more sense to minimize the number of channels and the plan view area of the flocculator rather than trying to maximize the use of the polycarbonate baffle material.
#
# The number of channels calculation will need to modified if part of the first flocculator channel is used for grit removal.
#
# Now we calculate the minimum number of channels given the total flocculator width and the maximum channel width. We round up because otherwise we would occasionally require channels that are wider than a polycarbonate sheet.
L_Floc := L_Sed
L_EtMax := L_Et(W_FlocChannelMin) = 1.46954 m
N_FlocChannels := Ceil((Vol_FlocMin/(W_FlocChannelMaxBod*HW_FlocEnd) + L_EtMax + 2*W_SedInletChannelPreWeir)/L_Floc, 2) = 2
# The max function is required to make sure that we don't specify a channel narrower than the minimum width for the very low flow rates where the length of the sedimentation tank is longer than is required for the flocculator.
# The factor of 1.1 was added to account for the fact that due to the integer number of baffles in each channel, the real baffle spacing S needs to be slightly larger than the theoretical calculated value. For many designs the actual baffle spacing results in an H/S ratio under 3, which is out of the efficient range. By making the channel slightly wider than needed it allows a smaller baffle spacing and keeps the geometry efficient for all designs, and provides extra collision potential to compensate for additional inactive space following the entrance tank at the beggining of the flocculator and before the sedimentation tank channel entrance at the end.
W_FlocChannelCP := Ceil(Vol_FlocMin/(HW_FlocEnd*(N_FlocChannels*L_Floc - L_EtMax - 2*W_SedInletChannelPreWeir)), 1 cm) = 0.67 m
W_FlocChannel := max(W_FlocChannelCP, W_FlocChannelMin) = 0.67 m
L_Et := L_Et(W_FlocChannel) = 1.41954 m
# Our design falls in the middle of the available design envelope. It is possible that for low flow rates plants the flocculator wouldn't even need to be as long as one sed tank. We will get some design failures for very high flow rates where the minimum and the maximum channel widths converge because the number of channels must be an integer.
# Find the maximum distance between obstacles. In this analysis H is the distance between obstacles rather than the depth of water.
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H_FlocObstacleMax := (K_FlocBaffle/(2*ε_Ave))^(1/4)*(Π_HSMax*Q_Plant/W_FlocChannel)^(3/4) = 1.24593 m
# Find the minimum number of expansions per baffle space.
N_FlocSpaceExpansions := ceil(HW_FlocEnd/H_FlocObstacleMax) = 2
# This number of obstacles includes the expansion created by the baffle. Calculate the distance between expansions.
H_FlocObs := HW_FlocEnd/N_FlocSpaceExpansions = 0.752329 m
# Now we can calculate the spacing between baffles. Note that in this equation we now use the distance between expansions as calculated above rather than the water depth for H.
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S_FlocBaffleMin := (K_FlocBaffle/(2*H_FlocObs*ε_Ave))^(1/3)*(Q_Plant/W_FlocChannel) = 0.245682 m
N_FlocChannelSpaces := Ceil((L_Floc + T_FlocBaffle)/(S_FlocBaffleMin + T_FlocBaffle), 2) = 28
N_FlocChannelBaffles := N_FlocChannelSpaces - 1
S_FlocBaffle := (L_Floc - N_FlocChannelBaffles*T_FlocBaffle)/N_FlocChannelSpaces = 0.243748 m
Pi_HS := H_FlocObs/S_FlocBaffle = 3.0865
N_FlocFirstChannelSpaces := Floor((L_Floc - L_Et + T_FlocBaffle)/(S_FlocBaffle + T_FlocBaffle) + 1, 2) - 1 = 21
N_FlocFirstChannelBaffles := N_FlocFirstChannelSpaces
N_FlocLastChannelSpaces := Floor((L_Floc - W_SedInletChannelPreWeir + T_FlocBaffle)/(S_FlocBaffle + T_FlocBaffle), 2) = 26
N_FlocLastChannelBaffles := N_FlocLastChannelSpaces
N_FlocSpaces := N_FlocFirstChannelSpaces + N_FlocLastChannelSpaces + N_FlocChannelSpaces*(N_FlocChannels - 2) = 47
N_FlocExpansions := N_FlocSpaces*N_FlocSpaceExpansions = 94
# Obstacle design
# The obstacles will block the flow such that the contraction occupies Pi_VCBaffle = 0.387426of the width of the space between the baffles.
W_FlocObstacleWake := S_FlocBaffle*(1 - Pi_VCBaffle) = 5.8785 in
# For half pipes, assume there is no vena contracta, so the un-blocked space should be equal to the width of the jet following the turn around a plate. The obstacles are the same for upflow and downflow spaces.
ND_FlocObs :=
    i ← 0
    ND_Obs ← AvailND[i]
    while W_FlocObstacleWake > 2*outerradius(ND_Obs)
        i ← i + 1
        ND_Obs ← AvailND[i]
    return ND_Obs
ND_FlocObs = 6 in
# Next calculate the collision potential per obstacle and total flocculator collision potential.
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CP_FlocObs := (K_FlocBaffle^2*H_FlocObs^4/(4*α_ε))^(1/6) = 0.793847 m^(2/3)
CP_Floc := N_FlocExpansions*CP_FlocObs = 74.6216 m^(2/3)
# The number of baffles required is substantially fewer than with our previous design. We are getting much more collision potential per baffle with this new design. In our previous designs the number of baffles INCREASED as the flow rate decreased due to the inefficiency at low flow rates. This new design has a reduction in the number of baffles as the flow rate decreases. If we can add obstacles that cost less than a baffle, then this new design will be very cost effective.
#
# The fluid velocity is a traditional design target and thus we can compare our design with tradition.
V_Floc := Q_Plant/(S_FlocBaffle*W_FlocChannel) = 0.183698 m/s
V_MaxSchulz := 0.3*m/s
V_Max10State := 1.5*ft/s = 0.4572 m/s
V_MinSchulz := 0.1*m/s
V_Min10State := 0.5*ft/s = 0.1524 m/s
# Head loss calculations to confirm that we are getting the head loss that we set initially.
HL_FlocCheck := K_FlocBaffle*V_Floc^2/(2*g)*N_FlocExpansions = 0.404321 m
# All of the designs generate the target head loss.
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HL := CP_FlocBod*ε_Ave^(2/3)*α_ε^(1/6)/g = 0.4 m
# Now we check to see if the design contraints meet the H/S ratio.
Π_HSCheck := H_FlocObs/S_FlocBaffle = 3.0865
