Mod := 0
Q_Plant := .8*L/s
# Need to change this in the design file first!
# [reference: ExpertInputs.xmcd]
# [reference: MathFunctions.xmcd]
# [reference: PipeDatabase - may.xmcd]
# [reference: PipeDatabase.xmcd]
# [reference: MaterialsDatabase.xmcd]
# [reference: FluidsFunctions.xmcd]
# [reference: SedTankFunctions.xmcd]
# [reference: CdcFunctions.xmcd]
# [reference: LfomFunctions.xmcd]
# [reference: SedimentationTank.xmcd]
# [reference: Flocculator.xmcd]
# [reference: LFOM.xmcd]
# [reference: EntranceTank.xmcd]
# [reference: SRSFmrf222TEST.xmcd]
# [reference: LMFSRSF_mrf222.xmcd]
# [reference: LinearCdc.xmcd]
# [reference: ChemStorageTanks.xmcd]
# These are the codes that take MathCAD outputs and create AutoCAD scripts that are used to draw the plant (formerly Basics)
# [reference: MtoATranslators.xmcd]
# The wrapped MtoA translator contains the functions that the user will want to access. These functions will draw pieces with full functionality - specifying the location, dimension, and orientation of the object. Also, it contains layer control and subtraction capabilities for grouped objects.
# [reference: MtoATranslatorsWrapped.xmcd]
# [reference: ChannelF.xmcd]
# [reference: PlumbingF May.xmcd]
# from May's folder
# [reference: PlumbingF.xmcd]
# [reference: TankF.xmcd]
# [reference: StairsF.xmcd]
# [reference: DrainChannelF.xmcd]
# AutoCAD Script Files:
# [reference: FlocculatorAC.xmcd]
# [reference: SedTankRemoveBotSlab.xmcd]
# [reference: EntranceTankAC.xmcd]
# [reference: ChemStockTanksAC.xmcd]
# Low Flow Stacked Rapid Sand Filter for Application in low range of medium flow plants
# Origins
# Plant origin probably needs to be the edge of the sed tank
FiInletChannel_Origin := [
    Plant_Origin[0] - L_Sed + L_FiInletChannel;
    Plant_Origin[1] - 2*T_PlantWall - W_FiInletChannel;
    Z_FiInletChannelBottom
]  # We may want to put in a front box as in the SRSF.
FiPipe_Origin := [
    Tank_Origin[0] - L_Wall + ConRadius(ND_FiInlet) + L_FiPipeToOutletVertCenterLine*cos(AN_FiIn) + S_Fitting/4;
    FlowDistributionTank_Origin[1] + L_FiDistTank - 2*ConRadius(ND_FiInlet) - outerradius(ND_FiPipe) - 1.5*S_Fitting;
    Tank_Origin[2] + H_Wall + T_FiCap + T_Flange + T_TankWall + FiLift
]  # error: This variable is undefined.
# This is defined below in the Filter Body section.
FiPipe_Origin := FiInletChannel_Origin
Fi_origin := [
    FiInletChannel_Origin[0] - L_FiInletChannel + S_Fitting + ConRadius(ND_FiManPipe);
    FiInletChannel_Origin[1] + S_Fitting + ConRadius(ND_FiManPipe) - 3*ElbowRadius(ND_FiManPipe) - 4*SocketDepth(ND_FiManPipe) - SocketDepth(ND_FiManTrunk) - L_FiBallValve*ND_FiManTrunk/(2 in) + ValveSocket(ND_FiManTrunk) - L_FiOuterBulkFitting*ND_FiManTrunk/(1 in) - L_FiManTrunk/2 - (.0042 m*(ND_FiManTrunk/(1 in)));
    Z_FiBottom
]
# correction of angles
L_FiPipeInHalf := BulkheadThreadLength(ND_FiManTrunk) - L_FiManBulkheadOffset + BallValveLength(ND_FiManTrunk) - BallValveSocket(ND_FiManTrunk) + 2*SocketDepth(ND_FiInlet) + 2*SocketDepth(ND_FiManTrunk)
L_FiPipeInRest := 2*ElbowRadius(ND_FiInlet) + 2*SocketDepth(ND_FiInlet) + ElbowRadius(ND_FiInlet) + innerdiameter(ND_FiPipe, PS_Fi)/2
L_FiPipeToInletVertCenterLine := L_FiPipeInHalf + L_FiPipeInRest = 0.798154 m
L_FiPipeToOutletVertCenterLine := (cos(AN_FiIn)*L_FiPipeToInletVertCenterLine + S_Fitting + 2*ConRadius(ND_FiInlet))/cos(AN_FiIn)
X_OutletOffset := -L_FiPipeToOutletVertCenterLine*cos(AN_FiIn) + L_FiPipeToOutletVertCenterLine = 0.0289753 m
Y_OutletOffset := L_FiPipeToOutletVertCenterLine*sin(AN_FiIn) = 0.233397 m
X_InletOffset := -L_FiPipeToInletVertCenterLine*cos(AN_FiIn) + L_FiPipeToInletVertCenterLine = 0.0242292 m
Y_InletOffset := -(L_FiPipeToInletVertCenterLine*sin(AN_FiIn))
AN_Bw := 215 deg
AN_BwMod := AN_Bw - 180 deg = 35 deg  # Check this ASAP!
L_FiBwVertCenterLine := (L_FiPipeToInletVertCenterLine*cos(AN_FiIn) - (2*S_Fitting + ConRadius(ND_FiBwDrain) + T_Et + ConRadius(ND_FiInlet)))/cos(AN_BwMod)  # error: This variable is undefined.
# Storage Tank, Entrance Tank, Distribution Channel
ND_FiInlet := ND_FiPipe  # Not sure!
ND_FiDrainValve := ND_FiPipe
FiLift := 1.07*(ShortTeeLength(ND_FiInlet) + 2*SocketDepth(ND_FiInlet) + 2*SocketDepth(ND_FiDrainValve) + BallValveLength(ND_FiDrainValve))
Tank_Origin := [0; 0; 0]*m
# From India 3
# Need to go through that file to try to figure out how these are determined, and if they should even be used here!
W_ChemPlatform := 1.272 m
# Not sure... made up
# The chlorine things?
H_DistChanAboveFi := .2 m  # What are these about??
H_DistChanBottomToEt := .1 m
H_DrainChannel := .3 m
# What is transmission?
H_Freeboard := H_PlantFreeboard
T_TankWall := T_PlantWall
# Do we even want this? We want a pipe.
FlowDistributionTank_Origin := Tank_Origin + [-L_Wall + W_FiDistTank; 0; H_Wall + H_DistChanAboveFi + T_Floor + FiLift]
# Do we want flow metering?
FlowMeteringTank_Origin := [Tank_Origin[0]; Tank_Origin[1]; FlowDistributionTank_Origin[2] + H_DistChanBottomToEt]
RoomLyr := layer_new("Room", grey)
Room := Tank(Tank_Origin + [0; 0; H_Wall + T_TankWall], [L_Wall + L_Cantilever; W_Wall; H_Room], T_TankWall)
# In India, T.TankWall is 25 cm
# We probably don't need this!
HatchLedge := BoxF([-(W_ChemPlatform*3/4); W_Wall - 1.05*ConRadius(ND_FiInlet) - S_Fitting; H_Wall] + Tank_Origin, [
    -(W_ChemPlatform*5/4);
    W_Wall - 1.05*ConRadius(ND_FiInlet) - S_Fitting - S_Walkway;
    H_Wall + T_TankWall + S_Fitting
] + Tank_Origin, [0; 0; 0]*deg)
RoomFrz := FreezeLayer("Room")
HatchLedgeCut := BoxF([-(W_ChemPlatform*3/4) - 10 cm; W_Wall - 1.05*ConRadius(ND_FiInlet) - 3*S_Fitting; H_Wall] + Tank_Origin, [
    -(W_ChemPlatform*5/4) + 10 cm;
    W_Wall - 1.05*ConRadius(ND_FiInlet) - S_Walkway + S_Fitting;
    H_Wall + T_TankWall + S_Fitting
] + Tank_Origin, [0; 0; 0]*deg)
DrainWedge := WedgeF([-L_Wall + ConRadius(ND_SystemDrain) + outerradius(ND_SystemDrain); W_Wall; H_Wall + T_TankWall] + Tank_Origin, [
    -L_Wall + 3*ConRadius(ND_SystemDrain) + outerradius(ND_SystemDrain);
    W_Wall - 2*outerradius(ND_SystemDrain);
    H_Wall + T_TankWall - outerradius(ND_SystemDrain)
] + Tank_Origin, [270; 0; 0]*deg)
SubtractDrainWedge := SubtractF(["Room"], "DeleteMe")
HatchLyr := layer_new("StorageHatch", ltgrey)
HatchBox := BoxSUBF([
    -(W_ChemPlatform*3/4) - 5 cm;
    W_Wall - 1.05*ConRadius(ND_FiInlet) - 2*S_Fitting;
    H_Wall + T_TankWall + S_Fitting
] + Tank_Origin, [-(W_ChemPlatform*5/4) + 5 cm; W_Wall - 1.05*ConRadius(ND_FiInlet) - S_Walkway; H_Wall + T_TankWall] + Tank_Origin, [0; 0; 0]*deg, ["Room"])
HatchFrz := FreezeLayer("StorageHatch")
DoorLyr := layer_new("Door", red)
DoorBox := BoxSUBF([-W_ChemPlatform; W_Wall; H_Wall + T_TankWall + 6 cm] + Tank_Origin, [-W_ChemPlatform/2; T_TankWall + W_Wall; H_Wall + T_TankWall + 6.5 ft] + Tank_Origin, [0; 0; 0]*deg, ["Room"])
Z_DoorTop := Tank_Origin[2] + H_Wall + T_TankWall + 6.5 ft
DoorFrz := FreezeLayer("Door")
Door := stack(DoorLyr, DoorBox, DoorFrz)
StorageTankLyr := layer_new("StorageTank", grey)
6.5 ft = 1981.2 mm
FiTank := Tank(Tank_Origin, [L_Wall; W_Wall; H_Wall], T_TankWall)  # What is up with the chlorine contact stuff? Propably not used here.
FiTankWeir := BoxF([0; W_Wall - W_ChlorineContact; 0] + Tank_Origin, [-L_Wall; W_Wall - W_ChlorineContact - 15 cm; H_ChlorineContactWeir] + Tank_Origin, [0; 0; 0]*deg)
StorageTanksFrz := FreezeLayer("StorageTank")
FlowMeteringTankLyr := layer_new("FlowMeteringTank", grey)
FlowMeteringTank := Tank(FlowMeteringTank_Origin, [L_Et; W_Et; H_Et], T_Et)  # Do we need the flow metering?
FlowMeteringTankFrz := FreezeLayer("FlowMeteringTank")
BaffleLyr := layer_new("Baffle", purple)
Baffle := BoxSUBF([-2*(S_Fitting/4 + ConRadius(ND_EtOverflow)); -S_Fitting; 1.5*S_Fitting] + FlowMeteringTank_Origin, [-2*(S_Fitting/4 + ConRadius(ND_EtOverflow)) - T_SedWeir; W_Et + S_Fitting; H_Et] + FlowMeteringTank_Origin, [0; 0; 0]*deg, ["FlowMeteringTank"])
BaffleFrz := FreezeLayer("Baffle")
EtOverflowCoupling_Origin := [-ConRadius(ND_EtOverflow); ConRadius(ND_EtOverflow); -SocketDepth(ND_EtOverflow)] + FlowMeteringTank_Origin
EtOverflowElbowUnder_Origin := [
    EtOverflowCoupling_Origin[0];
    EtOverflowCoupling_Origin[1];
    FlowDistributionTank_Origin[2] - max(CouplingLength(ND_RMPipe), T_Et) - 2*SocketDepth(ND_RMPipe) - ElbowRadius(ND_RMPipe)
]
EtOverflowDrainElbow_Origin := [
    FlowDistributionTank_Origin[0] - S_Fitting - ConRadius(ND_EtOverflow) - ElbowRadius(ND_EtOverflow);
    EtOverflowElbowUnder_Origin[1];
    -2*ElbowRadius(ND_EtOverflow) + EtOverflowElbowUnder_Origin[2]
]
EtOverflowDrainFitLyr := layer_new("EtOverflowDrainFittings", green)
EtOverflowCoupling := CouplingSUBF(EtOverflowCoupling_Origin, [0; 270; 0]*deg, ND_EtOverflow, PS_Fi, ["FlowMeteringTank"])
EtOverflowElbowUnder := ElbowF(EtOverflowElbowUnder_Origin, [0; 0; 270]*deg, ND_EtOverflow, PS_Fi)
EtOverflowDrainElbow := ElbowF(EtOverflowDrainElbow_Origin, [180; 0; 270]*deg, ND_EtOverflow, PS_Fi)
EtOverflowDrainFitFrz := FreezeLayer("EtOverflowDrainFittings")
EtOverflowDrainFit := stack(EtOverflowDrainFitLyr, EtOverflowCoupling, EtOverflowElbowUnder, EtOverflowDrainElbow, EtOverflowDrainFitFrz)
EtOverflowDrainPipeLyr := layer_new("EtOverflowDrainPipes", blue)
L_EtOverflowPipe := SocketDepth(ND_EtOverflow) + H_Et - H_Freeboard + HL_EtOverflow/2
EtOverflowPipe := PipeF(EtOverflowCoupling_Origin, L_EtOverflowPipe, [0; 90; 0]*deg, ND_EtOverflow, PS_Fi)
L_EtOverflowPipeUnder := EtOverflowCoupling_Origin[2] - CouplingLength(ND_EtOverflow) + 2*SocketDepth(ND_EtOverflow) - EtOverflowElbowUnder_Origin[2]
EtOverflowPipeUnder := PipeSUBF(EtOverflowCoupling_Origin + [0; 0; -CouplingLength(ND_EtOverflow) + 2*SocketDepth(ND_EtOverflow)], L_EtOverflowPipeUnder, [0; 270; 0]*deg, ND_EtOverflow, PS_Fi, ["FlowMeteringTank"])
L_EtOverflowPipeWall := EtOverflowElbowUnder_Origin[0] - EtOverflowDrainElbow_Origin[0] - 2*ElbowRadius(ND_EtOverflow)
EtOverflowPipeWall := PipeF(EtOverflowElbowUnder_Origin + [-ElbowRadius(ND_EtOverflow); 0; -ElbowRadius(ND_EtOverflow)], L_EtOverflowPipeWall, [0; 0; 0]*deg, ND_EtOverflow, PS_Fi)
L_EtOverflowPipeDrain := EtOverflowDrainElbow_Origin[2] - Tank_Origin[2] - H_Wall - T_TankWall - H_DrainChannel
EtOverflowPipeDrain := PipeF(EtOverflowDrainElbow_Origin, EtOverflowDrainElbow_Origin[2] - Tank_Origin[2] - H_Wall - T_TankWall - H_DrainChannel, [0; 270; 0]*deg, ND_EtOverflow, PS_Fi)
EtOverflowDrainPipeFrz := FreezeLayer("EtOverflowDrainPipes")
EtOverflowDrainPipes := stack(EtOverflowDrainPipeLyr, EtOverflowPipe, EtOverflowPipeUnder, EtOverflowPipeWall, EtOverflowPipeDrain, EtOverflowDrainPipeFrz)
EtOverflow := stack(EtOverflowDrainFit, EtOverflowDrainPipes)
SystemCoupling_Origin := [
    T_Et - SocketDepth(ND_Transmission);
    W_Et - ConRadius(ND_Transmission) - S_Fitting;
    ConRadius(ND_Transmission)
] + FlowMeteringTank_Origin
SystemInletFitLyr := layer_new("SystemInletCoupling", green)
SystemInletCoupling := CouplingSUBF(SystemCoupling_Origin, [180; 0; 270]*deg, ND_Transmission, PS_Fi, ["FlowMeteringTank"])
SystemInletFitFrz := FreezeLayer("SystemInletCoupling")
SystemInletPipeLyr := layer_new("SystemInletPipes", blue)
SystemInletPipe := PipeSUBF(SystemCoupling_Origin + [W_Et; 0; 0], W_Et, [0; 0; 0]*deg, ND_Transmission, PS_Fi, ["Room"])
SystemInletPipeFrz := FreezeLayer("SystemInletPipes")
EtScript := stack(FlowMeteringTankLyr, FlowMeteringTank, FlowMeteringTankFrz, EtOverflow, BaffleLyr, Baffle, BaffleFrz, SystemInletFitLyr, SystemInletCoupling, SystemInletFitFrz, SystemInletPipeLyr, SystemInletPipe, SystemInletPipeFrz)
DistTankLyr := layer_new("FlowDistributionTank", grey)
FlowDistributionTank := Tank(FlowDistributionTank_Origin, [W_FiDistTank; L_FiDistTank; H_FiDistTank], T_Et)
DistTankFrz := FreezeLayer("FlowDistributionTank")
DistTankFitFrz := FreezeLayer("DistributionTankDrainCoupling")
DistTank := stack(DistTankLyr, FlowDistributionTank, DistTankFrz)
Tanks := stack(RoomLyr, Room, HatchLedge, RoomFrz, HatchLedgeCut, DrainWedge, GroupDelete, SubtractDrainWedge, HatchLyr, HatchBox, HatchFrz, Door, StorageTankLyr, FiTank, FiTankWeir, Union_All, StorageTanksFrz, EtScript, DistTank)
# Filter Body
L_FiManBulkheadOffset := 9.912*10^-4*m  # From India 3
T_FiCap := 9.525*10^-3*m
L_BranchExtend := 0.024 m
L_FiPipe := 2.05 m
FiPipe_Origin and [
    Tank_Origin[0] - L_Wall + ConRadius(ND_FiInlet) + L_FiPipeToOutletVertCenterLine*cos(AN_FiIn) + S_Fitting/4;
    FlowDistributionTank_Origin[1] + L_FiDistTank - 2*ConRadius(ND_FiInlet) - outerradius(ND_FiPipe) - 1.5*S_Fitting;
    Tank_Origin[2] + H_Wall + T_FiCap + T_Flange + T_TankWall + FiLift
]
FiManBulkhead_Origin := [
    L_FiManBulkheadOffset - innerdiameter(ND_FiPipe, PS_Fi)/2;
    0;
    1.5*ConRadius(ND_FiManTrunk) + T_FiCap
] + FiPipe_Origin = [2.00078; -0.6; 0.514257] m
FiManInletPipe_Origin := [L_FiManTrunk; 0 m; 0] + FiManBulkhead_Origin
FiBranch_Origin(i) := [
    FiPipe_Origin[0] + innerdiameter(ND_FiPipe, PS_Fi)/2 - S_FiManBranchEnds - S_FiManBranch*i;
    FiPipe_Origin[1] + innerdiameter(ND_FiManTrunk, PS_FiBranch)/2 - L_BranchExtend;
    FiManInletPipe_Origin[2]
]
LayerFiBody := layer_new("FiBodyPlu", blue3)
DrawFiBody := PipeF(FiPipe_Origin, L_FiPipe, [0; 90]*deg, ND_FiPipe, PS_FiBranch)
FreezeFiBody := FreezeLayer("FiBodyPlu")
FiBodyOrificeInlet := CylinderF(FiManBulkhead_Origin + [zc; 0; 0], outerdiameter(ND_FiManTrunk)/2, CouplingLength(ND_FiManTrunk), [0; 0]*deg)
ArrayInletOrifice := ArrayLast(N_FiLayer/2 + 1, 1, T_FiLayer*2)
FiBodyOrificeOutlet := CylinderF([
    FiPipe_Origin[0] + ConRadius(ND_FiPipe) + CouplingLength(ND_FiManTrunk)/2;
    FiManBulkhead_Origin[1];
    T_FiLayer + FiManBulkhead_Origin[2]
], outerdiameter(ND_FiManTrunk)/2, CouplingLength(ND_FiManTrunk), [0; 0]*deg)
ArrayOutletOrifice := ArrayLast(N_FiLayer/2, 1, T_FiLayer*2)
# GroupDelete
SubtractFiInletsOutlets := SubtractF(["FiBodyPlu"], "DeleteMe")
FiBodyPipe := stack(LayerFiBody, DrawFiBody, FreezeFiBody)
# Internal Filter Piping
# origins in "Filter Body" section
L_FiManBranch := [0.081; 0.142; 0.081]*m  # How is THIS determined? It's from India 3
AN_FiIn := .247
FiManTrunkLyr := layer_new("FiManTrunkPlu", blue3)
FiManTrunk := PipeF(FiManInletPipe_Origin, L_FiManTrunk, [0; 0]*deg, ND_FiManTrunk, PS_FiBranch)
FiManTrunkFrz := FreezeLayer("FiManTrunkPlu")
D_BranchSlotOrifice := 0.96*outerdiameter(ND_FiManBranch) = 0.0204826 m
D_BranchSlotOrifice*10 = 0.204826 m
FiManTrunkOrifice := CylinderF(FiBranch_Origin(0) + [0; 1.5*ConRadius(ND_FiManTrunk); 0], D_BranchSlotOrifice/2, 3*ConRadius(ND_FiManTrunk), [90; 0]*deg)
ArrayTrunkOrifice := ArrayLast(1, N_FiManBranch, -S_FiManBranch)
# GroupDelete
SubtractFiOrifices := SubtractF(["FiManTrunkPlu"], "DeleteMe")
FiManPlu :=
    Local ← layer_new("FiManBranchPlu", blue3)
    for i ∈ 0 .. N_FiManBranch - 1
        Local ← stack(Local, PipeF(FiBranch_Origin(i), L_FiManBranch[i], [270; 0]*deg, ND_FiManBranch, PS_FiBranch))
    Local
FiManFreeze := FreezeLayer("FiMan*Plu")
DrawFiManPipes := stack(FiManTrunkLyr, FiManTrunk, FiManTrunkFrz, FiManTrunkOrifice, ArrayTrunkOrifice, GroupDelete, SubtractFiOrifices, FiManPlu, FiManFreeze)
DrawFiManPipes := stack(FiManTrunkLyr, FiManTrunk, FiManTrunkFrz, FiManTrunkOrifice, ArrayTrunkOrifice, GroupDelete, SubtractFiOrifices, FiManFreeze)
FiManBranchCaps :=
    Local ← layer_new("FiManCapsPlu", red)
    for i ∈ 0 .. N_FiManBranch - 1
        Local ← stack(Local, CutCapF(FiBranch_Origin(i) + [0; L_FiManBranch[i]; 0], H_FiManCap, [90; 0]*deg, ND_FiManBranch))
    Local
FiManTrunkCap := CapF(FiManInletPipe_Origin, [0; 0]*deg, ND_FiManTrunk)
FiManCapFrz := FreezeLayer("FiManCapsPlu")
ThawFiManPlu := ThawMultiple(["FiManBranchPlu"; "FiManCapsPlu"])
MirrorFiMan := MirrorAll([FiPipe_Origin[0]; FiPipe_Origin[1]], [FiPipe_Origin[0] + zc; FiPipe_Origin[1]], "n")
FiManPluFrz := FreezeMultiple(["FiMan*"])
FiManBulkheadLyr := layer_new("FiManBulkheadPlu", green)
FiManBulkhead := InsertDwg(BulkheadDwg, FiManBulkhead_Origin, ND_FiManTrunk, 180 deg)
FiManBulkheadFrz := FreezeLayer("FiManBulkheadPlu")
GroupFiMan := GroupAll("FiMan")
DrawFiManFittings := stack(FiManBranchCaps, FiManTrunkCap, FiManCapFrz, ThawFiManPlu, MirrorFiMan, FiManPluFrz, FiManBulkheadLyr, FiManBulkhead, FiManBulkheadFrz, ThawMultiple(["FiMan*"]), GroupFiMan, FiManPluFrz)
DrawFiManFittings := stack(FiManTrunkCap, FiManCapFrz, ThawFiManPlu, MirrorFiMan, FiManPluFrz, FiManBulkheadLyr, FiManBulkheadFrz, ThawMultiple(["FiMan*"]), GroupFiMan, FiManPluFrz)
ArrayFiMan :=
    Local ← stack(ThawMultiple(["FiMan*"]), Rotate_All([FiPipe_Origin[0]; FiPipe_Origin[1]], AN_FiIn), GroupFiMan)
    for i ∈ 0 .. N_FiLayer - 1
        Local ←
            stack(Local, CopyGroup("FiMan", [FiPipe_Origin[0]; FiPipe_Origin[1]; FiManBulkhead_Origin[2]], [[FiPipe_Origin[0]; FiPipe_Origin[1]; FiManBulkhead_Origin[2] + T_FiLayer*(i + 1)]]), Rotate3DLast(FiPipe_Origin, "z", -2*AN_FiIn)) if (-1)^i == 1
            stack(Local, CopyGroup("FiMan", [FiPipe_Origin[0]; FiPipe_Origin[1]; FiManBulkhead_Origin[2]], [[FiPipe_Origin[0]; FiPipe_Origin[1]; FiManBulkhead_Origin[2] + T_FiLayer*(i + 1)]])) otherwise
    Local
FrzFiMan := FreezeMultiple(["FiMan*"])
ArrayFiManifolds := stack(ArrayFiMan, FrzFiMan)
# Bed Tester
ND_FiTesterOuter := 1.5 in
ND_FiTesterInner := 1 in
L_FiTesterReducer := SocketDepth(ND_FiTesterInner)
L_FiTesterBulkheadOffset := 0.5*innerdiameter(ND_FiPipe, PS_Fi) - BulkheadSocketOuterD(ND_FiTesterOuter)*0.5/tan(asin(BulkheadSocketOuterD(ND_FiTesterOuter)/innerdiameter(ND_FiPipe, PS_Fi))) = 0.000633649 m
L_FiTesterInnerCapOffset := innerdiameter(ND_FiPipe, PS_Fi) - ConRadius(ND_FiTesterInner)/tan(asin(ConRadius(ND_FiTesterInner)/innerdiameter(ND_FiPipe, PS_Fi))) = 0.000650007 m
L_FiTesterOuter := 2*SocketDepth(ND_FiTesterOuter)
L_FiTesterInner := innerdiameter(ND_FiPipe, PS_Fi) - L_FiTesterInnerCapOffset - CapThickness(ND_FiTesterInner) + CouplingLength(ND_FiTesterOuter) + L_FiTesterReducer + CapHeight(ND_FiTesterOuter) + SocketDepth(ND_FiTesterOuter) + SocketDepth(ND_FiTesterInner)
# Draw the tester along the x-axis and then rotate it 30 deg.
FiTesterBulkhead_Origin := FiManBulkhead_Origin + [-L_FiManBulkheadOffset + L_FiTesterBulkheadOffset; 0; T_FiLayer/2]
FiTesterFemaleAdapter_Origin := FiTesterBulkhead_Origin + [-BulkheadThreadLength(ND_FiTesterOuter); 0; 0] = [1.94726; -0.6; 0.614257] m
FiTesterReducer_Origin := FiTesterFemaleAdapter_Origin + [-CouplingLength(ND_FiTesterOuter); 0; 0] = [1.87503; -0.6; 0.614257] m
FiTesterInnerCapL_Origin := FiTesterReducer_Origin + [
    SocketDepth(ND_FiTesterOuter) - L_FiTesterReducer - CapHeight(ND_FiTesterInner) + CapThickness(ND_FiTesterInner) - SocketDepth(ND_FiTesterInner) - SocketDepth(ND_FiTesterOuter);
    0;
    0
]
FiTesterInner_Origin := FiTesterInnerCapL_Origin + [L_FiTesterInner; 0; 0]
FiTesterOuter_Origin := [-CouplingLength(ND_FiTesterOuter) + 2*SocketDepth(ND_FiTesterOuter); 0; 0] + FiTesterFemaleAdapter_Origin
FiTesterLyr := layer_new("FiTesterPlu", blue)
FiTesterOuterPipe := PipeF(FiTesterOuter_Origin, L_FiTesterOuter, [0; 0], ND_FiTesterOuter, PS_Fi)
FiTesterInnerPipe := PipeF(FiTesterInner_Origin, L_FiTesterInner, [0; 0], ND_FiTesterInner, PS_Fi)
FiTesterFrz := FreezeLayer("FiTesterPlu")
FiTesterFitLyr := layer_new("FiTesterFittingsPlu", green)
FiTesterBulkhead := InsertDwg(BulkheadDwg, FiTesterBulkhead_Origin, ND_FiTesterOuter, 180 deg)
FiTesterFemaleAdapter := CouplingF(FiTesterFemaleAdapter_Origin, [0; 0]*deg, ND_FiTesterOuter, PS_Fi)
FiTesterReducer := reducerF(FiTesterReducer_Origin, [0; 0; 0]*deg, ND_FiTesterOuter, ND_FiTesterInner, L_FiTesterReducer, PS_Fi)
FiTesterCapR := CapF(FiTesterInner_Origin, [0; 0]*deg, ND_FiTesterInner)
FiTesterCapL := CapF(FiTesterInnerCapL_Origin, [180; 0]*deg, ND_FiTesterInner)
FiTesterFitFrz := FreezeLayer("FiTesterFittingsPlu")
FiTesterScript := stack(FiTesterLyr, FiTesterOuterPipe, FiTesterInnerPipe, FiTesterFrz, FiTesterFitLyr, FiTesterBulkhead, FiTesterFemaleAdapter, FiTesterReducer, FiTesterCapR, FiTesterCapL, FiTesterFitFrz, ThawMultiple(["*tester*"]), Rotate_All([FiPipe_Origin[0]; FiPipe_Origin[1]], 65 deg), FreezeMultiple(["*tester*"]))
FiTesterScript := stack(FiTesterLyr, FiTesterOuterPipe, FiTesterInnerPipe, FiTesterFrz, FiTesterFitLyr, FiTesterFemaleAdapter, FiTesterReducer, FiTesterCapR, FiTesterCapL, FiTesterFitFrz, ThawMultiple(["*tester*"]), Rotate_All([FiPipe_Origin[0]; FiPipe_Origin[1]], 65 deg), FreezeMultiple(["*tester*"]))
# Filter Caps
ND_FiBwDrain := .051 m  # From India 3
T_FiFlange := 9.525*10^-3*m
T_FiFlangeLipOuter := .019 m
T_FiFlangeLipInner := 6.35*10^-3*m
ND_FiCapValve := 3 in
FiCapBulkhead_Origin := [0; -ConRadius(ND_FiBwDrain) - ConRadius(ND_FiCapValve); L_FiPipe + T_FiFlange] + FiPipe_Origin
FiCapValve_Origin := FiCapBulkhead_Origin + [0; 0; BulkheadThreadLength(ND_FiCapValve)]
AluminumFlangeLyr := layer_new("AluminumFlange", grey)
TopFlange := CylinderF([0; 0; L_FiPipe] + FiPipe_Origin, outerdiameter(ND_FiPipe)/2 + T_FiFlangeLipOuter, T_FiFlange, [0; 90]*deg)
BottomFlange := CylinderF([0; 0; -T_FiFlange] + FiPipe_Origin, outerdiameter(ND_FiPipe)/2 + T_FiFlangeLipOuter, T_FiFlange, [0; 90]*deg)
AluminumFlangeFrz := FreezeLayer("AluminumFlange")
TopFlangeSubtract := CylinderF([0; 0; L_FiPipe] + FiPipe_Origin, outerdiameter(ND_FiPipe)/2 - T_FiFlangeLipInner, T_FiFlange, [0; 90]*deg)
BottomFlangeSubtract := CylinderF([0; 0; -T_FiFlange] + FiPipe_Origin, outerdiameter(ND_FiPipe)/2 - T_FiFlangeLipInner, T_FiFlange, [0; 90]*deg)
SubtractFlange := SubtractF(["AluminumFlange"], "DeleteMe")
AluminumFlange := stack(AluminumFlangeLyr, TopFlange, BottomFlange, AluminumFlangeFrz, TopFlangeSubtract, BottomFlangeSubtract, GroupDelete, SubtractFlange)
FiCapLyr := layer_new("FiCap", grey)
TopCap := CylinderF([0; 0; L_FiPipe + T_FiFlange] + FiPipe_Origin, outerdiameter(ND_FiPipe)/2 + T_FiFlangeLipOuter, T_FiFlange, [0; 90]*deg)
BottomCap := CylinderF([0; 0; -T_FiFlange - T_FiCap] + FiPipe_Origin, outerdiameter(ND_FiPipe)/2 + T_FiFlangeLipOuter, T_FiFlange, [0; 90]*deg)
FiCapFrz := FreezeLayer("FiCap")
ValveAccessOrifice := CylinderF([FiPipe_Origin[0]; FiCapBulkhead_Origin[1]; L_FiPipe + T_FiFlange + FiPipe_Origin[2]], innerdiameter(ND_FiCapValve, PS_Fi)/2, T_FiFlange, [0; 90]*deg)
SubtractValveAccess := SubtractF(["FiCap"], "DeleteMe")
FiCaps := stack(FiCapLyr, TopCap, BottomCap, FiCapFrz, ValveAccessOrifice, GroupDelete, SubtractValveAccess)
S_BoltsEst := 7 in
R_Bolt := 1/4*in
L_FiBolt := (T_FiCap + T_FiFlange)*1.1
N_Bolts := ceil(2*π*(outerdiameter(ND_FiPipe)*0.5 + R_Bolt)/S_BoltsEst) = 6
N_ThreadedRods := N_Bolts/2
S_Bolts := π*innerdiameter(ND_FiPipe, PS_Fi)/N_Bolts = 0.158768 m
AN_BoltArray := 360 deg
FiCapBoltLyr := layer_new("FiCapBolt", red)
FiCapBolt := CylinderF([0.5*outerdiameter(ND_FiPipe) + R_Bolt; 0; L_FiPipe - 0.05*(T_FiCap + T_FiFlange)] + FiPipe_Origin, R_Bolt, L_FiBolt, [0; 90]*deg)
ArrayFiBolt := ArrayLastPolar([FiPipe_Origin[0]; FiPipe_Origin[1]], N_Bolts, AN_BoltArray)
FiCapBoltFrz := FreezeLayer("FiCapBolt")
FiBolts := stack(FiCapBoltLyr, FiCapBolt, ArrayFiBolt, view("f"), array_all(2, 1, -(L_FiPipe + 2*T_FiFlange)), view("t"), FiCapBoltFrz)
FiThreadedRodsLyr := layer_new("FiThreadedRods", grey)
FiThreadedRod := CylinderF([0; -(0.5*outerdiameter(ND_FiPipe) + 2*R_Bolt); -1.05*(T_FiCap + T_FiFlange)] + FiPipe_Origin, R_Bolt, L_FiPipe + 2.1*(T_FiCap + T_FiFlange), [0; 90; 0]*deg)
ArrayFiThreadedRod := ArrayLastPolar([FiPipe_Origin[0]; FiPipe_Origin[1]], N_ThreadedRods, AN_BoltArray)
FiThreadedRodFrz := FreezeLayer("FiThreadedRods")
FiThreadedRods := stack(FiThreadedRodsLyr, FiThreadedRod, ArrayFiThreadedRod, FiThreadedRodFrz)
FiCapFittingsLyr := layer_new("FiCapAccess", green)
FiCapBulkhead := InsertDwg(BulkheadDwg, [FiCapBulkhead_Origin[0]; FiCapBulkhead_Origin[2]; (-FiCapBulkhead_Origin)[1]], ND_FiCapValve, 90 deg)
# drawings are here! where do I get them from?
FiCapValve := InsertDwg(BallValveDwg, [FiCapValve_Origin[0]; FiCapValve_Origin[2]; (-FiCapValve_Origin)[1]], ND_FiCapValve, 270 deg)
FiCapFittingsFrz := FreezeLayer("FiCapAccess")
FiCapAccess := stack(FiCapFittingsLyr, view("f"), FiCapBulkhead, FiCapValve, view("t"), FiCapFittingsFrz)
FiCapsScript := stack(AluminumFlange, FiCaps, FiBolts, FiCapAccess)
FiCapsScript := stack(AluminumFlange, FiCaps, FiBolts)
# Sand Drain
ND_FiSandDrain := 1 in
L_FiSandBulkheadOffset := 0.5*innerdiameter(ND_FiPipe, PS_Fi) - BulkheadSocketOuterD(ND_FiSandDrain)*0.5/tan(asin(BulkheadSocketOuterD(ND_FiSandDrain)/innerdiameter(ND_FiPipe, PS_Fi))) = 0.000303193 m
FiSandDrainPipeInt_Origin := [
    FiPipe_Origin[0];
    -0.5*innerdiameter(ND_FiPipe, PS_Fi) + FiPipe_Origin[1] + BulkheadSocketDepth(ND_FiSandDrain) + SocketDepth(ND_FiSandDrain) + ElbowRadius(ND_FiSandDrain);
    FiManBulkhead_Origin[2] + outerradius(ND_FiManBranch)
]
L_FiSandDrainPipeInt := T_FiLayer - ElbowRadius(ND_FiSandDrain) - 2.1*ConRadius(ND_FiManTrunk)
FiSandDrainElbowInt_Origin := [0; 0; L_FiSandDrainPipeInt] + FiSandDrainPipeInt_Origin
FiSandDrainPipeH_Origin := [0; -ElbowRadius(ND_FiSandDrain); ElbowRadius(ND_FiSandDrain)] + FiSandDrainElbowInt_Origin
L_FiSandDrainPipeH := BulkheadSocketDepth(ND_FiSandDrain) + SocketDepth(ND_FiSandDrain)
FiSandDrainBulkhead_Origin := [0; -L_FiSandDrainPipeH; 0] + FiSandDrainPipeH_Origin
FiSandDrainFemaleAdapter_Origin := FiSandDrainBulkhead_Origin + [0; -BulkheadThreadLength(ND_FiSandDrain); 0]
FiSandDrainElbowExt_Origin := FiSandDrainFemaleAdapter_Origin + [0; -CouplingLength(ND_FiSandDrain); 0]
FiSandDrainValve_Origin := [
    FiSandDrainElbowExt_Origin[0];
    FiSandDrainElbowExt_Origin[1] - ElbowRadius(ND_FiSandDrain);
    -SocketDepth(ND_FiSandDrain) - BallValveSocket(ND_FiSandDrain) + FiSandDrainElbowExt_Origin[2] - ElbowRadius(ND_FiSandDrain)
]
FiSandDrainPipeVExt_Origin := FiSandDrainValve_Origin + [0; 0; -BallValveLength(ND_FiSandDrain) + 2*BallValveSocket(ND_FiSandDrain)]
L_SandSettle := 10 cm
FiSandDrainPluLyr := layer_new("FiSandDrainPlu", blue)
FiSandDrainIntV := PipeF(FiSandDrainPipeInt_Origin, L_FiSandDrainPipeInt, [0; 90; 0]*deg, ND_FiSandDrain, PS_Fi)
FiSandDrainPipeH := PipeF(FiSandDrainPipeH_Origin, L_FiSandDrainPipeH, [90; 0]*deg, ND_FiSandDrain, PS_Fi)
FiSandDrainPipeExt := PipeF(FiSandDrainPipeVExt_Origin, L_SandSettle + BallValveSocket(ND_FiSandDrain), [0; 270; 0]*deg, ND_FiSandDrain, PS_Fi)
FiSandDrainPluFrz := FreezeLayer("FiSandDrainPlu")
FiSandDrainPlu := stack(FiSandDrainPluLyr, FiSandDrainIntV, FiSandDrainPipeH, FiSandDrainPipeExt, FiSandDrainPluFrz)
FiSandDrainFitLyr := layer_new("FiSandDrainFittings", green)
FiSandDrainBulkhead := InsertDwg(BulkheadDwg, FiSandDrainBulkhead_Origin, ND_FiSandDrain, 270 deg)
FiSandDrainFemaleAdapter := CouplingF(FiSandDrainFemaleAdapter_Origin, [90; 0]*deg, ND_FiSandDrain, PS_Fi)
FiSandDrainElbowInt := ElbowF(FiSandDrainElbowInt_Origin, [90; 90; 0]*deg, ND_FiSandDrain, PS_Fi)
FiSandDrainElbowExt := ElbowF(FiSandDrainElbowExt_Origin, [180; 90; 0]*deg, ND_FiSandDrain, PS_Fi)
FiSandDrainValve := InsertDwg(BallValveDwg, [FiSandDrainValve_Origin[0]; FiSandDrainValve_Origin[2]; -FiSandDrainValve_Origin[1]], ND_FiSandDrain, 90 deg)
FiSandDrainFitFrz := FreezeLayer("FiSandDrainFittings")
FiSandDrainFit := stack(FiSandDrainFitLyr, view("f"), FiSandDrainValve, view("t"), FiSandDrainBulkhead, FiSandDrainFemaleAdapter, FiSandDrainElbowInt, FiSandDrainElbowExt, FiSandDrainFitFrz)
FiSandDrainFit := stack(FiSandDrainFitLyr, view("f"), view("t"), FiSandDrainFemaleAdapter, FiSandDrainElbowInt, FiSandDrainElbowExt, FiSandDrainFitFrz)
FiSandDrainScript := stack(FiSandDrainPlu, FiSandDrainFit)
# Backwash Piping
# Backwash stuff!
L_FiBwVertCenterLine := 0.735 m
L_FiBwBulkheadOffset := (9.912*10^-4)*m  # From India 3
L_FiBwMan := .291 m
L_FiBwOrificeOffsetR := 0.028 m
N_FiBwOrifices := 8
D_FiBwOrifices := .019 m
B_FiBwOrifices := .034 m
ND_FiAirValve := 1 in
L_FiBwExtend := L_FiBwVertCenterLine - ShortTeeLength(ND_FiBwDrain) - innerdiameter(ND_FiPipe, PS_Fi)/2 + L_FiBwBulkheadOffset - BulkheadThreadLength(ND_FiBwDrain) + 2*SocketDepth(ND_FiBwDrain) - CouplingLength(ND_FiBwDrain)
FiBwBulkhead_Origin := [
    innerdiameter(ND_FiPipe, PS_Fi)/2 - L_FiBwBulkheadOffset;
    0;
    L_FiPipe - T_Flange - 1.25*ConRadius(ND_FiBwDrain)
] + FiPipe_Origin = [2.30202; -0.6; 2.46238] m
FiBwFemaleAdapter_Origin := FiBwBulkhead_Origin + [BulkheadThreadLength(ND_FiBwDrain); 0; 0]
FiBwTee_Origin := FiBwFemaleAdapter_Origin + [2*SocketDepth(ND_FiBwDrain) + L_FiBwExtend - CouplingLength(ND_FiBwDrain); 0; 0]
L_FiBwPipeVert := L_FiPipe - 1.25*ConRadius(ND_FiBwDrain) + ShortTeeLength(ND_FiDrainValve) + 2*SocketDepth(ND_FiDrainValve)
FiBwReducer_Origin := FiBwTee_Origin + [ShortTeeLength(ND_FiBwDrain); 0; ShortTeeLength(ND_FiBwDrain) + 2*SocketDepth(ND_FiBwDrain)]
FiBwAirValve_Origin := FiBwReducer_Origin + [0; 0; SocketDepth(ND_FiBwDrain) + SocketDepth(ND_FiAirValve)]
FiBwVertValve_Origin := FiBwTee_Origin + [ShortTeeLength(ND_FiBwDrain); 0; -L_FiBwPipeVert - ShortTeeLength(ND_FiBwDrain)]
FiBwDrainLyr := layer_new("FiBwDrainPlu", blue3)
FiBwMan := PipeF(FiBwBulkhead_Origin, L_FiBwMan, [0; 0]*deg, ND_FiBwDrain, PS_Fi)
FiBwDrainFrz := FreezeLayer("FiBwDrainPlu")
FiBwManOrifice := CylinderF(FiBwBulkhead_Origin - [L_FiBwOrificeOffsetR; 0; 0], D_FiBwOrifices/2, 1.1*ConRadius(ND_FiBwDrain), [0; 270]*deg)
ArrayFiBwManOrifices := ArrayLast(1, N_FiBwOrifices, -B_FiBwOrifices)
GroupDelete
D_FiBwOrifices = 1.9 cm
SubtractFiBwManOrifices := SubtractF(["FiBwDrainPlu"], "DeleteMe")
B_FiBwOrifices = 3.4 cm
ND_FiAirValve = 1 in
SelectBwDrain := SelectLayer("FiBwDrainPlu")
FiBwNipple := PipeF(FiBwTee_Origin, 2*SocketDepth(ND_FiBwDrain) + L_FiBwExtend, [0; 0]*deg, ND_FiBwDrain, PS_Fi)
FiBwPipeVert1 := PipeF(FiBwTee_Origin + [ShortTeeLength(ND_FiBwDrain); 0; -ShortTeeLength(ND_FiBwDrain)], L_FiBwPipeVert, [0; 270]*deg, ND_FiBwDrain, PS_Fi)
FiBwDrainPlu := stack(FiBwDrainLyr, FiBwMan, FiBwDrainFrz, FiBwManOrifice, ArrayFiBwManOrifices, GroupDelete, SubtractFiBwManOrifices, SelectBwDrain, FiBwNipple, FiBwPipeVert1, FiBwDrainFrz)
FiBwDrainFittingsLyr := layer_new("FiBwDrainFittingsPlu", green)
FiBwManBulkhead := InsertDwg(BulkheadDwg, FiBwBulkhead_Origin, ND_FiBwDrain, 0 deg)
FiBwFemaleAdapter := CouplingF(FiBwFemaleAdapter_Origin, [0; 0; 90]*deg, ND_FiBwDrain, PS_Fi)
FiBwTee := TeeF(FiBwTee_Origin, [90; 0; 90]*deg, ND_FiBwDrain, PS_Fi)
FiOutletReducer := reducerF(FiBwReducer_Origin, [0; 90; 0]*deg, ND_FiBwDrain, ND_FiAirValve, SocketDepth(ND_FiManTrunk), PS_Fi)
FiBwAirValve := InsertDwg(BallValveDwg, [FiBwAirValve_Origin[1]; FiBwAirValve_Origin[2]; FiBwAirValve_Origin[0]], ND_FiAirValve, 270 deg)
FiBwVertValve := InsertDwg(BallValveDwg, [FiBwVertValve_Origin[1]; FiBwVertValve_Origin[2]; FiBwVertValve_Origin[0]], ND_FiBwDrain, 90 deg)
FiBwManCap := CapF(FiBwBulkhead_Origin - [L_FiBwMan; 0; 0], [180; 0]*deg, ND_FiBwDrain)
SubtractFiBwManCapOrifices := SubtractF(["FiBwDrainFittingsPlu"], "DeleteMe")
SelectFiBwDrainFittings := SelectLayer("FiBwDrainFittingsPlu")
FiBwDrainFittingsFrz := FreezeLayer("FiBwDrainFittingsPlu")
FiBwDrainFittings := stack(FiBwDrainFittingsLyr, FiOutletReducer, FiBwManCap, FiBwDrainFittingsFrz, FiBwManOrifice, ArrayFiBwManOrifices, GroupDelete, SubtractFiBwManCapOrifices, SelectFiBwDrainFittings, FiBwManBulkhead, FiBwFemaleAdapter, FiBwTee, view("r"), FiBwAirValve, FiBwVertValve, view("t"), FiBwDrainFittingsFrz)
Y_FiBwDrainPipeOffset := (FiBwTee_Origin[0] + ShortTeeLength(ND_RMPipe) - FiPipe_Origin[0])*1/sqrt(3)
X_FiBwDrainPipeOffset := (FiBwTee_Origin[0] + ShortTeeLength(ND_RMPipe) - FiPipe_Origin[0])*(1 - sqrt(3)/2)  # these only work for 30 deg angles!!!!
FiBwPlu := stack(FiBwDrainFittings, FiBwDrainPlu, ThawMultiple(["*bw*"]), Rotate_All([FiPipe_Origin[0]; FiPipe_Origin[1]], AN_Bw), FreezeMultiple(["*bw*"]))
FiBwPlu := stack(FiBwDrainPlu, ThawMultiple(["*bw*"]), Rotate_All([FiPipe_Origin[0]; FiPipe_Origin[1]], AN_Bw), FreezeMultiple(["*bw*"]))
# Inlet Plumbing
AN_FiDrain := 70 deg + 270 deg
FiInletBallValveBottom_Origin := [
    FiManBulkhead_Origin[0] - BulkheadThreadLength(ND_FiInlet) + BallValveSocket(ND_FiInlet) - L_FiManBulkheadOffset;
    FiManBulkhead_Origin[1];
    FiManBulkhead_Origin[2]
] = [1.75554; -0.6; 0.514257] m
FullReducerLength := 2*SocketDepth(ND_FiManTrunk) + SocketDepth(ND_FiInlet)  # right now the reducer uses length as an input
FiInletReducerBottom_Origin := [
    BallValveSocket(ND_FiManTrunk) - BallValveLength(ND_FiManTrunk) - FullReducerLength + SocketDepth(ND_FiInlet);
    0;
    0
] + FiInletBallValveBottom_Origin = [1.67239; -0.6; 0.514257] m
FiInletTeeBottom_Origin := [-2*SocketDepth(ND_FiInlet) - ElbowRadius(ND_FiInlet) + ShortTeeLength(ND_FiInlet); 0; 0] + FiInletReducerBottom_Origin
FiInletElbowUpper_Origin := FiInletTeeBottom_Origin + [-ShortTeeLength(ND_FiInlet); 0; 6*T_FiLayer - ElbowRadius(ND_FiInlet)]
FiInletElbowDrop_Origin := FiInletTeeBottom_Origin + [-ShortTeeLength(ND_FiInlet); 0; -ShortTeeLength(ND_FiInlet) - 2*SocketDepth(ND_FiInlet)]
FiInletElbowUp_Origin := FiInletElbowDrop_Origin + [-(ElbowRadius(ND_FiInlet) + 2*SocketDepth(ND_FiInlet)); 0; -ElbowRadius(ND_FiInlet)]
FiDrainTee_Origin := FiInletElbowUp_Origin + [
    -ElbowRadius(ND_FiInlet) + ShortTeeLength(ND_FiInlet)*cos(AN_FiDrain);
    ShortTeeLength(ND_FiInlet)*sin(AN_FiDrain);
    2*SocketDepth(ND_FiInlet) + ElbowRadius(ND_FiInlet) + ShortTeeLength(ND_FiInlet)
]
FiDrainReducer_Origin := FiDrainTee_Origin + [2*SocketDepth(ND_FiInlet)*cos(AN_FiDrain); 2*SocketDepth(ND_FiInlet)*sin(AN_FiDrain); 0]
FiDrainValve_Origin := FiDrainReducer_Origin + [
    (2*SocketDepth(ND_FiDrainValve) + BallValveLength(ND_FiDrainValve) - BallValveSocket(ND_FiDrainValve))*cos(AN_FiDrain);
    (2*SocketDepth(ND_FiDrainValve) + BallValveLength(ND_FiDrainValve) - BallValveSocket(ND_FiDrainValve))*sin(AN_FiDrain);
    0
]
FiDrainElbow_Origin := FiDrainValve_Origin + [
    (BallValveSocket(ND_FiDrainValve) + SocketDepth(ND_FiDrainValve) + ElbowRadius(ND_FiDrainValve))*cos(AN_FiDrain);
    (BallValveSocket(ND_FiDrainValve) + SocketDepth(ND_FiDrainValve) + ElbowRadius(ND_FiDrainValve))*sin(AN_FiDrain);
    -ElbowRadius(ND_FiDrainValve)
]
FiInletManifoldFittingsLyr := layer_new("FiInletManFittingsPlu", green)
FiInletReducer := reducerF(FiInletReducerBottom_Origin, [180; 0; 0]*deg, ND_FiInlet, ND_FiManTrunk, SocketDepth(ND_FiManTrunk), PS_Fi)
FiInletBallValve := InsertDwg(BallValveDwg, FiInletBallValveBottom_Origin, ND_FiManTrunk, 0 deg)
FiInletBottomTee := TeeF(FiInletTeeBottom_Origin, [270; 0; 90]*deg, ND_FiInlet, PS_Fi)
ArrayFiInFittings := array_all(4, 1, 2*T_FiLayer)
ArrayFiInTees := ArrayLast(3, 1, 2*T_FiLayer)
FiOutElbowDrop := ElbowF(FiInletElbowDrop_Origin, [0; 0; 270]*deg, ND_FiInlet, PS_Fi)
FiInletElbowUp := ElbowF(FiInletElbowUp_Origin, [90; 0; 270]*deg, ND_FiInlet, PS_Fi)
FiInletElbowUpper := ElbowF(FiInletElbowUpper_Origin, [180; 0; 270]*deg, ND_FiInlet, PS_Fi)
FiDrainTee := stack(view("f"), TeeF([FiDrainTee_Origin[0]; FiDrainTee_Origin[2]; -FiDrainTee_Origin[1]], [270 deg; AN_FiDrain; 0], ND_FiInlet, PS_Fi), view("t"))
FiDrainReducer := reducerF(FiDrainReducer_Origin, [180 deg + AN_FiDrain; 0; 0], ND_FiInlet, ND_FiDrainValve, SocketDepth(ND_FiDrainValve), PS_Fi)
FiDrainValve := InsertDwg(BallValveDwg, FiDrainValve_Origin, ND_FiDrainValve, AN_FiDrain)
FiDrainElbow := stack(view("f"), ElbowF([FiDrainElbow_Origin[0]; FiDrainElbow_Origin[2]; -FiDrainElbow_Origin[1]], [0; AN_FiDrain; 0], ND_FiDrainValve, PS_Fi), view("t"))
FiInletManifoldFittingsFrz := FreezeLayer("FiInletManFittingsPlu")
FiInletFittings := stack(FiInletManifoldFittingsLyr, FiInletReducer, FiInletBallValve, view("f"), ArrayFiInFittings, view("t"), FiInletBottomTee, view("f"), ArrayFiInTees, view("t"), FiInletElbowUpper, FiOutElbowDrop, FiInletElbowUp, FiDrainTee, FiDrainValve, FiDrainReducer, FiDrainElbow, FiInletManifoldFittingsFrz)
FiInletFittings := stack(FiInletManifoldFittingsLyr, FiInletReducer, view("f"), ArrayFiInFittings, view("t"), FiInletBottomTee, view("f"), ArrayFiInTees, view("t"), FiInletElbowUpper, FiOutElbowDrop, FiInletElbowUp, FiDrainTee, FiDrainReducer, FiDrainElbow, FiInletManifoldFittingsFrz)
FiInletPipesLyr := layer_new("FiInletManPlu", blue)
FiInletPipesFrz := FreezeLayer("FiInletManPlu")
L_FiDistPipesUnder := FlowDistributionTank_Origin[2] - CouplingLength(ND_FiInlet) + SocketDepth(ND_FiInlet) - ShortTeeLength(ND_FiInlet) - FiDrainTee_Origin[2]
FiDistUnderInletNorth := PipeF([
    FiInletElbowUp_Origin[0] - ElbowRadius(ND_FiInlet);
    FiInletElbowUp_Origin[1];
    FiDrainTee_Origin[2] + ShortTeeLength(ND_FiInlet)
], L_FiDistPipesUnder, [0; 90]*deg, ND_FiInlet, PS_Fi)
L_BottomPipeV := 2*T_FiLayer - TeeLength(ND_FiInlet) = -0.108 m
FiInletManBottomPipeV := PipeF(FiInletTeeBottom_Origin + [-ShortTeeLength(ND_FiInlet); 0; ShortTeeLength(ND_FiInlet)], L_BottomPipeV, [0; 90]*deg, ND_FiInlet, PS_Fi)
# LH = left horiz
FiInletManUpperPipeV := PipeF(FiInletElbowUpper_Origin, L_BottomPipeV + ShortTeeLength(ND_FiInlet) - ElbowRadius(ND_FiInlet), [0; 270]*deg, ND_FiInlet, PS_Fi)
L_InletPipeBottomLH := 2*SocketDepth(ND_FiInlet) = 0.152 m
FiInletPipeBottomLH := PipeF(FiInletReducerBottom_Origin, L_InletPipeBottomLH, [0; 0]*deg, ND_FiInlet, PS_Fi)
ArrayFiInletPipeV := ArrayLast(2, 1, 2*T_FiLayer)
ArrayFiInletPipesH := array_all(4, 1, 2*T_FiLayer)
FiInletPipes := stack(FiInletPipesLyr, FiInletPipeBottomLH, view("f"), ArrayFiInletPipesH, view("t"), FiInletManBottomPipeV, view("f"), ArrayFiInletPipeV, view("t"), FiDistUnderInletNorth, FiInletManUpperPipeV, FiInletPipesFrz, ThawMultiple(["FiInletMan*"]), Rotate_All([FiPipe_Origin[0]; FiPipe_Origin[1]], AN_FiIn), FreezeMultiple(["FiInletMan*"]))
FiInletPlu := stack(FiInletFittings, FiInletPipes)
L_InletShortPiece := max(0, CouplingLength(ND_FiInlet) - T_Et) + 2*SocketDepth(ND_FiInlet)
# Outlet Plumbing
L_FiPipeToOutletVertCenterLine := 1.045 m
AN_FiOut := 2.895  # From India 3
ND_FiSamplerValve := 1 in
FiCheckValve_Origin := [
    (BulkheadThreadLength(ND_FiManTrunk) + ChkValveLength(ND_FiManTrunk) - 2*ChkValveSocket(ND_FiManTrunk)) + 2*FiPipe_Origin[0] - FiManBulkhead_Origin[0];
    FiManBulkhead_Origin[1];
    FiManBulkhead_Origin[2] + T_FiLayer
]
FiOutletAdapter_Origin := FiCheckValve_Origin + [MaleAdapterLength(ND_FiManTrunk) - SocketDepth(ND_FiManTrunk); 0; 0] = [2.40464; -0.6; 0.714257] m
FiOutletManElbow_Origin := [
    FiPipe_Origin[0] + L_FiPipeToOutletVertCenterLine - ElbowRadius(ND_FiInlet);
    FiOutletAdapter_Origin[1];
    FiOutletAdapter_Origin[2]
]
FiOutletReducer_Origin := FiOutletManElbow_Origin + [-(2*SocketDepth(ND_FiInlet)); 0; 0] = [2.5872; -0.6; 0.714257] m
FiOutletManTeeBottom_Origin := [-ShortTeeLength(ND_FiInlet) + ElbowRadius(ND_FiInlet); 0; 2*T_FiLayer] + FiOutletManElbow_Origin
L_FiSamplerReducer := SocketDepth(ND_FiInlet) + 2*SocketDepth(ND_FiSamplerValve)
FiOutletSamplerReducer_Origin := FiOutletManTeeBottom_Origin + [ShortTeeLength(ND_FiInlet); 0; -(ShortTeeLength(ND_FiInlet) + 2*SocketDepth(ND_FiInlet))] = [3.1964; -0.6; 0.708257] m
FiOutletSamplerValve_Origin := FiOutletSamplerReducer_Origin + [
    0;
    0;
    -2*SocketDepth(ND_FiSamplerValve) - BallValveLength(ND_FiSamplerValve) + BallValveSocket(ND_FiSamplerValve)
]
FiDischargeElbow1_Origin := [
    ShortTeeLength(ND_FiInlet) + FiOutletManTeeBottom_Origin[0];
    FiOutletManTeeBottom_Origin[1];
    FiOutletManTeeBottom_Origin[2] + 2*SocketDepth(ND_FiInlet) + 2*T_FiLayer + ShortTeeLength(ND_FiInlet)
]
FiDischargeElbow2_Origin := [0; ElbowRadius(ND_FiInlet) + T_TankWall + ConRadius(ND_FiPipe); ElbowRadius(ND_FiInlet)] + FiDischargeElbow1_Origin
FiOutletFittingsLyr := layer_new("FiOutletManFittingsPlu", green)
FiOutletCheckValves := InsertDwg(ChkValveDwg, FiCheckValve_Origin, ND_FiManTrunk, 0 deg)
ArrayFiOutletCheckValves := array_all(3, 1, 2*T_FiLayer)
FiOutletAdapter := MaleAdapterF(FiOutletAdapter_Origin, [0; 0]*deg, ND_FiManTrunk, PS_Fi)
FiOutletReducer := reducerF(FiOutletReducer_Origin, [0; 0; 0]*deg, ND_FiInlet, ND_FiManTrunk, SocketDepth(ND_FiManTrunk), PS_Fi)
FiOutletManElbow := ElbowF(FiOutletManElbow_Origin, [270; 0; 90]*deg, ND_FiInlet, PS_Fi)
FiOutletManTeeBottom := TeeF(FiOutletManTeeBottom_Origin, [90; 0; 90]*deg, ND_FiInlet, PS_Fi)
ArrayFiOutletTee := ArrayLast(2, 1, 2*T_FiLayer)
FiPipe_Origin = [2.1514; -0.6; 0.474966] m
FiOutletFittingsFrz := FreezeLayer("FiOutletManFittingsPlu")
FiOutletFittings := stack(FiOutletFittingsLyr, FiOutletReducer, FiOutletCheckValves, FiOutletAdapter, view("f"), ArrayFiOutletCheckValves, view("t"), FiOutletManTeeBottom, view("f"), ArrayFiOutletTee, view("t"), FiOutletManElbow, FiOutletFittingsFrz)
FiOutletFittings := stack(FiOutletFittingsLyr, FiOutletReducer, FiOutletAdapter, view("f"), ArrayFiOutletCheckValves, view("t"), FiOutletManTeeBottom, view("f"), ArrayFiOutletTee, view("t"), FiOutletManElbow, FiOutletFittingsFrz)
FiOutletPipesLyr := layer_new("FiOutletManPlu", blue)
L_FiOutExtend := FiOutletReducer_Origin[0] - FiOutletAdapter_Origin[0] - SocketDepth(ND_FiInlet)
FiOutletNipple := PipeF([FiOutletAdapter_Origin[0] + L_FiOutExtend; FiOutletAdapter_Origin[1]; FiOutletAdapter_Origin[2]], L_FiOutExtend, [0; 0]*deg, ND_FiManTrunk, PS_Fi)
FiBottomHOutlManPipe := PipeF([
    FiOutletReducer_Origin[0] + 2*SocketDepth(ND_FiInlet);
    FiOutletAdapter_Origin[1];
    FiOutletAdapter_Origin[2]
], 2*SocketDepth(ND_FiInlet), [0; 0]*deg, ND_FiInlet, PS_Fi)
FiMidHOutManPipe := PipeF([
    FiOutletReducer_Origin[0] + (2*SocketDepth(ND_FiInlet) + ElbowRadius(ND_FiInlet) - ShortTeeLength(ND_FiInlet));
    FiOutletAdapter_Origin[1];
    FiOutletAdapter_Origin[2] + 2*T_FiLayer
], 2*SocketDepth(ND_FiInlet) + ElbowRadius(ND_FiInlet) - ShortTeeLength(ND_FiInlet), [0; 0]*deg, ND_FiInlet, PS_Fi)
FiUpperHOutManPipe := PipeF([
    FiOutletReducer_Origin[0] + (2*SocketDepth(ND_FiInlet) + ElbowRadius(ND_FiInlet) - ShortTeeLength(ND_FiInlet));
    FiOutletAdapter_Origin[1];
    FiOutletAdapter_Origin[2] + 4*T_FiLayer
], 2*SocketDepth(ND_FiInlet) + ElbowRadius(ND_FiInlet) - ShortTeeLength(ND_FiInlet), [0; 0]*deg, ND_FiInlet, PS_Fi)
FiMidVOutManPipe := PipeF(FiOutletManTeeBottom_Origin + [ShortTeeLength(ND_FiInlet); 0; ShortTeeLength(ND_FiInlet)], 2*T_FiLayer - TeeLength(ND_FiInlet), [0; 90]*deg, ND_FiInlet, PS_Fi)
FiLowerVOutManPipe := PipeF(FiOutletManElbow_Origin + [ElbowRadius(ND_FiInlet); 0; ElbowRadius(ND_FiInlet)], 2*T_FiLayer - ShortTeeLength(ND_FiInlet) - ElbowRadius(ND_FiInlet), [0; 90]*deg, ND_FiInlet, PS_Fi)
FiOutletPipesFrz := FreezeLayer("FiOutletManPlu")
FiOutletPipes := stack(FiOutletPipesLyr, FiOutletNipple, view("f"), ArrayFiOutletCheckValves, view("t"), FiMidVOutManPipe, FiLowerVOutManPipe, FiBottomHOutlManPipe, FiMidHOutManPipe, FiUpperHOutManPipe, FiOutletPipesFrz, ThawMultiple(["FiOutletMan*"]), Rotate_All([FiPipe_Origin[0]; FiPipe_Origin[1]], AN_FiOut), FreezeMultiple(["FiOutletMan*"]))
FiOutletPlu := stack(FiOutletFittings, FiOutletPipes)
FiInExManPlu := stack(FiInletPlu, FiOutletPlu)
# Array Filter
ThawFi := ThawMultiple(["Fi*"])
FiPipe3_Origin := [
    FiPipe_Origin[0];
    Tank_Origin[1] + ConRadius(ND_FiInlet) + 2*ConRadius(ND_RMPipe) + sin(AN_FiIn)*L_FiPipeToOutletVertCenterLine;
    FiPipe_Origin[2]
]
L_ChannelAvail := FiPipe_Origin[1] - FiPipe3_Origin[1]
# This code only works if there is more than 1 filter. So if the flow is over .8 Lps
B_Fi := (L_ChannelAvail - (CouplingLength(ND_FiSandDrain) + ElbowRadius(ND_FiSandDrain) + ConRadius(ND_FiSandDrain)))/(N_Fi - 1)
ArrayFi := array_all(N_Fi - 1, 1, -B_Fi)
MirrorFi := MirrorGroup([Tank_Origin[0]; FiPipe_Origin[1] - L_ChannelAvail/2], [Tank_Origin[0] - zc; FiPipe_Origin[1] - L_ChannelAvail/2], "Fi*", "n")
FreezeFi := FreezeMultiple(["Fi*"])
FiArray := stack(ThawFi, ArrayFi, MirrorFi, FreezeFi)
FiPipe2_Origin := [0; -B_Fi; 0] + FiPipe_Origin
# Operator Access/Walls
L_ChemPlatform := 1.343 m  # From India 3
T_Platform := T_PlantWall
# Chem doser platform
H_ConstantHeadAboveEt := 10 cm
H_ConstantHeadToStockOutlet := 15 cm
H_ChemPlatformLedge := 5 cm = 0.05 m
H_ConstantHeadToStockBottom := H_ConstantHeadToStockOutlet - 10 cm
Z_ChemPlatformTop := FlowMeteringTank_Origin[2] + H_Et + H_ConstantHeadAboveEt + H_ConstantHeadToStockBottom
ChemPlatform_Origin := [Tank_Origin[0]; Tank_Origin[1] + W_Wall - L_ChemPlatform; Z_ChemPlatformTop]
H_ChemPlatform := Z_ChemPlatformTop - Tank_Origin[0] - H_Wall - T_TankWall = 1.99686 m
H_StairSet := H_ChemPlatform/3 = 0.66562 m
W_StairSet := H_StairSet*3/2 = 0.99843 m
# Stairs and associated platforms
W_SingleStairMin := 27 cm
H_SingleStairEst := 27 cm
W_StairPlatformMin := 40 cm
H_StairsTotal := H_ChemPlatform - 2*H_SingleStairEst = 1.45686 m
L_EtStairsAvail := W_Wall - W_Et - T_Et - W_StairPlatformMin - 15 cm = 2.09085 m
L_ChemPlatformStairsAvail := W_Wall - L_ChemPlatform - W_Et - T_Et = 1.29785 m
L_StairsAvailTotal := L_EtStairsAvail + L_ChemPlatformStairsAvail = 3.3887 m
Stair_Ratio := H_StairsTotal/L_StairsAvailTotal = 0.429917
N_Stairs := floor(L_StairsAvailTotal/W_SingleStairMin) = 12
W_SingleStair := L_StairsAvailTotal/N_Stairs = 0.282392 m
H_SingleStair := W_SingleStair*Stair_Ratio = 0.121405 m
H_ChemPlatformStairsTotal := Z_ChemPlatformTop - T_TankWall - H_Wall - T_Platform
H_ChemPlatformStairs := (H_ChemPlatformStairsTotal - 2*H_SingleStair)/3 = 0.534683 m
OpAccessLyr := layer_new("OperatorAccess", grey)
ChemPlatform := BoxF(ChemPlatform_Origin + [0; 0; H_ChemPlatformLedge], [-W_ChemPlatform; L_ChemPlatform; -T_Platform] + ChemPlatform_Origin, [0; 0; 0]*deg)
CHTPillar := BoxF([-W_ChemPlatform; 0; 0] + ChemPlatform_Origin, [
    -W_ChemPlatform + T_Et + ChemPlatform_Origin[0];
    ChemPlatform_Origin[1] + T_Et;
    Tank_Origin[2] + H_Wall
], [0; 0; 0]*deg)
N_StairsToEt := round(L_EtStairsAvail*H_SingleStair/W_SingleStair/H_SingleStair) = 7
H_StairToEt := L_EtStairsAvail*H_SingleStair/W_SingleStair/N_StairsToEt = 0.128413 m
H_EtStairsTot := H_StairToEt*N_StairsToEt = 0.898892 m
N_StairsToChemPlatform := floor((L_ChemPlatformStairsAvail - W_StairPlatformMin + W_SingleStair + 15 cm)/W_SingleStair) = 4
L_StairsToChemPlatformTot := N_StairsToChemPlatform*W_SingleStair = 1.12957 m
L_ChemPlatformStairsAvail = 1.29785 m
W_PlatformUpper := L_ChemPlatformStairsAvail - L_StairsToChemPlatformTot + 15 cm = 0.318283 m
H_StairsToChemPlatformTot := L_StairsToChemPlatformTot*H_SingleStair/W_SingleStair = 0.48562 m
H_ChemPlatformStair := H_StairsToChemPlatformTot/N_StairsToChemPlatform = 0.121405 m
H_StairToChemTanksAvail := H_ChemPlatform - H_EtStairsTot - H_StairToEt = 0.969555 m
H_StairExtra := (H_StairToChemTanksAvail - H_StairsToChemPlatformTot + H_ChemPlatformStair + H_SingleStair)/3 = 0.242248 m
W_StairPlatformMin = 0.4 m
H_StairToEt = 0.128413 m
EtStairsBox := BoxF([Tank_Origin[0]; W_Wall + Tank_Origin[1]; H_Wall + T_TankWall + Tank_Origin[2]], [
    -W_ChemPlatform/2;
    -(L_EtStairsAvail + 15 cm) + W_Wall;
    Tank_Origin[2] + T_TankWall + H_Wall + H_StairExtra
] + Tank_Origin, [0; 0; 0]*deg) = "_box 0,3,3.15 -0.636,0.75915,3.39225"
H_StairExtra = 0.242248 m
Tank_Origin[2] + T_TankWall + H_Wall + H_StairExtra - 2*H_SingleStair
H_StairExtra - 2*H_SingleStair = -0.000561734 m
EtStairs := Stairs([
    FlowMeteringTank_Origin[0] - W_ChemPlatform/2;
    W_Et + T_Et + W_StairPlatformMin + FlowMeteringTank_Origin[1];
    H_EtStairsTot + Tank_Origin[2] + T_TankWall + H_Wall + H_StairExtra - H_StairToEt
], W_ChemPlatform/2, H_EtStairsTot, 90 deg)
EtPlatform := BoxF([
    FlowMeteringTank_Origin[0];
    W_Et + T_Et + FlowMeteringTank_Origin[1];
    Tank_Origin[2] + H_Wall + T_TankWall
], [
    FlowMeteringTank_Origin[0] - W_ChemPlatform;
    W_Et + T_Et + FlowMeteringTank_Origin[1] + W_StairPlatformMin;
    Tank_Origin[2] + H_Wall + T_TankWall + H_EtStairsTot + 2*H_StairExtra - H_StairToEt
] + Tank_Origin, [0; 0; 0]*deg)
EtPlatformLeft := BoxF([
    FlowMeteringTank_Origin[0] - W_ChemPlatform/2;
    W_Et + T_Et + FlowMeteringTank_Origin[1];
    Tank_Origin[2] + H_Wall + T_TankWall + H_EtStairsTot
], [
    FlowMeteringTank_Origin[0] - W_ChemPlatform;
    ChemPlatform_Origin[1];
    Tank_Origin[2] + H_Wall + T_TankWall + H_EtStairsTot + 3*H_StairExtra - H_StairToEt
] + Tank_Origin, [0; 0; 0]*deg)
UpperPlatform := BoxF([
    FlowMeteringTank_Origin[0] - W_ChemPlatform/2;
    ChemPlatform_Origin[1] - 11.67 cm;
    Z_ChemPlatformTop + H_ChemPlatformLedge
], [
    FlowMeteringTank_Origin[0] - W_ChemPlatform;
    ChemPlatform_Origin[1];
    Z_ChemPlatformTop - H_StairExtra - H_StairsToChemPlatformTot
] + Tank_Origin, [0; 0; 0]*deg)
UpperPlatformExtra := BoxF([
    FlowMeteringTank_Origin[0] - W_ChemPlatform/2;
    ChemPlatform_Origin[1] + 17.33 cm;
    Z_ChemPlatformTop + H_ChemPlatformLedge
], [FlowMeteringTank_Origin[0] - W_ChemPlatform; ChemPlatform_Origin[1]; Z_ChemPlatformTop] + Tank_Origin, [0; 0; 0]*deg)
WestPlatform := BoxF([
    FlowMeteringTank_Origin[0] - L_Et - T_Et;
    FlowMeteringTank_Origin[1] + W_Et;
    Tank_Origin[2] + H_Wall + T_TankWall + H_EtStairsTot + 3*H_StairExtra - H_StairToEt
], [
    FlowMeteringTank_Origin[0] - W_ChemPlatform;
    W_Et + T_Et + FlowMeteringTank_Origin[1];
    Tank_Origin[2] + H_Wall + T_TankWall
] + Tank_Origin, [0; 0; 0]*deg) = "_box -0.79368,0.28415,4.64722 -1.272,0.35915,3.15"
ChemPlatformStairs := Stairs([
    FlowMeteringTank_Origin[0] - W_ChemPlatform/2;
    W_Et + T_Et + FlowMeteringTank_Origin[1] + W_StairPlatformMin - W_SingleStair + L_StairsToChemPlatformTot;
    H_EtStairsTot + Tank_Origin[2] + T_TankWall + H_Wall + 3*H_StairExtra - H_StairToEt + H_StairsToChemPlatformTot - H_ChemPlatformStair
], W_ChemPlatform/2, H_StairsToChemPlatformTot, -90 deg)
OpAccessFrz := FreezeLayer("OperatorAccess")
ChemPlatformLedgeBox := BoxF(ChemPlatform_Origin + [0; 5 cm; H_ChemPlatformLedge], [-W_ChemPlatform + 5 cm; L_ChemPlatform; 0] + ChemPlatform_Origin, [0; 0; 0]*deg)
SubtractChemPlatformLedge := SubtractF(["OperatorAccess"], "DeleteMe")
OpAccessSelect := SelectLayer("OperatorAccess")
OpAccessScript := stack(OpAccessLyr, ChemPlatform, CHTPillar, EtStairs, EtStairsBox, EtPlatform, EtPlatformLeft, ChemPlatformStairs, UpperPlatform, WestPlatform, Union_All, OpAccessFrz, ChemPlatformLedgeBox, GroupDelete, SubtractChemPlatformLedge, OpAccessSelect, UpperPlatformExtra, OpAccessFrz)
# Backwash Buckets, Drain Channel
H_BackwashBoxes := .191 m  # From India 3
R_FitHand := 5 cm
BwBucketsLyr := layer_new("BwBuckets", yellow)
NorthBwBucketOuter := CylinderF([
    -cos(AN_BwMod)*L_FiBwVertCenterLine + FiPipe_Origin[0] - R_FitHand;
    -sin(AN_BwMod)*L_FiBwVertCenterLine + FiPipe_Origin[1];
    Tank_Origin[2] + H_Wall + T_TankWall
], 1.8*ConRadius(ND_FiBwDrain) + R_FitHand, H_BackwashBoxes, [0; 90; 0]*deg)
MirrorBwBucket := MirrorLast([Tank_Origin[0]; FiPipe_Origin[1] - L_ChannelAvail/2], [Tank_Origin[0] - zc; FiPipe_Origin[1] - L_ChannelAvail/2], "n")
MidBwBucketOuter := CylinderF([
    -cos(AN_BwMod)*L_FiBwVertCenterLine + FiPipe_Origin[0] - R_FitHand;
    -sin(AN_BwMod)*L_FiBwVertCenterLine + FiPipe_Origin[1] - B_Fi;
    Tank_Origin[2] + H_Wall + T_TankWall
], 1.8*ConRadius(ND_FiBwDrain) + R_FitHand, H_BackwashBoxes, [0; 90; 0]*deg)
FreezeBwBuckets := FreezeLayer("BwBuckets")
NorthBwBucketInner := CylinderF([
    -cos(AN_BwMod)*L_FiBwVertCenterLine + FiPipe_Origin[0] - R_FitHand;
    -sin(AN_BwMod)*L_FiBwVertCenterLine + FiPipe_Origin[1];
    Tank_Origin[2] + H_Wall + T_TankWall + .08*ConRadius(ND_FiBwDrain)
], 1.72*ConRadius(ND_FiBwDrain) + R_FitHand, H_BackwashBoxes, [0; 90; 0]*deg)
MidBwBucketInner := CylinderF([
    -cos(AN_BwMod)*L_FiBwVertCenterLine + FiPipe_Origin[0] - R_FitHand;
    -sin(AN_BwMod)*L_FiBwVertCenterLine + FiPipe_Origin[1];
    Tank_Origin[2] + H_Wall + T_TankWall + .08*ConRadius(ND_FiBwDrain)
], 1.72*ConRadius(ND_FiBwDrain) + R_FitHand, H_BackwashBoxes, [0; 90; 0]*deg)
SubtractBwBuckets := SubtractF(["BwBuckets"], "DeleteMe")
DrainChannelLyr := layer_new("DrainChannel", grey)
DCBox := BoxF([
    -cos(AN_BwMod)*L_FiBwVertCenterLine + ConRadius(ND_FiBwDrain) + FiPipe_Origin[0] + 2*S_Fitting;
    FlowDistributionTank_Origin[1];
    Tank_Origin[2] + H_Wall + T_TankWall
], [
    -cos(AN_BwMod)*L_FiBwVertCenterLine + ConRadius(ND_FiBwDrain) + FiPipe_Origin[0] + T_Et + 2*S_Fitting;
    FlowDistributionTank_Origin[1] + W_Wall;
    Tank_Origin[2] + H_Wall + T_TankWall + H_DrainChannel
], [0; 0; 0]*deg)
DrainChannelFrz := FreezeLayer("DrainChannel")
DrainChannel := stack(BwBucketsLyr, NorthBwBucketOuter, MirrorBwBucket, MidBwBucketOuter, FreezeBwBuckets, NorthBwBucketInner, MirrorBwBucket, MidBwBucketInner, GroupDelete, SubtractBwBuckets, DrainChannelLyr, DCBox, DrainChannelFrz)
# Chem Tanks
CoagTank_Origin := [
    -max(R_CoagTank, R_ChlorineTank) + ChemPlatform_Origin[0] - S_Fitting/2;
    -(S_Fitting/2 + R_CoagTank) + ChemPlatform_Origin[1] + W_ChemPlatform;
    ChemPlatform_Origin[2]
]
ChemTankLyr := layer_new("ChemicalTanks", yellow)
CoagTank := CylinderF(CoagTank_Origin, R_CoagTank + T_ChemTankWall, H_CoagTank + T_ChemTankWall, [0; 90]*deg)
ChemTankFrz := FreezeLayer("ChemicalTanks")
CoagTankInner := CylinderF(CoagTank_Origin + [0; 0; T_ChemTankWall], R_CoagTank, H_CoagTank, [0; 90]*deg)
HollowTanks := SubtractF(["ChemicalTanks"], "DeleteMe")
ChemTanksScript := stack(ChemTankLyr, CoagTank, ChemTankFrz, CoagTankInner, GroupDelete, HollowTanks, ThawMultiple(["ChemicalTanks"]), Array_All(1, 2, -(2*R_CoagTank + S_Fitting/2)), FreezeLayer("ChemicalTanks"))
# Slotted Pipe Molded
L_slots := .039 m
# From India 3. The team is currently working on this. Check the Spring 2014 design file?
W_slots := 2*10^-4*m
N_slots := 629.921*1/m
SlottedPipe_Origin := [0; 0; 0]*m
OuterMold_Origin := [outerdiameter(ND_FiManTrunk)/2 - L_BranchExtend; -(1.1*ConRadius(ND_FiManBranch)); 0] + SlottedPipe_Origin
FiSlottedSampleLyr := layer_new("FiSlottedSample", blue)
SlottedPipe := PipeF([0; 0; 0]*m, L_FiManBranch[0], [0; 0]*deg, ND_FiManBranch, PS_Fi)
FiSlottedSampleFrz := FreezeLayer("FiSlottedSample")
PipeMoldOuter := CylinderF(OuterMold_Origin, outerdiameter(ND_FiManTrunk)/2, 2.2*ConRadius(ND_FiManBranch), [270; 0]*deg)
PipeSubtraction := CylinderF(SlottedPipe_Origin, D_BranchSlotOrifice/2, outerdiameter(ND_FiManTrunk), [0; 0]*deg)
SubtractMold := SubtractAll(OuterMold_Origin)
SquishPipe := SubtractF(["FiSlottedSample"], "DeleteMe")
L_SlotFromCenter := sqrt((innerdiameter(ND_FiManBranch, PS_Fi)/2)^2 - (L_slots/2)^2)
L_FiBranchAvail := L_FiManBranch[0] - 0.75*CapHeight(ND_FiManBranch) - L_BranchExtend = 0.0373547 m
B_Slots := (L_FiBranchAvail - W_slots)/(0.5*N_slots*L_FiBranchAvail - 1) = 0.00345135 m
N_FiSlotsOneSide := Ceil(L_FiBranchAvail*N_slots*0.5, 1) = 12
SlotBox := BoxF([
    -L_BranchExtend - 0.25*CapHeight(ND_FiManBranch) - W_slots;
    L_SlotFromCenter;
    outerdiameter(ND_FiManBranch)
] + SlottedPipe_Origin, [
    -L_BranchExtend - 0.25*CapHeight(ND_FiManBranch);
    outerdiameter(ND_FiManBranch);
    -outerdiameter(ND_FiManBranch)
] + SlottedPipe_Origin, [0; 0; 0]*deg)
MirrorSlot := MirrorLast([SlottedPipe_Origin[0]; SlottedPipe_Origin[1]], [SlottedPipe_Origin[0] - zc; SlottedPipe_Origin[1]], "n")
ArraySlots := Array_All(1, N_FiSlotsOneSide, -B_Slots)
SubtractSlots := SubtractF(["FiSlottedSample"], "DeleteMe")
SlottedSampleCapLyr := layer_new("FiSlottedCapSample", red)
SampleCap := CutCapF(SlottedPipe_Origin - [L_FiManBranch[0]; 0; 0], CapHeight(ND_FiManBranch)/2, [180; 0]*deg, ND_FiManBranch)
SlottedSampleCapFrz := FreezeLayer("FiSlottedCapSample")
FiSlottedSample := stack(FiSlottedSampleLyr, SlottedPipe, FiSlottedSampleFrz, PipeMoldOuter, GroupDelete, PipeSubtraction, SubtractMold, SquishPipe, SlotBox, MirrorSlot, ArraySlots, GroupDelete, SubtractSlots, SlottedSampleCapLyr, SampleCap, SlottedSampleCapFrz)
# Filtered Water Plumbing
ND_CleanWaterOutlet := .025 m  # From India 3
# L means the lower line for waste
# U means the upper line for storage
CleanWaterElbowFromFiSouth_Origin := [
    -(cos(AN_FiIn)*L_FiPipeToOutletVertCenterLine) + FiPipe_Origin[0];
    Tank_Origin[1] + 2*ConRadius(ND_RMPipe) + ConRadius(ND_FiInlet);
    FiOutletManElbow_Origin[2] + 4*T_FiLayer + 2*SocketDepth(ND_FiInlet) + ShortTeeLength(ND_FiInlet)
]
CleanWaterTeeToStorageU_Origin := [
    CleanWaterElbowFromFiSouth_Origin[0];
    FiPipe3_Origin[1] + (FiPipe2_Origin[1] - FiPipe3_Origin[1])*0.5;
    CleanWaterElbowFromFiSouth_Origin[2] + ElbowRadius(ND_FiInlet) - ShortTeeLength(ND_FiInlet)
]
CleanWaterElbowToStorageL_Origin := [
    CleanWaterTeeToStorageU_Origin[0];
    CleanWaterTeeToStorageU_Origin[1] + ElbowRadius(ND_FiInlet);
    FiPipe_Origin[2]
]
CleanWaterTeeToWasteSouth_Origin := CleanWaterTeeToStorageU_Origin + [0; -(TeeLength(ND_FiInlet) + 2*SocketDepth(ND_FiInlet) + BallValveLength(ND_FiInlet)); 0]
CleanWaterReducerToWasteSouth_Origin := CleanWaterTeeToWasteSouth_Origin + [0; 0; -2*SocketDepth(ND_FiInlet)]
WasteValveSouth_Origin := CleanWaterReducerToWasteSouth_Origin + [0; 0; -2*SocketDepth(ND_CleanWaterOutlet) - BallValveSocket(ND_CleanWaterOutlet)]
CleanWaterValveSouth_Origin := CleanWaterTeeToWasteSouth_Origin + [
    0;
    ShortTeeLength(ND_FiInlet) + SocketDepth(ND_FiInlet) + BallValveLength(ND_FiInlet) - BallValveSocket(ND_FiInlet);
    ShortTeeLength(ND_FiInlet)
]
CleanWaterValveMid_Origin := CleanWaterTeeToStorageU_Origin + [
    0;
    ShortTeeLength(ND_FiInlet) + SocketDepth(ND_FiInlet) + BallValveLength(ND_FiInlet) - BallValveSocket(ND_FiInlet);
    ShortTeeLength(ND_FiInlet)
]
CleanWaterTeeToWasteMid_Origin := CleanWaterTeeToStorageU_Origin + [0; TeeLength(ND_FiInlet) + 2*SocketDepth(ND_FiInlet) + BallValveLength(ND_FiInlet); 0]
CleanWaterReducerToWasteMid_Origin := CleanWaterTeeToWasteMid_Origin + [0; 0; -2*SocketDepth(ND_FiInlet)]
WasteValveMid_Origin := CleanWaterReducerToWasteMid_Origin + [0; 0; -2*SocketDepth(ND_CleanWaterOutlet) - BallValveSocket(ND_CleanWaterOutlet)]
CleanWaterElbowFromFiNorth_Origin := [
    -(cos(AN_FiIn)*L_FiPipeToOutletVertCenterLine) + FiPipe_Origin[0];
    sin(AN_FiIn)*L_FiPipeToOutletVertCenterLine + FiPipe_Origin[1];
    CleanWaterElbowFromFiSouth_Origin[2]
]
CleanWaterElbowFromFiMid_Origin := CleanWaterElbowFromFiNorth_Origin + [0; -B_Fi; 0]
CleanWaterElbowToStorageU_Origin := [0; 2*ConRadius(ND_FiInlet) + S_Fitting; 0] + CleanWaterElbowFromFiMid_Origin
CleanWaterTeeToWasteNorth_Origin := CleanWaterElbowToStorageU_Origin + [
    0;
    2*SocketDepth(ND_FiInlet) + BallValveLength(ND_FiInlet) + ShortTeeLength(ND_FiInlet) + ElbowRadius(ND_FiInlet);
    -ShortTeeLength(ND_FiInlet) + ElbowRadius(ND_FiInlet)
]
CleanWaterReducerToWasteNorth_Origin := CleanWaterTeeToWasteNorth_Origin + [0; 0; -2*SocketDepth(ND_FiInlet)]
WasteValveNorth_Origin := CleanWaterReducerToWasteNorth_Origin + [0; 0; -2*SocketDepth(ND_CleanWaterOutlet) - BallValveSocket(ND_CleanWaterOutlet)]
CleanWaterValveNorth_Origin := CleanWaterElbowToStorageU_Origin + [
    0;
    SocketDepth(ND_FiInlet) + BallValveLength(ND_FiInlet) - BallValveSocket(ND_FiInlet) + ElbowRadius(ND_FiInlet);
    ElbowRadius(ND_FiInlet)
]
CleanWaterTeeToStorageL_Origin := [
    CleanWaterElbowToStorageU_Origin[0];
    CleanWaterElbowToStorageU_Origin[1];
    FiPipe_Origin[2] + ShortTeeLength(ND_FiInlet)
] = [1.13812; 0.474853; 0.728966] m
CleanWaterElbowToStorageNorth_Origin := [
    CleanWaterElbowFromFiNorth_Origin[0];
    Tank_Origin[1] + W_Wall - ConRadius(ND_FiInlet) - ElbowRadius(ND_FiInlet);
    CleanWaterTeeToStorageL_Origin[2] - ShortTeeLength(ND_FiInlet)
]
FiAuxFittingsLyr := layer_new("AuxFittings", green)
CleanWaterElbowFromFiSouth := ElbowF(CleanWaterElbowFromFiSouth_Origin, [270; 270; 0]*deg, ND_FiInlet, PS_Fi)
CleanWaterTeeToWasteSouth := TeeF(CleanWaterTeeToWasteSouth_Origin, [90; 270; 0]*deg, ND_FiInlet, PS_Fi)
CleanWaterReducerToWasteSouth := reducerF(CleanWaterReducerToWasteSouth_Origin, [0; 270; 0]*deg, ND_FiInlet, ND_CleanWaterOutlet, SocketDepth(ND_CleanWaterOutlet), PS_Fi)
CleanWaterTeeToStorageU := TeeF(CleanWaterTeeToStorageU_Origin, [90; 270; 0]*deg, ND_FiInlet, PS_Fi)
CleanWaterTeeToWasteMid := TeeF(CleanWaterTeeToWasteMid_Origin, [90; 270; 0]*deg, ND_FiInlet, PS_Fi)
CleanWaterReducerToWasteMid := reducerF(CleanWaterReducerToWasteMid_Origin, [0; 270; 0]*deg, ND_FiInlet, ND_CleanWaterOutlet, SocketDepth(ND_CleanWaterOutlet), PS_Fi)
CleanWaterElbowFromFiMid := ElbowF(CleanWaterElbowFromFiMid_Origin, [90; 90; 0]*deg, ND_FiInlet, PS_Fi)
CleanWaterElbowFromFiNorth := ElbowF(CleanWaterElbowFromFiNorth_Origin, [90; 90; 0]*deg, ND_FiInlet, PS_Fi)
CleanWaterTeeToStorageL := TeeF(CleanWaterTeeToStorageL_Origin, [90; 90; 0]*deg, ND_FiInlet, PS_Fi)
CleanWaterElbowToStorageL := ElbowF(CleanWaterElbowToStorageL_Origin, [180; 270; 0]*deg, ND_FiInlet, PS_Fi)
CleanWaterTeeToWasteNorth := TeeF(CleanWaterTeeToWasteNorth_Origin, [90; 270; 0]*deg, ND_FiInlet, PS_Fi)
CleanWaterReducerToWasteNorth := reducerF(CleanWaterReducerToWasteNorth_Origin, [0; 270; 0]*deg, ND_FiInlet, ND_CleanWaterOutlet, SocketDepth(ND_CleanWaterOutlet), PS_Fi)
CleanWaterElbowToStorageU := ElbowF(CleanWaterElbowToStorageU_Origin, [270; 270; 0]*deg, ND_FiInlet, PS_Fi)
CleanWaterValveNorth := InsertDwg(BallValveDwg, [CleanWaterValveNorth_Origin[1]; CleanWaterValveNorth_Origin[2]; CleanWaterValveNorth_Origin[0]], ND_FiInlet, 0 deg)
CleanWaterValveMid := InsertDwg(BallValveDwg, [CleanWaterValveMid_Origin[1]; CleanWaterValveMid_Origin[2]; CleanWaterValveMid_Origin[0]], ND_FiInlet, 0 deg)
CleanWaterValveSouth := InsertDwg(BallValveDwg, [CleanWaterValveSouth_Origin[1]; CleanWaterValveSouth_Origin[2]; CleanWaterValveSouth_Origin[0]], ND_FiInlet, 0 deg)
WasteValveNorth := InsertDwg(BallValveDwg, [WasteValveNorth_Origin[1]; WasteValveNorth_Origin[2]; WasteValveNorth_Origin[0]], ND_CleanWaterOutlet, 90 deg)
WasteValveMid := InsertDwg(BallValveDwg, [WasteValveMid_Origin[1]; WasteValveMid_Origin[2]; WasteValveMid_Origin[0]], ND_CleanWaterOutlet, 90 deg)
WasteValveSouth := InsertDwg(BallValveDwg, [WasteValveSouth_Origin[1]; WasteValveSouth_Origin[2]; WasteValveSouth_Origin[0]], ND_CleanWaterOutlet, 90 deg)
StorageAndWasteValves := stack(view("r"), CleanWaterValveNorth, CleanWaterValveMid, CleanWaterValveSouth, WasteValveNorth, WasteValveMid, WasteValveSouth, view("t"))
FiAuxFittingsFrz := FreezeLayer("AuxFittings")
FiAuxFit := stack(FiAuxFittingsLyr, CleanWaterElbowFromFiSouth, CleanWaterTeeToWasteSouth, CleanWaterReducerToWasteSouth, CleanWaterElbowFromFiMid, CleanWaterElbowFromFiNorth, CleanWaterTeeToStorageL, CleanWaterTeeToWasteMid, CleanWaterReducerToWasteMid, CleanWaterTeeToStorageU, CleanWaterElbowToStorageL, CleanWaterTeeToWasteNorth, CleanWaterReducerToWasteNorth, CleanWaterElbowToStorageU, StorageAndWasteValves, FiAuxFittingsFrz)
FiAuxPipesLyr := layer_new("AuxPipes", blue)
L_SouthCleanWaterPipeU := CleanWaterTeeToWasteSouth_Origin[1] - CleanWaterElbowFromFiSouth_Origin[1] - ShortTeeLength(ND_FiInlet) - ElbowRadius(ND_FiInlet)
L_MidCleanWaterPipeU := CleanWaterElbowFromFiMid_Origin[1] - CleanWaterTeeToWasteMid_Origin[1] - ShortTeeLength(ND_FiInlet) - ElbowRadius(ND_FiInlet)
L_NorthCleanWaterPipeU := CleanWaterElbowFromFiNorth_Origin[1] - CleanWaterTeeToWasteNorth_Origin[1] - ShortTeeLength(ND_FiInlet) - ElbowRadius(ND_FiInlet)
L_SouthPipeToStorage := CleanWaterTeeToStorageU_Origin[2] - CleanWaterElbowToStorageL_Origin[2] - ElbowRadius(ND_FiInlet)
L_NorthPipeToStorage := CleanWaterElbowToStorageU_Origin[2] - CleanWaterElbowToStorageL_Origin[2] - ShortTeeLength(ND_FiInlet)
L_CleanWaterPipeL := CleanWaterElbowToStorageNorth_Origin[1] - ShortTeeLength(ND_FiInlet) - CleanWaterTeeToStorageL_Origin[1]
L_SouthCleanWaterPipeL := CleanWaterTeeToStorageL_Origin[1] - CleanWaterElbowToStorageL_Origin[1] - ShortTeeLength(ND_FiInlet)
L_WastePipeNorth := (WasteValveNorth_Origin[2] - Tank_Origin[2] - H_Wall - T_Floor)*.50
L_WastePipeMid := (WasteValveNorth_Origin[2] - Tank_Origin[2] - H_Wall - T_Floor)*.50
L_WastePipeSouth := (WasteValveNorth_Origin[2] - Tank_Origin[2] - H_Wall - T_Floor)*.50
FiSouthCleanWaterPipeU := PipeF(CleanWaterElbowFromFiSouth_Origin + [0; ElbowRadius(ND_FiInlet); ElbowRadius(ND_FiInlet)], L_SouthCleanWaterPipeU, [270; 0; 0]*deg, ND_FiInlet, PS_Fi)
FiMidCleanWaterPipeU := PipeF(CleanWaterElbowFromFiMid_Origin + [0; -ElbowRadius(ND_FiInlet); ElbowRadius(ND_FiInlet)], L_MidCleanWaterPipeU, [90; 0; 0]*deg, ND_FiInlet, PS_Fi)
FiNorthCleanWaterPipeU := PipeF(CleanWaterElbowFromFiNorth_Origin + [0; -ElbowRadius(ND_FiInlet); ElbowRadius(ND_FiInlet)], L_NorthCleanWaterPipeU, [90; 0; 0]*deg, ND_FiInlet, PS_Fi)
FiSouthCleanWaterPipeL := PipeF(CleanWaterTeeToStorageL_Origin + [0; -ShortTeeLength(ND_FiInlet); -ShortTeeLength(ND_FiInlet)], L_SouthCleanWaterPipeL, [90; 0; 0]*deg, ND_FiInlet, PS_Fi)
FiNorthCleanWaterPipeL := PipeF(CleanWaterElbowToStorageNorth_Origin, L_CleanWaterPipeL, [90; 0; 0]*deg, ND_FiInlet, PS_Fi)
FiNorthWastePipe := PipeF(WasteValveNorth_Origin + [0; 0; -BallValveLength(ND_FiInlet) + 2*SocketDepth(ND_FiInlet)], (WasteValveNorth_Origin[2] - Tank_Origin[2] - H_Wall - T_Floor)*.50, [0; 270; 0]*deg, ND_CleanWaterOutlet, PS_Fi)
FiMidWastePipe := PipeF(WasteValveMid_Origin + [0; 0; -BallValveLength(ND_FiInlet) + 2*SocketDepth(ND_FiInlet)], (WasteValveNorth_Origin[2] - Tank_Origin[2] - H_Wall - T_Floor)*.50, [0; 270; 0]*deg, ND_CleanWaterOutlet, PS_Fi)
FiSouthWastePipe := PipeF(WasteValveSouth_Origin + [0; 0; -BallValveLength(ND_FiInlet) + 2*SocketDepth(ND_FiInlet)], (WasteValveNorth_Origin[2] - Tank_Origin[2] - H_Wall - T_Floor)*.50, [0; 270; 0]*deg, ND_CleanWaterOutlet, PS_Fi)
SouthPipeToStorage := PipeF(CleanWaterTeeToStorageU_Origin, L_SouthPipeToStorage, [0; 270; 0]*deg, ND_FiInlet, PS_Fi)
NorthPipeToStorage := PipeF(CleanWaterElbowToStorageU_Origin, L_NorthPipeToStorage, [0; 270; 0]*deg, ND_FiInlet, PS_Fi)
FiAuxPipesFrz := FreezeLayer("AuxPipes")
FiAuxPipes := stack(FiAuxPipesLyr, FiSouthCleanWaterPipeU, FiMidCleanWaterPipeU, FiNorthCleanWaterPipeU, FiSouthCleanWaterPipeL, FiNorthCleanWaterPipeL, FiNorthWastePipe, FiMidWastePipe, FiSouthWastePipe, SouthPipeToStorage, NorthPipeToStorage, FiAuxPipesFrz)
FiAuxPlumbing := stack(FiAuxFit, FiAuxPipes)
# Plumbing To Storage
H_Bucket5Gal := .5 m  # This is from India 3 but where is it first?
CleanWaterElbowToStorageNorthU_Origin := [
    CleanWaterElbowToStorageNorth_Origin[0];
    ElbowRadius(ND_FiInlet) + CleanWaterElbowToStorageNorth_Origin[1];
    CleanWaterElbowToStorageNorth_Origin[2] + ElbowRadius(ND_FiInlet) + H_Bucket5Gal
]
CleanWaterTeeToStorage_Origin := [
    FiPipe_Origin[0] + ConRadius(ND_FiPipe) + ConRadius(ND_FiInlet);
    CleanWaterElbowToStorageNorth_Origin[1] + ElbowRadius(ND_FiInlet);
    CleanWaterElbowToStorageNorthU_Origin[2] + ElbowRadius(ND_FiInlet) - ShortTeeLength(ND_FiInlet)
]
CleanWaterOutletReducer_Origin := CleanWaterTeeToStorage_Origin + [0; 0; -2*SocketDepth(ND_FiInlet)]
CleanWaterCouplingToStorage_Origin := [
    CleanWaterTeeToStorage_Origin[0] + ShortTeeLength(ND_FiInlet) + 2*SocketDepth(ND_FiInlet) + ElbowRadius(ND_FiInlet);
    CleanWaterTeeToStorage_Origin[1];
    Tank_Origin[2] + H_Wall + T_TankWall - SocketDepth(ND_FiInlet)
]
CleanWaterOutletElbow_Origin := [
    CleanWaterCouplingToStorage_Origin[0];
    CleanWaterCouplingToStorage_Origin[1];
    CleanWaterTeeToStorage_Origin[2] + ShortTeeLength(ND_FiInlet) - ElbowRadius(ND_FiInlet)
]
CleanWaterOutletValve_Origin := [
    CleanWaterOutletReducer_Origin[0];
    CleanWaterOutletReducer_Origin[1];
    CleanWaterOutletReducer_Origin[2] - (2*SocketDepth(ND_CleanWaterOutlet) + BallValveSocket(ND_CleanWaterOutlet))
]
FiFitToStorageLyr := layer_new("FiFittingsToStorage", green)
FiCleanWaterElbowNorth := ElbowF(CleanWaterElbowToStorageNorth_Origin, [0; 90; 0]*deg, ND_FiInlet, PS_Fi)
FiCleanWaterElbowNorthU := ElbowF(CleanWaterElbowToStorageNorthU_Origin, [180; 0; 270]*deg, ND_FiInlet, PS_Fi)
FiCleanWaterTeeToStorage := TeeF(CleanWaterTeeToStorage_Origin, [0; 0; 270]*deg, ND_FiInlet, PS_Fi)
FiCleanWaterCouplingToStorage := CouplingSUBF(CleanWaterCouplingToStorage_Origin, [0; 270; 0]*deg, ND_FiInlet, PS_Fi, ["Room"])
FiCleanWaterOutletReducer := reducerF(CleanWaterOutletReducer_Origin, [0; 270; 0]*deg, ND_FiInlet, ND_CleanWaterOutlet, SocketDepth(ND_CleanWaterOutlet), PS_Fi)
FiCleanWaterOutletElbow := ElbowF(CleanWaterOutletElbow_Origin, [0; 0; 90]*deg, ND_FiInlet, PS_Fi)
FiCleanWaterOutletValve := stack(view("f"), InsertDwg(BallValveDwg, [CleanWaterOutletValve_Origin[0]; CleanWaterOutletValve_Origin[2]; -CleanWaterOutletValve_Origin[1]], ND_CleanWaterOutlet, 90 deg), view("t"))
FiFitToStorageFrz := FreezeLayer("FiFittingsToStorage")
FiFitToStorage := stack(FiFitToStorageLyr, FiCleanWaterElbowNorth, FiCleanWaterElbowNorthU, FiCleanWaterTeeToStorage, FiCleanWaterCouplingToStorage, FiCleanWaterOutletReducer, FiCleanWaterOutletValve, FiCleanWaterOutletElbow, FiFitToStorageFrz)
FiPlumbingToStorageLyr := layer_new("FiPlumbingToStorage", blue)
L_FiUpCleanWaterPipe := CleanWaterElbowToStorageNorthU_Origin[2] - CleanWaterElbowToStorageNorth_Origin[2] - ElbowRadius(ND_FiInlet)
L_FiPerpCleanWaterPipe := CleanWaterTeeToStorage_Origin[0] - CleanWaterElbowToStorageNorthU_Origin[0] - ShortTeeLength(ND_FiInlet) - ElbowRadius(ND_FiInlet)
L_FiDownCleanWaterPipe := CleanWaterOutletElbow_Origin[2] - CleanWaterCouplingToStorage_Origin[2]
L_FiIntCleanWaterPipe := 0.9*H_Wall
FiUpCleanWaterPipe := PipeF(CleanWaterElbowToStorageNorthU_Origin, L_FiUpCleanWaterPipe, [0; 270; 0]*deg, ND_FiInlet, PS_Fi)
FiPerpCleanWaterPipe := PipeF(CleanWaterTeeToStorage_Origin + [-ShortTeeLength(ND_FiInlet); 0; ShortTeeLength(ND_FiInlet)], L_FiPerpCleanWaterPipe, [0; 0; 0]*deg, ND_FiInlet, PS_Fi) = ["_cylinder 2.24983,2.82379,1.88937 0.16192 a 1.59532,2.82379,1.88937"; "_cylinder 2.25983,2.82379,1.88937 0.15161 a 1.58532,2.82379,1.88937"; "_zoom w 1.58532,2.65186,1.88937 1.60532,2.99571,1.88937"; "_subtract 1.59532,2.98571,1.88937  1.58532,2.9754,1.88937 "]
FiDownCleanWaterPipe := PipeF(CleanWaterOutletElbow_Origin, L_FiDownCleanWaterPipe, [0; 270; 0]*deg, ND_FiInlet, PS_Fi)
FiIntCleanWaterPipe := PipeSUBF(CleanWaterCouplingToStorage_Origin + [0; 0; -CouplingLength(ND_FiInlet) + 2*SocketDepth(ND_FiInlet)], L_FiIntCleanWaterPipe, [0; 270; 0]*deg, ND_FiInlet, PS_Fi, ["Room"])
FiPlumbingToStorageFrz := FreezeLayer("FiPlumbingToStorage")
FiPipesToStorage := stack(FiPlumbingToStorageLyr, FiUpCleanWaterPipe, FiPerpCleanWaterPipe, FiDownCleanWaterPipe, FiIntCleanWaterPipe, FiPlumbingToStorageFrz)
FiToStoragePlumbing := stack(FiFitToStorage, FiPipesToStorage)
# LFOM Plumbing
FiLfomCoupling_Origin := [-L_Et + S_Fitting + ConRadius(ND_RMPipe); ConRadius(ND_RMPipe); -SocketDepth(ND_RMPipe)] + FlowMeteringTank_Origin
FiLfomElbow_Origin := [
    FiLfomCoupling_Origin[0];
    FiLfomCoupling_Origin[1];
    FlowDistributionTank_Origin[2] - max(CouplingLength(ND_RMPipe), T_Et) - SocketDepth(ND_RMPipe)
]
FiDistInletCoupling_Origin := [
    -S_Fitting - ConRadius(ND_RMPipe) + FlowDistributionTank_Origin[0];
    FiLfomCoupling_Origin[1];
    -SocketDepth(ND_RMPipe) + FlowDistributionTank_Origin[2]
]
FiDistInletElbow_Origin := [
    FiDistInletCoupling_Origin[0];
    FiLfomCoupling_Origin[1];
    FlowDistributionTank_Origin[2] - max(CouplingLength(ND_RMPipe), T_Et) - SocketDepth(ND_RMPipe)
]
RMPipeLyr := layer_new("RapidMixPipes", blue)
FiLfom := PipeF(FiLfomCoupling_Origin, H_Et, [0; 90]*deg, ND_RMPipe, PS_Fi)
LfomOrifices :=
    Local ← FiLfom
    for h ∈ 0 .. last(H_LfomOrifices)
        if N_LfomOrifices[h] ≠ 0
            Local ← stack(Local, CylinderF([
                FiLfomCoupling_Origin[0];
                FiLfomCoupling_Origin[1];
                FlowMeteringTank_Origin[2] + CapHeight(ND_EtFloat) + S_Fitting + H_LfomOrifices[h]
            ], D_LfomOrifices/2, outerradius(ND_RMPipe) + zc, [
                (asin(0.5*S_LfomOrificesMin/(2*outerradius(ND_RMPipe))) + asin(D_LfomOrifices/(2*outerradius(ND_RMPipe))))*(mod(h, 2) == 0);
                0 deg
            ]))
        if N_LfomOrifices[h] > 1
            Local ← stack(Local, ArrayLastPolar([
                FiLfomCoupling_Origin[0];
                FiLfomCoupling_Origin[1];
                FlowMeteringTank_Origin[2] + CapHeight(ND_EtFloat) + S_Fitting + H_LfomOrifices[h]
            ], N_LfomOrifices[h], (N_LfomOrifices[h] - 1)*(2*asin(D_LfomOrifices/(2*outerradius(ND_RMPipe))) + 2*asin(S_LfomOrificesMin/(2*outerradius(ND_RMPipe))))))
    return Local
SubtractLfomOrifices := stack(view("t"), SubtractAll(FiLfomCoupling_Origin + [0; outerradius(ND_RMPipe); 0]))
L_RMPipeEast := FiLfomCoupling_Origin[2] - FiLfomElbow_Origin[2] - CouplingLength(ND_RMPipe) + 2*SocketDepth(ND_RMPipe)
L_RMPipeWest := FiDistInletCoupling_Origin[2] - FiDistInletElbow_Origin[2] - CouplingLength(ND_RMPipe) + 2*SocketDepth(ND_RMPipe)
L_RMPipeHoriz := FiLfomElbow_Origin[0] - FiDistInletElbow_Origin[0] - 2*ElbowRadius(ND_RMPipe)
RMPipeEastVert := PipeSUBF(FiLfomElbow_Origin, L_RMPipeEast, [0; 90]*deg, ND_RMPipe, PS_Fi, ["FlowMeteringTank"])
RMPipeWestVert := PipeSUBF(FiDistInletElbow_Origin, L_RMPipeWest, [0; 90]*deg, ND_RMPipe, PS_Fi, ["FlowDistributionTank"])
RMPipeHoriz := PipeF(FiLfomElbow_Origin + [-ElbowRadius(ND_RMPipe); 0; -ElbowRadius(ND_RMPipe)], L_RMPipeHoriz, [0; 0]*deg, ND_RMPipe, PS_Fi)
RMPipeFrz := FreezeLayer("RapidMixPipes")
RMPipes := stack(RMPipeLyr, LfomOrifices, SubtractLfomOrifices, RMPipeEastVert, RMPipeWestVert, RMPipeHoriz, RMPipeFrz)
RMFitLyr := layer_new("RapidMixFittings", green)
RMCouplingEast := CouplingSUBF(FiLfomCoupling_Origin, [0; 270; 0]*deg, ND_RMPipe, PS_Fi, ["FlowMeteringTank"])
RMElbowEast := ElbowF(FiLfomElbow_Origin, [0; 0; 270]*deg, ND_RMPipe, PS_Fi)
FiDistInletCoupling := CouplingSUBF(FiDistInletCoupling_Origin, [0; 270; 0]*deg, ND_RMPipe, PS_Fi, ["FlowDistributionTank"])
FiDistInletElbow := ElbowF(FiDistInletElbow_Origin, [180; 0; 90]*deg, ND_RMPipe, PS_Fi)
RMFitFrz := FreezeLayer("RapidMixFittings")
RMFittings := stack(RMFitLyr, RMCouplingEast, RMElbowEast, FiDistInletCoupling, FiDistInletElbow, RMFitFrz)
RMPlumbing := stack(RMPipes, RMFittings)
# Channel Inlet Plumbing
L_FiPipeToInletVertCenterLine := .889 m
# From India 3
H_OrificeBottom := .05 m
D_InletOrifice := .017 m
FiDistInletCouplingNorth_Origin := [
    -cos(AN_FiIn)*L_FiPipeToInletVertCenterLine + FiPipe_Origin[0];
    -sin(AN_FiIn)*L_FiPipeToInletVertCenterLine + FiPipe_Origin[1];
    FlowDistributionTank_Origin[2] - SocketDepth(ND_FiInlet)
]
FiDistInletCouplingMid_Origin := [
    -cos(AN_FiIn)*L_FiPipeToInletVertCenterLine + FiPipe_Origin[0];
    -sin(AN_FiIn)*L_FiPipeToInletVertCenterLine - B_Fi + FiPipe_Origin[1];
    FlowDistributionTank_Origin[2] - SocketDepth(ND_FiInlet)
]
FiDistInletCouplingSouth_Origin := [
    -cos(AN_FiIn)*L_FiPipeToInletVertCenterLine + FiPipe_Origin[0];
    FiPipe3_Origin[1] + sin(AN_FiIn)*L_FiPipeToInletVertCenterLine;
    FlowDistributionTank_Origin[2] - SocketDepth(ND_FiInlet)
]
FiDistInletFitLyr := layer_new("FiDistInletFittings", green)
FiDistInletCouplingNorth := CouplingSUBF(FiDistInletCouplingNorth_Origin, [0; 270; 0]*deg, ND_FiInlet, PS_Fi, ["FlowDistributionTank"])
FiDistInletCouplingMid := CouplingSUBF(FiDistInletCouplingMid_Origin, [0; 270; 0]*deg, ND_FiInlet, PS_Fi, ["FlowDistributionTank"])
FiDistInletCouplingSouth := CouplingSUBF(FiDistInletCouplingSouth_Origin, [0; 270; 0]*deg, ND_FiInlet, PS_Fi, ["FlowDistributionTank"])
FiDistInletFitFrz := FreezeLayer("FiDistInletFittings")
FiDistInletFit := stack(FiDistInletFitLyr, FiDistInletCouplingNorth, FiDistInletCouplingMid, FiDistInletCouplingSouth, FiDistInletFitFrz)
FiDistInletPipeLyr := layer_new("FiDistInletPipes", blue)
FiDistInletPipeNorth := PipeF(FiDistInletCouplingNorth_Origin, H_FiDistTank + SocketDepth(ND_FiInlet), [0; 90]*deg, ND_FiInlet, PS_Fi)
FiDistInletPipeMid := PipeF(FiDistInletCouplingMid_Origin, H_FiDistTank + SocketDepth(ND_FiInlet), [0; 90]*deg, ND_FiInlet, PS_Fi)
FiDistInletPipeSouth := PipeF(FiDistInletCouplingSouth_Origin, H_FiDistTank + SocketDepth(ND_FiInlet), [0; 90]*deg, ND_FiInlet, PS_Fi)
DiFistInletPipeFrz := FreezeLayer("FiDistInletPipes")
FiDistInletOrificeNorth := CylinderF(FiDistInletCouplingNorth_Origin + [0; 0; H_OrificeBottom + D_InletOrifice/2 + SocketDepth(ND_FiInlet)], D_InletOrifice/2, outerradius(ND_FiInlet) + zc, [0; 0; 0]*deg)
FiDistInletOrificeMid := CylinderF(FiDistInletCouplingMid_Origin + [0; 0; H_OrificeBottom + D_InletOrifice/2 + SocketDepth(ND_FiInlet)], D_InletOrifice/2, outerradius(ND_FiInlet) + zc, [0; 0; 0]*deg)
FiDistInletOrificeSouth := CylinderF(FiDistInletCouplingSouth_Origin + [0; 0; H_OrificeBottom + D_InletOrifice/2 + SocketDepth(ND_FiInlet)], D_InletOrifice/2, outerradius(ND_FiInlet) + zc, [0; 0; 0]*deg)
SubtractFiInletOrifices := SubtractF(["FiDistInletPipes"], "DeleteMe")
FiDistInletPipes := stack(FiDistInletPipeLyr, FiDistInletPipeNorth, FiDistInletPipeMid, FiDistInletPipeSouth, DiFistInletPipeFrz, FiDistInletOrificeNorth, FiDistInletOrificeMid, FiDistInletOrificeSouth, GroupDelete, SubtractFiInletOrifices)
FiDistPlu := stack(FiDistInletFit, FiDistInletPipes)
# Deleted Chemical Doser and Roof Sections
# Plant Drains
ND_ChemPlatformDrain := .038 m
# From India 3
Z_BottomLowerTank := 6 m
# Wow I doubt the Z is supposed to be 6 m in the air still.
# Chem Drains
ChemDrainCoupling_Origin := [
    Tank_Origin[0] - ConRadius(ND_ChemPlatformDrain);
    Tank_Origin[1] - ConRadius(ND_ChemPlatformDrain) + W_Wall;
    Z_ChemPlatformTop - SocketDepth(ND_ChemPlatformDrain)
]
ChemDrainElbowR_Origin := [
    ChemDrainCoupling_Origin[0];
    ChemDrainCoupling_Origin[1];
    Z_DoorTop + ConRadius(ND_ChemPlatformDrain) + ElbowRadius(ND_ChemPlatformDrain)
] = [-0.028575; 2.97142; 5.21692] m
ChemDrainElbowUnder_Origin := [
    FlowDistributionTank_Origin[0];
    ChemDrainElbowR_Origin[1];
    ChemDrainElbowR_Origin[2] - ElbowRadius(ND_ChemPlatformDrain)
]
ChemDrainElbowDown_Origin := [
    ChemDrainElbowUnder_Origin[0] - ElbowRadius(ND_ChemPlatformDrain);
    ChemDrainElbowUnder_Origin[1] - ElbowRadius(ND_ChemPlatformDrain) - 2*ConRadius(ND_FiInlet) - ConRadius(ND_ChemPlatformDrain);
    ChemDrainElbowUnder_Origin[2]
]
DrainChannelElbow_Origin := [
    Tank_Origin[0] - L_Wall + ConRadius(ND_SystemDrain);
    Tank_Origin[1] + W_Wall + T_TankWall + SocketDepth(ND_SystemDrain);
    Tank_Origin[2] + H_Wall + T_TankWall
]
DrainChannelCoupling_Origin := [
    DrainChannelElbow_Origin[0];
    Tank_Origin[1] + W_Wall + SocketDepth(ND_SystemDrain);
    DrainChannelElbow_Origin[2]
]
DrainChannelElbowOutlet_Origin := DrainChannelElbow_Origin + [0; ElbowRadius(ND_SystemDrain); -Z_BottomLowerTank + ElbowRadius(ND_SystemDrain)]
SystemDrainFitLyr := layer_new("SystemDrainFittings", green)
ChemDrainCoupling := CouplingSUBF(ChemDrainCoupling_Origin, [0; 270]*deg, ND_ChemPlatformDrain, PS_Fi, ["OperatorAccess"])
ChemDrainElbowR := ElbowF(ChemDrainElbowR_Origin, [0; 0; 270]*deg, ND_ChemPlatformDrain, PS_Fi)
ChemDrainElbowUnder := ElbowF(ChemDrainElbowUnder_Origin, [90; 0; 0]*deg, ND_ChemPlatformDrain, PS_Fi)
ChemDrainElbowDown := ElbowF(ChemDrainElbowDown_Origin, [180; 90; 0]*deg, ND_ChemPlatformDrain, PS_Fi)
DrainChannelElbow := ElbowF(DrainChannelElbow_Origin, [0; 270; 0]*deg, ND_SystemDrain, PS_Fi)
DrainChannelCoupling := CouplingSUBF(DrainChannelCoupling_Origin, [270; 0]*deg, ND_SystemDrain, PS_Fi, ["Room"])
DrainElbowOutlet := ElbowF(DrainChannelElbowOutlet_Origin, [270; 90; 0]*deg, ND_SystemDrain, PS_Fi)
SystemDrainFitFrz := FreezeLayer("SystemDrainFittings")
SystemDrainFit := stack(SystemDrainFitLyr, ChemDrainCoupling, ChemDrainElbowR, ChemDrainElbowUnder, ChemDrainElbowDown, DrainChannelElbow, DrainChannelCoupling, DrainElbowOutlet, SystemDrainFitFrz)
SystemDrainPipesLyr := layer_new("SystemDrainPipes", blue)
L_ChemPlatformDrainPipe := ChemDrainCoupling_Origin[2] - CouplingLength(ND_ChemPlatformDrain) + 2*SocketDepth(ND_ChemPlatformDrain) - ChemDrainElbowR_Origin[2]
L_ChemPlatformDrainHoriz := ChemDrainElbowR_Origin[0] - ChemDrainElbowUnder_Origin[0] - ElbowRadius(ND_SystemDrain)
L_ChemPlatformDrainPerp := ChemDrainElbowUnder_Origin[1] - ChemDrainElbowDown_Origin[1] - ElbowRadius(ND_SystemDrain)
L_ChemDrainDown := (ChemDrainElbowUnder_Origin[2] - Tank_Origin[2] - H_Wall - T_TankWall)*0.85
L_DrainChannelPipe := DrainChannelElbow_Origin[1] - DrainChannelCoupling_Origin[1] - CouplingLength(ND_SystemDrain) + 2*SocketDepth(ND_SystemDrain)
L_DrainOutlet := Z_BottomLowerTank - 2*ElbowRadius(ND_SystemDrain)
ChemPlatformDrainPipe := PipeSUBF(ChemDrainElbowR_Origin, L_ChemPlatformDrainPipe, [0; 90; 0]*deg, ND_ChemPlatformDrain, PS_Fi, ["OperatorAccess"])
ChemDrainHoriz := PipeF(ChemDrainElbowR_Origin + [-ElbowRadius(ND_SystemDrain); 0; -ElbowRadius(ND_SystemDrain)], L_ChemPlatformDrainHoriz, [0; 0; 0]*deg, ND_ChemPlatformDrain, PS_Fi)
ChemDrainPerp := PipeF(ChemDrainElbowDown_Origin, L_ChemPlatformDrainPerp, [270; 0; 0]*deg, ND_ChemPlatformDrain, PS_Fi)
ChemDrainDown := PipeF(ChemDrainElbowDown_Origin + [0; -ElbowRadius(ND_SystemDrain); -ElbowRadius(ND_SystemDrain)], L_ChemDrainDown, [0; 270; 0]*deg, ND_ChemPlatformDrain, PS_Fi)
DrainChannelPipe := PipeSUBF(DrainChannelCoupling_Origin + [0; CouplingLength(ND_SystemDrain) - 2*SocketDepth(ND_SystemDrain); 0], L_DrainChannelPipe, [270; 0; 0]*deg, ND_SystemDrain, PS_Fi, ["Room"])
DrainOutletPipe := PipeF(DrainChannelElbow_Origin + [0; ElbowRadius(ND_SystemDrain); -ElbowRadius(ND_SystemDrain)], L_DrainOutlet, [0; 270; 0]*deg, ND_SystemDrain, PS_Fi)
SystemDrainPipesFrz := FreezeLayer("SystemDrainPipes")
SystemDrainPipes := stack(SystemDrainPipesLyr, ChemPlatformDrainPipe, ChemDrainHoriz, ChemDrainPerp, ChemDrainDown, DrainChannelPipe, DrainOutletPipe, SystemDrainPipesFrz)
SystemDrain := stack(SystemDrainFit, SystemDrainPipes)
ND_ChemDrains := 1/2*in
AC_LFSRSF :=
    stack(FiBodyPipe, FiBwPlu, FiInExManPlu, FiTesterScript, FiCapsScript, FiSandDrainScript, OpAccessScript, FiAuxPlumbing, RMPlumbing, DrainChannel, FiDistPlu, FiToStoragePlumbing, SystemDrain) if N_Fi == 1
    stack(FiBodyPipe, FiBwPlu, FiInExManPlu, FiTesterScript, FiCapsScript, FiSandDrainScript, FiArray, OpAccessScript, FiAuxPlumbing, RMPlumbing, DrainChannel, FiDistPlu, FiToStoragePlumbing, SystemDrain) otherwise
# The array section is undefined if N.Fi-1 is zero.
Check := stack(FiBodyPipe, FiBwPlu, FiInExManPlu)
# [component: inputs Check]
