Mod := 0
Q_Plant := 3*L/s
# [reference: ExpertInputs.xmcd]
# [reference: MathFunctions.xmcd]
# [reference: PipeDatabase - may.xmcd]
# This contains stuff about bulkheads
# [reference: PipeDatabase.xmcd]
# [reference: MaterialsDatabase.xmcd]
# Note that with flow rates above 3 L/s, more than 1 sed tank will be needed! This means we will need an inlet channel similar to the SRSF set up.
# Hence L-MEDIUMFlowSRSF
# [reference: FluidsFunctions.xmcd]
# [reference: SedTankFunctions.xmcd]
# [reference: CdcFunctions.xmcd]
# [reference: LfomFunctions.xmcd]
# [reference: SedimentationTank.xmcd]
# [reference: Flocculator.xmcd]
# [reference: LFOM.xmcd]
# [reference: EntranceTank.xmcd]
ND_FiBody := 12 in
PS_FiBody := 2
ND_FiBwManBranch := 0.5 in
ND_FiManBranch := 0.5 in
B_FiManifoldBranch := 5 cm = 1.9685 in  # Center to Center
S_FiBwManifoldBranch := B_FiManifoldBranch - ND_FiBwManBranch = 3.73 cm
S_FiManifoldBranch := B_FiManifoldBranch - ND_FiManBranch = 3.73 cm
Pi_CapHeight := 0.7  # Amount of cap remaining after sawing off
# Stacked Rapid Sand Filter
## Constraints and Comments (Not necessarily updated)
# Max head loss through inlet piping during filtration
# Max head loss through inlet piping during backwash
# Max head loss through outlet piping during filtration
# Max head loss through outlet piping during backwash (siphon)
# Max ratio of head loss in manifold to head loss through filter layer during filtration
# Max ratio of head loss in manifold to head loss through filter layer during filtration
# The head loss across each layer of the filter must be large compared to losses in the plumbing that distributes water into the sand bed, in order for the water to be distributed uniformly to each layer.  At the beginning of a filtration cycle when the sand bed is clean, the head loss is the smallest.  This minimum head loss during filtration is estimated by the Carman-Kozeny equation.
# Filtration mode constraints
# The inlet manifolds need to have a small piezometric head variation relative to the head loss through a clean sand bed. Given that both the trunk lines and the branches are short manifolds (fL/d < 1), the piezometric head variability is dominated by pressure recovery which is given by V^2/(2*g)*.  where the velocity is the initial velocity in the manifold. Thus the velocity in the trunk and branch lines is limited by this constraint. If we want to relax this constraint we could add head loss through the slots. But we need to be careful to not cause a flow imbalance between the inlets that carry flow for two layers and the inlets that carry flow for only one layer. Perhaps top inlet and bottom inlet should have only one line of slots per pipe instead of two lines. We are currently assuming that the backwash branches will have 1/2 the slot area of the branches in the other layers.
#
# Slot head loss issues
# If we use the slots to generate head loss in an effort to improve flow distribution, we need to account for sand blocking (1-ε) of the slots during filtration. The slots are not blocked during backwash (except perhaps during backwash initiation).
#
# Backwash mode constraints
# The  constraint on the design of the backwash manifold branches is that the flow rate from each slot must be close to the average (perhaps within 20%). We cannot rely on head loss through the filter media to help create uniform flow from the manifold during backwash because the filter bed will be fluidized. Thus we must design the backwash manifold to have uniform flow distribution without any external assistance. We can improve uniformity of flow distribution by decreasing head loss and pressure recovery in the manifold branches and in the trunk line and/or by increasing the head loss through the slots. The backwash system will also be used during filtration and the flow rate in the backwash manifold system will vary by a factor of 6 between those two states. Thus head loss through the slots will vary by a factor of 36 between the two states. We could use a relatively high slot head loss to get uniform flow distribution. The slot head loss must be small enough during filtration mode to not cause a flow inbalance between filter layers. That suggests that the slot head loss must be less than 10% of the clean bed head loss during filtration and thus less than 36 times that amount during backwash.
#
# Flow distribution in a short manifold is quite uniform for the case when the total port area is equal to or less than the manifold area. We have two manifold systems operating in series with trunk line distributing flow to branches and branches distributing flow to slots. Head loss through the slots effectively helps distribute flow between branches as well as between slots. Thus the constraints on both trunk and branch sizes are that they have pressure recovery terms that are small compared with the head loss through the slots.
# Algorithm for trunk, branch, slot design
# Head loss through the slots in the backwash manifold are directly related to the head loss throught the slots during filtration. The flow area during filtration will be reduced due to sand blocking. This results in a factor of ε_FiSand
# Calculate slot area for backwash assuming this head loss.
# Note that the slot area for backwash analysis should not be adjusted for sand porosity.
# Calculate size of branch lines using the rule that their area must exceed the port area.
# Given the area of the branch lines, recalculate the slot area by setting it equal to the branch area.
# Recalculate the actual head loss through the slots given this new slot area.
#
# Calculate the size of the trunk lines using the rule that their area must exceed the port area. Thus branches must have more area than the slots in a branch. Trunk must have more area than the branches.
# Top View
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# Layer Thickness as Function of Trunk Diameter
# round up to the nearest cm to make construction easier
H_FiLayerF(ND_Trunk) := max(H_FiLayerMin, Ceil(outerdiameter(ND_Trunk) + S_FiTrunkMin, 1 cm), Ceil(OuterDiameterFittingPVC(ND_Trunk), 1 cm), Ceil(FerncoOuterDiameter(ND_Trunk), 1 cm))
H_FiBottomLayerF(ND_Trunk, ND_BwTrunk) := max(H_FiLayerMin, Ceil(outerradius(ND_Trunk) + outerradius(ND_BwTrunk) + S_FiTrunkMin, 1 cm), Ceil(ConRadius(ND_Trunk) + ConRadius(ND_BwTrunk), 1 cm), Ceil(FerncoOuterDiameter(ND_Trunk)/2 + FerncoOuterDiameter(ND_BwTrunk)/2, 1 cm))
# Dimensions and Pipe Sizes
L_FiBodyPipe := 6 ft
S_FiInletMan := 40 cm
PS_Fi := 2
ND_FiPipe := 12 in
ND_FiManTrunk := 1 in
ND_FiManBranch := .5 in
ND_FiManPipe := 2 in
ND_BallValve := 2 in
ND_FiBW := 3/2*in
ND_BedTester := 1/2*in
ND_BedTesterOuter := 1 in
H_FiManCap := CapHeight(ND_FiManTrunk)/2
T_FiLayer := 20 cm
N_FiManBranch := 3  # number of branches on either side
N_FiInletPipes := 4
N_FiOutletPipes := 3
D_FiTopRingOuter := 14 in
Dist_CentToRodTop := 6.6739 in
Dist_CentToStuds := 5.6525 in
D_FiTopRingInner := 10 in
D_FiRodHoles := 5/16*in
H_FiCap := 3/8*in
L_FiBallValve := .1625 m
L_FiOuterBulkFitting := .0368 m
# Flow Distribution Constraints: Ratio of Pressure Recovery to Clean Bed Head Loss
# There are three flow distribution problems in the filter design: distribution between the slots along a manifold branch, distribution between branches along a trunk, and distribution between filter layers. The first two are both addressed by making pressure recovery in the manifold (both trunks and branches) small relative to the short path head loss (head loss through the clean bed, since slot head loss in forward filtration is small). In backwash mode where there is no bed head loss, the pressure recovery in the manifold plumbing must be small relative to slot head loss.
#
# Head loss through the inlet and outlet plumbing differs for different layers both because the number of elbows varies and because the top and bottom inlets have 1/2 the flow of the middle two. Therefore good flow distribution between layers would be addressed by making head loss through the inlet and outlet plumbing small for all layers relative to clean bed head loss. We do not have an explicit constraint set for this, but the constraint on trunk diameter which gives good flow distribution within the manifolds seems to be sufficient to take care of it. As a check, see the analysis under the section "Path Head Loss Calculations and Flow Distribution Between Layers" below.
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Pi_FiManifoldQ := 0.85  # Ratio of long path flow to short path flow
Pi_FiManifoldHeadLoss := 1 - Pi_FiManifoldQ^2 = 0.2775
# Ratio of pressure recovery in the slotted pipes to the head loss through the clean bed (or through the slots in backwash mode)
# Even though the piezometric head profiles for the inlet and outlet manifolds on the middle layers may be parallel meaning that pressure recovery there need not be small for good distribution between sand bed flow paths, we still need pressure recovery to be small in the outlet manifolds in order to get good flow distribution in the top and bottom layers where the velocity in the manifolds is 1/2 and the pressure recovery 1/4 that of other layers (even smaller in the larger-diameter bottom manifold where velocity head is tiny).
# Numbers of Filters, Trunk Diameter and Layer Thickness Based on Flow Distribution Constraint
Q_FilterMax :=
    for i ∈ 0 .. last(AvailND)
        H_FiLayer ← H_FiLayerF(AvailND[i])
        HL_FiCleanLayer ← h_lKozeny(H_FiLayer, D_FiSand60, V_FiLayer, ε_FiSand, Nu_Water)
        V_FiTrunkMaxPR ← sqrt(2*g*HL_FiCleanLayer*Pi_FiManifoldHeadLoss)
        Q_FilterMax[i] ← π*innerdiameter(AvailND[i], PS_Default)^2/4*V_FiTrunkMaxPR*N_FiLayer/2
    return Q_FilterMax
# This function returns the maximum flow rate through a filter for each of the available trunk pipe sizes based on the manifold flow distribution constraint.
N_Fi := ceil(Q_Plant/LookupCeil(ND_FiTrunkMax, AvailND, Q_FilterMax)) = 1
# We will have one filter up until the plant flow is the maximum for a 6 inch trunk, after which we will multiply the filter as needed
# What is this about?
ND_FiTrunk := LookupCeil(Q_Plant/N_Fi, Q_FilterMax, AvailND) = 2 in
LookupCeil(ND_FiTrunkMax, AvailND, Q_FilterMax) = 0.0309485 m^3/s
H_FiLayer := H_FiLayerF(ND_FiTrunk) = 20 cm
# Filtration manifold maximum velocity
HL_FiCleanLayer := h_lKozeny(H_FiLayer, D_FiSand60, V_FiLayer, ε_FiSand, Nu_Water) = 5.56209 cm
PR_FiManifoldMax := HL_FiCleanLayer*Pi_FiManifoldHeadLoss = 1.54348 cm
V_FiManMaxPR := sqrt(2*g*PR_FiManifoldMax) = 0.550207 m/s
# Backwash manifold maximum velocity
HL_FiBwSlotsEst := 5 cm
PR_FiBwManifoldMax := HL_FiBwSlotsEst*Pi_FiManifoldHeadLoss
V_FiBwManMaxPR := sqrt(2*g*PR_FiBwManifoldMax) = 0.521665 m/s
# Clean Bed Head Loss and Maximum Manifold Velocity
# Number of Filters, Flow Rate Calculations, and Backwash Trunk Diameter
Q_FiMax := LookupCeil(ND_FiTrunk, AvailND, Q_FilterMax) = 3.94933 L/s
N_Fi := ceil(Q_Plant/(.8*L/s)) = 4  # This functhon has been added because I'm not sure what the above N.Fi used to get such a high flow rate!
Q_Fi := Q_Plant/N_Fi = 0.75 L/s  # The flow will be divided evenly between the N_Fi = 4 filters.
A_FiActive := Q_Fi/(N_FiLayer*V_FiLayer) = 0.0681818 m^2  # This is the required area of each of the N_Fi = 4 filters.
Q_FiLayer := Q_Fi/N_FiLayer = 0.125 L/s  # This is the flow rate through each filter layer
ND_FiBwTrunk := NominalDiameter(CeilNearest(D_circle(Q_Fi/V_FiBwManMaxPR), AvailPipeSizes(PS_Default)[:, 0]), PS_Default) = 1.5 in
# Number of Manifold Branches
Q_FiManBranchMaxPR := V_FiManMaxPR*π*innerdiameter(ND_FiManBranch, PS_FiBranch)^2/4 = 0.107861 L/s
Q_FiManBranchAveMaxPR := Q_FiManBranchMaxPR/(1 + (1 - Pi_FiManifoldQ)/2) = 0.100336 L/s
# branches are coming out of both sides of the manifold
N_FiManBranchMin := Ceil(Q_FiLayer/Q_FiManBranchAveMaxPR, 2) = 2
L_BodyTrunkConnector := 2.25 in
N_FiManBranchMax := floor((innerdiameter(ND_FiBody, PS_FiBody) - L_BodyTrunkConnector)/(outerdiameter(ND_FiManBranch) + S_FiManifoldBranch)) = 4
# Choose this Max?
# Yes:
N_FiManBranch := 2*N_FiManBranchMax
# (If chossing a smaller number of branches, redifineN_FiManBranch
Q_FiManBranch := Q_FiLayer/N_FiManBranch = 0.015625 L/s
# This is an estimate, they should have different flows due to different amount of filter active area etc.
# Recalculate manifold spacing
S_FiManifoldBranch := ((innerdiameter(ND_FiBody, PS_FiBody) - L_BodyTrunkConnector) - N_FiManBranch/2*outerdiameter(ND_FiManBranch))/(N_FiManBranch/2) = 4.01828 cm
S_FiBwManifoldBranch := ((innerdiameter(ND_FiBody, PS_FiBody) - L_BodyTrunkConnector) - N_FiManBranch/2*outerdiameter(ND_FiBwManBranch))/(N_FiManBranch/2) = 4.01828 cm
B_FiManifoldBranch := S_FiManifoldBranch + outerdiameter(ND_FiManBranch) = 6.15188 cm
# Filter Box Dimensions and Manifold Pipe Lengths
# These lengths could just be the innerdiameter - assembly - cap.
# Need to change this code still, not exactly necessary for slots...
L_FiTrunk := innerdiameter(ND_FiBody, PS_FiBody) - CapThickness(ND_FiTrunk) - S_FiManAssembly = 11.388 in
L_FiBwTrunk := innerdiameter(ND_FiBody, PS_FiBody) - CapThickness(ND_FiBwTrunk) - S_FiManAssembly = 11.3693 in
# - L.FiManBranchMatrix stores the lengths of each manifold required (on one side),  (So for total, multiply thesum by 2) This length does not make corrections for space taken by the cap, this is correted when calculated the total length of piping needed to be bought.
#
# - L.FiManBranchTot as the total manifold length available on a trunk (2 sides) available for slots, i.e, the length of the branch - the portion covered by slots. As L.FiManBranchMatrix does not make corrections for cap, we remove the proportion of the cap that will still remain on the branch here.
#
# - ManBranch as (L.FiManBranchTot/2)/N.FiManBranch (i.e, a sort of average length for manifolds on one side).
# Derived using intersecting chords formula
L_FiManBranchMatrix := [
    sqrt(L_BodyTrunkConnector*(innerdiameter(ND_FiBody, PS_Default) - L_BodyTrunkConnector));
    sqrt(((S_FiManifoldBranch + outerdiameter(ND_FiManBranch)) + L_BodyTrunkConnector)*(innerdiameter(ND_FiBody, PS_Default) - ((S_FiManifoldBranch + outerdiameter(ND_FiManBranch)) + L_BodyTrunkConnector)));
    sqrt((2*S_FiManifoldBranch + outerdiameter(ND_FiManBranch))*(innerdiameter(ND_FiBody, PS_Default) - (2*S_FiManifoldBranch + outerdiameter(ND_FiManBranch))));
    sqrt(S_FiManifoldBranch*(innerdiameter(ND_FiBody, PS_Default) - S_FiManifoldBranch))
] - [
    outerdiameter(ND_FiTrunk)/2;
    outerdiameter(ND_FiTrunk)/2;
    outerdiameter(ND_FiTrunk)/2;
    outerdiameter(ND_FiTrunk)/2
] = [3.42607; 4.54674; 4.36721; 2.81531] in
L_FiManBranchTot := 2*sum(L_FiManBranchMatrix) - N_FiManBranch*CapHeight(ND_FiManBranch)*Pi_CapHeight = 24.5357 in
# Total Available branch length for slots on all the branches on a trunk
L_BodyTrunkConnector + S_FiManifoldBranch + 2*outerdiameter(ND_FiManBranch) = 5.512 in
innerdiameter(ND_FiBody, PS_Default)/2 = 5.855 in
# Derived using intersecting chords formula
L_FiBwManBranchMatrix := [
    sqrt(L_BodyTrunkConnector*(innerdiameter(ND_FiBody, PS_Default) - L_BodyTrunkConnector));
    sqrt(((S_FiBwManifoldBranch + outerdiameter(ND_FiBwManBranch)) + L_BodyTrunkConnector)*(innerdiameter(ND_FiBody, PS_Default) - ((S_FiBwManifoldBranch + outerdiameter(ND_FiBwManBranch)) + L_BodyTrunkConnector)));
    sqrt((2*S_FiBwManifoldBranch + outerdiameter(ND_FiBwManBranch))*(innerdiameter(ND_FiBody, PS_Default) - (2*S_FiBwManifoldBranch + outerdiameter(ND_FiBwManBranch))));
    sqrt(S_FiBwManifoldBranch*(innerdiameter(ND_FiBody, PS_Default) - S_FiBwManifoldBranch))
] - [
    outerdiameter(ND_FiBwTrunk)/2;
    outerdiameter(ND_FiBwTrunk)/2;
    outerdiameter(ND_FiBwTrunk)/2;
    outerdiameter(ND_FiBwTrunk)/2
] = [3.66357; 4.78424; 4.60471; 3.05281] in
L_FiBwManBranchTot := 2*sum(L_FiBwManBranchMatrix) - (N_FiManBranch*CapHeight(ND_FiBwManBranch)*Pi_CapHeight) = 26.4357 in
# Total Available branch length for slots on all the branches on the bw trunk
L_FiManBranch := sum(L_FiManBranchMatrix)/(N_FiManBranch/2) = 0.0962364 m
L_FiBwManBranch := sum(L_FiBwManBranchMatrix)/(N_FiManBranch/2) = 0.102269 m
# Amount of Manifold Piping to Required and Final Length to be cut to for Filter:
Pi_Safety := 1.15  # Safety factor to account for wrong cutting
L_CapSpace := 8.5/16*in  # The Height of the dome of the cap
# We think that this is a slightly too large number. Measuring 0.5in caps yields dome height closer to 7/16in
L_ManSlot1Side := Pi_Safety*((2*sum(L_FiManBranchMatrix) - N_FiManBranch*L_CapSpace + 4*outerdiameter(ND_FiBwTrunk)) + (2*sum(L_FiBwManBranchMatrix) - N_FiManBranch*L_CapSpace + 4*outerdiameter(ND_FiTrunk))) = 6.81579 ft
L_ManSlot1Side/2 = 40.8948 in
L_ManSlot2Side := 5*Pi_Safety*(2*sum(L_FiManBranchMatrix) - N_FiManBranch*L_CapSpace + 4*outerdiameter(ND_FiTrunk)) = 17.0395 ft
# Assuming that one manifold is pushed through the trunk to form two branches, Manifolds have to be cut to:
L_ManifoldsCut := 2*L_FiBwManBranchMatrix + outerdiameter(ND_FiBwTrunk) - 2*L_CapSpace = [8.16463; 10.406; 10.0469; 6.94312] in
# '
# Manifold Design and Slot Area
# We select  B_FiBwManSlot := 1/8*in = 3.175 mm  for the closest slot spacing, and N_FiBwSlotRows := 1  for best structural integrity of these pipes
# We select  B_FiManSlot := 1/8*in = 3.175 mm  for the closest slot spacing, and N_FiSlotRows := 2  for best structural integrity of these pipes
Q_FiBwManBranch := Q_Fi/N_FiManBranch = 0.09375 L/s
PR_FiBwManBranch := (Q_FiBwManBranch/(π*innerdiameter(ND_FiBwManBranch, PS_FiBranch)^2/4))^2/(2*g) = 1.16605 cm
HL_FiBwSlot := PR_FiBwManBranch/Pi_FiManifoldHeadLoss = 4.20197 cm
# This is the minimum HL from ALL Bw slot, the check below chooses a greater headloss (by making slots smaller) if this produces unviable slot length for available branch diameter
C_Check := 0
HL_FiBwSlotCheck :=
    while C_Check == 0
        A_FiBwManSlots ← A_orifice(HL_FiBwSlot, Pi_VenaContractaOrifice, Q_Fi)
        L_FiBwManSlotBranchTotal ← A_FiBwManSlots/W_FiManSlots
        N_FiBwManSlotsPerTrunk ← N_FiBwSlotRows*floor((L_FiBwManBranchTot - B_FiBwManSlot)/(B_FiBwManSlot + W_FiManSlots))
        L_FiBwManSlotCurvedInner ← L_FiBwManSlotBranchTotal/N_FiBwManSlotsPerTrunk
        C_FiBwManInner ← π*innerdiameter(ND_FiBwManBranch, PS_FiBranch)
        Pi_SlotCirc ← L_FiBwManSlotCurvedInner/C_FiBwManInner
        C_Check ← 1 if Pi_SlotCirc < 0.4
        HL_FiBwSlot ← HL_FiBwSlot + 0.05 cm otherwise
    return HL_FiBwSlot
# The slots should be configured to provide this total amount of slot area for the
# bottom manifold handling the backwash flow. We will define this as the inner diameter area of the slots
# The slots cumulatively on all branch pipes on 1 trunk must have this total length to provide the required area.
# We assume that atleast 20% of the manifold circumference must be conserved for structural integrity purposes while slotting it.
# This translates to a 40% max curved length of Bw Slot
HL_FiBwSlot := HL_FiBwSlotCheck = 11.452 cm
# This is not used, just a check
8*π*(0.33 in)^2 = 17.6577 cm^2
A_FiBwManSlots := A_orifice(HL_FiBwSlot, Pi_VenaContractaOrifice, Q_Fi) = 7.94338 cm^2
A_FiBwManBranches := N_FiManBranch*π*innerdiameter(ND_FiBwManBranch, PS_FiBranch)^2/4 = 15.683 cm^2
HL_FiBwSlotForward := h_orifice(D_circle(A_FiBwManSlots*ε_FiSand), Pi_VenaContractaOrifice, Q_FiLayer) = 1.98819 cm
Pi_FiBwManArea := A_FiBwManBranches/A_FiBwManSlots = 1.97434
# Check that head loss through the backwash slots is small in filtration mode (we want good flow distribution between layers, so the bottom layer should not have significantly more slot head loss)
π*(7/8*in)^2 = 15.5179 cm^2
Q_Fi/(π*(7/8*in)^2) = 0.483312 m/s  # barbed fittings
HL_FiBwSlot/HL_FiBwSlotForward = 5.76
A_FiManSlots := 2*A_FiBwManSlots = 15.8868 cm^2  # Inner manifolds have double the slot area of the upper and lower manifolds
# A conservative estimate of the head loss through the slots of the normal inlet manifold given sand blockage
HL_FiSlot := (2*Q_FiLayer/(Pi_VenaContractaOrifice*A_FiManSlots*ε_FiSand))^2*1/(2*g) = 1.98819 cm
# Final Slot Geometry:
L_FiBwManSlotBranchTotal := A_FiBwManSlots/W_FiManSlots = 3.90914 m
L_FiManSlotBranchTotal := A_FiManSlots/W_FiManSlots = 7.81829 m
N_FiBwManSlotsPerTrunk := N_FiBwSlotRows*floor((L_FiBwManBranchTot - B_FiBwManSlot)/(B_FiBwManSlot + W_FiManSlots)) = 197
N_FiManSlotsPerTrunk := N_FiSlotRows*floor((L_FiManBranchTot - B_FiManSlot)/(B_FiManSlot + W_FiManSlots)) = 366
L_FiBwManSlotCurvedInner := L_FiBwManSlotBranchTotal/N_FiBwManSlotsPerTrunk = 0.781235 in
L_FiManSlotCurvedInner := L_FiManSlotBranchTotal/N_FiManSlotsPerTrunk = 0.841002 in
C_FiBwManInner := π*innerdiameter(ND_FiBwManBranch, PS_FiBranch) = 1.95407 in
C_FiManInner := π*innerdiameter(ND_FiBwManBranch, PS_FiBranch) = 1.95407 in
Pi_FiBwSlotCirc := L_FiBwManSlotCurvedInner/C_FiBwManInner = 0.399799  # Check for whether Pi.SlotCirc <  0.4
Pi_FiSlotCirc := L_FiManSlotCurvedInner/C_FiManInner = 0.430384
C_FiBwManOuter := π*outerdiameter(ND_FiBwManBranch) = 2.63894 in
C_FiManOuter := π*outerdiameter(ND_FiBwManBranch) = 2.63894 in
L_FiBwManSlotInner := 2*innerdiameter(ND_FiBwManBranch, PS_FiBranch)/2*sin(2*π*L_FiBwManSlotCurvedInner/C_FiBwManInner/2) = 0.591436 in
L_FiManSlotInner := 2*innerdiameter(ND_FiManBranch, PS_FiBranch)/2*sin(2*π*L_FiManSlotCurvedInner/C_FiManInner/2) = 1.54225 cm
H_FiManCenterToSlot := sqrt((innerdiameter(ND_FiManBranch, PS_FiBranch)/2)^2 - (L_FiManSlotInner/2)^2) = 0.0674759 in
H_FiBwManCenterToSlot := sqrt((innerdiameter(ND_FiBwManBranch, PS_FiBranch)/2)^2 - (L_FiBwManSlotInner/2)^2) = 0.0962913 in
L_FiBwManSlotOuter := 2*sqrt(outerradius(ND_FiBwManBranch)^2 - H_FiBwManCenterToSlot^2) = 0.817626 in
L_FiManSlotOuter := 2*sqrt(outerradius(ND_FiManBranch)^2 - H_FiManCenterToSlot^2) = 0.829089 in
H_FiBwSlot := outerradius(ND_FiBwManBranch) - H_FiBwManCenterToSlot = 0.82222 cm
H_FiSlot := outerradius(ND_FiManBranch) - H_FiManCenterToSlot = 0.895411 cm
# SPECIFICATIONS: We need pipes of diameter  ND_FiBwManBranch = 0.5 in, with slots of width W_FiManSlots = 0.2032 mm, straight length L_FiBwManSlotOuter = 0.817626 in  and a spacing of  B_FiBwManSlot = 0.125 in. This is a total length of L_ManSlot1Side/2 = 3.4079 ft  of 1 side slotted pipes.
# SPECIFICATIONS:  we need pipes of diameter  ND_FiManBranch = 0.5 in  with slots of width  W_FiManSlots = 0.2032 mm,straight length L_FiManSlotOuter = 2.10589 cm, and a spacing of B_FiManSlot = 0.125 in  This is a total length of L_ManSlot2Side = 17.0395 ft of 2 side slotted pipes
# SPECIFICATIONS:  we need  pipes of diameter  ND_FiManBranch = 0.5 in  with slots of width  W_FiManSlots = 0.2032 mm,straight length L_FiManSlotOuter = 0.829089 in, and a spacing of B_FiManSlot = 0.125 in  This is a total length of L_ManSlot1Side/2 = 3.4079 ft of 2 side slotted pipes
# As discussed earlier, for fitting, manifolds are to be cut to:
L_ManifoldsCut/2 = [10.3691; 13.2156; 12.7596; 8.81776] cm
L_centerforBranch := [
    L_BodyTrunkConnector + outerdiameter(ND_FiManBranch)/2;
    S_FiManifoldBranch + 1.5*outerdiameter(ND_FiManBranch) + L_BodyTrunkConnector;
    2*S_FiManifoldBranch + 2.5*outerdiameter(ND_FiManBranch) + L_BodyTrunkConnector;
    3*S_FiManifoldBranch + 3.5*outerdiameter(ND_FiManBranch) + L_BodyTrunkConnector
] = [6.7818; 12.9337; 19.0856; 25.2374] cm
# Check:
[
    innerdiameter(ND_FiBody, PS_Default) - (3.5*outerdiameter(ND_FiManBranch) + 4*S_FiManifoldBranch);
    innerdiameter(ND_FiBody, PS_Default) - (2.5*outerdiameter(ND_FiManBranch) + 3*S_FiManifoldBranch);
    innerdiameter(ND_FiBody, PS_Default) - (1.5*outerdiameter(ND_FiManBranch) + 2*S_FiManifoldBranch);
    innerdiameter(ND_FiBody, PS_Default) - (S_FiManifoldBranch + 0.5*outerdiameter(ND_FiManBranch))
] = [2.442; 4.864; 7.286; 9.708] in
# Manifold Pipe Lengths, probably redundant (from Julia's code)
L_FiManCouplingOffset := 0.5*innerdiameter(ND_FiPipe, PS_Fi) - ConRadius(ND_FiManTrunk)/tan(asin(2*ConRadius(ND_FiManTrunk)/innerdiameter(ND_FiPipe, PS_Fi))) = 0.00130423 m
L_FiManCapOffset := 0.5*innerdiameter(ND_FiPipe, PS_Fi) - ConRadius(ND_FiManBranch)/tan(asin(2*ConRadius(ND_FiManBranch)/innerdiameter(ND_FiPipe, PS_Fi)))
S_FiManBranchEnds := L_FiManCouplingOffset + CouplingLength(ND_FiManTrunk) + outerdiameter(ND_FiManBranch)/2 = 0.0715048 m
L_FiManTrunk := innerdiameter(ND_FiPipe, PS_Fi) - CapThickness(ND_FiManTrunk) + (.0042 m*(ND_FiManTrunk/(1 in))) - L_FiManCouplingOffset
S_FiManBranch := (innerdiameter(ND_FiPipe, PS_Fi) - 2*S_FiManBranchEnds)/(N_FiManBranch - 1) = 0.022888 m
# cut coupling down
L_FiManBranch :=
    for i ∈ 0 .. N_FiManBranch - 1
        L[i] ←
            0.5*innerdiameter(ND_FiPipe, PS_Fi)*sin(acos((0.5*innerdiameter(ND_FiPipe, PS_Fi) - S_FiManBranchEnds + ConRadius(ND_FiManBranch) - S_FiManBranch*i)/(0.5*innerdiameter(ND_FiPipe, PS_Fi)))) - (0.5*innerdiameter(ND_FiManTrunk, PS_FiBranch) + CapThickness(ND_FiManBranch)) if i < N_FiManBranch/2
            (0.5*innerdiameter(ND_FiPipe, PS_Fi) - innerdiameter(ND_FiManTrunk, PS_FiBranch) - L_FiManCapOffset - CapThickness(ND_FiManBranch)) if i + 0.5 == N_FiManBranch/2
            L[N_FiManBranch - 1 - i] otherwise
    L
L_FiInBodytoValvePipe := 2*SocketDepth(ND_FiManTrunk) + (outerradius(ND_FiManPipe) - innerdiameter(ND_FiManPipe, PS_FiBranch)/2) + ValveSocket(ND_FiManTrunk) + S_Fitting
L_FiInBushingtoElbowPipe := 2*SocketDepth(ND_FiManPipe) + T_PlantWall + S_Fitting
L_BushingtoValvePipe := SocketDepth(ND_FiManTrunk) + ValveSocket(ND_FiManTrunk)
L_ElbowtoValvePipeOut := 2*SocketDepth(ND_FiManTrunk)
L_FiOutBushingtoBodyPipe := L_FiInBodytoValvePipe
L_FiCheckValve := .1651 m
L_BottomPipe := L_FiInBodytoValvePipe + L_FiBallValve*ND_FiManTrunk/(2 in) - ValveSocket(ND_FiManTrunk) + SocketDepth(ND_FiManTrunk) = 0.216162 m
L_ValvetoTeePipe := L_BushingtoValvePipe + (ElbowRadius(ND_FiManPipe) - ShortTeeLength(ND_FiManPipe))
L_TeetoTeeVertPipe := 2*T_FiLayer - TeeLength(ND_FiManPipe)
L_ElbowtoTeeVertPipe := 2*T_FiLayer - ElbowRadius(ND_FiManPipe) - ShortTeeLength(ND_FiManPipe)
L_HydDisPipe := L_FiBodyPipe - (T_Flange + ConRadius(ND_FiManTrunk)) + ShortTeeLength(ND_FiManPipe) + 2*SocketDepth(ND_FiManPipe) - (CouplingLength(ND_FiManPipe) - SocketDepth(ND_FiManPipe))
L_TeetoCapVertPipe := T_FiLayer - ShortTeeLength(ND_FiManPipe)
L_BWOut := 2*SocketDepth(ND_FiBW)
L_BedTester := 170 cm
S_Fi := 2*ElbowRadius(ND_FiBW) + 2*SocketDepth(ND_FiBW) + L_FiBallValve*ND_FiBW/(2 in) + ShortTeeLength(ND_FiManPipe) + 2*SocketDepth(ND_FiManPipe) + ElbowRadius(ND_FiManPipe) + ConRadius(ND_FiManPipe) + outerdiameter(ND_FiPipe)/2 + 2*S_Fitting
L_BWHoriz := 2*SocketDepth(ND_FiBW)
L_BWOutlet := L_BWOut + L_FiBodyPipe + H_FiCap - (T_Flange + ConRadius(ND_FiManTrunk) + ElbowRadius(ND_FiBW))
L_FiDrainElbowPipe := S_Fi/2 - ShortTeeLength(ND_FiManPipe) - ElbowRadius(ND_FiManPipe)
L_FiTeetoReducer := 2*SocketDepth(ND_FiManPipe) = 0.092 m
# Bottom Layer Thickness, Total Sand Depth, and Backwash Head Loss
H_FiBottomLayer := H_FiBottomLayerF(ND_FiTrunk, ND_FiBwTrunk) = 20 cm
HL_FiCleanBottomLayer := h_lKozeny(H_FiBottomLayer, D_FiSand60, V_FiLayer, ε_FiSand, Nu_Water) = 5.56209 cm
H_FiSand := (N_FiLayer - 1)*H_FiLayer + H_FiBottomLayer + outerradius(ND_FiBwManBranch) + outerradius(ND_FiManBranch) = 1.22134 m
H_FiSandActive := H_FiSand - outerradius(ND_FiBwManBranch) - outerradius(ND_FiManBranch) = 1.2 m
H_FiFluidizedBed := Pi_FiFluidized*H_FiSand = 1.58774 m
HL_FiBwSS := H_FiSand*(Rho_FiSand - Rho_H2O)*(1 - ε_FiSand)/Rho_H2O = 1.20912 m  # Sand bed head loss during steady state backwash.
# The backwash head loss is almost exactly equal  to the sand bed depth. Note that this ignores losses in the plumbing.
HL_FiDirty := 40 cm  # Mickey suggested this value based on lab experience
HL_FiTerminal := HL_FiCleanLayer + HL_FiDirty = 45.5621 cm
HL_FiBwInitiation := HL_FiBwSF + HL_FiBwSS = 1.40912 m
# How much does the filter bed over fluidize when the entrance box level lowers after backwash initiation?
H_FiFluidizedBedVariation := (HL_FiBwInitiation - HL_FiBwSS)*(W_FiEntrance*L_FiEntrance - 3*π*outerradius(ND_FiTrunk)^2 - π*outerradius(ND_FiBwTrunk)^2)/A_FiActive
# Plumbing Head Loss - need to change these slightly
# Lengths of Branches are different!! - use May's code? Run checks - maybe not necessary just yet - these maybe good approximations if length is an average length (ARE THEY??).
HL_FiBwInletManifold := 1/3*h_f(Q_Fi, innerD(ND_FiBwTrunk, PS_Default), L_Fi, Nu_Water, E_Pvc) + h_e(Q_Fi/N_FiManBranch, innerD(ND_FiBwManBranch, PS_FiBranch), K_PipeEnt) + 1/3*h_f(Q_Fi/N_FiManBranch, innerD(ND_FiBwManBranch, PS_FiBranch), W_FiActive, Nu_Water, E_Pvc) + HL_FiBwSlot
HL_FiInletManifold(Q_Layer) := 1/3*h_f(2*Q_Layer, innerD(ND_FiTrunk, PS_Default), L_Fi, Nu_Water, E_Pvc) + h_e(2*Q_Layer/N_FiManBranch, innerD(ND_FiManBranch, PS_FiBranch), K_PipeEnt) + 1/3*h_f(2*Q_Layer/N_FiManBranch, innerD(ND_FiManBranch, PS_FiBranch), L_FiManBranch, Nu_Water, E_Pvc) + HL_FiSlot
HL_FiInletManifoldTop(Q_Layer) := 1/3*h_f(Q_Layer, innerD(ND_FiTrunk, PS_Default), L_Fi, Nu_Water, E_Pvc) + h_e(Q_Layer/N_FiManBranch, innerD(ND_FiManBranch, PS_FiBranch), K_PipeEnt) + 1/3*h_f(Q_Layer/N_FiManBranch, innerD(ND_FiManBranch, PS_FiBranch), L_FiManBranch, Nu_Water, E_Pvc) + HL_FiSlot
HL_FiInletManifoldBottom(Q_Layer) := 1/3*h_f(Q_Layer, innerD(ND_FiBwTrunk, PS_Default), L_Fi, Nu_Water, E_Pvc) + h_e(Q_Layer/N_FiManBranch, innerD(ND_FiBwManBranch, PS_FiBranch), K_PipeEnt) + 1/3*h_f(Q_Layer/N_FiManBranch, innerD(ND_FiBwManBranch, PS_FiBranch), L_FiManBranch, Nu_Water, E_Pvc) + HL_FiSlot
HL_FiOutletManifold(Q_Layer) := 1/3*h_f(2*Q_Layer, innerD(ND_FiTrunk, PS_Default), L_Fi, Nu_Water, E_Pvc) + h_e(2*Q_Layer/N_FiManBranch, innerD(ND_FiManBranch, PS_FiBranch), K_PipeExit) + 1/3*h_f(2*Q_Layer/N_FiManBranch, innerD(ND_FiManBranch, PS_FiBranch), L_FiManBranch, Nu_Water, E_Pvc)
# For the head loss through the outlet manifold:
# Does it make sense to have a pipe exit loss included?
# Also, is it worth coming up with an estimate for head loss through the slots entering the branch?
HL_FiOutletStubs(Q_Layer) := Headloss_weir(Q_Layer, innerdiameter(ND_FiTrunk, PS_Default))
HL_FiInletPlumbing1(Q_Layer) := h_l(Q_Layer, innerD(ND_FiTrunk, PS_Default), 3 m, 3*K_El90 + K_PipeEnt, Nu_Water, E_Pvc) + HL_FiInletManifoldTop(Q_Layer)
HL_FiInletPlumbing2(Q_Layer) := h_l(2*Q_Layer, innerD(ND_FiTrunk, PS_Default), 3 m, 3*K_El90 + K_PipeEnt, Nu_Water, E_Pvc) + HL_FiInletManifold(Q_Layer)
HL_FiInletPlumbing3(Q_Layer) := h_l(2*Q_Layer, innerD(ND_FiTrunk, PS_Default), 3 m, K_El90 + K_PipeEnt, Nu_Water, E_Pvc) + HL_FiInletManifold(Q_Layer)
# These are numbered from the top of the filter bed down. The top and bottom inlets have half the flow rate (only serve the layers below and above, respectively). The bottom inlet has the diameter of the backwash trunk.
HL_FiInletPlumbing4(Q_Layer) := h_l(Q_Layer, innerD(ND_FiBwTrunk, PS_Default), 3 m, K_El90 + K_PipeEnt, Nu_Water, E_Pvc) + HL_FiInletManifoldBottom(Q_Layer)
HL_FiInletPlumbingMax(Q_1, Q_2, Q_3, Q_4) := max(HL_FiInletPlumbing1(Q_1), HL_FiInletPlumbing2(Q_2), HL_FiInletPlumbing3(Q_3), HL_FiInletPlumbing4(Q_4))
HL_FiInletPlumbingMin(Q_1, Q_2, Q_3, Q_4) := min(HL_FiInletPlumbing1(Q_1), HL_FiInletPlumbing2(Q_2), HL_FiInletPlumbing3(Q_3), HL_FiInletPlumbing4(Q_4))
HL_FiInletPlumbingAve(Q_1, Q_2, Q_3, Q_4) := (HL_FiInletPlumbing1(Q_1) + HL_FiInletPlumbing2(Q_2) + HL_FiInletPlumbing3(Q_3) + HL_FiInletPlumbing4(Q_4))/4
HL_FiBwInletPlumbing := h_l(Q_Fi, innerD(ND_FiBwTrunk, PS_Default), 3 m, K_El90 + K_PipeEnt, Nu_Water, E_Pvc) + HL_FiBwInletManifold
HL_FiOutletPlumbing1(Q_Layer) := h_l(2*Q_Layer, innerD(ND_FiTrunk, PS_Default), 3 m, K_El90 + K_PipeExit, Nu_Water, E_Pvc) + HL_FiOutletManifold(Q_Layer) + HL_FiOutletStubs(Q_Layer)
HL_FiOutletPlumbing2(Q_Layer) := HL_FiOutletPlumbing1(Q_Layer)
HL_FiOutletPlumbing3(Q_Layer) := h_l(2*Q_Layer, innerD(ND_FiTrunk, PS_Default), 3 m, 2*K_El90 + K_PipeExit, Nu_Water, E_Pvc) + HL_FiOutletManifold(Q_Layer) + HL_FiOutletStubs(Q_Layer)
HL_FiOutletPlumbingMax(Q_1, Q_3) := max(HL_FiOutletPlumbing1(Q_1), HL_FiOutletPlumbing2(Q_1), HL_FiOutletPlumbing3(Q_3))
HL_FiOutletPlumbingMin(Q_1, Q_3) := min(HL_FiOutletPlumbing1(Q_1), HL_FiOutletPlumbing2(Q_1), HL_FiOutletPlumbing3(Q_3))
HL_FiOutletPlumbingAve(Q_1, Q_3) := (HL_FiOutletPlumbing1(Q_1) + HL_FiOutletPlumbing2(Q_1) + HL_FiOutletPlumbing3(Q_3))/3
# Path Head Loss Calculations and Flow Distribution Between Layers
HL_FiCleanLyr(Q) := h_lKozeny(H_FiLayer, D_FiSand60, Q/A_FiActive, ε_FiSand, Nu_Water)
HL_FiCleanBottomLyr(Q) := h_lKozeny(H_FiBottomLayer, D_FiSand60, Q/A_FiActive, ε_FiSand, Nu_Water)
HL_FiPathClean1(Q_Path) := HL_FiInletPlumbing1(Q_Path) + HL_FiCleanLyr(Q_Path) + HL_FiOutletPlumbing1(Q_Path)
HL_FiPathClean2(Q_Path) := HL_FiInletPlumbing2(Q_Path) + HL_FiCleanLyr(Q_Path) + HL_FiOutletPlumbing1(Q_Path)
HL_FiPathClean3(Q_Path) := HL_FiInletPlumbing2(Q_Path) + HL_FiCleanLyr(Q_Path) + HL_FiOutletPlumbing2(Q_Path)
HL_FiPathClean4(Q_Path) := HL_FiInletPlumbing3(Q_Path) + HL_FiCleanLyr(Q_Path) + HL_FiOutletPlumbing2(Q_Path)
HL_FiPathClean5(Q_Path) := HL_FiInletPlumbing3(Q_Path) + HL_FiCleanLyr(Q_Path) + HL_FiOutletPlumbing3(Q_Path)
HL_FiPathClean6(Q_Path) := HL_FiInletPlumbing4(Q_Path) + HL_FiCleanBottomLyr(Q_Path) + HL_FiOutletPlumbing3(Q_Path)
HL_FiPathCleanMax(Q_1, Q_2, Q_3, Q_4, Q_5, Q_6) := max(HL_FiPathClean1(Q_1), HL_FiPathClean2(Q_2), HL_FiPathClean3(Q_3), HL_FiPathClean4(Q_4), HL_FiPathClean5(Q_5), HL_FiPathClean6(Q_6))
HL_FiPathCleanMin(Q_1, Q_2, Q_3, Q_4, Q_5, Q_6) := min(HL_FiPathClean1(Q_1), HL_FiPathClean2(Q_2), HL_FiPathClean3(Q_3), HL_FiPathClean4(Q_4), HL_FiPathClean5(Q_5), HL_FiPathClean6(Q_6))
# In reality the flow will distribute itself such that all paths have the same head loss. We will treat the average of all of the calculated path head losses as the actual complete head loss accross all paths.
HL_FiPathCleanAve(Q_1, Q_2, Q_3, Q_4, Q_5, Q_6) := (HL_FiPathClean1(Q_1) + HL_FiPathClean2(Q_2) + HL_FiPathClean3(Q_3) + HL_FiPathClean4(Q_4) + HL_FiPathClean5(Q_5) + HL_FiPathClean6(Q_6))/6
Pi_QFiLayer(Q_1, Q_2, Q_3, Q_4, Q_5, Q_6) := sqrt(HL_FiPathCleanMin(Q_1, Q_2, Q_3, Q_4, Q_5, Q_6)/HL_FiPathCleanMax(Q_1, Q_2, Q_3, Q_4, Q_5, Q_6))
# This estimate is reasonable as long as the answer is close to 1
# Guess:
Q_2 := Q_FiLayer
Q_3 := Q_FiLayer
Q_4 := Q_FiLayer
Q_5 := Q_FiLayer
Q_6 := Q_FiLayer
Q_1 := Q_FiLayer
Given
HL_FiPathClean1(Q_1) == HL_FiPathClean2(Q_2)
HL_FiPathClean2(Q_2) == HL_FiPathClean3(Q_3)
Q_1 + Q_2 + Q_3 + Q_4 + Q_5 + Q_6 == Q_Fi
HL_FiPathClean3(Q_3) == HL_FiPathClean4(Q_4)
HL_FiPathClean4(Q_4) == HL_FiPathClean5(Q_5)
HL_FiPathClean5(Q_5) == HL_FiPathClean6(Q_6)
HL_FiPath(Q) := Find(Q_1, Q_2, Q_3, Q_4, Q_5, Q_6)
Q_FiLayer = 0.000125 m^3/s
Q_FiPath := HL_FiPath(Q_Fi) = L/s
Q_FiLayer1 := Q_FiPath[0]
Q_FiLayer2 := Q_FiPath[1]
HL_FiPathClean1(Q_FiPath[0]) =  # error: This variable is undefined.
Q_FiLayer3 := Q_FiPath[2]
HL_FiPathClean2(Q_FiPath[1]) =  # error
Q_FiLayer4 := Q_FiPath[3]
HL_FiPathClean3(Q_FiPath[2]) =  # error
HL_FiCleanPath := HL_FiPathClean1(Q_FiPath[0])
Q_FiLayer5 := Q_FiPath[4]
HL_FiPathClean4(Q_FiPath[3]) =  # error
Q_FiLayer6 := Q_FiPath[5]
HL_FiPathClean5(Q_FiPath[4]) =  # error
HL_FiPathClean6(Q_FiPath[5]) =  # error
L_FiSiphonEst := 2*(HL_FiBwInletPlumbing + HL_FiBwSS + HL_FiSiphonMax) + 2*(H_FiFluidizedBed + H_FiFluidizedBedToSiphon) + L_Fi/2 + T_FiWall + W_MpWalkway + 4*T_PlantWall + L_FiExit + L_FiEntrance + W_ChannelMin + W_DCWalkway/2
K_FiSiphon := 5*K_El90 + K_PipeEnt + K_PipeExit = 6  # Minor loss coefficients for flow through the siphon. The tee is treated as an extra elbow
# Siphon has to handle the entire flow into the filter plus drain the terminal head in Ti.FiBwInitiation.  This is approximately a "hole in a bucket problem" so the average flow rate is half the max flow (hence the factor of 2).  The HL sum corresponds to the height of water that needs to be drained. Use maximum head loss through the siphon for conservative estimate.
Q_FiSiphonInitiation := Q_Fi + 2*A_FiActive*(HL_FiBwSF + H_FiForwardNoSuckAir + HL_FiDirty + HL_FiBwInletPlumbing + HL_FiBwSS + HL_FiSiphonMax - H_FiSiphonNoSuckAir)/Ti_FiBwInitiationBod = L/s
HL_FiSiphonMax := 30 cm
HL_FiSiphonInitiationMax := HL_FiBwSF + H_FiForwardNoSuckAir + HL_FiDirty + HL_FiBwInletPlumbing + HL_FiBwSS + HL_FiSiphonMax - H_FiSiphonNoSuckAir
ND_FiSiphonSS :=
    i ← 5
    HL_SiphonEst ← 10 m
    while HL_SiphonEst > HL_FiSiphonMax
        i ← i + 1
        ID_Siphon ← innerdiameter(AvailND[i], PS_Default)
        HL_SiphonPipeEst ← h_l(Q_Fi, ID_Siphon, L_FiSiphonEst, K_FiSiphon, Nu_Water, E_Pvc)
        HL_SiphonOutlet ← Headloss_weir(Q_Fi, ID_Siphon)
        HL_SiphonOrifice ← h_orifice(ID_Siphon, Pi_VenaContractaOrifice, Q_Fi)
        HL_SiphonEst ← HL_SiphonPipeEst + HL_SiphonOutlet + HL_SiphonOrifice
    return AvailND[i]
# these two functions must be changed if the available pipes are changed in the pipe database!!!!
ND_FiSiphonInitiation :=
    i ← 5
    HL_SiphonEst ← 10 m
    while HL_SiphonEst > HL_FiSiphonInitiationMax
        i ← i + 1
        ID_Siphon ← innerdiameter(AvailND[i], PS_Default)
        HL_SiphonPipeEst ← h_l(Q_FiSiphonInitiation, ID_Siphon, L_FiSiphonEst, K_FiSiphon, Nu_Water, E_Pvc)
        HL_SiphonOutlet ← Headloss_weir(Q_FiSiphonInitiation, ID_Siphon)
        HL_SiphonOrifice ← h_orifice(ID_Siphon, Pi_VenaContractaOrifice, Q_FiSiphonInitiation)
        HL_SiphonEst ← HL_SiphonPipeEst + HL_SiphonOutlet + HL_SiphonOrifice
    return AvailND[i]
ND_FiSiphon := max(ND_FiSiphonSS, ND_FiSiphonInitiation)
HL_FiSiphonPipe := h_l(Q_Fi, innerdiameter(ND_FiSiphon, PS_Default), L_FiSiphonEst, K_FiSiphon, Nu_Water, E_Pvc)
HL_FiSiphonOutlet := Headloss_weir(Q_Fi, innerD(ND_FiSiphon, PS_Default))
B_FiSiphonManOrificesEst := 10 cm
N_FiSiphonManOrifices := 2*floor((L_Fi - 2*ConRadius(ND_FiSiphon))/(2*B_FiSiphonManOrificesEst))
D_FiSiphonManOrifices := CeilNearest(innerdiameter(ND_FiSiphon, PS_Default)/sqrt(N_FiSiphonManOrifices), D_Drill)
# This keeps the area of the orifices the same as the siphon area.
B_FiSiphonManOrifices := (L_Fi - 2*ConRadius(ND_FiSiphon))/N_FiSiphonManOrifices
HL_FiSiphonOrifice := h_orifice(D_FiSiphonManOrifices, Pi_VenaContractaOrifice, Q_Fi/N_FiSiphonManOrifices)
HL_FiBwTotalSS := HL_FiBwInletPlumbing + HL_FiBwSS + HL_FiSiphonOrifice + HL_FiSiphonPipe + HL_FiSiphonOutlet
Rho_FiFluidized := Rho_H2O*ε_FiSand*Pi_FiFluidized + Rho_FiSand*(1 - ε_FiSand)/Pi_FiFluidized = 1743.08 kg/m^3
# Siphon Design
# Entrance Pipe from Sedimentation
# see sedimentation tank code
# The order of logic for the design of filter elevations begins with the water level in the inlet channel, from which you get all entrance box elevations. Exit box elevations are calculated based on path head loss. The elevation of the siphon outlet is below the minimum water level in the entrance box by a height equal to the total backwash head loss (through all plumbing, sand bed, and siphon outlet). The siphon inlet elevation is then set such that air will not be pulled in during low-flow backwash operation. Finally, the elevation of the bottom of the filter box is set such that the fluidized sand bed does not reach the siphon inlet orifices.
ZW_FiInletChannel := Z_SedWeirExit - HL_ChannelMax - HL_FiEntrancePipe = 1.51931 m
Z_FiEntranceWeir := ZW_FiInletChannel - HL_FiEntranceWeir
ZW_FiEntranceMax := Z_FiEntranceWeir - H_FiWeirFreefall
ZW_FiEntranceTerminal := ZW_FiEntranceMax - HL_FiOverflowWeir
Z_FiOverflowWeir := ZW_FiEntranceTerminal
ZW_FiEntranceCleanForward := ZW_FiEntranceTerminal - HL_FiDirty
Z_FiEntranceStub := ZW_FiEntranceTerminal - HL_FiDirty - H_FiForwardNoSuckAir
Z_FiEntranceBottomMax := Z_FiEntranceStub - HL_FiBwSF - H_FiBwNoSuckAir
Z_FiInletChannelBottomMax := Z_SedChannelBottom - max(CouplingLength(ND_FiEntrancePipe), T_PlantWall) - ElbowRadius(ND_FiEntrancePipe) - ConRadius(ND_FiEntrancePipe) - S_Fitting - SocketDepth(ND_FiEntrancePipe) = 1.03213 m
Z_FiInletChannelBottom := min(Z_FiInletChannelBottomMax, Z_FiEntranceBottomMax)
Z_FiEntranceBottom :=
    Z_FiEntranceBottomMax if Z_FiInletChannelBottom - Z_FiEntranceBottomMax ≥ 10 cm
    Z_FiInletChannelBottom otherwise
ZW_FiEntranceBwSS := Z_FiEntranceBottom + H_FiBwNoSuckAir
# NOTE: The last term here is the height of the bubble of water flowing out of the top of the stubs in the exit box. We likely over-estimated this height with an anology to weir head loss. The exit stubs should first be cut longer and then shortened until the water level in the entrance box during clean forward operation is a reasonable margin (H_FiForwardNoSuckAir = 10 cm) above the entrance pipe stubs.
Z_FiExitStub := ZW_FiEntranceCleanForward - HL_FiCleanPath - HL_FiOutletStubs(max(Q_FiPath))
Z_FiSiphonOutlet := ZW_FiEntranceBwSS - HL_FiBwTotalSS
# The top of the pipe stub on the siphon where it discharges into the drain channel. Like the stubs in the exit box, the stubs here should be longer than designed for at first and cut shorter until the water level in the entrance box during backwash is approximately H_FiBwNoSuckAir = 20 cm
Z_PlantDrainChannelBottom := Z_FiSiphonOutlet - L_FiSiphonChannelStubMin
Z_FiSiphonInlet := Z_FiSiphonOutlet - H_FiSiphonNoSuckAir
Z_FiBottom := Z_FiSiphonInlet - H_FiFluidizedBed - H_FiFluidizedBedToSiphon
H_FiEntrance := ZW_FiInletChannel + H_PlantFreeboard - Z_FiEntranceBottom
Z_FiTop := Z_FiEntranceBottom + H_FiEntrance
H_Fi := Z_FiTop - Z_FiBottom
Z_FiExitBottom := Z_FiEntranceBottom
H_FiExit := H_FiEntrance
ZW_FiBwSS := Z_FiSiphonOutlet + HL_FiSiphonOrifice + HL_FiSiphonPipe + HL_FiSiphonOutlet
ZW_FiClean := Z_FiExitStub + HL_FiOutletStubs(max(Q_FiPath)) + HL_FiOutletPlumbingAve(Q_FiLayer1, Q_FiLayer3) + HL_FiCleanLayer
ZW_FiMax := Z_FiExitStub + HL_FiOutletStubs(max(Q_FiPath)) + HL_FiOutletPlumbingAve(Q_FiLayer1, Q_FiLayer3) + HL_FiTerminal
H_FiOverflowMin := H_FiBypassSafety + OuterDiameterFittingPVC(ND_FiBypass) + S_Fitting
Z_FiOverflowBottom := min(Z_FiTop - H_FiOverflowMin, Z_FiOverflowWeir - H_FiOverflowWeirFreefall)
H_FiOverflow := Z_FiTop - Z_FiOverflowBottom
Z_FiDistPipe := Z_FiExitBottom - H_FiDistDrop
# This is the center line of the pipe through the wall.  This is a maximum based on zero flow and the goal of wanting to be able to initiate backwash at the beginning of filtration. This constraint could be relaxed if needed.
Z_FiSiphonCouplingMax := Z_FiExitStub - outerradius(ND_FiSiphon)
H_FiSiphonMax := ZW_FiMax - Z_FiSiphonOutlet
L_FiSiphonTop := L_Fi/2 - ElbowRadius(ND_FiSiphon) + ShortTeeLength(ND_FiBwManBranch) + SocketDepth(ND_FiSiphon) + T_FiWall + outerradius(ND_FiSiphon)
# The following is the minimum elevation of the top of the siphon where it goes through the filter wall so that it will not overflow when the air is compressed in forward filtration mode. See Monroe's filtration notes for a derivation of the following in terms of simple variables. This expression was derived for the variables defined here.
Z_FiSiphonCouplingMin := (P_Atm*(ZW_FiMax + ZW_FiBwSS) + Rho_H2O*g*(ZW_FiMax^2 + ZW_FiMax*L_FiSiphonTop - ZW_FiMax*Z_FiSiphonOutlet))/(2*P_Atm + Rho_H2O*g*(L_FiSiphonTop + ZW_FiMax - Z_FiSiphonOutlet)) + outerradius(ND_FiSiphon)
Z_FiSiphonCouplingMax - Z_FiSiphonCouplingMin =  # error
# Not much room to spare here! We need to always check this and somehow report an error if this is negative!!!!
W_SedExitChannel = 0.34 m
S_Fitting + ConRadius(ND_FiEntrancePipe) + T_SedWeir + W_ChannelMin = 0.2908 m
Z_FiSiphonCoupling := Z_FiSiphonCouplingMax
W_SedExitChannelPostWeir = 15 cm
W_SedExitChannelPreWeir = 15 cm
H_FiSiphonPressure := ZW_FiMax - Z_FiSiphonCouplingMin  # This cannot be greater than Z_FiSiphonOutlet - Z_FiBottom =
Z_FiAirRemovalBlockBottom := 0.15*S_FiEntranceBaffle + Z_FiEntranceBottom
Z_FiAirRemovalBlockTop := ZW_FiEntranceBwSS - H_FiAirRemovalBlockSubmerged
# Elevations
HL_FiSiphonValveWater := (Z_FiSiphonCoupling - ND_FiSiphon/2) - (Z_FiSiphonOutlet + HL_FiSiphonPipe + HL_FiSiphonOutlet)
# The available head is equal to the difference between the bottom of the siphon pipe and the steady state water level in the filter.  This is a head available in terms of water.
Vol_FiSiphonAir := (CouplingLength(ND_FiSiphon) + 4*outerdiameter(ND_FiSiphon) + 2*(Z_FiSiphonCoupling - Z_FiSiphonOutlet))*π/4*innerdiameter(ND_FiSiphon, PS_Default)^2
# Goal is to fill siphon tube with air in 10 seconds. To account for the diminishing head as the siphon tube fills with air we will use 0.5 seconds. This rapid fill is desirable so that the operator can open and then immediately close the valve without having to wait. This is important because the operator won't be able to see the air filling up the siphon tube.
Ti_FiSiphonBreak := 10 s
# Monroe increased this to 1 s (from 0.5 s) because the video of starting backwash showed the operator moving the valve slowly. This indicatess that it wasn't necessary to have such a large valve at Tamara.
# changed to 10s 1/7/2012
Q_FiSiphonAir := Vol_FiSiphonAir/Ti_FiSiphonBreak = L/s
HL_FiSiphonValveAir := HL_FiSiphonValveWater*Rho_H2O/Rho_Air  # This is the head available in terms of air.
K_FiSiphonValve := 3
# Entrance and Exit loses and ball valve losses
L_FiSiphonBreak := Z_FiBottom + H_Fi - Z_FiSiphonCoupling
# Estimated length of the pipe that will be connected to the air valve. Air valve will be at the very top of the filter.
ND_FiSiphonAirValve := NominalPipeSize(D_PipeTotal(Q_FiSiphonAir, HL_FiSiphonValveAir, L_FiSiphonBreak, Nu_Air, E_Pvc, K_FiSiphonValve))
# Siphon Valve Size
# Sand Removal Pipe
ND_FiSandOutlet = 2 in
H_FiSandOutlet := 1 m  # to be high enough to dump into a 55 gal drum
# This can't be set any higher because the available head will be insufficient to pump sand unless we figure out a way to maintain a higher water level in the filter during the sand dump. See the small head loss available at the finish of pumping the sand below.
Z_FiSandOutlet := Z_FiBottom + H_FiSandOutlet
# This is higher than the sed tank drain channel. Thus the backwash water can easily discharge into the drain channel
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HL_FiSandOutlet := Z_FiSiphonOutlet - Z_FiSandOutlet
# This isn't quite right because of the different densities.
# Calculating head loss and density for this problem is a bit complicated. The sand bed has a density of
Rho_FiFluidized = 1743.08 kg/m^3
# This ends up changing Nu.Water, but that doesn't change the results because we are in the very turbulent domain of the Moody diagram. The available head has to take into account the different densities of the fluidized bed and the water above the bed. As the fluidized bed is drained the available head will decrease. Would it be possible to drain the sand out of the bed at the very beginning of the backwash cycle while the water depth above the bed is gradually decreasing? This extra bed depth would provide more head to push the sand through the sand outlet.
# At the beginning of sand pumping the filter box has fluidized sand (and thus a high fluid density) and thus the pressure at the entrance to the sand dump is high. At the end of the sand dump the filter is filled with water and thus the pressure at the entrance to the sand dump is much lower and yet the sand dump pipe is still filled with the high density fluidized sand.
HL_FiSandOutletStart := ((Z_FiSiphonOutlet - Z_FiBottom - H_FiSand*Pi_FiFluidized)*Rho_H2O + H_FiSand*Pi_FiFluidized*Rho_FiFluidized + (-H_FiSandOutlet*Rho_FiFluidized))/Rho_FiFluidized
# Sand Calcs
HL_FiSandOutletFinish := ((Z_FiSiphonOutlet - Z_FiBottom)*Rho_H2O + (-H_FiSandOutlet*Rho_FiFluidized))/Rho_FiFluidized
(7.5 + 13 + 13 + 5)*in*11/2*in*11/2*in*π = 59.9566 L
(11.5/2*in)^2*π*H_FiSand - 7*(1 in)^2*π*11*in - 7*sum(L_FiManBranchMatrix)*π*(0.5 in)^2 = 76.5148 L
V_FiSand := W_Fi*L_Fi*H_FiSand*Pi_FiFluidized  # Total volume of the fluidized bed
# Use the largest pipe that will fit between the branch lines (but not between the backwash branch lines)
Q_FiSandOutletStart := Q_pipetotal(innerdiameter(ND_FiSandOutlet, PS_Default), HL_FiSandOutletStart, H_FiSandOutlet, Nu_Water*Rho_H2O/Rho_FiFluidized, E_Pvc, K_PipeExit + K_PipeEnt + 2*K_El90) = L/s
Q_FiSandOutletFinish := Q_pipetotal(innerdiameter(ND_FiSandOutlet, PS_Default), HL_FiSandOutletFinish, H_FiSandOutlet, Nu_Water*Rho_H2O/Rho_FiFluidized, E_Pvc, K_PipeExit + K_PipeEnt + 2*K_El90) = L/s
Q_FiSandOutlet := (Q_FiSandOutletStart + Q_FiSandOutletFinish)/2  # This isn't quite right, but it is close.
Ti_FiSand := V_FiSand/Q_FiSandOutlet  # This is the time required to empty the filter of the sand.
Ti_FiSandDrum := 220*L/Q_FiSandOutlet
Q_FiSandOutletFinish/(innerdiameter(ND_FiSandOutlet, PS_Default)^2/4*π) =  # error  # The velocity in the pipe is far greater than the backwash velocity
# Estimate of the flow rate that would allow sand to settle within the vertical pipe. This flow rate is really low and so the valve will need to be almost closed before the sand stops flowing.
Q_Settle := 5*mm/s*(innerdiameter(ND_FiSandOutlet, PS_Default)^2/4*π) = 0.0119632 L/s
HL_BwPipe := h_l(Q_Plant, innerdiameter(1.5 in, PS_Default), 81 in, K_PipeExit + K_PipeEnt + K_El90, Nu_Water, E_Pvc)
HL_BwPipe = 72.6641 cm
# Amount of Sand to Buy:
Vol_SandNeeded := π*(innerdiameter(12 in, PS_Default)/2)^2*53*in = 93.5364 L
d_Bucket := 11 in
h := 12 in + 8 in + 8.5 in + 13 in
Vol_SandAvailable := π*(d_Bucket/2)^2*h = 64.6286 L
Vol_Sand2 := Vol_SandNeeded - (6*π/4*(1 in)^2*12*in + (6*π)/4*(0.5 in)^2*sum(L_ManifoldsCut)) = 91.9232 L
Vol_SandToBuy := 1.2*(Vol_SandNeeded - Vol_SandAvailable) = 34.6894 L
Mass_SandNeeded := Vol_Sand2*Rho_FiSand*(1 - ε_FiSand) = 146.158 kg
Rho_FiSand = 2650 kg/m^3
45*3 = 135
Mass_SandToBuy := Vol_SandToBuy*Rho_FiSand*(1 - ε_FiSand) = 121.599 lb
p1 := 90 in*Rho_H2O*g = 22.418 kPa
p2 := 40 in*Rho_H2O*g = 9.96356 kPa
D_FiSandES = 0.5 mm
# OR
Pi_UCFiSand = 1.65
p_diffmax := 10 cm*Rho_H2O*g = 0.980665 kPa
D_FiSand60 = 0.825 mm
# Inlet Channel Design
L_FiInletChannel := N_Fi*W_FiEntrance + (N_Fi - 1)*(W_FiOverflow + 2*T_PlantWall)
H_FiInletChannel := Z_FiTop - Z_FiInletChannelBottom
HW_FiInletChannel := ZW_FiInletChannel - Z_FiInletChannelBottom
Pi_QFi := 0.97
HL_FiInletChannel := Headloss_weir(Q_Fi, L_FiEntranceWeir) - Headloss_weir(Q_Fi*Pi_QFi, L_FiEntranceWeir)
W_FiInletChannelFlowDist := W_HorizChannel(Q_Plant, HW_FiInletChannel, HL_FiInletChannel, L_FiInletChannel, Nu_Water, E_Concrete, 0)
W_FiInletChannel := max(W_FiInletChannelFlowDist, W_FiInletChannelMin)
# Trunk Line Purge Valves
# Here we design for a certain scour velocity in the trunk lines BEYOND the manifold (outside of the filter box). We likely won't get sufficient scour velocities within the manifold where there is only a fraction of the total flow rate in the lines (particularly at the ends of the manifolds). Therefore these valves will probably not be all that effective if there is a serious solids accumulation problem. Hopefully accumulation of solids in the inlet plumbing will not be a problem when our manifold is constructed such that there is no sand leakage.
# For operation, the line which is being purged must be plugged from the entrance box so that the valve does not need to handle both the full filter flow and the trunk flush flow. For best operation, the other pipe stubs in the entrance box should be pulled out so that the entrance box water can contribute to the flow for a longer run at scour velocity.
# Decide on a reasonable scour velocity for compacted sludge
V_Scour(Rho_Particle, D_Particle, θ) := sqrt(2*sqrt(500000)/(3*0.332)*(Rho_Particle - Rho_H2O)/Rho_H2O*g*D_Particle*tan(θ))
V_FiTrunkFlush := V_Scour((2.65*gm/mL + Rho_FB)/2, 0.1 mm, 5 deg) = 0.317119 m/s
V_FiTrunkFlush := V_Scour(Rho_FiSand, D_FiSand60, 5 deg) = 1.28775 m/s
# We won't be able to flush sand out of the line - the scour velocity is too high no matter how big a valve we choose.
# Head loss calculations and valve sizes
V_FiTrunkFlush := 0.3*m/s
Q_FiBwTrunkFlush := π*innerdiameter(ND_FiBwTrunk, PS_Default)^2/4*V_FiTrunkFlush = 0.457064 L/s
HL_FiSandBedBwTrunkFlush := h_lKozeny(H_FiSandActive, D_FiSand60, Q_FiBwTrunkFlush/A_FiActive, ε_FiSand, Nu_Water) = 1.22027 m
HL_FiBwSlotsTrunkFlush := h_orifice(D_circle(A_FiBwManSlots*ε_FiSand), Pi_VenaContractaOrifice, Q_FiBwTrunkFlush) = 0.265822 m
H_FiBwTrunkFlushAvail := ZW_FiClean - Z_FiBottom - outerradius(ND_FiBwManBranch) - HL_FiSandBedBwTrunkFlush - HL_FiBwSlotsTrunkFlush
ND_FiBwTrunkFlushValve := D_pipeschedule(Q_FiBwTrunkFlush, PS_Default, H_FiBwTrunkFlushAvail, 5 cm, Nu_Water, E_Pvc, K_PipeEnt + K_GateValve + K_PipeExit)
Q_FiTrunkFlush := π*innerdiameter(ND_FiTrunk, PS_Default)^2/4*V_FiTrunkFlush = 0.717791 L/s
HL_FiSlotsTrunkFlush := h_orifice(D_circle(A_FiManSlots*ε_FiSand), Pi_VenaContractaOrifice, Q_FiTrunkFlush) = 0.163898 m
HL_FiElbowTrunkFlush := h_e(Q_FiTrunkFlush, innerdiameter(ND_FiTrunk, PS_Default), K_El90) = 0.412985 cm
HL_FiSandBedTrunk2Flush := h_lKozeny(H_FiSandActive - 2*H_FiLayer, D_FiSand60, Q_FiTrunkFlush/A_FiActive, ε_FiSand, Nu_Water) = 1.27757 m
HL_FiSandBedTrunk3Flush := h_lKozeny(H_FiSandActive - 4*H_FiLayer, D_FiSand60, Q_FiTrunkFlush/A_FiActive, ε_FiSand, Nu_Water) = 0.638787 m
H_FiTrunk2FlushAvail := ZW_FiClean - Z_FiBottom - outerradius(ND_FiBwManBranch) - 2*H_FiLayer - HL_FiSandBedTrunk2Flush - HL_FiSlotsTrunkFlush - HL_FiElbowTrunkFlush
H_FiTrunk3FlushAvail := ZW_FiClean - Z_FiBottom - outerradius(ND_FiBwManBranch) - 4*H_FiLayer - HL_FiSandBedTrunk3Flush - HL_FiSlotsTrunkFlush - HL_FiElbowTrunkFlush
H_FiTrunk4FlushAvail := ZW_FiClean - Z_FiBottom - outerradius(ND_FiBwManBranch) - 6*H_FiLayer - HL_FiSlotsTrunkFlush - HL_FiElbowTrunkFlush
ND_FiTrunk2FlushValve := D_pipeschedule(Q_FiTrunkFlush, PS_Default, H_FiTrunk2FlushAvail, 5 cm, Nu_Water, E_Pvc, K_PipeEnt + K_GateValve + K_PipeExit)
ND_FiTrunk3FlushValve := D_pipeschedule(Q_FiTrunkFlush, PS_Default, H_FiTrunk3FlushAvail, 5 cm, Nu_Water, E_Pvc, K_PipeEnt + K_GateValve + K_PipeExit)
ND_FiTrunk4FlushValve := D_pipeschedule(Q_FiTrunkFlush, PS_Default, H_FiTrunk4FlushAvail, 5 cm, Nu_Water, E_Pvc, K_PipeEnt + K_GateValve + K_PipeExit)
ND_FiTrunkFlushValve := max(ND_FiTrunk2FlushValve, ND_FiTrunk3FlushValve, ND_FiTrunk4FlushValve)
# To calculate the maximum possible flow through the drainchannel, all tanks are assumed to be initially full and emptying in the same time
# Note that the tank heights are used instead of the water levels in the calculation of maximum flow to have a conservative design.
Q_TankDrainMax := Q_pipeminor(innerdiameter(ND_EtDrain, PS_Default), H_Et, K_PipeEnt + K_PipeExit)*(N_EtFullHopper + 1) + Q_pipeminor(innerdiameter(ND_FlocValve, PS_Default), H_Floc, K_PipeEnt + K_PipeExit)*(last(Y_FlocDrainValves) + 1) + Q_pipeminor(innerdiameter(ND_SedSludgePipe, PS_Default), H_Sed, K_PipeEnt + K_PipeExit)*N_SedBays*N_SedTanks
Q_PlantDCMax := Q_TankDrainMax + N_Fi*(1 + N_Fi > 1)*Q_Fi = 0.13607 m^3/s
L_PlantDC := 2*T_PlantWall + N_SedTanks*(W_Sed + T_SedWallDivider) - T_SedWallDivider + N_FlocChannels*(W_FlocChannel + T_FlocChannelWall) - T_FlocChannelWall + W_EtWalkway + 2*T_PlantWall + W_Et = 6.19077 m
W_PlantDC := W_DCWalkway = 1 m
H_PlantDC := H_HorizChannelMin(Q_PlantDCMax, W_PlantDC, L_PlantDC, Nu_Water, E_Concrete, 1) = 0.194386 m
Z_PlantLowerDCBottom := min(Plant_Origin[2] - H_PlantDC, Z_FiSiphonOutlet - L_FiSiphonChannelStubMin, Z_Walkway - T_Floor - H_HumanAccess)
Z_PlantUpperDCBottom := min(Z_FlocTank - H_PlantDC, Z_Walkway - T_Floor - H_HumanAccess) = -0.309947 m
# Main Plant Drain Channel
