Q_Plant := 40*L/s
# [reference: MtoATranslators.xmcd]
# The wrapped MtoA translator contains the functions that the user will want to access. These functions will draw pieces with full functionality - specifying the location, dimension, and orientation of the object. Also, it contains layer control and subtraction capabilities for grouped objects.
# [reference: MtoATranslatorsWrapped.xmcd]
# [reference: ExpertInputs.xmcd]
# [reference: MathFunctions.xmcd]
# [reference: PipeDatabase.xmcd]
# [reference: MaterialsDatabase.xmcd]
# [reference: FluidsFunctions.xmcd]
# [reference: SedimentationTank.xmcd]
# [reference: LFOM.xmcd]
# [reference: FlocculatorEntranceTank.xmcd]
# [reference: StackedRapidSandFilter.xmcd]
# [reference: ChemicalDoseController.xmcd]
# [reference: ChannelF.xmcd]
# [reference: PlumbingF.xmcd]
# [reference: TankF.xmcd]
# [reference: StairsF.xmcd]
# [reference: DrainChannelF.xmcd]
# [reference: FlocculatorAC.xmcd]
# [reference: SedimentationTankAC.xmcd]
# [reference: LayoutsAC.xmcd]
# LFOM AutoCAD
# LFOM Drawing
LfomLayer := layer_new("EtLfomPlu", blue)
LFOM_Origin := [0 m; 0 m; 0 m]
SubtractFromEtRMPipe := SubtractF(["EtLfomPu"], "DeleteMe")
EtRMPipe := PipeF(LFOM_Origin, H_PlantFreeboard, [0; 90]*deg, ND_RMPipe, SDR_41)
last(H_LfomOrifices) + H_PlantFreeboard
LfomFrz := FreezeLayer("EtLfomPlu")
LfomOrifices :=
    Local ← LfomFrz
    for h ∈ 0 .. last(H_LfomOrifices)
        if N_LfomOrifices[h] ≠ 0
            Local ← stack(Local, CylinderF([LFOM_Origin[0]; LFOM_Origin[1]; LFOM_Origin[2] + H_LfomOrifices[h]], D_LfomOrifices/2, OR(ND_RMPipe) + zc, [
                90 deg + (asin(0.5*S_LfomOrificesMin/OD(ND_RMPipe)) + asin(D_LfomOrifices/OD(ND_RMPipe)))*(mod(h, 2) == 0);
                0 deg
            ]))
        Local ← stack(Local, ArrayLastPolar([LFOM_Origin[0]; LFOM_Origin[1]; LFOM_Origin[2] + H_LfomOrifices[h]], N_LfomOrifices[h], (N_LfomOrifices[h] - 1)*(2*asin(D_LfomOrifices/OD(ND_RMPipe)) + 2*asin(S_LfomOrificesMin/OD(ND_RMPipe))))) if N_LfomOrifices[h] > 1
    return Local
L_RMVertPipeTop := H_PlantFreeboard
AC_LFOM := stack(LfomLayer, EtRMPipe, LfomFrz, LfomOrifices, GroupDelete, SubtractFromEtRMPipe)
# [component: inputs AC_LFOM]
