Q_Plant := 20*L/s
# [reference: ExpertInputs.xmcd]
# [reference: MathFunctions.xmcd]
# [reference: PipeDatabase.xmcd]
# [reference: MaterialsDatabase.xmcd]
# [reference: FluidsFunctions.xmcd]
# The sed tank files have been changed. Go back to revision 6721 for clean Sed Tank files (no dropped bottom or moved outlets to filter) mrf222
# [reference: SedTankFunctions.xmcd]
# [reference: CdcFunctions.xmcd]
# [reference: LfomFunctions.xmcd]
# [reference: SedimentationTank.xmcd]
# [reference: Flocculator.xmcd]
# [reference: LFOM.xmcd]
# [reference: EntranceTank.xmcd]
# [reference: StackedRapidSandFilter.xmcd]
# [reference: LinearCdc.xmcd]
# [reference: ChemStorageTanks.xmcd]
# AutoCAD drawing programs:
# Translators:
# These are the codes that take MathCAD outputs and create AutoCAD scripts that are used to draw the plant (formerly Basics)
# [reference: MtoATranslators.xmcd]
# The wrapped MtoA translator contains the functions that the user will want to access. These functions will draw pieces with full functionality - specifying the location, dimension, and orientation of the object. Also, it contains layer control and subtraction capabilities for grouped objects.
# [reference: MtoATranslatorsWrapped.xmcd]
# Drawing functions:
# [reference: ChannelF.xmcd]
# [reference: PlumbingF.xmcd]
# [reference: TankF.xmcd]
# [reference: StairsF.xmcd]
# [reference: DrainChannelF.xmcd]
# AutoCAD Script Files:
# [reference: FlocculatorAC.xmcd]
# [reference: SedimentationTankAC.xmcd]
# DISCLAIMER : IF YOU CHANGE THE AUTOCAD DRAWING FUNCTIONS, YOU ALSO NEED TO CHANGE THE MATERIALS LIST HIGHLIGHTED IN ORANGE.
# Note : This file does not have high flow capabilities. mrf222
# Entrance Tank AutoCAD
# Everything AirRelease needs to be removed from this file.
# Entrance Tank Concrete
# Origins and dimensions
Et_Origin0 := [
    Plant_Origin[0] - L_Sed + L_Et - {
        (0 m) if EN_DoubleTrain == 0
        (W_DCWalkway + 3*T_PlantWall + L_LfomChannel) otherwise
    };
    Floc_Origin[1] + {
        (N_FlocChannels*(W_FlocChannel + T_FlocChannelWall)) + W_EtWalkway + 2*T_PlantWall - T_FlocChannelWall if Q_Plant > Q_PlantMaxLF
        L_Floc + T_PlantWall + L_ChannelSlot + W_EtWalkway otherwise
    };
    Z_Et
] = [-3.19037; 6.1004; 1.16822] m
Et_Origin1 := [
    Plant_Origin[0] - L_Sed + L_Et;
    Floc_Origin[1] + (N_FlocChannels*(W_FlocChannel + T_PlantWall)) + W_EtWalkway + T_PlantWall;
    Z_Et
] = [-3.19037; 6.1004; 1.16822] m
Et_Origin :=
    Et_Origin0 if EN_EtGrit == 0
    Et_Origin1 otherwise
Et_Origin = [-3.19037; 6.1004; 1.16822] m
Et_Dim := [L_Et; W_Et; H_Et + DropEt] = [4.2398; 1.23818; 1.13375] m
EtHopper_Origin := [
    Et_Origin[0] - S_Fitting - ConRadius(ND_EtDrain) - L_EtHopper/2 - T_EtHopperLedge;
    Et_Origin[1] + W_Et;
    Et_Origin[2]
] = [-4.37572; 7.33857; 1.16822] m
T_EtHopperLedge = 0.15 m
Hopper_FarCorner := [Et_Origin[0] - L_EtHopper - T_EtHopperLedge; Et_Origin[1]; Z_EtHopper] = [-5.20947; 6.1004; 2.00197] m
W_Et = 1.23818 m
L_EtHopperBack = 0.636575 m
HopperBack_FarCorner := [
    Et_Origin[0] - {
        L_EtHopperBack if EN_DoubleTrain == 0
        L_EtHopperBack otherwise
    };
    Et_Origin[1] + L_Et + W_Et;
    Et_Origin[2] + H_EtHopperBack
] = [-3.82695; 11.5784; 1.80479] m
HopperFront_FarCorner := [
    Et_Origin[0] - {
        (L_EtHopperFront/2) if EN_DoubleTrain == 1
        -L_EtHopperFront otherwise
    };
    Et_Origin[1] + L_Et;
    Et_Origin[2] + H_EtHopperFront
] = [-2.79037; 10.3402; 1.56822] m
EtDC_Origin := Et_Origin + [-L_EtDC; L_EtSupport; -T_PlantWall]  # Changed by mrf222 to be as close to the front of the tank as possible
# Origin for LFOM channel.
LfomChannel_Origin := [
    Et_Origin[0] - L_Et + W_DCWalkway + 3*T_PlantWall + 2*L_LfomChannel;
    Et_Origin[1] + T_LfomChannelWall;
    Floc_Origin[2]
] = [-4.82468; 6.2504; 0] m
# Hoppers and tank walls
EntTankLayer := layer_new("EtCon", grey)
EtHopper := WedgeF(EtHopper_Origin, Hopper_FarCorner, [0; 0; 0]*deg)
MirrorEtHopper := MirrorLast([EtHopper_Origin[0] + T_EtHopperLedge/2; EtHopper_Origin[1]], [EtHopper_Origin[0] + T_EtHopperLedge/2; EtHopper_Origin[1] + zc], "n")
EtHopperLedge := BoxF(EtHopper_Origin, EtHopper_Origin + [T_EtHopperLedge; -W_Et; H_EtHopper], [0; 0; 0]*deg)
EtHopper_Origin = [-4.37572; 7.33857; 1.16822] m
AddHopper :=
    1 if EN_DoubleTrain == 0
    4 otherwise
ArrayEtHoppers := array_all(1, N_EtFullHopper + AddHopper, -L_EtHopper - T_EtHopperLedge)
Hopper_FarCorner = [-5.20947; 6.1004; 2.00197] m
N_EtFullHopper = 1
EtHopperBack := WedgeF(Et_Origin + [0; W_Et; 0], HopperBack_FarCorner, [90; 0; 0]*deg)
Et_Origin = [-3.19037; 6.1004; 1.16822] m
ArrayEtHoppers = "-array all  R 1 2 -2.0191"
EtHopperFront := WedgeF(Et_Origin, HopperFront_FarCorner, [90; 0; 0]*deg)
HopperBack_FarCorner = [-3.82695; 11.5784; 1.80479] m
EntTank := Tank(Et_Origin, Et_Dim, T_PlantWall)
# Drain channel
HopperFront_FarCorner = [-2.79037; 10.3402; 1.56822] m
DrainAngle :=
    (1 %) if EN_DoubleTrain == 0
    (2 %) otherwise
EtDC == DrainChannelF(EtDC_Origin + [0 m; W_Et/2 - W_EtDC/2; 0 m], [180; 0; 0]*deg, Q_EtDCMax, W_EtDC, H_EtDC, L_EtDC, DrainAngle, Nu_Water, E_Concrete, 1)
# Changed origin point of the drain channel.
EtDC := DrainChannelF(EtDC_Origin + [0 m; W_EtDC; 0 m], [180; 0; 0]*deg, Q_EtDCMax, W_EtDC, H_EtDC, L_EtDC, DrainAngle, Nu_Water, E_Concrete, 1)
FreezeEntTank := FreezeLayer("EtCon")
# Subtract Cutout for Main Plant Drain Channel
PlantDCCutout := BoxF([
    (Plant_Origin[0] - L_Sed - T_PlantWall - W_PlantDC);
    Et_Origin[1] + .5*L_EtHopperFront;
    Et_Origin[2] - T_PlantWall - H_EtDC - T_ChannelWall - 3*T_ConcreteMin
], [
    Plant_Origin[0] - L_Sed - T_PlantWall;
    Et_Origin[1] + .5*L_EtHopperFront + W_EtDC;
    Et_Origin[2] - T_PlantWall
], [0; 0; 0]*deg)
# Subtract extra Hopper length
HopperSubtraction := BoxF([Et_Origin[0] - Et_Dim[0] - T_PlantWall; Et_Origin[1]; Et_Origin[2]], [
    Et_Origin[0] - Et_Dim[0] - T_PlantWall - 2*L_EtHopper;
    Et_Origin[1] + W_Et;
    Et_Origin[2] + H_Et + DropEt
], [0; 0; 0]*deg)
HopperSkim := BoxF([
    Et_Origin[0] - Et_Dim[0];
    Et_Origin[1];
    Et_Origin[2] + H_Et + DropEt - (HL_Lfom + H_PlantFreeboard + T_ConcreteMin)
], [Et_Origin[0]; Et_Origin[1] + W_Et; Et_Origin[2] + H_Et + DropEt], [0; 0; 0]*deg)
# Trash rack slots
TrashRackSlot1 := BoxF(EtHopper_Origin + [T_EtHopperLedge/2 - T_ConcreteMin/2; 2*D_Rebar; H_EtHopper - 2*D_Rebar], EtHopper_Origin + [
    T_EtHopperLedge/2 - T_ConcreteMin/2 - 2*D_Rebar;
    -W_Et - 2*D_Rebar;
    H_EtHopper + H_EtTop + H_PlantFreeboard + zc
], [0; 0; 0]*deg)
TrashRackSlot2 := BoxF(EtHopper_Origin + [T_EtHopperLedge/2 + T_ConcreteMin/2; 2*D_Rebar; H_EtHopper - 2*D_Rebar], EtHopper_Origin + [
    T_EtHopperLedge/2 + T_ConcreteMin/2 + 2*D_Rebar;
    -W_Et - 2*D_Rebar;
    H_EtHopper + H_EtTop + H_PlantFreeboard + zc
], [0; 0; 0]*deg)
SubtractTrashRackSlots := SubtractF(["EtCon"], "DeleteMe")
# No-Grit Features
EtDrainSlope := WedgeF(Et_Origin - [L_Et; 0; 0], Et_Origin + [
    -L_Et + ConRadius(ND_EtFlowControl)/tan(30 deg);
    2*ConRadius(ND_EtFlowControl);
    -ConRadius(ND_EtFlowControl)
], [0; 0; 0]*deg)
FreezeEntTank := FreezeLayer("EtCon")
SubtractEtDrainSlope := SubtractF(["EtCon"], "DeleteMe")
EtBaffleLayer := layer_new("EtBaffle", ltgrey)
EtBaffle := BoxSUBF(Et_Origin + [-S_EtBaffle; -T_ConcreteMin; S_EtBaffleBottom], Et_Origin + [-S_EtBaffle - T_ConcreteMin; W_Et + T_ConcreteMin; H_Et + DropEt], [0; 0; 0]*deg, ["EtCon"])
EtBaffleFrz := FreezeLayer("EtBaffle")
EtTankScript :=
    stack(EntTankLayer, EntTank, FreezeEntTank, EtDrainSlope, GroupDelete, SubtractEtDrainSlope, EtBaffleLayer, EtBaffle, EtBaffleFrz) if EN_EtGrit == 1
    stack(EntTankLayer, EtHopper, MirrorEtHopper, EtHopperLedge, ArrayEtHoppers, EtHopperBack, EtHopperFront, EntTank, EtDC, Union_All, FreezeEntTank, PlantDCCutout, HopperSkim, TrashRackSlot1, TrashRackSlot2, HopperSubtraction, GroupDelete, SubtractTrashRackSlots) if EN_DoubleTrain == 1 and EN_EtGrit == 0
    stack(EntTankLayer, EtHopper, MirrorEtHopper, EtHopperLedge, ArrayEtHoppers, EtHopperBack, EtHopperFront, EntTank, EtDC, Union_All, FreezeEntTank, TrashRackSlot1, TrashRackSlot2, GroupDelete, SubtractTrashRackSlots) otherwise
# Entrance Tank Concrete Two Inlets
# Origins and dimensions
Et_Origin0 := [
    Plant_Origin[0] - L_Sed + L_Et;
    Floc_Origin[1] + {
        (N_FlocChannels*(W_FlocChannel + T_FlocChannelWall)) + W_EtWalkway + 2*T_PlantWall - T_FlocChannelWall if Q_Plant > Q_PlantMaxLF
        L_Floc + T_PlantWall + L_ChannelSlot + W_EtWalkway otherwise
    };
    Z_Et
] = [-3.19037; 6.1004; 1.16822] m
Et_Origin1 := [
    Plant_Origin[0] - L_Sed + L_Et;
    Floc_Origin[1] + (N_FlocChannels*(W_FlocChannel + T_PlantWall)) + W_EtWalkway + T_PlantWall;
    Z_Et
] = [-3.19037; 6.1004; 1.16822] m
Et_Origin :=
    Et_Origin0 if EN_EtGrit == 0
    Et_Origin1 otherwise
Et_Dim := [L_Et; W_Et; H_Et + DropEt] = [4.2398; 1.23818; 1.13375] m
EtHopper_Origin := [
    Et_Origin[0] - S_Fitting - ConRadius(ND_EtDrain) - L_EtHopper/2 - T_EtHopperLedge;
    Et_Origin[1] + W_Et;
    Et_Origin[2]
] = [-4.37572; 7.33857; 1.16822] m
Hopper_FarCorner := [Et_Origin[0] - L_EtHopper - T_EtHopperLedge; Et_Origin[1]; Z_EtHopper] = [-5.20947; 6.1004; 2.00197] m
# Use two inlet back far corner for first hopper and original for last two hoppers
HopperBack_FarCorner := [Et_Origin[0] - L_EtHopperBack; Et_Origin[1] + L_Et + W_Et; Et_Origin[2] + H_EtHopperBack] = [-3.82695; 11.5784; 1.80479] m
HopperBack_FarCornerTwoInlet := [
    Et_Origin[0] - L_EtHopperBack + (2*S_Fitting + T_EtRemovableWall + 2*T_EtRemovableWallSupport + 2*ConRadius(ND_EtDrain));
    Et_Origin[1] + L_Et + W_Et;
    Et_Origin[2] + H_EtHopperBack
] = [-3.47535; 11.5784; 1.80479] m
HopperFront_FarCorner := [Et_Origin[0] + L_EtHopperFront; Et_Origin[1] + L_Et; Et_Origin[2] + H_EtHopperFront] = [-2.79037; 10.3402; 1.56822] m
EtDC_Origin := Et_Origin + [-L_EtDC; L_EtHopperFront; -T_PlantWall]
EtDividingWall_Origin := Et_Origin + [0 m; (L_EtHopperFront + 2*S_Fitting + 2*ConRadius(ND_EtDrain) + T_EtRemovableWallSupport); 0 m]
EtDividingWallSupportL_Origin := EtDividingWall_Origin + [0 m; (T_EtRemovableWall + T_EtRemovableWallSupport)/2; 0 m]
# Set both origins for support walls on opposite sides of the removable wall
EtDividingWallSupportR_Origin := EtDividingWall_Origin + [0 m; -(T_EtRemovableWall + T_EtRemovableWallSupport)/2; 0 m]
# Hoppers and tank walls
EntTankLayer := layer_new("EtCon", grey)
EtHopper := WedgeF(EtHopper_Origin, Hopper_FarCorner, [0; 0; 0]*deg)
MirrorEtHopper := MirrorLast([EtHopper_Origin[0] + T_EtHopperLedge/2; EtHopper_Origin[1]], [EtHopper_Origin[0] + T_EtHopperLedge/2; EtHopper_Origin[1] + zc], "n")
EtHopperLedge := BoxF(EtHopper_Origin, EtHopper_Origin + [T_EtHopperLedge; -W_Et; H_EtHopper], [0; 0; 0]*deg)
ArrayEtHoppers := array_all(1, N_EtFullHopper + 1, -L_EtHopper - T_EtHopperLedge)
# Have to change this or the hopper back far corner
# Incorporate 2 molds
# Make two wedges
EtHopperBack :=
    WedgeF(Et_Origin + [0; W_Et; 0], HopperBack_FarCornerTwoInlet, [90; 0; 0]*deg) if EN_TwoInlets == 1
    WedgeF(Et_Origin + [0; W_Et; 0], HopperBack_FarCorner, [90; 0; 0]*deg) otherwise
ConRadius(ND_EtDrain) - S_Fitting - T_EtHopperLedge
[Et_Origin[0] - L_EtHopperBack; Et_Origin[1] + L_Et + W_Et; Et_Origin[2] + H_EtHopperBack]
EtHopperBack2 := WedgeF(Et_Origin + [-L_EtHopper/2 - T_EtHopperLedge; W_Et; 0], HopperBack_FarCorner + [-W_Et/2; -L_EtHopper/2; 0 m], [90; 0; 0]*deg)
Et_HopperBack :=
    EtHopperBack if EN_TwoInlets == 1
    EtHopperBack otherwise
EtHopperFront := WedgeF(Et_Origin, HopperFront_FarCorner, [90; 0; 0]*deg)
EntTank := Tank(Et_Origin, Et_Dim, T_PlantWall)
EtDividingWallSupportL := BoxF(EtDividingWallSupportL_Origin, EtDividingWallSupportL_Origin + [
    -L_EtHopper/2 - ConRadius(ND_EtDrain) - S_Fitting;
    T_EtRemovableWallSupport;
    H_EtRemovableWallSupport
], [0; 0; 0]*deg)
EtDividingWallSupportR := BoxF(EtDividingWallSupportR_Origin, EtDividingWallSupportR_Origin + [
    -L_EtHopper/2 - ConRadius(ND_EtDrain) - S_Fitting;
    T_EtRemovableWallSupport;
    H_EtRemovableWallSupport
], [0; 0; 0]*deg)
EtDividingWallSupportWedgeR := WedgeF(EtDividingWallSupportR_Origin + [-L_EtHopper/2 - ConRadius(ND_EtDrain) - S_Fitting; 0 m; H_EtRemovableWallSupport], EtDividingWallSupportR_Origin + [
    -2*ConRadius(ND_EtDrain) - 2*S_Fitting;
    T_EtRemovableWallSupport;
    H_EtHopper + H_EtRemovableWallSupport
], [0; 0; 0]*deg)
EtDividingWallSupportWedgeL := WedgeF(EtDividingWallSupportL_Origin + [-L_EtHopper/2 - ConRadius(ND_EtDrain) - S_Fitting; 0 m; H_EtRemovableWallSupport], EtDividingWallSupportL_Origin + [
    -2*ConRadius(ND_EtDrain) - 2*S_Fitting;
    T_EtRemovableWallSupport;
    H_EtHopper + H_EtRemovableWallSupport
], [0; 0; 0]*deg)
SubtractDividingWallSupport := SubtractF(["EtCon"], "DeleteMe")
EntDividingWallSupport := stack(EtDividingWallSupportL, EtDividingWallSupportR, EtDividingWallSupportWedgeR, EtDividingWallSupportWedgeL)
# Drain channel
EtDC := DrainChannelF(EtDC_Origin + [0 m; W_EtDC; 0 m], [180; 0; 0]*deg, Q_EtDCMax, W_EtDC, H_EtDC, L_EtDC, 1 %, Nu_Water, E_Concrete, 1)
FreezeEntTank := FreezeLayer("EtCon")
# Trash rack slots
TrashRackSlot1 := BoxF(EtHopper_Origin + [T_EtHopperLedge/2 - T_ConcreteMin/2; 2*D_Rebar; H_EtHopper - 2*D_Rebar], EtHopper_Origin + [
    T_EtHopperLedge/2 - T_ConcreteMin/2 - 2*D_Rebar;
    -W_Et - 2*D_Rebar;
    H_EtHopper + H_EtTop + H_PlantFreeboard + zc
], [0; 0; 0]*deg)
TrashRackSlot2 := BoxF(EtHopper_Origin + [T_EtHopperLedge/2 + T_ConcreteMin/2; 2*D_Rebar; H_EtHopper - 2*D_Rebar], EtHopper_Origin + [
    T_EtHopperLedge/2 + T_ConcreteMin/2 + 2*D_Rebar;
    -W_Et - 2*D_Rebar;
    H_EtHopper + H_EtTop + H_PlantFreeboard + zc
], [0; 0; 0]*deg)
SubtractTrashRackSlots := SubtractF(["EtCon"], "DeleteMe")
# Removable Wall
EtRemovableLayer := layer_new("EtRemovWall", ltgrey)
EtDividingWall := BoxF(EtDividingWall_Origin, EtDividingWall_Origin + [-L_EtHopper/2 - ConRadius(ND_EtDrain) - S_Fitting; T_EtRemovableWall; H_Et + DropEt], [0; 0; 0]*deg)
FreezeEntRemovable := FreezeLayer("EtRemovWall")
DividingWallWedge := WedgeF(EtDividingWall_Origin + [-L_EtHopper/2 - ConRadius(ND_EtDrain) - S_Fitting; 0 m; 0 m], EtDividingWall_Origin + [-2*S_Fitting - 2*ConRadius(ND_EtDrain); T_EtRemovableWall; H_EtHopper], [0; 0; 0]*deg)
SubtractDividingWallWedge := SubtractF(["EtRemovWall"], "DeleteMe")
RemovableWall := stack(EtRemovableLayer, EtDividingWall, FreezeEntRemovable, DividingWallWedge, GroupDelete, SubtractDividingWallWedge, FreezeEntRemovable)
EtTankScript2 := stack(EntTankLayer, EtHopper, MirrorEtHopper, EtHopperLedge, ArrayEtHoppers, EtHopperBack, EtHopperBack2, EtHopperFront, EntTank, EntDividingWallSupport, EtDC, Union_All, FreezeEntTank, RemovableWall, TrashRackSlot1, TrashRackSlot2, GroupDelete, SubtractTrashRackSlots)
# Concrete Modifications for Double Train
ModificationsLayer := layer_new("EtExtensions", grey)
# LFOM channel origin is defined above. It comes before channel 2.
W_DCWalkway + 3*T_PlantWall + L_LfomChannel
LfomChannel2_Origin := [
    LfomChannel_Origin[0] - L_LfomChannel - 2*T_ChannelWall - W_DCWalkway;
    LfomChannel_Origin[1];
    Floc_Origin[2]
] = [-6.70243; 6.2504; 0] m
LfomChannel2_Dim := [L_LfomChannel; W_LfomChannel; H_LfomChannel + Z_LfomChannelBottom]
# Draw 2, not original!
LfomChannel2 := Tank(LfomChannel2_Origin, LfomChannel2_Dim, T_ChannelWall)
RMChannel2_Origin := LfomChannel2_Origin + [-T_ChannelWall - W_RMChannel; T_ChannelWall; -T_ChannelWall] = [-7.35243; 6.4004; -0.15] m
RMChannel2 := BoxF(RMChannel2_Origin, RMChannel2_Origin + [
    -W_RMChannel - 2*T_ChannelWall;
    L_RMChannel + 2*T_ChannelWall + T_PlantWall;
    H_RMChannel + 2*T_ChannelWall
], [180; 0; 0]*deg)
# This is that big weird box that needs to be adjusted!
EndFill := BoxF([
    Et_Origin[0] - L_EtHopper*(N_EtFullHopper + (AddHopper - 2)) - L_EtHopper/2 - T_PlantWall*(N_EtFullHopper + (AddHopper - 2));
    Et_Origin[1] + W_LfomChannel + T_ChannelWall;
    Et_Origin[2]
], [
    Et_Origin[0] - Et_Dim[0];
    Et_Origin[1] + W_Et;
    Et_Origin[2] + H_Et - (HL_Lfom + H_PlantFreeboard + T_ConcreteMin)
], [0; 0; 0]*deg)
FreezeModifications := FreezeLayer("EtExtensions")
LfomChannelSubtraction := BoxF([LfomChannel2_Origin[0] - L_LfomChannel; LfomChannel2_Origin[1]; LfomChannel2_Origin[2]], [LfomChannel2_Origin[0]; LfomChannel2_Origin[1]; LfomChannel2_Origin[2]] + [0 m; W_LfomChannel; (LfomChannel2_Dim[2] - H_Et) + T_PlantWall], [0; 0; 0]*deg)
LfomSheetSubtraction2 := BoxF([
    LfomChannel2_Origin[0] - T_ConcreteMin;
    LfomChannel2_Origin[1] + W_LfomChannel;
    LfomChannel2_Origin[2] + H_LfomChannel - (HL_Lfom + H_PlantFreeboard + T_ConcreteMin)
], [
    LfomChannel2_Origin[0] - L_LfomChannel + T_ConcreteMin;
    LfomChannel2_Origin[1] + W_LfomChannel + T_ChannelWall;
    LfomChannel2_Origin[2] + H_LfomChannel
], [0; 0; 0]*deg)
RMSubtraction2 := BoxF(RMChannel2_Origin + [T_ChannelWall; 0 m; T_ChannelWall], RMChannel2_Origin + [
    -W_RMChannel + T_ChannelWall;
    L_RMChannel + 2*T_ChannelWall + T_PlantWall;
    H_RMChannel + T_ChannelWall
], [180; 0; 0]*deg)
# GroupDelete
ModificationSubtractions := SubtractF(["Etcon"; "EtExtensions"], "DeleteMe")
# EndFill | Taken out!
ModificationScript := stack(ModificationsLayer, LfomChannel2, RMChannel2, FreezeModifications, LfomChannelSubtraction, LfomSheetSubtraction2, RMSubtraction2, GroupDelete, ModificationSubtractions)
# Blocking Temp
block(BlockName, bp, ip) :=
    one ← concat("-block", sp, BlockName)
    two ← concat(point(bp[:, 0]), sp, "all", sp)
    three ← concat("-insert", sp, bp)
    four ← concat(point(ip[:, 0]), sp)
    five ← concat(sp)
    total ← stack(one, two, three, four, five)
    return total
Blocking(BlockName, Origin) :=
    one ← concat("-block", sp, BlockName)
    two ← concat(point(Origin[:, 0]), sp, "all", sp)
    three ← concat("-insert", sp, BlockName)
    four ← concat(point(Origin[:, 0]), sp)
    five ← concat(sp)
    total ← stack(one, two, three, four, five)
    return total
BlockingLast(BlockName, Origin) :=
    Naming ← concat("-block", sp, BlockName)
    OriginPoint ← concat(point(Origin), sp, "l", sp)
    InsertingBlock ← concat("-insert", sp, BlockName, sp)
    InsertionPoint ← concat(point(Origin), sp)
    enter ← concat(sp)
    total ← stack(Naming, OriginPoint, InsertingBlock, InsertionPoint, enter)
    return total
BlockingLast2(BlockName, Origin) :=
    Naming ← concat("-block", sp, BlockName)
    OriginPoint ← concat(point(Origin), sp, "l")
    InsertingBlock ← concat("-insert", sp, BlockName)
    InsertionPoint ← concat(point(Origin))
    enter ← concat(sp)
    total ← stack(Naming, OriginPoint, InsertingBlock, InsertionPoint, enter)
    return total
stringit_inches(x) := num2str(x/in)
stringit_round(x) := num2str(round(x/m, 2))
Accessory_Att(PlantComponent, Diameter, Origin, BlockName, Specification) :=
    BlockEditor ← concat("-bedit", sp, BlockName, sp)
    PlantComponentTag ← concat("-attdef", sp, "i", sp, sp, "PlantComponent", sp, "Component of Plant", sp)
    PlantComponentValue ← concat(PlantComponent)
    DiameterTag ← concat("-attdef", sp, "i", sp, sp, "Diameter", sp, "Diameter of Accessory", sp)
    DiameterValue ← concat(stringit_inches(Diameter))
    InsertionPoint ← concat(point(Origin), sp, sp)
    SpecificationTag ← concat("-attdef", sp, "i", sp, sp, "Specification", sp, "Accessory Specification", sp)
    SpecificationValue ← concat(stringit_nounits(Specification))
    SaveAttributes ← concat("bsave", sp, "bclose", sp)
    SyncBlocks ← concat("attsync", sp, "s", sp, "l", sp, "y")
    total ← stack(BlockEditor, PlantComponentTag, PlantComponentValue, InsertionPoint, DiameterTag, DiameterValue, InsertionPoint, SpecificationTag, SpecificationValue, InsertionPoint, SaveAttributes, SyncBlocks)
    return total
Pipe_Att(PlantComponent, PipeDiameter, Origin, BlockName, Length, Specification) :=
    BlockEditor ← concat("-bedit", sp, BlockName, sp)
    PlantComponentTag ← concat("-attdef", sp, "i", sp, sp, "PlantComponent", sp, "Component of Plant", sp)
    PlantComponentValue ← concat(PlantComponent)
    InsertionPoint ← concat(point(Origin), sp, sp)
    DiameterTag ← concat("-attdef", sp, "i", sp, sp, "Diameter", sp, "Diameter of the Pipe", sp)
    DiameterValue ← concat(stringit_inches(PipeDiameter))
    LenthTag ← concat("-attdef", sp, "i", sp, sp, "Length", sp, "Length of Pipe", sp)
    LengthValue ← concat(stringit_round(Length))
    SpecificationTag ← concat("-attdef", sp, "i", sp, sp, "Specification", sp, "Pipe Specification", sp)
    SpecificationValue ← concat(stringit_nounits(Specification))
    SaveAttributes ← concat("bsave", sp, "bclose", sp)
    SyncBlocks ← concat("attsync", sp, "s", sp, "l", sp, "y")
    total ← stack(BlockEditor, PlantComponentTag, PlantComponentValue, InsertionPoint, DiameterTag, DiameterValue, InsertionPoint, LenthTag, LengthValue, InsertionPoint, SpecificationTag, SpecificationValue, InsertionPoint, SaveAttributes, SyncBlocks)
    return total
copyblock(origin, insertionpoint) :=
    select ← concat("select", sp, "l", sp)
    copy ← concat("co", sp, point(origin), sp, point(insertionpoint), sp)
    enter ← concat(sp)
    tot ← stack(select, copy, enter)
    return tot
ZoomExtents1 := concat("z", sp, "e")
BlockingWindow(BlockName, Origin, Corner1, Corner2, axis, angle) :=
    Rotation1 ← concat("_rotate3d", sp, "all", sp, sp, axis, sp, point(Origin), sp, "-", angle)
    Naming ← concat("-block", sp, BlockName)
    OriginPoint ← concat(point(Origin), sp, "w", sp, point(Corner1), sp, point(Corner2), sp)
    InsertingBlock ← concat("-insert", sp, BlockName, sp)
    InsertionPoint ← concat(point(Origin), sp)
    Rotation2 ← concat("_rotate3d", sp, "all", sp, sp, axis, sp, point(Origin), sp, angle)
    enter ← concat(sp)
    total ← stack(Rotation1, ZoomExtents1, Naming, OriginPoint, InsertingBlock, InsertionPoint, enter, Rotation2)
    return total
BlockingBox(BlockName, Origin, Corner1, Corner2) :=
    Naming ← concat("-block", sp, BlockName)
    OriginPoint ← concat(point(Origin), sp, "box", sp, point(Corner1), sp, point(Corner2), sp)
    InsertingBlock ← concat("-insert", sp, BlockName, sp)
    InsertionPoint ← concat(point(Origin), sp)
    enter ← concat(sp)
    total ← stack(Naming, OriginPoint, InsertingBlock, InsertionPoint, enter, enter)
    return total
# Trash Rack
TRLayer := layer_new("EtTrashrack", yellow)
HorizCylinder := CylinderF(EtHopper_Origin + [T_EtHopperLedge/2 - T_ConcreteMin/2 - D_Rebar/2; 2*D_Rebar; H_EtHopper - 3/2*D_Rebar], D_Rebar/2, W_Et + 4*D_Rebar, [90; 0]*deg)
ViewRight := view("r")
ArrayHorizCylinder := ArrayLast(N_TRSpacesH + 1, 1, B_EtRebar)
ViewTop := view("t")
VertCylinder :=
    CylinderF(EtHopper_Origin + [T_EtHopperLedge/2 - T_ConcreteMin/2 - 3*D_Rebar/2; 3/2*D_Rebar; H_EtHopper - 2*D_Rebar], D_Rebar/2, (N_TRSpacesH + 1)*B_EtRebar - D_Rebar, [0; 90]*deg) if EN_DoubleTrain == 0
    otherwise
        CylinderF(EtHopper_Origin + [
            T_EtHopperLedge/2 - T_ConcreteMin/2 - 3*D_Rebar/2;
            3/2*D_Rebar;
            H_EtHopper - 2*D_Rebar - (H_EtHopper - (H_Et + DropEt - (HL_Lfom + H_PlantFreeboard + T_ConcreteMin)))
        ], D_Rebar/2, HL_Lfom + H_PlantFreeboard + T_ConcreteMin - zc, [0; 90]*deg)
ArrayVertCyl := ArrayLast(1, N_TRSpacesV + 1, -B_EtRebar)
EtTrashRack_Origin := EtHopper_Origin + [T_EtHopperLedge/2 - T_ConcreteMin/2 - D_Rebar/2; 2*D_Rebar; H_EtHopper - 3/2*D_Rebar]
CopyOrigin_TrashRack := EtHopper_Origin + [
    T_EtHopperLedge/2 - T_ConcreteMin/2 - D_Rebar/2 + T_ConcreteMin + 2*D_Rebar;
    2*D_Rebar;
    H_EtHopper - 3/2*D_Rebar
]
EtTrashRack_Block := Blocking("EtTrashRack", EtTrashRack_Origin)
EtTrashRack_Diameter := 0
EtTrashRack_Att := Accessory_Att("Et", EtTrashRack_Diameter, EtTrashRack_Origin, "EtTrashRack", PS_Default)
Copy_TrashRack := copyblock(EtTrashRack_Origin, CopyOrigin_TrashRack)
Freeze := FreezeLayer("EtTrashrack")
EtTrashRackScript := stack(TRLayer, HorizCylinder, ViewRight, ArrayHorizCylinder, ViewTop, VertCylinder, ViewRight, ArrayVertCyl, ViewTop, EtTrashRack_Block, EtTrashRack_Att, Copy_TrashRack, Freeze)
# Rapid Mix Pipe, LFOM, and Orifice Plate
# this is the upper elbow (connected to the LFOM)
RMElbow_Origin0 := [
    Plant_Origin[0] - L_Sed + S_Fitting + ConRadius(ND_RMPipe);
    Et_Origin[1] + W_Et - S_Fitting - ConRadius(ND_RMPipe) - ElbowRadius(ND_RMPipe);
    FlocCoupling_Origin[2]
]
RMElbow_Origin1 := [
    Plant_Origin[0] - L_Sed + S_Fitting + ConRadius(ND_RMPipe);
    Et_Origin[1] + W_Et - 2*S_Fitting - ConRadius(ND_RMPipe) - ElbowRadius(ND_RMPipe) - 2*ConRadius(ND_EtOverflowDrain);
    FlocCoupling_Origin[2]
]
RMElbow_Origin :=
    RMElbow_Origin0 if EN_EtGrit == 0
    RMElbow_Origin1 otherwise
RMAirRelease_Origin := [
    RMElbow_Origin[0];
    Floc_Origin[1] + (N_FlocChannels*(W_FlocChannel + T_FlocChannelWall)) + T_PlantWall - T_FlocChannelWall + S_Fitting;
    FlocCoupling_Origin[2] + innerdiameter(ND_RMPipe, PS_Default)/2 - zc
]
L_RMPipeHoriz := (Et_Origin[1] + W_Et - S_Fitting - ConRadius(ND_RMPipe) - ElbowRadius(ND_RMPipe)) - (Floc_Origin[1] + N_FlocChannels*W_FlocChannel + (N_FlocChannels - 1)*T_FlocChannelWall - L_FlocCouplingExt + CouplingLength(ND_RMPipe) - SocketDepth(ND_RMPipe))
L_RMPipeVert := Z_EtTop - (RMElbow_Origin[2] + ElbowRadius(ND_RMPipe)) = 1.87414 m
L_RMAirRelease := Floc_Origin[2] + H_Floc - (FlocCoupling_Origin[2] + innerdiameter(ND_RMPipe, PS_Default)/2 - zc)
# RM Elbow
RMElbowLayer := layer_new("EtRmElbowPlu", green)
RMElbow := ElbowSUBF(RMElbow_Origin, [0; 90; 0]*deg, ND_RMPipe, PS_Default, ["EtCon"])
EtRmElbow_Block := BlockingLast("EtRMElbow", RMElbow_Origin)
EtRmElbow_Att := Accessory_Att("Et", ND_RMPipe, RMElbow_Origin, "EtRMElbow", PS_Default)
FreezeRMElbow := FreezeLayer("EtRmElbowPlu")
# RM Pipes
RMPipeLayer := layer_new("EtRmPipePlu", blue)
RMVertPipe := PipeSUBF([
    RMElbow_Origin[0];
    RMElbow_Origin[1] + ElbowRadius(ND_RMPipe);
    RMElbow_Origin[2] + ElbowRadius(ND_RMPipe)
], L_RMPipeVert, [0; 90; 0]*deg, ND_RMPipe, PS_Default, ["EtCon"])
RMVertPipe_Origin := [
    RMElbow_Origin[0];
    RMElbow_Origin[1] + ElbowRadius(ND_RMPipe);
    RMElbow_Origin[2] + ElbowRadius(ND_RMPipe)
]
RMHorizPipe := PipeF(RMElbow_Origin, L_RMPipeHoriz, [90; 0; 0]*deg, ND_RMPipe, PS_Default)
RMAirRelease := PipeF(RMAirRelease_Origin, L_RMAirRelease, [0; 90; 0]*deg, ND_RMAirRelease, PS_Default)
RMAirReleaseHole := CylinderF([RMAirRelease_Origin[0]; RMAirRelease_Origin[1]; FlocCoupling_Origin[2]], outerradius(ND_RMAirRelease), outerradius(ND_RMPipe) + zc, [0; 90; 0]*deg)
RMVertPipe_Block := BlockingLast("EtRMVertPipe", RMVertPipe_Origin)
RMVertPipe_Att := Pipe_Att("Et", ND_RMPipe, RMVertPipe_Origin, "EtRMVertPipe", L_RMPipeVert, PS_Default)
RMHorizPipe_Block := BlockingLast("EtRMHorizPipe", EtHopper_Origin)
RMHorizPipe_Att := Pipe_Att("Et", ND_RMPipe, RMElbow_Origin, "EtRMHorizPipe", L_RMPipeHoriz, PS_Default)
FreezeRMPipe := FreezeLayer("EtRmPipePlu")
SelectRMPipes := SelectLayer("EtRmPipePlu")
# LFOM Orifices
LFOM_Origin0 := [RMElbow_Origin[0]; RMElbow_Origin[1] + ElbowRadius(ND_RMPipe); ZW_Et - HL_Flowmeasure]
LFOM_Origin1 := [RMElbow_Origin[0]; RMElbow_Origin[1] + ElbowRadius(ND_RMPipe); ZW_Et - HL_Flowmeasure]
# This only removes the holes from the vertical Rm Pipes so it does not need to be blocked.
# The vertical Pipe is drawn above.
LFOM_Origin :=
    LFOM_Origin0 if EN_EtGrit == 0
    LFOM_Origin1 otherwise
LfomOrifices :=
    Local ← FreezeRMPipe
    for h ∈ 0 .. last(H_LfomOrifices)
        if N_LfomOrifices[h] ≠ 0
            Local ← stack(Local, CylinderF([LFOM_Origin[0]; LFOM_Origin[1]; LFOM_Origin[2] + H_LfomOrifices[h]], D_LfomOrifices/2, outerradius(ND_RMPipe) + zc, [
                90 deg + (asin(0.5*S_LfomOrificesMin/(2*outerradius(ND_RMPipe))) + asin(D_LfomOrifices/(2*outerradius(ND_RMPipe))))*(mod(h, 2) == 0);
                0 deg
            ]))
        Local ← stack(Local, ArrayLastPolar([LFOM_Origin[0]; LFOM_Origin[1]; LFOM_Origin[2] + H_LfomOrifices[h]], N_LfomOrifices[h], (N_LfomOrifices[h] - 1)*(2*asin(D_LfomOrifices/(2*outerradius(ND_RMPipe))) + 2*asin(S_LfomOrificesMin/(2*outerradius(ND_RMPipe)))))) if N_LfomOrifices[h] > 1
    return Local
SubtractRMPipeOrifices := SubtractF(["EtRmPipePlu"], "DeleteMe")
RMScript := stack(RMElbowLayer, RMElbow, EtRmElbow_Block, EtRmElbow_Att, FreezeRMElbow, RMPipeLayer, RMVertPipe, RMVertPipe_Block, RMVertPipe_Att, RMHorizPipe, RMHorizPipe_Block, RMHorizPipe_Att, FreezeRMPipe, SelectRMPipes, LfomOrifices, GroupDelete, SubtractRMPipeOrifices)
RMElbowScript := stack(RMElbowLayer, RMElbow, EtRmElbow_Block, EtRmElbow_Att, FreezeRMElbow)
RMPipeScript := stack(RMPipeLayer, RMVertPipe, RMVertPipe_Block, RMVertPipe_Att, RMHorizPipe, RMHorizPipe_Block, RMHorizPipe_Att, FreezeRMPipe)
# [component: inputs RMScript]
# High Flow LFOM Sheet and Channel | Does not need to be Blocked
EtConLayer := SelectLayer("EtCon")
W_DCWalkway + 3*T_PlantWall + L_LfomChannel
LfomChannel_Dim := [L_LfomChannel; W_LfomChannel; H_LfomChannel + Z_LfomChannelBottom] = [0.57775; 0.5; 2.36831] m
RMChannel_Origin := [
    Et_Origin[0] - L_Et + W_DCWalkway + 3*T_PlantWall + L_LfomChannel + W_RMChannel;
    Et_Origin[1] - T_PlantWall - L_RMChannel + T_LfomChannelWall;
    Floc_Origin[2]
] = [-4.90243; 5.1004; 0] m
RMChannel_Dim := [W_RMChannel; L_RMChannel; H_RMChannel] = [0.5; 1; 0.5] m
LfomSheet_Dim := [-L_LfomChannel; T_LfomSheet; HL_Lfom + H_PlantFreeboard + T_ConcreteMin]
LfomSheet_Origin := [
    LfomChannel_Origin[0];
    LfomChannel_Origin[1] + W_LfomChannel + 0.5*(T_ChannelWall - T_LfomSheet);
    Z_EtTop - LfomSheet_Dim[2]
] = [-4.82468; 6.8004; 1.95197] m
LfomChannel := Tank(LfomChannel_Origin, LfomChannel_Dim, T_ChannelWall)
LfomChannelFill := BoxF(LfomChannel_Origin + [T_ChannelWall; 0 m; 0 m], LfomChannel_Origin + [-L_LfomChannel; W_LfomChannel + T_ChannelWall; -H_Et + H_LfomChannel], [0; 0; 0]*deg)
RMChannel := Tank(RMChannel_Origin, RMChannel_Dim, T_ChannelWall)
RMChannelTop := BoxF(RMChannel_Origin + [T_LfomChannelWall; -T_LfomChannelWall; H_RMChannel], RMChannel_Origin + [-W_RMChannel - T_LfomChannelWall; L_RMChannel + T_LfomChannelWall; H_RMChannel + T_LfomChannelWall], [0; 0; 0]*deg)
FreezeEtcon := FreezeLayer("EtCon")
RMChannelSubtraction := BoxF(RMChannel_Origin, RMChannel_Origin + [-W_RMChannel; -T_LfomChannelWall; H_RMChannel], [0; 0; 0]*deg)
ChannelSubtraction := BoxF(LfomChannel_Origin + [-L_LfomChannel; 0 m; 0 m], LfomChannel_Origin + [-L_LfomChannel + W_RMChannel; -T_PlantWall; H_RMChannel], [0; 0; 0]*deg)
SlopeSubtraction := BoxF(LfomChannel_Origin, LfomChannel_Origin + [-L_LfomChannel; W_LfomChannel; LfomChannel_Dim[2]], [0; 0; 0]*deg)
SlopeSubtraction2 := BoxF(LfomChannel2_Origin, LfomChannel2_Origin + [-L_LfomChannel; W_LfomChannel; LfomChannel2_Dim[2]], [0; 0; 0]*deg)
LfomSheetSubtraction := BoxF([LfomChannel_Origin[0] - T_ConcreteMin; LfomChannel_Origin[1] + W_LfomChannel; LfomSheet_Origin[2]], [
    LfomChannel_Origin[0] - L_LfomChannel + T_ConcreteMin;
    LfomChannel_Origin[1] + W_LfomChannel + T_ChannelWall;
    LfomChannel_Origin[2] + LfomChannel_Dim[2]
], [0; 0; 0]*deg)
LfomSheetSlotSubtraction := BoxF([
    LfomChannel_Origin[0];
    LfomChannel_Origin[1] + W_LfomChannel + 0.5*(T_ChannelWall - T_LfomSheet);
    LfomSheet_Origin[2]
], LfomChannel_Origin + [-L_LfomChannel; W_LfomChannel + 0.5*(T_ChannelWall + T_LfomSheet); LfomChannel_Dim[2]], [0; 0; 0]*deg)
LfomChannelOrificeSheetSubtraction := BoxF([
    LfomChannel_Origin[0] + T_LfomSheet;
    LfomChannel_Origin[1];
    LfomChannel_Origin[2] + Z_LfomChannelOrifice
], [
    LfomChannel_Origin[0] - T_LfomSheet - L_LfomChannel;
    LfomChannel_Origin[1] + W_LfomChannel;
    LfomChannel_Origin[2] + T_LfomSheet + Z_LfomChannelOrifice
], [0; 0; 0]*deg)
# GroupDelete
ChannelSubtractions := SubtractF(["EtCon"], "DeleteMe")
LfomSheetLayer := layer_new("EtLfomSheet", ltpurple)
LfomSheet := BoxF(LfomSheet_Origin, LfomSheet_Origin + LfomSheet_Dim, [0; 0; 0]*deg)
LfomChannelSheet := BoxF([
    LfomChannel_Origin[0] + T_LfomSheet;
    LfomChannel_Origin[1];
    LfomChannel_Origin[2] + Z_LfomChannelOrifice
], [
    LfomChannel_Origin[0] - T_LfomSheet - L_LfomChannel;
    LfomChannel_Origin[1] + W_LfomChannel;
    LfomChannel_Origin[2] + T_LfomSheet + Z_LfomChannelOrifice
], [0; 0; 0]*deg)
FrzLfomSheetLayer := FreezeLayer("EtLfomSheet")
LfomOrifices :=
    Local ← FrzLfomSheetLayer
    for h ∈ 0 .. last(H_LfomOrifices)
        if N_LfomOrifices[h] ≠ 0
            Local ← stack(Local, CylinderF([
                (LfomSheet_Origin[0] - T_ConcreteMin - 0.5*(D_LfomOrifices + S_LfomOrificesMin)) - 0.5*(S_LfomOrificesMin + D_LfomOrifices)*(mod(h, 2) == 0);
                LfomSheet_Origin[1];
                Z_LfomChannelBottom + T_ConcreteMin + HW_LfomChannel + H_Freefall + H_LfomOrifices[h]
            ], D_LfomOrifices/2, T_LfomSheet + zc, [-90; 0]*deg))
        Local ← stack(Local, ArrayLast(1, N_LfomOrifices[h], -(D_LfomOrifices + S_LfomOrificesMin))) if N_LfomOrifices[h] > 1
    return Local
LfomChannelOrifice := CylinderF([
    LfomChannel_Origin[0] - L_LfomChannel/2;
    LfomChannel_Origin[1] + W_LfomChannel/2;
    LfomChannel_Origin[2] + Z_LfomChannelOrifice
], D_LfomChannelOrifice/2, T_LfomSheet + zc, [0; 0]*deg)
RotateOrifice := Rotate3DLast([
    LfomChannel_Origin[0] - L_LfomChannel/2;
    LfomChannel_Origin[1] + W_LfomChannel/2;
    LfomChannel_Origin[2] + Z_LfomChannelOrifice
], "y", 90 deg)
# GroupDelete
SubtractLfomOrifices := SubtractF(["EtLfomSheet"], "DeleteMe")
ThawSheets := ThawMultiple(["EtLfomSheet"])
MirrorSheets := Mirror3dAll("YZ", [
    Et_Origin[0] - L_Et + W_DCWalkway + 3*T_PlantWall + L_LfomChannel - 1/2*W_DCWalkway - T_PlantWall;
    0 m;
    0 m
], "N")
FreezeSheets := FreezeMultiple(["EtLfomSheet"])
LfomChannelScript := stack(EtConLayer, LfomChannel, LfomChannelFill, RMChannel, RMChannelTop, FreezeEtcon, RMChannelSubtraction, ChannelSubtraction, SlopeSubtraction, SlopeSubtraction2, LfomSheetSubtraction, LfomSheetSlotSubtraction, LfomChannelOrificeSheetSubtraction, GroupDelete, ChannelSubtractions, LfomSheetLayer, LfomSheet, LfomChannelSheet, LfomOrifices, LfomChannelOrifice, RotateOrifice, GroupDelete, SubtractLfomOrifices, ThawSheets, MirrorSheets, FreezeSheets)
# Need to not draw the original LFOM channel!
# Hopper Drains
DrainCouplingLayer := layer_new("EtDrainCouplingsPlu", green)
FreezeDrainCouplings := FreezeLayer("EtDrainCouplingsPlu")
DrainWeirCoupling := CouplingSUBF([
    -S_Fitting - ConRadius(ND_EtDrain);
    {
        (ConRadius(ND_EtDrain) + S_Fitting + L_EtHopperFront) if EN_DoubleTrain == 0
        (ConRadius(ND_EtDrain) + S_Fitting + 1/2*W_Et - T_ChannelWall + T_ConcreteMin) otherwise
    };
    -SocketDepth(ND_EtDrain)
] + Et_Origin, [0; 270]*deg, ND_EtDrain, PS_Default, ["EtCon"])
EtDrainCouplingsScript :=
    Local ← stack(DrainCouplingLayer, DrainWeirCoupling)
    i ← 0
    CouplingOrigin ← [
        -(L_EtHopper + T_EtHopperLedge)*i - S_Fitting - ConRadius(ND_EtDrain);
        {
            (ConRadius(ND_EtDrain) + S_Fitting + L_EtHopperFront) if EN_DoubleTrain == 0
            (ConRadius(ND_EtDrain) + S_Fitting + 1/2*W_Et - T_ChannelWall + T_ConcreteMin) otherwise
        };
        -SocketDepth(ND_EtDrain)
    ]
    BlockScriptdraincc ← BlockingLast("EtHopperDrainCoupling", CouplingOrigin)
    DrainCoupling_Att ← Accessory_Att("Et", ND_EtDrain, CouplingOrigin, "EtHopperDrainCoupling", PS_Default)
    Local ← stack(Local, CouplingSUBF(CouplingOrigin + Et_Origin, [0; 270]*deg, ND_EtDrain, PS_Default, ["EtCon"]), BlockScriptdraincc, DrainCoupling_Att)
    i ← 1
    while i ≤ N_EtFullHopper + {
    (AddHopper - 2) if EN_DoubleTrain == 1
    1 otherwise
}
        CopyingOrigin ← CouplingOrigin
        CouplingOrigin ← [
            -(L_EtHopper + T_EtHopperLedge)*i - S_Fitting - ConRadius(ND_EtDrain);
            {
                (ConRadius(ND_EtDrain) + S_Fitting + L_EtHopperFront) if EN_DoubleTrain == 0
                (ConRadius(ND_EtDrain) + S_Fitting + 1/2*W_Et - T_ChannelWall + T_ConcreteMin) otherwise
            };
            -SocketDepth(ND_EtDrain)
        ]
        drain ← copyblock(CopyingOrigin, CouplingOrigin)
        Local ← stack(Local, drain)
        i ← i + 1
    Local ← stack(Local, FreezeDrainCouplings)
    return Local  # Added 10/17/2014 by mrf222 at the request of Drew Hart.
EasyToGrab := 5 cm
L_EtDrainStopper := H_Et + DropEt + SocketDepth(ND_EtDrain) + EasyToGrab
MS_NDrains := 1 + (N_EtFullHopper + {
    (AddHopper - 2) if EN_DoubleTrain == 1
    1 otherwise
})
MS_HopperDrains := [
    "Hopper Drains", "Couplings", ND_EtDrain/m, PS_Default, MS_NDrains, 0;
    "Hopper Drains", "Stopper Pipes", ND_EtDrain/m, PS_Default, MS_NDrains, L_EtDrainStopper/m
]
DrainCouplings :=
    Local ← stack(DrainCouplingLayer, DrainWeirCoupling)
    for i ∈ 0 .. (N_EtFullHopper + {
    (AddHopper - 2) if EN_DoubleTrain == 1
    1 otherwise
})
        Local ← stack(Local, CouplingSUBF([
            -(L_EtHopper + T_EtHopperLedge)*i - S_Fitting - ConRadius(ND_EtDrain);
            {
                (ConRadius(ND_EtDrain) + S_Fitting + L_EtHopperFront) if EN_DoubleTrain == 0
                (ConRadius(ND_EtDrain) + S_Fitting + 1/2*W_Et - T_ChannelWall + T_ConcreteMin) otherwise
            };
            -SocketDepth(ND_EtDrain)
        ] + Et_Origin, [0; 270]*deg, ND_EtDrain, PS_Default, ["EtCon"]))
DrainPipeLayer := layer_new("EtDrainPipesPlu", blue)
DrainPipes :=
    Local ← stack(DrainPipeLayer)
    for i ∈ 0 .. N_EtFullHopper + {
    (AddHopper - 2) if EN_DoubleTrain == 1
    1 otherwise
}
        Local ← stack(Local, PipeSUBF([
            -(L_EtHopper + T_EtHopperLedge)*i - S_Fitting - ConRadius(ND_EtDrain);
            {
                (ConRadius(ND_EtDrain) + S_Fitting + L_EtHopperFront) if EN_DoubleTrain == 0
                (ConRadius(ND_EtDrain) + S_Fitting + .5*W_Et - T_ChannelWall + T_ConcreteMin) otherwise
            };
            SocketDepth(ND_EtDrain) - CouplingLength(ND_EtDrain)
        ] + Et_Origin, T_PlantWall, [0; 270; 0]*deg, ND_EtDrain, PS_Default, ["EtCon"]))
FreezePipes := FreezeLayer("EtDrainPipesPlu")
EtDrainPipesScript :=
    Local ← stack(DrainPipeLayer)
    i ← 0
    PipeOrigin ← [
        -(L_EtHopper + T_EtHopperLedge)*i - S_Fitting - ConRadius(ND_EtDrain);
        {
            (ConRadius(ND_EtDrain) + S_Fitting + L_EtHopperFront) if EN_DoubleTrain == 0
            (ConRadius(ND_EtDrain) + S_Fitting + .5*W_Et - T_ChannelWall + T_ConcreteMin) otherwise
        };
        SocketDepth(ND_EtDrain) - CouplingLength(ND_EtDrain)
    ]
    BlockScriptdraincc ← BlockingLast("EtHopperDrainPipe", PipeOrigin)
    DrainPipe_Att ← Pipe_Att("Et", ND_EtDrain, PipeOrigin, "EtHopperDrainPipe", T_PlantWall, PS_Default)
    Local ← stack(Local, PipeSUBF([
        -(L_EtHopper + T_EtHopperLedge)*i - S_Fitting - ConRadius(ND_EtDrain);
        {
            (ConRadius(ND_EtDrain) + S_Fitting + L_EtHopperFront) if EN_DoubleTrain == 0
            (ConRadius(ND_EtDrain) + S_Fitting + .5*W_Et - T_ChannelWall + T_ConcreteMin) otherwise
        };
        SocketDepth(ND_EtDrain) - CouplingLength(ND_EtDrain)
    ] + Et_Origin, T_PlantWall, [0; 270; 0]*deg, ND_EtDrain, PS_Default, ["EtCon"]), BlockScriptdraincc, DrainPipe_Att)
    i ← 1
    while i ≤ N_EtFullHopper + {
    (AddHopper - 2) if EN_DoubleTrain == 1
    1 otherwise
}
        CopyingOrigin ← PipeOrigin
        PipeOrigin ← [
            -(L_EtHopper + T_EtHopperLedge)*i - S_Fitting - ConRadius(ND_EtDrain);
            {
                (ConRadius(ND_EtDrain) + S_Fitting + L_EtHopperFront) if EN_DoubleTrain == 0
                (ConRadius(ND_EtDrain) + S_Fitting + .5*W_Et - T_ChannelWall + T_ConcreteMin) otherwise
            };
            SocketDepth(ND_EtDrain) - CouplingLength(ND_EtDrain)
        ]
        drain ← copyblock(CopyingOrigin, PipeOrigin)
        Local ← stack(Local, drain)
        i ← i + 1
    Local ← stack(Local, FreezePipes)
    return Local
StopperLayer := layer_new("EtDrainStoppersPlu", red)
FirstStopper := PipeF([
    -S_Fitting - ConRadius(ND_EtDrain);
    {
        (ConRadius(ND_EtDrain) + S_Fitting + L_EtHopperFront) if EN_DoubleTrain == 0
        (ConRadius(ND_EtDrain) + S_Fitting + .5*W_Et - T_ChannelWall + T_ConcreteMin) otherwise
    };
    -SocketDepth(ND_EtDrain)
] + Et_Origin, L_EtDrainStopper, [0; 90; 0]*deg, ND_EtDrain, PS_Default)
StopperPipes :=
    Local ← stack(FreezePipes, StopperLayer)
    for i ∈ 0 .. N_EtFullHopper + {
    (AddHopper - 2) if EN_DoubleTrain == 1
    1 otherwise
}
        Local ← stack(Local, PipeF([
            -(L_EtHopper + T_EtHopperLedge)*i - S_Fitting - ConRadius(ND_EtDrain);
            {
                (ConRadius(ND_EtDrain) + S_Fitting + L_EtHopperFront) if EN_DoubleTrain == 0
                (ConRadius(ND_EtDrain) + S_Fitting + .5*W_Et - T_ChannelWall + T_ConcreteMin) otherwise
            };
            -SocketDepth(ND_EtDrain)
        ] + Et_Origin, L_EtDrainStopper, [0; 90; 0]*deg, ND_EtDrain, PS_Default))
FreezeStopper := FreezeLayer("EtDrainStoppersPlu")
FreezeStopper := FreezeLayer("EtDrainStoppersPlu")
EtStopperPipesScript :=
    Local ← stack(FreezePipes, StopperLayer)
    i ← 0
    StopperOrigin ← [
        -(L_EtHopper + T_EtHopperLedge)*i - S_Fitting - ConRadius(ND_EtDrain);
        {
            (ConRadius(ND_EtDrain) + S_Fitting + L_EtHopperFront) if EN_DoubleTrain == 0
            (ConRadius(ND_EtDrain) + S_Fitting + .5*W_Et - T_ChannelWall + T_ConcreteMin) otherwise
        };
        SocketDepth(ND_EtDrain) - CouplingLength(ND_EtDrain)
    ]
    BlockScriptdraincc ← BlockingLast("EtStopperPipe", StopperOrigin)
    StopperPipe_Att ← Pipe_Att("Et", ND_EtDrain, StopperOrigin, "EtStopperPipe", T_PlantWall, PS_Default)
    Local ← stack(Local, PipeF([
        -(L_EtHopper + T_EtHopperLedge)*i - S_Fitting - ConRadius(ND_EtDrain);
        {
            (ConRadius(ND_EtDrain) + S_Fitting + L_EtHopperFront) if EN_DoubleTrain == 0
            (ConRadius(ND_EtDrain) + S_Fitting + .5*W_Et - T_ChannelWall + T_ConcreteMin) otherwise
        };
        -SocketDepth(ND_EtDrain)
    ] + Et_Origin, L_EtDrainStopper, [0; 90; 0]*deg, ND_EtDrain, PS_Default), BlockScriptdraincc, StopperPipe_Att)
    i ← 1
    while i ≤ N_EtFullHopper + {
    (AddHopper - 2) if EN_DoubleTrain == 1
    1 otherwise
}
        CopyingOrigin ← StopperOrigin
        StopperOrigin ← [
            -(L_EtHopper + T_EtHopperLedge)*i - S_Fitting - ConRadius(ND_EtDrain);
            {
                (ConRadius(ND_EtDrain) + S_Fitting + L_EtHopperFront) if EN_DoubleTrain == 0
                (ConRadius(ND_EtDrain) + S_Fitting + .5*W_Et - T_ChannelWall + T_ConcreteMin) otherwise
            };
            SocketDepth(ND_EtDrain) - CouplingLength(ND_EtDrain)
        ]
        stopper ← copyblock(CopyingOrigin, StopperOrigin)
        Local ← stack(Local, stopper)
        i ← i + 1
    Local ← stack(Local, FreezeStopper)
    return Local
EtDrains := stack(EtDrainCouplingsScript, EtDrainPipesScript, EtStopperPipesScript)
# Hopper Drains Two Inlets
# The way our change works is we have functions to mirror the drains. This originally included a i = 0
# section for the first hopper drain piece, but this was taken out for the three areas (Drain Coupling, Pipe, and stopper.
#
# Then I added this first part in before the full stack function to create two pieces (two drains, two couplings, to stoppers) in the first hopper. Making them independent of the mirror function allows us to change their location easily without modifying the rest.
DrainCouplingLayer := layer_new("EtDrainCouplingsPlu", green)
DrainWeirCoupling := CouplingSUBF([
    (-S_Fitting - ConRadius(ND_EtDrain));
    ConRadius(ND_EtDrain) + S_Fitting + L_EtHopperFront;
    -SocketDepth(ND_EtDrain)
] + Et_Origin, [0; 270]*deg, ND_EtDrain, PS_Default, ["EtCon"])
DrainWeirCoupling_1 := CouplingSUBF([
    (-S_Fitting - ConRadius(ND_EtDrain));
    ConRadius(ND_EtDrain) + S_Fitting + L_EtHopperFront + 2*ConRadius(ND_EtDrain) + S_Fitting + (2*T_EtRemovableWallSupport + T_EtRemovableWall + S_Fitting);
    -SocketDepth(ND_EtDrain)
] + Et_Origin, [0; 270]*deg, ND_EtDrain, PS_Default, ["EtCon"])
DrainCouplings :=
    Local ← stack(DrainCouplingLayer, DrainWeirCoupling, DrainWeirCoupling_1)
    for i ∈ 1 .. (N_EtFullHopper + 1)
        Local ← stack(Local, CouplingSUBF([
            -(L_EtHopper + T_EtHopperLedge)*i - S_Fitting - ConRadius(ND_EtDrain);
            ConRadius(ND_EtDrain) + S_Fitting + L_EtHopperFront;
            -SocketDepth(ND_EtDrain)
        ] + Et_Origin, [0; 270]*deg, ND_EtDrain, PS_Default, ["EtCon"]))
# Stacks both couplings in first
# hopper and adds row of the rest
# of the hoppers
# I added Drain Weir Coupling.1
# Started i at 1 instead of 0. 0 is
# Covered in Drain weir Coupling
N_EtFullHopper = 1
FreezeDrainCouplings := FreezeLayer("EtDrainCouplingsPlu")
DrainPipeLayer := layer_new("EtDrainPipesPlu", blue)
# Created two
# Drain SUBF's
DrainPipe_0 := PipeSUBF([
    -S_Fitting - ConRadius(ND_EtDrain);
    ConRadius(ND_EtDrain) + S_Fitting + L_EtHopperFront;
    SocketDepth(ND_EtDrain) - CouplingLength(ND_EtDrain)
] + Et_Origin, T_PlantWall, [0; 270; 0]*deg, ND_EtDrain, PS_Default, ["EtCon"])
DrainPipe_1 := PipeSUBF([
    -S_Fitting - ConRadius(ND_EtDrain);
    ConRadius(ND_EtDrain) + S_Fitting + L_EtHopperFront + (2*ConRadius(ND_EtDrain) + S_Fitting) + (2*T_EtRemovableWallSupport + T_EtRemovableWall + S_Fitting);
    SocketDepth(ND_EtDrain) - CouplingLength(ND_EtDrain)
] + Et_Origin, T_PlantWall, [0; 270; 0]*deg, ND_EtDrain, PS_Default, ["EtCon"])
DrainPipes :=
    Local ← stack(FreezeDrainCouplings, DrainPipeLayer, DrainPipe_0, DrainPipe_1)
    for i ∈ 1 .. N_EtFullHopper + 1
        Local ← stack(Local, PipeSUBF([
            -(L_EtHopper + T_EtHopperLedge)*i - S_Fitting - ConRadius(ND_EtDrain);
            ConRadius(ND_EtDrain) + S_Fitting + L_EtHopperFront;
            SocketDepth(ND_EtDrain) - CouplingLength(ND_EtDrain)
        ] + Et_Origin, T_PlantWall, [0; 270; 0]*deg, ND_EtDrain, PS_Default, ["EtCon"]))
# Added in first two pipes to local
# Changed i to 1 from 0
FreezePipes := FreezeLayer("EtDrainPipesPlu")
StopperLayer := layer_new("EtDrainStoppersPlu", red)
L_EtDrainStopper := H_Et - H_PlantFreeboard/2 + SocketDepth(ND_EtDrain)
FirstStopper_0 := PipeF([
    (-S_Fitting - ConRadius(ND_EtDrain));
    ConRadius(ND_EtDrain) + S_Fitting + L_EtHopperFront;
    -SocketDepth(ND_EtDrain)
] + Et_Origin, L_EtDrainStopper, [0; 90; 0]*deg, ND_EtDrain, PS_Default)
# Two New functions
# taken from StopperPipes
# Function for first two
# stoppers
FirstStopper_1 := PipeF([
    (-S_Fitting - ConRadius(ND_EtDrain));
    ConRadius(ND_EtDrain) + S_Fitting + L_EtHopperFront + (2*ConRadius(ND_EtDrain) + S_Fitting) + (2*T_EtRemovableWallSupport + T_EtRemovableWall + S_Fitting);
    -SocketDepth(ND_EtDrain)
] + Et_Origin, L_EtDrainStopper, [0; 90; 0]*deg, ND_EtDrain, PS_Default)
# Changed i to 1
# added to layer
StopperPipes :=
    Local ← stack(FreezePipes, StopperLayer, FirstStopper_0, FirstStopper_1)
    for i ∈ 1 .. N_EtFullHopper + 1
        Local ← stack(Local, PipeF([
            -(L_EtHopper + T_EtHopperLedge)*i - S_Fitting - ConRadius(ND_EtDrain);
            ConRadius(ND_EtDrain) + S_Fitting + L_EtHopperFront;
            -SocketDepth(ND_EtDrain)
        ] + Et_Origin, L_EtDrainStopper, [0; 90; 0]*deg, ND_EtDrain, PS_Default))
FreezeStopper := FreezeLayer("EtDrainStoppersPlu")
EtDrainsRight2Inlets := stack(DrainCouplings, DrainPipes, StopperPipes, FreezeStopper)
ThawDrains := ThawMultiple(["EtCon"; "EtDrainCouplingsPlu"; "EtDrainPipesPlu"; "EtWeir"; "EtTrashrack"; "Cdc"; "CdcFittings"; "EtDrainStoppersPlu"])
MirrorDrains := Mirror3dAll("YZ", [Plant_Origin[0] - 1/2*L_Sed; 0 m; 0 m], "Y")
FreezeDrains := FreezeMultiple(["EtCon"; "EtDrainCouplingsPlu"; "EtDrainPipesPlu"; "EtWeir"; "EtTrashrack"; "Cdc"; "CdcFittings"; "EtDrainStoppersPlu"])
EtDrainsLeft2Inlets := stack(ThawDrains, MirrorDrains, FreezeDrains)
# Overflow Drain Grit
# The half of the PVC overflow channel closer to the right-hand end of the tank (from top view):
L_EtFrontToOverflowWeir :=
    (L_EtHopperFront + 2*ConRadius(ND_EtDrain) + 2*S_Fitting + ConRadius(ND_EtOverflowDrain)) if EN_DoubleTrain == 0
    (.5*L_EtHopperFront + 2*ConRadius(ND_EtDrain) + 2*S_Fitting + ConRadius(ND_EtOverflowDrain)) otherwise
L_EtFrontToOverflowWeir = 0.693675 m
EtOverflow_Origin == Et_Origin + [
    -CapThickness(ND_EtOverflowDrain);
    L_EtFrontToOverflowWeir/2;
    H_EtHopper + HL_Flowmeasure - innerdiameter(ND_EtOverflowDrain, PS_Default)/2 + H_EtOverflowCutaway + H_EtLFOMtoOverflow
]
EtOverflow_Origin := Et_Origin + [
    -CapThickness(ND_EtOverflowDrain);
    L_EtSupport + W_EtDC - S_Fitting - ConRadius(ND_EtOverflowDrain);
    H_EtHopper + HL_Flowmeasure - innerdiameter(ND_EtOverflowDrain, PS_Default)/2 + H_EtOverflowCutaway + H_EtLFOMtoOverflow
]
# Redone to be on the back side of the drain channel mrf222 7/4/2014
EtChannelPipe1 := PipeF(EtOverflow_Origin, L_EtChannelPipes, [0; 0; 0]*deg, ND_EtOverflowDrain, PS_Default)
EtOverflowTeeCorner1 := EtOverflow_Origin + [-L_EtChannelPipes - TeeLength(ND_EtOverflowDrain)/2; 0 m; -ShortTeeLength(ND_EtOverflowDrain)] + [
    -TeeLength(ND_EtOverflowDrain)/2 - SocketDepth(ND_EtOverflowDrain);
    ShortTeeLength(ND_EtOverflowDrain) + CapDiameter(ND_EtOverflowDrain)/2;
    CapDiameter(ND_EtOverflowDrain)/2
]
# The half of the PVC overflow channel closer to the trash rack:
EtOverflowTeeCorner2 := (EtOverflow_Origin + [-L_EtChannelPipes - TeeLength(ND_EtOverflowDrain)/2; 0 m; -ShortTeeLength(ND_EtOverflowDrain)] + [
    TeeLength(ND_EtOverflowDrain)/2 + SocketDepth(ND_EtOverflowDrain);
    -SocketDepth(ND_EtOverflowDrain);
    -CapDiameter(ND_EtOverflowDrain)/2
])
EtChannelPipe2 := PipeF(EtOverflow_Origin + [-L_EtChannelPipes - TeeLength(ND_EtOverflowDrain); 0 m; 0 m], L_EtChannelPipes, [0; 0; 0]*deg, ND_EtOverflowDrain, PS_Default)
EtOverflowTee_Block := BlockingWindow("Tee", EtOverflow_Origin + [-L_EtChannelPipes - TeeLength(ND_EtOverflowDrain)/2; 0 m; -ShortTeeLength(ND_EtOverflowDrain)], EtOverflowTeeCorner1, EtOverflowTeeCorner2, "x", "90")
EtOverflowTee := TeeF(EtOverflow_Origin + [-L_EtChannelPipes - TeeLength(ND_EtOverflowDrain)/2; 0 m; -ShortTeeLength(ND_EtOverflowDrain)], [0; 0; -90]*deg, ND_EtOverflowDrain, PS_Default)
EtOverflowCap1Corner1 := EtOverflow_Origin + [
    -CapHeight(ND_EtOverflowDrain) + CapThickness(ND_EtOverflowDrain);
    CapDiameter(ND_EtOverflowDrain)/2;
    CapDiameter(ND_EtOverflowDrain)/2
]
EtOverflowCap1 := CapF(EtOverflow_Origin, [0; 0; 0]*deg, ND_EtOverflowDrain)
EtOverflowCap1Corner2 := EtOverflow_Origin + [
    CapThickness(ND_EtOverflowDrain);
    -CapDiameter(ND_EtOverflowDrain)/2;
    -CapDiameter(ND_EtOverflowDrain)/2
]
EtOverflowCap2 := CapF(EtOverflow_Origin + [-2*L_EtChannelPipes - TeeLength(ND_EtOverflowDrain); 0 m; 0 m], [0; 180; 0]*deg, ND_EtOverflowDrain)
EtOverflowCap1_Block := BlockingWindow("Cap1", EtOverflow_Origin, EtOverflowCap1Corner1, EtOverflowCap1Corner2, "x", "90")
EtOverflowCap2Corner1 := EtOverflow_Origin + [-2*L_EtChannelPipes - TeeLength(ND_EtOverflowDrain); 0 m; 0 m] + [
    -CapThickness(ND_EtOverflowDrain);
    3*CapDiameter(ND_EtOverflowDrain)/2;
    3*CapDiameter(ND_EtOverflowDrain)/2
]
L_EtOverflowPipeVert0 := H_EtHopper + HL_Flowmeasure - innerdiameter(ND_EtOverflowDrain, PS_Default)/2 + H_EtOverflowCutaway + H_EtLFOMtoOverflow - ShortTeeLength(ND_EtOverflowDrain) + T_PlantWall + zc
EtOverflowPipeVert := PipeSUBF(EtOverflow_Origin + [-L_EtChannelPipes - TeeLength(ND_EtOverflowDrain)/2; 0 m; -ShortTeeLength(ND_EtOverflowDrain)], L_EtOverflowPipeVert0, [0; -90; 0]*deg, ND_EtOverflowDrain, PS_Default, ["EtCon"])
EtOverflowCap2Corner2 := EtOverflow_Origin + [-2*L_EtChannelPipes - TeeLength(ND_EtOverflowDrain); 0 m; 0 m] + [
    CapHeight(ND_EtOverflowDrain) - CapThickness(ND_EtOverflowDrain);
    -3*CapDiameter(ND_EtOverflowDrain)/2;
    -3*CapDiameter(ND_EtOverflowDrain)/2
]
EtOverflowCap2_Block := BlockingWindow("Cap2", EtOverflow_Origin + [-2*L_EtChannelPipes - TeeLength(ND_EtOverflowDrain); 0 m; 0 m], EtOverflowCap2Corner1, EtOverflowCap2Corner2, "x", "90")
EtOverflowElbow := ElbowSUBF(Et_Origin + [
    -CapThickness(ND_EtOverflowDrain) - L_EtChannelPipes - TeeLength(ND_EtOverflowDrain)/2;
    L_EtFrontToOverflowWeir;
    -T_PlantWall - ConRadius(ND_EtOverflowDrain) + ElbowRadius(ND_EtOverflowDrain)
], [90; 270; 0]*deg, ND_EtOverflowDrain, PS_Default, ["EtCon"])
# Use Vert 0 or Vert 1?
EtOverflowPipeVertCorner1 := EtOverflow_Origin + [-L_EtChannelPipes - TeeLength(ND_EtOverflowDrain)/2; 0 m; -ShortTeeLength(ND_EtOverflowDrain)] + [outerradius(ND_EtOverflowDrain); 0; outerradius(ND_EtOverflowDrain)]
EtOverflowWeirSlot := BoxF(Et_Origin + [
    0;
    L_EtFrontToOverflowWeir - W_EtOverflowSlot/2;
    H_EtHopper + HL_Flowmeasure + H_EtLFOMtoOverflow - zc
], Et_Origin + [
    -CapThickness(ND_EtOverflowDrain) - L_EtOverflowWeir/2;
    L_EtFrontToOverflowWeir + W_EtOverflowSlot/2;
    H_EtHopper + HL_Flowmeasure + H_EtOverflowCutaway + H_EtLFOMtoOverflow + CapThickness(ND_EtOverflowDrain) + 2*zc
], [0; 0; 0]*deg)
EtOverflowPipeVertCorner2 := EtOverflow_Origin + [-L_EtChannelPipes - TeeLength(ND_EtOverflowDrain)/2; 0 m; -ShortTeeLength(ND_EtOverflowDrain)] - [outerradius(ND_EtOverflowDrain); L_EtOverflowPipeVert0; outerradius(ND_EtOverflowDrain)]
EtOverflowFittingLayer := layer_new("EtOverflowFittingPlu", green)
FreezeEtOverflowFittings := FreezeLayer("EtOverflowFittingPlu")
BoxF = ƒ([Length], [Length], [Unitless]) → [any1]
EtOverflowPipeLayer := layer_new("EtOverflowPipePlu", blue)
EtOverflowPipeVert_Block := BlockingWindow("OverflowPipeVert", EtOverflow_Origin + [-L_EtChannelPipes - TeeLength(ND_EtOverflowDrain)/2; 0 m; -ShortTeeLength(ND_EtOverflowDrain)], EtOverflowPipeVertCorner1, EtOverflowPipeVertCorner2, "x", "90")
FreezeEtOverflowPipe := FreezeLayer("EtOverflowPipePlu")
SubtractSlotFromFittings := SubtractF(["EtOverflowFittingPlu"], "DeleteMe")
EtChannelPipe1Corner1 := EtOverflow_Origin + [outerradius(ND_EtOverflowDrain); -L_EtChannelPipes; outerradius(ND_EtOverflowDrain)]
SubtractSlotFromPipes := SubtractF(["EtOverflowPipePlu"], "DeleteMe")
EtChannelPipe1Corner2 := EtOverflow_Origin + [-outerradius(ND_EtOverflowDrain); 0; -outerradius(ND_EtOverflowDrain)]
EtChannelPipe1_Block := BlockingWindow("ChannelPipe1", EtOverflow_Origin, EtChannelPipe1Corner1, EtChannelPipe1Corner2, "x", "90")
EtChannelPipe2Corner1 := EtOverflow_Origin + [-L_EtChannelPipes - TeeLength(ND_EtOverflowDrain); 0 m; 0 m] + [-L_EtChannelPipes; -outerradius(ND_EtOverflowDrain); outerradius(ND_EtOverflowDrain)]
EtChannelPipe2Corner2 := EtOverflow_Origin + [-L_EtChannelPipes - TeeLength(ND_EtOverflowDrain); 0 m; 0 m] + [0; outerradius(ND_EtOverflowDrain); -outerradius(ND_EtOverflowDrain)]
EtChannelPipe2_Block := BlockingWindow("ChannelPipe2", EtOverflow_Origin + [-L_EtChannelPipes - TeeLength(ND_EtOverflowDrain); 0 m; 0 m], EtChannelPipe2Corner1, EtChannelPipe2Corner2, "x", "90")
# Love, Ewa and Stephanie
# xoxo
# BLOCKING FUNCTIONS
# LAYERS
EtOverflowFittingLayer2 := layer_new("EtOverflowFittingPlu2", green)
FreezeEtOverflowFittings2 := FreezeLayer("EtOverflowFittingPlu2")
SubtractSlotFromFittings2 := SubtractF(["EtOverflowFittingPlu2"], "DeleteMe")
EtOverflowFittingLayer3 := layer_new("EtOverflowFittingPlu3", green)
FreezeEtOverflowFittings3 := FreezeLayer("EtOverflowFittingPlu3")
SubtractSlotFromFittings3 := SubtractF(["EtOverflowFittingPlu3"], "DeleteMe")
EtOverflowPipeLayer2 := layer_new("EtOverflowPipePlu2", blue)
FreezeEtOverflowPipe2 := FreezeLayer("EtOverflowPipePlu2")
SubtractSlotFromPipes2 := SubtractF(["EtOverflowPipePlu2"], "DeleteMe")
EtOverflowPipeLayer3 := layer_new("EtOverflowPipePlu3", blue)
FreezeEtOverflowPipe3 := FreezeLayer("EtOverflowPipePlu3")
SubtractSlotFromPipes3 := SubtractF(["EtOverflowPipePlu3"], "DeleteMe")
EtOverflowTee_Block := BlockingLast("OverflowTee", EtOverflow_Origin + [-L_EtChannelPipes - TeeLength(ND_EtOverflowDrain)/2; 0 m; -ShortTeeLength(ND_EtOverflowDrain)])
EtOverflowTee_Att := Accessory_Att("Et", ND_EtOverflowDrain, EtOverflow_Origin + [-L_EtChannelPipes - TeeLength(ND_EtOverflowDrain)/2; 0 m; -ShortTeeLength(ND_EtOverflowDrain)], "OverflowTee", PS_Default)
EtOverflowCap1_Block := BlockingLast("OverflowCap1", EtOverflow_Origin)
EtOverflowCap1_Att := Accessory_Att("Et", ND_EtOverflowDrain, EtOverflow_Origin, "OverflowCap1", PS_Default)
EtOverflowCap2_Block := BlockingLast("OverflowCap2", EtOverflow_Origin + [-2*L_EtChannelPipes - TeeLength(ND_EtOverflowDrain); 0 m; 0 m])
EtOverflowCap2_Att := Accessory_Att("Et", ND_EtOverflowDrain, EtOverflow_Origin + [-2*L_EtChannelPipes - TeeLength(ND_EtOverflowDrain); 0 m; 0 m], "OverflowCap2", PS_Default)
EtOverflowPipeVert_Block := BlockingLast("OverflowPipeVert", EtOverflow_Origin + [-L_EtChannelPipes - TeeLength(ND_EtOverflowDrain)/2; 0 m; -ShortTeeLength(ND_EtOverflowDrain)])
EtOverflowPipeVert_Att := Pipe_Att("Et", ND_EtOverflowDrain, EtOverflow_Origin + [-L_EtChannelPipes - TeeLength(ND_EtOverflowDrain)/2; 0 m; -ShortTeeLength(ND_EtOverflowDrain)], "OverflowPipeVert", L_EtOverflowPipeVert0, PS_Default)
EtChannelPipe1_Block := BlockingLast("ChannelPipe1", EtOverflow_Origin)
EtChannelPipe1_Att := Pipe_Att("Et", ND_EtOverflowDrain, EtOverflow_Origin, "ChannelPipe1", L_EtChannelPipes, PS_Default)
EtChannelPipe2_Block := BlockingLast("ChannelPipe2", EtOverflow_Origin + [-L_EtChannelPipes - TeeLength(ND_EtOverflowDrain); 0 m; 0 m])
EtChannelPipe2_Att := Pipe_Att("Et", ND_EtOverflowDrain, EtOverflow_Origin + [-L_EtChannelPipes - TeeLength(ND_EtOverflowDrain); 0 m; 0 m], "ChannelPipe2", L_EtChannelPipes, PS_Default)
EtChannelPipe2Script := stack(EtChannelPipe2_Block, EtChannelPipe2_Att)
EtChannelPipe1Script := stack(EtChannelPipe1_Block, EtChannelPipe1_Att)
EtOverflowPipeVertScript := stack(EtOverflowPipeVert_Block, EtOverflowPipeVert_Att)
EtOverflowCap2Script := stack(EtOverflowCap2_Block, EtOverflowCap2_Att)
EtOverflowCap1Script := stack(EtOverflowCap1_Block, EtOverflowCap1_Att)
EtOverflowTeeScript := stack(EtOverflowTee_Block, EtOverflowTee_Att)
EtOverflowTeeStack := stack(EtOverflowFittingLayer, EtOverflowTee, FreezeEtOverflowFittings, EtOverflowWeirSlot, GroupDelete, SubtractSlotFromFittings, SelectLayer("EtOverflowFittingPlu"), EtOverflowTeeScript, FreezeEtOverflowFittings)
EtOverflowCap1Stack := stack(EtOverflowFittingLayer2, EtOverflowCap1, FreezeEtOverflowFittings2, EtOverflowWeirSlot, GroupDelete, SubtractSlotFromFittings2, SelectLayer("EtOverflowFittingPlu2"), EtOverflowCap1Script, FreezeEtOverflowFittings2)
EtOverflowCap2Stack := stack(EtOverflowFittingLayer3, EtOverflowCap2, FreezeEtOverflowFittings3, EtOverflowWeirSlot, GroupDelete, SubtractSlotFromFittings3, SelectLayer("EtOverflowFittingPlu3"), EtOverflowCap2Script, FreezeEtOverflowFittings3)
EtOverflowPipeVertStack := stack(EtOverflowPipeLayer, EtOverflowPipeVert, FreezeEtOverflowPipe, SelectLayer("EtOverflowPipePlu"), EtOverflowPipeVertScript, FreezeEtOverflowPipe)
EtChannelPipe1Stack := stack(EtOverflowPipeLayer2, EtChannelPipe1, FreezeEtOverflowPipe2, EtOverflowWeirSlot, GroupDelete, SubtractSlotFromPipes2, SelectLayer("EtOverflowPipePlu2"), EtChannelPipe1Script, FreezeEtOverflowPipe2)
EtChannelPipe2Stack := stack(EtOverflowPipeLayer3, EtChannelPipe2, FreezeEtOverflowPipe3, EtOverflowWeirSlot, GroupDelete, SubtractSlotFromPipes3, SelectLayer("EtOverflowPipePlu3"), EtChannelPipe2Script, FreezeEtOverflowPipe3)
EtOverflowPluScript0 := stack(EtOverflowTeeStack, EtOverflowCap1Stack, EtOverflowCap2Stack, EtOverflowPipeVertStack, EtChannelPipe1Stack, EtChannelPipe2Stack)
# Overflow Drain Grit Two Inlets
# The half of the PVC overflow channel closer to the right-hand end of the tank (from top view):
L_EtFrontToOverflowWeir := L_EtHopperFront + 2*ConRadius(ND_EtDrain) + 2*S_Fitting + ConRadius(ND_EtOverflowDrain)
Et_OverflowWeirOrigin := Et_Origin + [-L_EtHopper; 0 m; 0 m]
EtChannelPipe1 := PipeF(Et_OverflowWeirOrigin + [
    -CapThickness(ND_EtOverflowDrain);
    L_EtFrontToOverflowWeir;
    H_EtHopper + HL_Flowmeasure - innerdiameter(ND_EtOverflowDrain, PS_Default)/2 + H_EtOverflowCutaway + H_EtLFOMtoOverflow
], L_EtChannelPipes, [0; 0; 0]*deg, ND_EtOverflowDrain, PS_Default)
# The half of the PVC overflow channel closer to the trash rack:
EtChannelPipe2 := PipeF(Et_OverflowWeirOrigin + [
    -CapThickness(ND_EtOverflowDrain) - L_EtChannelPipes - TeeLength(ND_EtOverflowDrain);
    L_EtFrontToOverflowWeir;
    H_EtHopper + HL_Flowmeasure - innerdiameter(ND_EtOverflowDrain, PS_Default)/2 + H_EtOverflowCutaway + H_EtLFOMtoOverflow
], L_EtChannelPipes, [0; 0; 0]*deg, ND_EtOverflowDrain, PS_Default)
EtOverflowTee := TeeF(Et_OverflowWeirOrigin + [
    -CapThickness(ND_EtOverflowDrain) - L_EtChannelPipes - TeeLength(ND_EtOverflowDrain)/2;
    L_EtFrontToOverflowWeir;
    H_EtHopper + HL_Flowmeasure - innerdiameter(ND_EtOverflowDrain, PS_Default)/2 + H_EtOverflowCutaway + H_EtLFOMtoOverflow - ShortTeeLength(ND_EtOverflowDrain)
], [0; 0; -90]*deg, ND_EtOverflowDrain, PS_Default)
EtOverflowCap1 := CapF(Et_OverflowWeirOrigin + [
    -CapThickness(ND_EtOverflowDrain);
    L_EtFrontToOverflowWeir;
    H_EtHopper + HL_Flowmeasure - innerdiameter(ND_EtOverflowDrain, PS_Default)/2 + H_EtOverflowCutaway + H_EtLFOMtoOverflow
], [0; 0; 0]*deg, ND_EtOverflowDrain)
EtOverflowCap2 := CapF(Et_OverflowWeirOrigin + [
    -CapThickness(ND_EtOverflowDrain) - 2*L_EtChannelPipes - TeeLength(ND_EtOverflowDrain);
    L_EtFrontToOverflowWeir;
    H_EtHopper + HL_Flowmeasure - innerdiameter(ND_EtOverflowDrain, PS_Default)/2 + H_EtOverflowCutaway + H_EtLFOMtoOverflow
], [0; 180; 0]*deg, ND_EtOverflowDrain)
L_EtOverflowPipeVert0 := H_EtHopper + HL_Flowmeasure - innerdiameter(ND_EtOverflowDrain, PS_Default)/2 + H_EtOverflowCutaway + H_EtLFOMtoOverflow - ShortTeeLength(ND_EtOverflowDrain) + T_PlantWall + zc
EtOverflowPipeVert := PipeSUBF(Et_OverflowWeirOrigin + [
    -CapThickness(ND_EtOverflowDrain) - L_EtChannelPipes - TeeLength(ND_EtOverflowDrain)/2;
    L_EtFrontToOverflowWeir;
    H_EtHopper + HL_Flowmeasure - innerdiameter(ND_EtOverflowDrain, PS_Default)/2 + H_EtOverflowCutaway + H_EtLFOMtoOverflow - ShortTeeLength(ND_EtOverflowDrain)
], L_EtOverflowPipeVert0, [0; -90; 0]*deg, ND_EtOverflowDrain, PS_Default, ["EtCon"])
EtOverflowWeirSlot := BoxF(Et_OverflowWeirOrigin + [
    0;
    L_EtFrontToOverflowWeir - W_EtOverflowSlot/2;
    H_EtHopper + HL_Flowmeasure + H_EtLFOMtoOverflow - zc
], Et_OverflowWeirOrigin + [
    -CapThickness(ND_EtOverflowDrain) - L_EtOverflowWeir/2;
    L_EtFrontToOverflowWeir + W_EtOverflowSlot/2;
    H_EtHopper + HL_Flowmeasure + H_EtOverflowCutaway + H_EtLFOMtoOverflow + CapThickness(ND_EtOverflowDrain) + 2*zc
], [0; 0; 0]*deg)
EtOverflowFittingLayer := layer_new("EtOverflowFittingPlu", green)
FreezeEtOverflowFittings := FreezeLayer("EtOverflowFittingPlu")
EtOverflowPipeLayer := layer_new("EtOverflowPipePlu", blue)
FreezeEtOverflowPipe := FreezeLayer("EtOverflowPipePlu")
Et_OverflowWeirPipe
SubtractSlotFromFittings := SubtractF(["EtOverflowFittingPlu"], "DeleteMe")
SubtractSlotFromPipes := SubtractF(["EtOverflowPipePlu"], "DeleteMe")
EtOverflowPluScript2 := stack(EtOverflowFittingLayer, EtOverflowTee, EtOverflowCap1, EtOverflowCap2, FreezeEtOverflowFittings, EtOverflowPipeLayer, EtOverflowPipeVert, EtChannelPipe1, EtChannelPipe2, FreezeEtOverflowPipe, EtOverflowWeirSlot, GroupDelete, SubtractSlotFromFittings, EtOverflowWeirSlot, GroupAll("DeleteMe"), SubtractSlotFromPipes)
# Overflow Drain No Grit
EtOverflowElbow_Origin := [
    -L_Et + 2*(S_Fitting + ConRadius(ND_RMPipe)) + SocketDepth(ND_EtOverflowDrain) + ElbowRadius(ND_EtOverflowDrain);
    W_Et/2;
    -max(T_PlantWall, CouplingLength(ND_EtOverflowDrain)) - SocketDepth(ND_EtOverflowDrain)
] + Et_Origin
EtOverflowCoupling_Origin := [
    -L_Et + 2*(S_Fitting + ConRadius(ND_RMPipe)) + SocketDepth(ND_EtOverflowDrain) + ElbowRadius(ND_EtOverflowDrain);
    W_Et/2;
    -SocketDepth(ND_EtOverflowDrain)
] + Et_Origin
EtOverflowTee_Origin := [
    EtOverflowCoupling_Origin[0];
    EtOverflowCoupling_Origin[1];
    Et_Origin[2] + H_Et - H_PlantFreeboard + H_EtLFOMtoOverflow + H_EtOverflowCutaway - innerdiameter(ND_EtOverflowDrain, PS_Default)/2 - ShortTeeLength(ND_EtOverflowDrain)
]
EtOverflowCap1_Origin := [
    EtOverflowTee_Origin[0];
    Et_Origin[1] + W_Et - CapThickness(ND_EtOverflowDrain);
    EtOverflowTee_Origin[2] + ShortTeeLength(ND_EtOverflowDrain)
]
EtOverflowCap2_Origin := [
    EtOverflowTee_Origin[0];
    Et_Origin[1] + CapThickness(ND_EtOverflowDrain);
    EtOverflowTee_Origin[2] + ShortTeeLength(ND_EtOverflowDrain)
]
EtOverflowFittingsLayer := layer_new("EtOverflowDrainFittingsPlu", green)
EtOverflowElbow := ElbowF(EtOverflowElbow_Origin, [0; 0; 270]*deg, ND_EtOverflowDrain, PS_Default)  # must subtract out of drain channel later
.
EtOverflowCoupling := CouplingSUBF(EtOverflowCoupling_Origin, [0; 270]*deg, ND_EtOverflowDrain, PS_Default, ["EtCon"])
EtOverflowTee := TeeF(EtOverflowTee_Origin, [90; 270; 0]*deg, ND_EtOverflowDrain, PS_Default)
EtOverflowCap1 := CapF(EtOverflowCap1_Origin, [90; 0]*deg, ND_EtOverflowDrain)
EtOverflowCap2 := CapF(EtOverflowCap2_Origin, [270; 0]*deg, ND_EtOverflowDrain)
EtOverflowFittingsFrz := FreezeLayer("EtOverflowDrainFittingsPlu")
EtOverflowCutaway := BoxF([W_EtOverflowSlot/1.5; CapThickness(ND_EtOverflowDrain); ConRadius(ND_EtOverflowDrain) + zc] + EtOverflowCap1_Origin, [
    -W_EtOverflowSlot/1.5;
    -CapThickness(ND_EtOverflowDrain);
    innerdiameter(ND_EtOverflowDrain, PS_Default)/2 - H_EtOverflowCutaway
] + EtOverflowCap2_Origin, [0; 0; 0]*deg)
EtOverflowFittingsSub := SubtractF(["EtOverflowDrainFittingsPlu"], "DeleteMe")
EtOverflowFittingsPlu := stack(EtOverflowFittingsLayer, EtOverflowElbow, EtOverflowCoupling, EtOverflowTee, EtOverflowCap1, EtOverflowCap2, EtOverflowFittingsFrz, EtOverflowCutaway, GroupDelete, EtOverflowFittingsSub)
EtOverflowPipesLayer := layer_new("EtOverflowDrainPlu", blue)
L_EtOverflowNipple := EtOverflowCoupling_Origin[2] - CouplingLength(ND_EtOverflowDrain) + 2*SocketDepth(ND_EtOverflowDrain) - EtOverflowElbow_Origin[2]
EtOverflowNipple := PipeSUBF(EtOverflowElbow_Origin, L_EtOverflowNipple, [0; 90]*deg, ND_EtOverflowDrain, PS_Default, ["EtCon"])
L_EtOverflowPipeVert1 := EtOverflowTee_Origin[2] - EtOverflowCoupling_Origin[2]
EtOverflowVertPipe := PipeF(EtOverflowCoupling_Origin, L_EtOverflowPipeVert1, [0; 90]*deg, ND_EtOverflowDrain, PS_Default)
L_EtOverflowHorizPipes := 0.5*(W_Et - 2*CapThickness(ND_EtOverflowDrain) - TeeLength(ND_EtOverflowDrain))
EtOverflowHorizPipe1 := PipeF(EtOverflowCap1_Origin, L_EtOverflowHorizPipes, [90; 0]*deg, ND_EtOverflowDrain, PS_Default)
EtOverflowHorizPipe2 := PipeF(EtOverflowCap2_Origin, L_EtOverflowHorizPipes, [270; 0]*deg, ND_EtOverflowDrain, PS_Default)
EtOverflowPipesFrz := FreezeLayer("EtOverflowDrainPlu")
EtOverflowPipesSub := SubtractF(["EtOverflowDrainPlu"], "DeleteMe")
EtOverflowPipesPlu := stack(EtOverflowPipesLayer, EtOverflowNipple, EtOverflowVertPipe, EtOverflowHorizPipe1, EtOverflowHorizPipe2, EtOverflowPipesFrz, EtOverflowCutaway, GroupDelete, EtOverflowPipesSub)
EtOverflowPluScript1 := stack(EtOverflowFittingsPlu, EtOverflowPipesPlu)
# Inlet Pipe
EtInletElbow_Origin0 == (Et_Origin + [; 0 m;; L_EtFrontToOverflowWeir/2 + ConRadius(ND_EtOverflowDrain) + S_Fitting + ConRadius(ND_EtInlet);; H_Et + DropEt + ConRadius(ND_EtInlet); ])
EtInletElbow_Origin0 := Et_Origin + [0 m; L_EtSupport + W_EtDC + ConRadius(ND_EtInlet); H_Et + DropEt + ConRadius(ND_EtInlet)] = [-3.19037; 7.05442; 2.42024] m
EtInletElbow_Origin1 := Et_Origin + [
    ElbowRadius(ND_EtInlet) - S_Fitting - ConRadius(ND_EtInlet);
    0.5*W_Et;
    H_Et + DropEt + ConRadius(ND_EtInlet) + ElbowRadius(ND_EtInlet) - SocketDepth(ND_EtInlet)
] = [-3.23005; 6.71949; 2.44722] m
EtInletElbow_Origin2 := Et_Origin + [ConRadius(ND_EtInlet); ConRadius(ND_EtInlet) + S_Fitting; H_Et + DropEt + ConRadius(ND_EtInlet)]
L_EtFrontToOverflowWeir = 0.693675 m
EtInletElbow_Origin :=
    EtInletElbow_Origin0 if EN_EtGrit == 0 and EN_DoubleTrain == 0
    EtInletElbow_Origin2 if EN_DoubleTrain == 1
    EtInletElbow_Origin1 otherwise
Et_Origin = [-3.19037; 6.1004; 1.16822] m
EtInletPipeLayer := layer_new("EtInletPipePlu", blue)
EtInletFittingLayer := layer_new("EtInletFittingPlu", green)
ND_EtInlet = 0.2032 m
EtInletElbow := ElbowF(EtInletElbow_Origin, [90; 0; 90]*deg, ND_EtInlet, PS_Default)
EtInletElbow_Block := BlockingLast("InletElbow", EtInletElbow_Origin)
EtInletElbow_Att := Accessory_Att("Et", ND_EtInlet, EtInletElbow_Origin, "InletElbow", PS_Default)
EtInletElbowScript := stack(EtInletElbow, EtInletElbow_Block, EtInletElbow_Att)
L_EtInletPipe := 1 m
EtInletPipe := PipeF(EtInletElbow_Origin + [L_EtInletPipe; 0; 0], L_EtInletPipe, [0; 0; 0]*deg, ND_EtInlet, PS_Default)
EtInletPipe_Block := BlockingLast("InletPipe", EtInletElbow_Origin + [L_EtInletPipe; 0; 0])
EtInletPipe_Att := Pipe_Att("Et", ND_EtInlet, EtInletElbow_Origin + [L_EtInletPipe; 0; 0], "InletPipe", L_EtInletPipe, PS_Default)
EtInletPipeScript := stack(EtInletPipe, EtInletPipe_Block, EtInletPipe_Att)
FreezeEtInletPipe := FreezeLayer("EtInletPipePlu")
FreezeEtInletFittings := FreezeLayer("EtInletFittingPlu")
EtInletScript := stack(EtInletFittingLayer, EtInletElbow, FreezeEtInletFittings, EtInletPipeLayer, EtInletPipe, FreezeEtInletPipe)
# Entrance Pipe Flow Control
# [reference: EntranceTankapb224.xmcd]
NewLayerInletPlumbing := layer_new("InletPlumbing", green)
DCElbow1_Origin := [
    EtDC_Origin[0] + L_EtDC + T_ChannelWall + SocketDepth(ND_Pvc);
    EtDC_Origin[1] + 3/4*W_EtDC;
    EtDC_Origin[2] - ElbowRadius(ND_Pvc)
]  # The team set the y component of DCElbow1Origin to EtDC_Origin[1]+ 3/4W_EtDC to ensure the water drains into the entrance tank
DCElbow1 := ElbowF(DCElbow1_Origin, [-90; 0; 90]*deg, ND_Pvc, PS_Default)
DCPipe1_Origin := [
    DCElbow1_Origin[0] + ElbowRadius(ND_Pvc);
    DCElbow1_Origin[1];
    DCElbow1_Origin[2] + ElbowRadius(ND_Pvc)
]
LengthPipe1 := SocketDepth(ND_Et) + ElbowRadius(ND_Et) + ShortTeeLength(ND_Et) + ND_Et + 1/2*TeeLength(ND_Pvc) + H_Et - ElbowRadius(ND_Pvc) = 1.68064 m
DCPipe1 := PipeF(DCPipe1_Origin, LengthPipe1, [0; 90; 0]*deg, ND_Pvc, PS_Default)
DCElbow2_Origin := [DCPipe1_Origin[0]; DCPipe1_Origin[1]; DCPipe1_Origin[2] + LengthPipe1]
DCElbow2 := ElbowF(DCElbow2_Origin, [0; 0; 90]*deg, ND_Pvc, PS_Default)
DCPipe2_Origin := [
    DCElbow2_Origin[0] - ElbowRadius(ND_Pvc);
    DCElbow2_Origin[1];
    DCElbow2_Origin[2] + ElbowRadius(ND_Pvc)
]
LengthPipe2 := L_horizontalPipe4to5 - 2*ElbowRadius(ND_Pvc) - ShortTeeLength(ND_Pvc)
DCPipe2 := PipeF(DCPipe2_Origin, LengthPipe2, [0; 0; 0]*deg, ND_Pvc, PS_Default)
DCTee1_Origin := [DCPipe2_Origin[0] - LengthPipe2; DCPipe2_Origin[1]; DCPipe2_Origin[2]]
DCTee1 := TeeF(DCTee1_Origin, [-90; 0; -90]*deg, ND_Pvc, PS_Default)
DCPipe3_Origin := [
    DCTee1_Origin[0] - ShortTeeLength(ND_Pvc);
    DCTee1_Origin[1];
    DCTee1_Origin[2] - 1/2*TeeLength(ND_Pvc)
]
LengthPipe3 := ND_Pvc
DCPipe3 := PipeF(DCPipe3_Origin, LengthPipe3, [0; -90; 0]*deg, ND_Pvc, PS_Default)
DCTee2_Origin := [DCPipe3_Origin[0]; DCPipe3_Origin[1]; DCPipe3_Origin[2] - LengthPipe3]
# DCTee2  Note: we are using ND of the entrance pipe, but this is actually going to be a reducer tee. It must update accordingly in the future
DCTee2 := TeeF(DCTee2_Origin, [90; -270; 0]*deg, ND_Pvc, PS_Default)
EtThreadedValve_Origin := [
    DCTee2_Origin[0];
    DCTee2_Origin[1] - 1/2*TeeLength(ND_Pvc) - SocketDepth(ND_Pvc);
    DCTee2_Origin[2] - ShortTeeLength(ND_Pvc)
]
EtFlowValve := InsertThreadedValve("Et", ND_Et, EtThreadedValve_Origin, 90 deg)
DCElbow3_Origin := [
    EtThreadedValve_Origin[0];
    EtThreadedValve_Origin[1] - ValveLength(ND_Et) - SocketDepth(ND_Et);
    EtThreadedValve_Origin[2]
]
DCElbow3_Block := BlockingLast("DCElbow3", DCElbow3_Origin)
DCElbow3 := ElbowF(DCElbow3_Origin, [90; 90; 90]*deg, ND_Et, PS_Default)
DCElbow3_Att := Accessory_Att("Et", ND_Et, DCElbow3_Origin, "DCElbow3", PS_Default)
DCElbow3Script := stack(DCElbow3, DCElbow3_Block, DCElbow3_Att)
DCPipe5_Origin := [
    DCTee2_Origin[0];
    DCTee2_Origin[1] + 1/2*TeeLength(ND_Pvc);
    DCTee2_Origin[2] - ShortTeeLength(ND_Pvc)
]
LengthPipe5 := 35 in  # LengthPipe5 is entrance pipe length set to arbitrary length
DCPipe5 := PipeF(DCPipe5_Origin, LengthPipe5, [-90; 0; -90]*deg, ND_Et, PS_Default)
DCPipe6_Origin := [
    DCTee1_Origin[0] - ShortTeeLength(ND_Pvc);
    DCTee1_Origin[1];
    DCTee1_Origin[2] + .5*TeeLength(ND_Pvc)
]
LengthPipe6 := h_4to6(Q_Plant, ND_Et, ND_Pvc)*SF_4to6
DCPipe6 := PipeF(DCPipe6_Origin, LengthPipe6, [0; -90; 0]*deg, ND_Pvc, PS_Default)
ND_TSpipe := round(DecPipe(ND_Pvc)/m*1000)*m/1000
TSElbow1_Origin := [DCPipe6_Origin[0]; DCPipe6_Origin[1]; DCPipe6_Origin[2] - LengthPipe6]
TSElbow1 := ElbowF(TSElbow1_Origin, [0; 0; 90]*deg, ND_TSpipe, PS_Default)
TSPipe2_Origin := [
    TSElbow1_Origin[0] - ElbowRadius(ND_TSpipe);
    TSElbow1_Origin[1];
    TSElbow1_Origin[2] + ElbowRadius(ND_TSpipe)
]
LengthTSPipe2 := 4*ND_Pvc  # We set LengthTSPipe2 arbitrarily 4*ND.Pvc
TSPipe2 := PipeF(TSPipe2_Origin, LengthTSPipe2, [0; 0; 0]*deg, ND_TSpipe, PS_Default)
TSElbow2_Origin := [TSPipe2_Origin[0] - LengthTSPipe2; TSPipe2_Origin[1]; TSPipe2_Origin[2]]
TSElbow2 := ElbowF(TSElbow2_Origin, [90; 0; 90]*deg, ND_TSpipe, PS_Default)
DCPipe7_Origin := [DCElbow1_Origin[0]; DCElbow1_Origin[1]; DCElbow1_Origin[2]]
LengthPipe7 := T_PlantWall + SocketDepth(ND_Pvc)
DCPipe7 := PipeF(DCPipe7_Origin, LengthPipe7, [0; 0; 0]*deg, ND_Pvc, PS_Default)
# BLOCKING FUNCTIONS
DCPipe1_Block := BlockingLast("Pipe1", DCPipe1_Origin)
DCElbow1_Block := BlockingLast("DCElbow1", DCElbow1_Origin)
DCPipe1_Att := Pipe_Att("Et", ND_Pvc, DCPipe1_Origin, "Pipe1", LengthPipe1, PS_Default)
DCElbow1_Att := Accessory_Att("Et", ND_Pvc, DCElbow1_Origin, "DCElbow1", PS_Default)
DCPipe1Script := stack(DCPipe1, DCPipe1_Block, DCPipe1_Att)
DCElbow1Script := stack(DCElbow1, DCElbow1_Block, DCElbow1_Att)
DCElbow2_Block := BlockingLast("DCElbow2", DCElbow2_Origin)
DCPipe2_Block := BlockingLast("Pipe2", DCPipe2_Origin)
DCElbow2_Att := Accessory_Att("Et", ND_Pvc, DCElbow2_Origin, "DCElbow2", PS_Default)
DCPipe2_Att := Pipe_Att("Et", ND_Pvc, DCPipe2_Origin, "Pipe2", LengthPipe1, PS_Default)
DCElbow2Script := stack(DCElbow2, DCElbow2_Block, DCElbow2_Att)
DCPipe2Script := stack(DCPipe2, DCPipe2_Block, DCPipe2_Att)
DCPipe3_Block := BlockingLast("Pipe3", DCPipe3_Origin)
DCTee1_Block := BlockingLast("DCTee1", DCTee1_Origin)
DCPipe3_Att := Pipe_Att("Et", ND_Pvc, DCPipe3_Origin, "Pipe3", LengthPipe3, PS_Default)
DCTee1_Att := Accessory_Att("Et", ND_Pvc, DCTee1_Origin, "DCTee1", PS_Default)
DCPipe3Script := stack(DCPipe3, DCPipe3_Block, DCPipe3_Att)
DCTee1Script := stack(DCTee1, DCTee1_Block, DCTee1_Att)
DCPipe5_Block := BlockingLast("Pipe5", DCPipe5_Origin)
TSElbow1_Block := BlockingLast("TSElbow1", TSElbow1_Origin)
DCPipe5_Att := Pipe_Att("Et", ND_Et, DCPipe5_Origin, "Pipe5", LengthPipe5, PS_Default)
TSElbow1_Att := Accessory_Att("Et", ND_TSpipe, TSElbow1_Origin, "TSElbow1", PS_Default)
DCPipe5Script := stack(DCPipe5, DCPipe5_Block, DCPipe5_Att)
TSElbow1Script := stack(TSElbow1, TSElbow1_Block, TSElbow1_Att)
DCPipe6_Block := BlockingLast("Pipe6", DCPipe6_Origin)
TSElbow2_Block := BlockingLast("TSElbow2", TSElbow2_Origin)
DCPipe6_Att := Pipe_Att("Et", ND_Pvc, DCPipe6_Origin, "Pipe6", LengthPipe6, PS_Default)
TSElbow2_Att := Accessory_Att("Et", ND_TSpipe, TSElbow2_Origin, "TSElbow2", PS_Default)
DCPipe6Script := stack(DCPipe6, DCPipe6_Block, DCPipe6_Att)
TSElbow2Script := stack(TSElbow2, TSElbow2_Block, TSElbow2_Att)
TSPipe2_Block := BlockingLast("TSPipe2", TSPipe2_Origin)
TSPipe2_Att := Pipe_Att("Et", ND_TSpipe, TSPipe2_Origin, "TSPipe2", LengthTSPipe2, PS_Default)
TSPipe2Script := stack(TSPipe2, TSPipe2_Block, TSPipe2_Att)
DCPipe7_Block := BlockingLast("Pipe7", DCPipe7_Origin)
DCPipe7_Att := Pipe_Att("Et", ND_Pvc, DCPipe7_Origin, "Pipe7", LengthPipe7, PS_Default)
DCPipe7Script := stack(DCPipe7, DCPipe7_Block, DCPipe7_Att)
NewLayerInletPlumbingPipesFrz := FreezeLayer("InletPlumbingPipes")
NewLayerInletPlumbingPipes := layer_new("InletPlumbingPipes", blue)
NewLayerInletPlumbingFrz := FreezeLayer("InletPlumbing")
InletPlumbing2 := stack(NewLayerInletPlumbing, DCElbow1Script, DCElbow2Script, DCTee1Script, DCTee2, EtFlowValve, DCElbow3Script, TSElbow1Script, TSElbow2Script, NewLayerInletPlumbingFrz, NewLayerInletPlumbingPipes, DCPipe1Script, DCPipe2Script, DCPipe3Script, DCPipe5Script, DCPipe6Script, DCPipe7Script, TSPipe2Script, NewLayerInletPlumbingPipesFrz)
InletPlumbing := stack(NewLayerInletPlumbing, DCElbow1Script, DCPipe1Script, DCElbow2Script, DCPipe2Script, DCTee1Script, DCPipe3Script, DCTee2, EtFlowValve, DCPipe5Script, DCElbow3Script, DCPipe6Script, TSElbow1Script, TSPipe2Script, TSElbow2Script, DCPipe7Script, NewLayerInletPlumbingFrz)
EntranceFlowControl :=
    stack(EtTankScript, EtTrashRackScript, RMScript, NewLayerInletPlumbing, DCElbow1, DCPipe1, DCElbow2, DCPipe2, DCTee1, DCPipe3, DCTee2, EtFlowValve, DCPipe5, DCElbow3, DCPipe6, DCPipe7, TSElbow1, TSPipe2, TSElbow2, NewLayerInletPlumbingFrz) if EN_EtGrit == 0 and EN_TwoInlets == 0 and EN_LfomPipe == 1
    stack(EtTankScript2, EtTrashRackScript, RMScript, NewLayerInletPlumbing, DCElbow1, DCPipe1, DCElbow2, DCPipe2, DCTee1, DCPipe3, DCTee2, EtFlowValve, DCPipe5, DCElbow3, DCPipe6, DCPipe7, TSElbow1, TSPipe2, TSElbow2, NewLayerInletPlumbingFrz) if EN_EtGrit == 0 and EN_TwoInlets == 1 and EN_LfomPipe == 1
    stack(EtTankScript, ModificationScript, EtTrashRackScript, LfomChannelScript, NewLayerInletPlumbing, DCElbow1, DCPipe1, DCElbow2, DCPipe2, DCTee1, DCPipe3, DCTee2, EtFlowValve, DCPipe5, DCElbow3, DCPipe6, DCPipe7, TSElbow1, TSPipe2, TSElbow2, NewLayerInletPlumbingFrz) if EN_EtGrit == 0 and EN_LfomPipe == 0 and EN_TwoInlets == 0
    stack(EtTankScript2, ModificationScript, EtTrashRackScript, LfomChannelScript, NewLayerInletPlumbing, DCElbow1, DCPipe1, DCElbow2, DCPipe2, DCTee1, DCPipe3, DCTee2, EtFlowValve, DCPipe5, DCElbow3, DCPipe6, DCPipe7, TSElbow1, TSPipe2, TSElbow2, NewLayerInletPlumbingFrz) if EN_EtGrit == 0 and EN_LfomPipe == 0 and EN_TwoInlets == 1
    stack(EtTankScript, RMScript, NewLayerInletPlumbing, DCElbow1, DCPipe1, DCElbow2, DCPipe2, DCTee1, DCPipe3, DCTee2, EtFlowValve, DCPipe5, DCElbow3, DCPipe6, DCPipe7, TSElbow1, TSPipe2, TSElbow2, NewLayerInletPlumbingFrz) otherwise
# [component: inputs EntranceFlowControl]
# [component: inputs InletPlumbing]
# Inlet Pipe Two Inlets
EtInletElbow_Origin0 := Et_Origin + [
    0 m;
    L_EtFrontToOverflowWeir + ConRadius(ND_EtOverflowDrain) + S_Fitting + ConRadius(ND_EtInlet);
    H_Et + ConRadius(ND_EtInlet)
]
EtInletElbow_Origin0 := Et_Origin + [
    0 m;
    L_EtHopperFront + 4*ConRadius(ND_EtDrain) + 4*S_Fitting + ConRadius(ND_EtInlet) + T_EtRemovableWall + 2*T_EtRemovableWallSupport;
    H_Et + ConRadius(ND_EtInlet)
]
# Starts after flat on bottom of hopper on back side
# New Back Inlet Origin
# No longer involves OFW
EtInletElbow_Origin1 := Et_Origin + [
    ElbowRadius(ND_EtInlet) - S_Fitting - ConRadius(ND_EtInlet);
    0.5*W_Et;
    H_Et + ConRadius(ND_EtInlet) + ElbowRadius(ND_EtInlet) - SocketDepth(ND_EtInlet)
]
EtInletElbow_Origin :=
    EtInletElbow_Origin0 if EN_EtGrit == 0
    EtInletElbow_Origin1 otherwise
EtInletElbow2_Origin := Et_Origin + [
    0 m;
    (ConRadius(ND_EtOverflowDrain) + S_Fitting + ConRadius(ND_EtInlet));
    H_Et + ConRadius(ND_EtInlet)
]
# New Front Inlet Origin
EtInletElbow2_Origin := Et_Origin + [0 m; L_EtHopperFront + (-ConRadius(ND_EtOverflowDrain)); H_Et + ConRadius(ND_EtInlet)]
EtInletPipeLayer := layer_new("EtInletPipePlu", blue)
EtInletFittingLayer := layer_new("EtInletFittingPlu", green)
ND_EtInlet = 0.2032 m
EtInletElbow := ElbowF(EtInletElbow_Origin, [90; 0; 90]*deg, ND_EtInlet, PS_Default)
EtInletElbow2 := ElbowF(EtInletElbow2_Origin, [90; 0; 90]*deg, ND_EtInlet, PS_Default)
EtInletElbow2_Block := BlockingLast("InletElbow2", EtInletElbow2_Origin)
EtInletElbow2_Att := Accessory_Att("Et", ND_EtInlet, EtInletElbow2_Origin, "InletElbow2", PS_Default)
EtInletElbow2Script := stack(EtInletElbow2, EtInletElbow2_Block, EtInletElbow2_Att)
L_EtInletPipe := 1 m
EtInletPipe := PipeF(EtInletElbow_Origin + [L_EtInletPipe; 0; 0], L_EtInletPipe, [0; 0; 0]*deg, ND_EtInlet, PS_Default)
EtInletPipe2 := PipeF(EtInletElbow2_Origin + [L_EtInletPipe; 0; 0], L_EtInletPipe, [0; 0; 0]*deg, ND_EtInlet, PS_Default)
EtInletPipe2_Block := BlockingLast("InletPipe2", EtInletElbow2_Origin + [L_EtInletPipe; 0; 0])
EtInletPipe2_Att := Pipe_Att("Et", ND_EtInlet, EtInletElbow2_Origin + [L_EtInletPipe; 0; 0], "InletPipe2", L_EtInletPipe, PS_Default)
EtInletPipe2Script := stack(EtInletPipe2, EtInletPipe2_Block, EtInletPipe2_Att)
FreezeEtInletPipe := FreezeLayer("EtInletPipePlu")
FreezeEtInletFittings := FreezeLayer("EtInletFittingPlu")
EtInletScript2 := stack(EtInletFittingLayer, EtInletElbow, EtInletElbow2, FreezeEtInletFittings, EtInletPipeLayer, EtInletPipe, EtInletPipe2, FreezeEtInletPipe)
# Add Water Levels
EtWaterLayer := layer_new("EtWater", blue2)
EtWater := BoxF(Et_Origin, [Et_Origin[0] - L_Et; Et_Origin[1] + W_Et; ZW_Et], [0; 0; 0]*deg)
EtRMPipeWater := CylinderF(RMElbow_Origin + [0; ElbowRadius(ND_RMPipe); ElbowRadius(ND_RMPipe)], innerdiameter(ND_RMPipe, PS_Default)/2, ZW_RMPipe - RMElbow_Origin[2] - ElbowRadius(ND_RMPipe), [0; 90]*deg)
EtWaterFrz := FreezeLayer("EtWater")
EtWaterScript := stack(EtWaterLayer, EtWater, EtRMPipeWater, EtWaterFrz)
AttDispOff := concat("attdisp", sp, "off")
AC_EntranceTank :=
    stack(EtTankScript, EtTrashRackScript, EtOverflowPluScript0, EtDrains, RMScript, FlowControlScript0, EtInletScript, AttDispOff) if EN_EtGrit == 0 and EN_TwoInlets == 0 and EN_LfomPipe == 1
    stack(EtTankScript2, EtTrashRackScript, EtOverflowPluScript2, EtDrainsRight2Inlets, RMScript, FlowControlScript2, EtInletScript2, AttDispOff) if EN_EtGrit == 0 and EN_TwoInlets == 1 and EN_LfomPipe == 1
    stack(EtTankScript, ModificationScript, EtTrashRackScript, EtOverflowPluScript0, EtDrains, LfomChannelScript, FlowControlScript0, EtInletScript, AttDispOff) if EN_EtGrit == 0 and EN_LfomPipe == 0 and EN_TwoInlets == 0
    stack(EtTankScript2, ModificationScript, EtTrashRackScript, EtOverflowPluScript2, EtDrainsRight2Inlets, LfomChannelScript, FlowControlScript2, EtInletScript2, AttDispOff) if EN_EtGrit == 0 and EN_LfomPipe == 0 and EN_TwoInlets == 1
    stack(EtTankScript, EtOverflowPluScript1, RMScript, FlowControlScript1, EtInletScript, AttDispOff) otherwise  # error: This variable is undefined.
AC_EntranceTankWater :=
    stack(EtTankScript, EtTrashRackScript, EtOverflowPluScript0, EtDrains, RMScript, FlowControlScript0, EtInletScript, EtWaterScript, AttDispOff) if EN_EtGrit == 0 and EN_TwoInlets == 0 and EN_LfomPipe == 1
    stack(EtTankScript2, EtTrashRackScript, EtOverflowPluScript2, EtDrainsRight2Inlets, RMScript, FlowControlScript2, EtInletScript2, EtWaterScript, AttDispOff) if EN_EtGrit == 0 and EN_TwoInlets == 1 and EN_LfomPipe == 1
    stack(EtTankScript, ModificationScript, EtTrashRackScript, EtOverflowPluScript0, EtDrains, LfomChannelScript, FlowControlScript0, EtInletScript, EtWaterScript, AttDispOff) if EN_EtGrit == 0 and EN_LfomPipe == 0 and EN_TwoInlets == 0
    stack(EtTankScript2, ModificationScript, EtTrashRackScript, EtOverflowPluScript2, EtDrainsRight2Inlets, LfomChannelScript, FlowControlScript2, EtInletScript2, EtWaterScript, AttDispOff) if EN_EtGrit == 0 and EN_LfomPipe == 0 and EN_TwoInlets == 1
    stack(EtTankScript, EtOverflowPluScript1, RMScript, FlowControlScript1, EtInletScript, EtWaterScript, AttDispOff) otherwise  # error: This variable is undefined.
AC_EntranceTank :=
    AC_EntranceTank if EN_Water == 0
    AC_EntranceTankWater otherwise  # error: This variable is undefined.
# [component: inputs AC_EntranceTank]
