Q_Plant := 25*L/s
HL_FlocMax := 40 cm
H_SedSlopesToFlocWeirMin := 25 cm
T_FlocSlab := 15 cm
T_SedWall := 15 cm
T_SedDividingWall := 15 cm
T_SedChannelWall := 15 cm
T_FlocWall := 15 cm
T_FlocDividingWall := 15 cm
T_FiWall := 25 cm
T_FiBoxWall := 15 cm
T_PlantWall := 15 cm
T_PlantFloor := 20 cm
T_ChemSlab := 15 cm
T_DrainChannelWall := 15 cm
C_CoagDoseMax := 40*mg/L
C_ChlorDoseAve := 1*mg/L
Mod := 0
method := "EtFlocSedFi"
# Mathcad to AutoCAD translators:
# [reference: MtoATranslators.xmcd]
# [reference: MtoATranslatorsWrapped.xmcd]
# Plant design calculations:
# [reference: ExpertInputs.xmcd]
# [reference: MathFunctions.xmcd]
# [reference: PipeDatabase.xmcd]
# [reference: MaterialsDatabase.xmcd]
# [reference: FluidsFunctions.xmcd]
# [reference: SedimentationTank.xmcd]
# [reference: LFOM.xmcd]
# [reference: FlocculatorEntranceTank.xmcd]
# [reference: StackedRapidSandFilter.xmcd]
# [reference: ChemicalDoseController.xmcd]
# [reference: ChannelF.xmcd]
# [reference: PlumbingF.xmcd]
# [reference: PlumbingF.xmcd]
# [reference: TankF.xmcd]
# [reference: StairsF.xmcd]
# [reference: DrainChannelF.xmcd]
# [reference: FlocculatorAC.xmcd]
# [reference: SedimentationTankAC.xmcd]
# [reference: EntranceTankCompactAC.xmcd]
# [reference: StackedRapidSandFilterAC.xmcd]
# [reference: ChemStockTanksAC.xmcd]
# [reference: OperatorAccessAC.xmcd]
# [reference: CdcAC.xmcd]
Lang := stringit_nounits(Language)
SetLayout(Layout) := concat("layout", sp, "s", sp, Layout)
CreateLayout(LayoutName) := concat("-layout ", "n ", LayoutName, sp)
LoadTemplate := stack(concat("-layout", sp, "ba", sp, "AguaClara", sp, Lang), "View")
ZoomView := concat("z", sp, "o", sp, "all", sp)
Zoom := concat("zoom", sp, "1/2XP")
RenameBackview := RenameLayout("View", "BackView")
SetBackview := SetLayout("BackView")
RenameLayout(Original, New) := stack(concat("layout", sp, "r", sp, Original), New)
BackViewPlant := stack(LoadTemplate, RenameBackview, SetBackview, ".ms", view("ba"), ZoomView, Zoom, "model")
LoadTemplate := stack(concat("-layout", sp, "ba", sp, "AguaClara", sp, Lang), "View")
LoadTop := stack("-view", "o", "t")
RenameFrontview := RenameLayout("View", "FrontView")
RenameBackview := RenameLayout("View", "BackView")
RenameTopview := RenameLayout("View", "TopView")
SetBackview := SetLayout("Backview")
SetTopview := SetLayout("Topview")
SetFrontview := SetLayout("FrontView")
FrontViewPlant := stack(LoadTemplate, RenameFrontview, SetFrontview, ".ms", view("f"), ZoomView, Zoom, "model")
ZoomView := concat("z", sp, "o", sp, "all", sp)
Zoom := concat("zoom", sp, "1/2XP")
RenameLeftview := RenameLayout("View", "LeftView")
BackViewPlant := stack(LoadTemplate, RenameBackview, SetBackview, ".ms", view("ba"), ZoomView, Zoom, "model")
SetLeftview := SetLayout("LeftView")
LeftViewPlant := stack(LoadTemplate, RenameLeftview, SetLeftview, ".ms", view("l"), ZoomView, Zoom, "model")
TopViewPlant := stack(LoadTop, ".ms", view("t"), ZoomView, Zoom)
RenameRightview := RenameLayout("View", "RightView")
SetRightview := SetLayout("RightView")
RightViewPlant := stack(LoadTemplate, RenameRightview, SetRightview, ".ms", view("ri"), ZoomView, Zoom, "model")
stack(Layout, SetLayout(Num), VPortErase([0; 0]*m, [10; 7.7]*m), VPortNew([.013; .013]*m, [.013 m + L_Border + D_LfomOrifices/2; W_Border + .013 m]), ChangeView([
    XStartPoint - D_LfomOrifices/2 + ((floor(L_Paper/OrificeCenterDist)*OrificeCenterDist)*(a - 1));
    YStartPoint
], [XStartPoint + L_Border*a; YStartPoint + W_Border]))
# L is 1 and T is 0.
SectionCutJog(Point1, Point2, LorT, SectionName, Point3, Angle1, Angle2) :=
    SwitchSpace ← concat("layout", sp, "s", sp, "model", sp)
    FreezeAll ← FreezeLayer("*")
    SectionLayer ← layer_new(SectionName, blue)
    DrawSection ← concat("Sectionplane", sp, "D")
    LT ← [0 m; .02 m; 0 m] if LorT == 1
    LT ← [.02 m; 0 m; 0 m] otherwise
    Direction ← point(Point2 + LT/2)
    Thaw ← concat("laythw")
    SectionPlanetoBlock ← concat("SPTB", sp, "last", Enter)
    Rotation ← stringit_nounits(Angle1/deg)
    InsertionPoint ← stack(point(Point3), "1", "1", Rotation)
    LayerOff ← LayerOff(SectionName)
    Flip ← stack("Rotate3D", "L", Enter, "y", "0,0,0", stringit_nounits(Angle2/deg))
    Layout ← stack(CreateLayout(SectionName), SetLayout(SectionName), VPortErase([0; 0]*m, [1000; 1000]*m), ChangeView([Point1[0]; Point1[2]], [Point2[0]; Point2[2]]))
    return stack(SwitchSpace, FreezeAll, SectionLayer, DrawSection, point(Point1), point(Point2), point(Point2 + LT), point(Point2 + LT + [0 m; 0 m; 1 m]), Enter, Direction, Thaw, SectionPlanetoBlock, InsertionPoint, LayerOff, Flip, Layout)
# Dir is 1 or 0 for forward or backward (based on which edge the plane is closer to)
# This revision does not work for the SPTB command! 'cannot process non-planar section'
SectionCut(Point1, Point2, Direction, SectionName, Point3, Angle1, Angle2) :=
    SwitchSpace ← concat("layout", sp, "s", sp, "model", sp)
    FreezeAll ← FreezeLayer("*")
    SectionLayer ← layer_new(SectionName, blue)
    DrawSection ← concat("Sectionplane", sp, "D")
    Direction ← concat(point(Direction))
    Thaw ← concat("laythw")
    SelectSection ← concat("Select", sp, "L")
    SectionPlanetoBlock ← concat("SPTB", sp, "last", Enter)
    Rotation ← stringit_nounits(Angle1/deg)
    InsertionPoint ← stack(point(Point3), "1", "1", Rotation)
    LayerOff ← LayerOff(SectionName)
    Flip ← stack("Rotate3D", "L", Enter, "y", "0,0,0", stringit_nounits(Angle2/deg))
    Layout ← stack(CreateLayout(SectionName), SetLayout(SectionName), VPortErase([0; 0]*m, [1000; 1000]*m), ChangeView([Point1[0]; Point1[2]], [Point2[0]; Point2[2]]))
    return stack(SwitchSpace, FreezeAll, SectionLayer, DrawSection, point(Point1), point(Point2), Enter, Direction, Thaw, SelectSection, sp, SectionPlanetoBlock, InsertionPoint, LayerOff, Flip, Layout)
SectionCut(Point1, Point2, LorT, Dir, SectionName, Point3, Angle1, Angle2) :=
    SwitchSpace ← concat("layout", sp, "s", sp, "model", sp)
    FreezeAll ← FreezeLayer("*")
    SectionLayer ← layer_new(SectionName, blue)
    DrawSection ← concat("Sectionplane", sp, "D")
    forward ← 1 if Dir == 1
    forward ← -1 otherwise
    LT ← [0 m; .02 m*forward; 0 m] if LorT == 1
    LT ← [.02 m*forward; 0 m; 0 m] otherwise
    Direction ← point(Point2 + LT/2)
    Thaw ← concat("laythw")
    SectionPlanetoBlock ← concat("Sectioner", sp, "last", Enter)
    Rotation ← stringit_nounits(Angle1/deg)
    InsertionPoint ← stack(point(Point3), "1", "1", Rotation)
    LayerOff ← LayerOff(SectionName)
    Flip ← stack("Rotate3D", "L", Enter, "y", "0,0,0", stringit_nounits(Angle2/deg))
    Layout ← stack(CreateLayout(SectionName), SetLayout(SectionName), VPortErase([0; 0]*m, [1000; 1000]*m), ChangeView([Point1[0]; Point1[2]], [Point2[0]; Point2[2]]))
    return stack(SwitchSpace, FreezeAll, SectionLayer, DrawSection, point(Point1), point(Point2), Enter, Direction, Thaw, SectionPlanetoBlock, InsertionPoint, LayerOff, Flip, Layout)
# name is in "quotes" and is the bit of the layer that should stay active!
OnlyLayer(name) := stack("-layer", "off", concat("~", name, "*"), "n", Enter)
# The basic version:
SectionCut(Point1, Point2, LorT, Dir, SectionName, Point3, Angle1, Angle2) :=
    DrawSection ← concat("Sectionplane", sp, "D")
    forward ← 1 if Dir == 1
    forward ← -1 otherwise
    LT ← [0 m; .02 m*forward; 0 m] if LorT == 1
    LT ← [.02 m*forward; 0 m; 0 m] otherwise
    Direction ← point(Point2 + LT/2)
    SectionPlanetoBlock ← concat("SPTB", sp, "last", Enter)
    InsertionPoint ← stack(point(Point3), "1", "1", 0)
    return stack(DrawSection, point(Point1), point(Point2), Enter, Direction, SectionPlanetoBlock, InsertionPoint)
SectionCutViews(Point1, Point2, Direction, SectionName, Point3, Angle1, Angle2, View) :=
    SwitchSpace ← concat("layout", sp, "s", sp, "model", sp)
    FreezeAll ← FreezeLayer("*")
    SectionLayer ← layer_new(SectionName, blue)
    DrawSection ← concat("Sectionplane", sp, "D")
    Direction ← concat(point(Direction))
    Thaw ← concat("laythw")
    SelectSection ← concat("Select", sp, "L")
    SectionPlanetoBlock ← concat("SPTB", sp, "last", Enter)
    Rotation ← stringit_nounits(Angle1/deg)
    InsertionPoint ← stack(point(Point3), "1", "1", Rotation)
    LayerOff ← LayerOff(SectionName)
    Flip ← stack("Rotate3D", "L", Enter, "y", "0,0,0", stringit_nounits(Angle2/deg))
    Layout ← stack(CreateLayout(SectionName), SetLayout(SectionName), VPortErase([0; 0]*m, [1000; 1000]*m), VPortNew([.013 m + Point1[0]; .013 m + Point1[1]], [.013 m + Point2[0]; .013 m + Point2[1]]), ChangeView([Point1[0]; Point1[2]], [Point2[0]; Point2[2]])) if View == "BackView"
    Layout ← stack(CreateLayout(SectionName), SetLayout(SectionName), VPortErase([0; 0]*m, [1000; 1000]*m), ChangeView([Point1[0]; Point1[2]], [Point2[0]; Point2[2]])) if View == "BackView"
    Layout ← stack(CreateLayout(SectionName), SetLayout(SectionName), VPortErase([0; 0]*m, [1000; 1000]*m), ChangeView([Point1[0]; Point1[2]], [Point2[0]; Point2[2]])) if View == "BackView"
    Layout ← stack(CreateLayout(SectionName), SetLayout(SectionName), VPortErase([0; 0]*m, [1000; 1000]*m), ChangeView([Point1[0]; Point1[2]], [Point2[0]; Point2[2]])) if View == "BackView"
    return stack(SwitchSpace, FreezeAll, SectionLayer, DrawSection, point(Point1), point(Point2), Enter, Direction, Thaw, SelectSection, sp, SectionPlanetoBlock, InsertionPoint, LayerOff, Flip, Layout)
SectionCutT(Point1, Point2, Direction, SectionName, Point3, Angle1, Angle2) :=
    SwitchSpace ← concat("layout", sp, "s", sp, "model", sp)
    FreezeAll ← FreezeLayer("*")
    SectionLayer ← layer_new(SectionName, blue)
    DrawSection ← concat("Sectionplane", sp, "D")
    Direction ← concat(point(Direction))
    Thaw ← concat("laythw")
    SelectSection ← concat("Select", sp, "L")
    SectionPlanetoBlock ← concat("SPTB", sp, "last", Enter)
    Rotation ← stringit_nounits(Angle1/deg)
    InsertionPoint ← stack(point(Point3), "1", "1", Rotation)
    LayerOff ← LayerOff(SectionName)
    Flip ← stack("Rotate3D", "L", Enter, "y", "0,0,0", stringit_nounits(Angle2/deg))
    Layout ← stack(CreateLayout(SectionName), SetLayout(SectionName), VPortErase([0; 0]*m, [1000; 1000]*m), VPortNew([Point3[0]; Point3[1]], [Point3[0] + Point2[0] - Point1[0]; Point3[1] + Point2[1] - Point1[1]]), ChangeView([0; 0]*m, [(Point2 - Point1)[0]; (Point2 - Point1)[1]]))
    return stack(FreezeAll, SectionLayer, DrawSection, Point1, Point2, Enter, Direction, Thaw, SelectSection, sp, SectionPlanetoBlock, InsertionPoint, LayerOff, Flip, Layout, SwitchSpace)
# summary of steps:
# copy all of the plant
# select the copy of the plant to slice
# slice along a plane
# retain one half of the slice
# slice just above the first plane (this is what needs to be kept in model view)
# define a model view for the thin slice
#
# repeat!
# Where is the plant?
plantspace1 := [Plant_Origin[0] + 2*T_PlantWall; Plant_Origin[1] - 2*T_PlantWall; Plant_Origin[2] - H_Fi]
plantspace2 := [
    Plant_Origin[0] - 2*L_Sed;
    Plant_Origin[1] + 2*N_FlocChannels*W_Floc + 2*N_SedTanks*W_Sed;
    Plant_Origin[2] + H_Fi
]
up_z := [0; 0; H_Fi]
down_z := [0; 0; -H_Fi]
spacer_x := [2*L_Sed + T_PlantWall; 0; 0]
spacer_y := [0; 2*N_FlocChannels*W_Floc + 2*N_SedTanks*W_Sed + T_PlantWall; 0]
amt := .02 m
tiny_x := [amt; 0; 0]
tiny_y := [0; amt; 0]  # Only one slice ALSO conceptual mode.
out_x := [1 m; 0; 0]
# L is 1 and T is 0
Conslice(point1, point2, LorT, insertPoint) :=
    LT ← tiny_y if LorT == 1
    LT ← tiny_x otherwise
    slice1 ← stack("slice", point(point1), point(point2), Enter, □)
    return stack(slice1)  # error: This placeholder is empty.
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# make rotation good, then everything should work!!!!!!!!!!!!!
# New information about sectionplanes:
# Use the ortho option. Pick the slice option.
ungroup := stack("ungroup", "all", "y")
layer_other(name) := stack("-layer", "n", name, Enter)
MakeLayers_start := stack("-layer", "n", "long1,long2,trans1,trans2,trans3", Enter)
disp_1 := [-50 m; -50 m; 0 m]
Copy_Trans1 := stack("-copytolayer", "all", Enter, "trans1", "0,0,0", point(disp_1))
degrees := 90
rotatecopy_Trans1 := stack(layer_freeze("*"), SelectLayer("trans1"), "rotate3d", "all", Enter, "z", point(disp_1), degrees)
# simple 3D rotation matrix about z axis
disp_2 := [-100 m; -50 m; 0 m]
disp_3 := [-150 m; -50 m; 0 m]
rotatepoint_z(degrees) := [cos(degrees*π/180), -sin(degrees*π/180), 0; sin(degrees*π/180), cos(degrees*π/180), 0; 0, 0, 1]
spin_matrix := rotatepoint_z(degrees) = [0, -1, 0; 1, 0, 0; 0, 0, 1]
Copy_Trans2 := stack(layer_freeze("*"), SelectLayer("trans1"), "-copytolayer", "all", Enter, "trans2", "0,0,0", point(disp_2))
Copy_Trans3 := stack(layer_freeze("*"), SelectLayer("trans2"), "-copytolayer", "all", Enter, "trans3", "0,0,0", point(disp_3))
half_1 := [Plant_Origin[0] - L_Sed - W_HumanMin; Plant_Origin[1] - T_FiWall; Plant_Origin[2] - H_Fi]
half_2 := [
    Plant_Origin[0] - L_Sed - W_HumanMin;
    Plant_Origin[1] + N_FlocChannels*W_Floc + N_SedTanks*W_Sed + L_ChemPlatform + (N_FlocChannels + N_SedTanks + 2)*T_PlantWall;
    Plant_Origin[2] + H_Sed + H_Fi
]
SliceCopy2 := stack(layer_freeze("*"), SelectLayer("trans2"), ungroup, "slice", point(disp_2 + spin_matrix*half_1), point(disp_2 + spin_matrix*half_2), Enter, "0,0,0")
SliceCopy3 := stack(layer_freeze("*"), SelectLayer("trans3"), ungroup, "slice", point(disp_3 + spin_matrix*half_1), point(disp_3 + spin_matrix*half_2), Enter, "-200,0,0")
# LONGITUDINAL
# The Longitudinal cuts are contained within this area. Each cut is explained and defined.
# 1) Just above the entrance tank upper wall (outside of the plant) - looking downward (negative y direction) inwards into the plant
Long11 := [Plant_Origin[0]; SedLaunderPipe_Origin[1]; Plant_Origin[2]]
# These two points have the same y and z coordinates, but different x coordinates.
Fi_origin = [-10.6141; 0.1; -3.18448] m
Long12 := [
    Plant_Origin[0] + Fi_origin[0] - L_Fi - T_FiWall - 30 cm;
    SedLaunderPipe_Origin[1];
    Plant_Origin[2]
]
# One fix may be a section cut of something that is already a section: If the plant is cut in the desired place, it can be viewed from just inside of that and still show only a thin sliver of the plant.
# Make the direction of view the opposite!
Angle11 := 0 deg
InsertionPoint1L := [20 m; Plant_Origin[1]; Plant_Origin[2]]
Angle12 := 0.0001 deg
SectCut1L := stack(layer_freeze("*"), SelectLayer("long1"), SectionCut(Long11, Long12, 1, 0, "Longitudinal One", InsertionPoint1L, Angle11, Angle12))
# 2) Entrance tank (through the center of the drainage pipes) - looking upward (positive y direction)
Long21 := [Plant_Origin[0]; LFOM_Origin[1]; Plant_Origin[2]]
LFOM_Origin = [-4.67984; 7.25; 2.30168] m
Long22 := [Plant_Origin[0] + Fi_origin[0] - L_Fi - T_FiWall - 30 cm; LFOM_Origin[1]; Plant_Origin[2]]
Angle21 := 0 deg
InsertionPoint2L := [2*20*m; Plant_Origin[1]; Plant_Origin[2]]
Angle22 := 180 deg
SectCut2L := stack(SectionCut(Long21, Long22, 1, 1, "Longitudinal Two", InsertionPoint2L, Angle21, Angle22), layer_freeze("*"))
SectionCutSpin(p1, p2, LorT, Dir, Name, InsertPt, Ang1, Ang2, disp, spin) := SectionCut(spin*p1 + disp, spin*p2 + disp, 1, Dir, Name, InsertPt, Ang1, Ang2)
# Assume that this is always for transversal cuts converted to L cuts
# The Transversal cuts are contained within this area. Each cut is explained and defined.
# TRANSVERSAL
copyLeft := stack("copy", point([
    Plant_Origin[0] - L_Floc - (2*T_PlantWall) - .5*W_HumanMin;
    Plant_Origin[1] - 2*T_PlantWall;
    Plant_Origin[2]
]), point(plantspace2), Enter, point(plantspace1), point([Plant_Origin[0]; Plant_Origin[1] + 20 m; Plant_Origin[2]]), Enter)
copyRight := stack("copy", point(plantspace2), point([
    Plant_Origin[0] - L_Floc - (2*T_PlantWall);
    Plant_Origin[1] + 2*N_FlocChannels*W_Floc + 2*N_SedTanks*W_Sed;
    Plant_Origin[2]
]), Enter, point(plantspace1), point([Plant_Origin[0]; Plant_Origin[1] + 40 m; Plant_Origin[2]]), Enter)
W_Trans1 := Plant_Origin[1] + N_FlocChannels*W_Floc + N_SedTanks*W_Sed + L_ChemPlatform + (N_FlocChannels + N_SedTanks + 2)*T_PlantWall = 13.3729 m
# 1) through sed tanks and floc tanks
Trans11 := [Plant_Origin[0] - S_FlocBaffle; Plant_Origin[1] - T_PlantWall; Plant_Origin[2]]
# These have the same x and z coordinates, but different y coordinates.
Et_Origin[1] + 2*T_PlantWall + W_Et + L_ChemPlatform = 11.5229 m
W_ChemPlatform = 4.54981 m
Trans12 := [Plant_Origin[0] - S_FlocBaffle; W_Trans1; Plant_Origin[2]]
AngleT11 := 0 deg
Dir1T := [Plant_Origin[0]; Plant_Origin[1]; Plant_Origin[2]]
InsertionPoint1T := [20 m; Plant_Origin[1] + 20 m; Plant_Origin[2]]
AngleT12 := 180 deg
SectCut1TSpin := stack(SelectLayer("trans1"), SectionCutSpin(Trans11, Trans12, 0, 1, "Transversal One", InsertionPoint1T, AngleT11, AngleT12, disp_1, spin_matrix))
SectCut1T := stack(SelectLayer("trans1"), SectionCut(Trans11, Trans12, 0, 1, "Transversal One", InsertionPoint1T, AngleT11, AngleT12))
# 2) Inside the filter box (through the center of a branch) - looking left (negative x direction)
Trans21 := [Fi_origin[0] - L_Fi/2; Plant_Origin[1] - T_PlantWall; Plant_Origin[2]]
Trans22 := [Fi_origin[0] - L_Fi/2; W_Trans1; Plant_Origin[2]]
AngleT21 := 0 deg
Dir2T := [Plant_Origin[0] + Floor_Dim[0]; Plant_Origin[1]; Plant_Origin[2]]
InsertionPoint2T := [2*20*m; Plant_Origin[1] + 20 m; Plant_Origin[2]]
AngleT22 := 0.0001 deg
SectCut2TSpin := stack(SectionCutSpin(Trans21, Trans22, 0, 0, "Transversal Two", InsertionPoint2T, AngleT21, AngleT22, disp_1, spin_matrix))
SectCut2T := stack(SectionCut(Trans21, Trans22, 0, 0, "Transversal Two", InsertionPoint2T, AngleT21, AngleT22))
# 3) Between the filter box and the filter’s exit box (avoid cutting the vertical siphon pipe or cut it down the center, if possible avoid cutting chemical tanks and plumbing off center) - looking left
Trans31 := [
    FiSiphonTee2_Origin[0] + ShortTeeLength(ND_FiSiphon);
    Plant_Origin[1] - T_PlantWall;
    Plant_Origin[2]
]
Trans32 := [FiSiphonTee2_Origin[0] + ShortTeeLength(ND_FiSiphon); W_Trans1; Plant_Origin[2]]
AngleT31 := 0 deg
Dir3T := [Plant_Origin[0] + Floor_Dim[0]; Plant_Origin[1]; Plant_Origin[2]]
InsertionPoint3T := [3*20*m; Plant_Origin[1] + 20 m; Plant_Origin[2]]
AngleT32 := 180 deg
SectCut3TSpin := SectionCutSpin(Trans31, Trans32, 0, 0, "Transversal Three", InsertionPoint3T, AngleT31, AngleT32, disp_1, spin_matrix)
SectCut3T := SectionCut(Trans31, Trans32, 0, 0, "Transversal Three", InsertionPoint3T, AngleT31, AngleT32)
Sec11 := thinslice(Trans31, Trans32, 0, 11, "Trans Three")
# 4) Inside the filter’s entrance box (through the center of the most distance entrance pipes or to the right of them) - looking left
# ConRadius no longer exists. It is now OR.Fitting
Trans41 := [
    FiEntranceBox_origin[0] - L_FiEntrance + L_FiOverflowWeir - (OR_Fitting(ND_FiTrunk) + S_Fitting);
    Plant_Origin[1] - T_PlantWall;
    FiEntranceBox_origin[2]
]
Trans42 := [
    FiEntranceBox_origin[0] - L_FiEntrance + L_FiOverflowWeir - (OR_Fitting(ND_FiTrunk) + S_Fitting);
    W_Trans1;
    FiEntranceBox_origin[2]
]
AngleT41 := 0 deg
Dir4T := [
    FiEntranceBox_origin[0] - L_FiEntrance;
    FiEntranceBox_origin[1] + W_FiEntrance;
    FiEntranceBox_origin[2]
]
InsertionPoint4T := [4*20*m; Plant_Origin[1] + 20 m; Plant_Origin[2]]
AngleT42 := 180 deg
SectCut4TSpin := SectionCutSpin(Trans41, Trans42, 0, 0, "Transversal Four", InsertionPoint4T, AngleT41, AngleT42, disp_1, spin_matrix)
SectCut4T := SectionCut(Trans41, Trans42, 0, 0, "Transversal Four", InsertionPoint4T, AngleT41, AngleT42)
# FiSiphonChannelPipe.Origin is not real any more. Is this the best location for this 'Trans'?
# 5) Drain channel (through the center of the siphon pipe exits or to the right of them, avoid cutting into the sed tank drain valves if possible) - looking left
FiSiphonDrainExit_x := FiSiphonTee2_Origin[0] + ShortTeeLength(ND_FiSiphon)
Trans51 := [FiSiphonDrainExit_x; Plant_Origin[1] - T_PlantWall; Plant_Origin[2]]
Trans52 := [FiSiphonDrainExit_x; W_Trans1; Plant_Origin[2]]
# STOP HERE FOR NOW
Dir5T := [Fi_origin[0]; Fi_origin[1]; Fi_origin[2]]
AngleT51 := 0 deg
InsertionPoint5T := [5*20*m; Plant_Origin[1] + 20 m; Plant_Origin[2]]
AngleT52 := 180 deg
SectCut5TSpin := stack(SectionCutSpin(Trans51, Trans52, 0, 0, "Transversal Five", InsertionPoint5T, AngleT51, AngleT52, disp_1, spin_matrix), layer_freeze("*"))
SectCut5T := stack(SectionCut(Trans51, Trans52, 0, 0, "Transversal Five", InsertionPoint5T, AngleT51, AngleT52), layer_freeze("*"))
# 6) Center of the first hopper of the entrance tank (should take care of flocculator and sed tank transversal cuts) - looking left
# Again, the entrance tank has totally changed! What would a more helpful slice be? Are we scrapping anything that is just the entrance tank?
Trans61 := [
    (Et_Origin[0] - L_EtHopper - T_EtHopperLedge) - S_Fitting - ConRadius(ND_EtDrain);
    Floor_Dim[1] - T_PlantWall;
    Plant_Origin[2]
]
Trans62 := [
    (Et_Origin[0] - L_EtHopper - T_EtHopperLedge) - S_Fitting - ConRadius(ND_EtDrain);
    Plant_Origin[1] - T_PlantWall;
    Plant_Origin[2]
]
AngleT61 := 0 deg
Dir6T := [Fi_origin[0]; Fi_origin[1]; Fi_origin[2]]
InsertionPoint6T := [-20 m; InsertionPoint2T[1]; InsertionPoint2T[2]]
AngleT62 := 180 deg
SectCut6T := SectionCutSpin(Trans61, Trans62, 0, 1, "Transversal Six", InsertionPoint6T, AngleT61, AngleT62, disp_1, spin_matrix)
LayeroffFi := stack(LayerOff("FiAuxFittingPlu"), LayerOff("FiAuxPipePlu"), LayerOff("FiAuxRemovablePlu"), LayerOff("FiBaffles"), LayerOff("FiBallValveGripMetalPlu"), LayerOff("FiBallValveMetalPlu"), LayerOff("FiCon"), LayerOff("FiDistFittingPlu"), LayerOff("FiDistPipePlu"), LayerOff("FiDrainValveGripPlu"), LayerOff("FiDrainValveMetalPlu"), LayerOff("FiEntExitBoxCon"), LayerOff("FiFerncoCouplingsPlu"), LayerOff("FiFittingsPlu"), LayerOff("FiInletChannelCon"), LayerOff("FiInletFittingsPlu"), LayerOff("FiInletPipePlu"), LayerOff("FiManBranchPlu"), LayerOff("FiManCapPlu"), LayerOff("FiManPipePlu"), LayerOff("FiPipePlu"), LayerOff("FiRemovablePlu"), LayerOff("FiSandDrainPlu"), LayerOff("FiTankCon"), LayerOff("FiValvePlu"))
SectCut6Tf := stack(SectCut6T, LayeroffFi)
# 7) To the right of the furthest wall of the sed/floc tanks (outside the plant) - looking left (inwards into the plant)
Trans71 := [Plant_Origin[0] + T_PlantWall; Plant_Origin[1] - T_PlantWall; Plant_Origin[2]]
Trans72 := [Plant_Origin[0] + T_PlantWall; Et_Origin[1] + T_PlantWall + W_Et; Plant_Origin[2]]
AngleT71 := 0 deg
Dir7T := [Fi_origin[0]; Fi_origin[1]; Fi_origin[2]]
InsertionPoint7T := [20 m; Plant_Origin[1]; Plant_Origin[2]]
AngleT72 := 0.0001 deg
SectCut7T := SectionCut(Trans71, Trans72, 0, 1, "Transversal Seven", InsertionPoint7T, AngleT71, AngleT72)
# Additional graphs
# ad1) To the right of the sedimentation tanks with section cut in the middle - looking right
LongAD11 := [Plant_Origin[0] + T_PlantWall - L_Sed/2; Plant_Origin[1]; Plant_Origin[2]]
LongAD12 := [
    Plant_Origin[0] + T_PlantWall - L_Sed/2;
    Plant_Origin[1] + 3*W_Sed + 2*T_PlantWall;
    Plant_Origin[2]
]
AngleAD11 := 0 deg
DirAD1 := [Plant_Origin[0]; Plant_Origin[1] + 3*W_Sed + 2*T_PlantWall; Plant_Origin[2]]
InsertionPointAD1 := [20 m; InsertionPoint2T[1]; InsertionPoint2T[2]]
AngleAD12 := 0.0001 deg
SectCutAD1 := SectionCut(LongAD11, LongAD12, 0, 1, "Transversal Eight", InsertionPointAD1, AngleAD11, AngleAD12)
LayeroffPartSed := stack(LayerOff("SedRemovablePlu"), LayerOff("SedModCapPlu"), LayerOff("SedPipePlu"), LayerOff("SedModPipePlu"), LayerOff("SedModSpacerPlu"))
SectCutAD1f := stack(SectCutAD1, LayeroffPartSed)
# ad2) Sedimentation tanks with section cut in the middle - looking front
LongAD12 := [Plant_Origin[0]; Plant_Origin[1] + W_Sed; Plant_Origin[2]]
LongAD22 := [Plant_Origin[0] - L_Sed; Plant_Origin[1] + W_Sed; Plant_Origin[2]]
AngleAD21 := 0 deg
DirAD2 := [Plant_Origin[0] - L_Sed; Plant_Origin[1]; Plant_Origin[2]]
InsertionPointAD2 := [-20 m; InsertionPoint2T[1]; InsertionPoint2T[2]]
AngleAD22 := 180 deg
SectCutAD2 := SectionCut(LongAD12, LongAD22, 0, 1, "Sedimentation Cross Section", InsertionPointAD2, AngleAD21, AngleAD22)
# Section Cut Map
InsertMapPoint := □  # error: This placeholder is empty.
# Code based on LFOM Template
# Need - matrix of points that you would grab the section planes from
SectionNames := ["Floc"; "Sed"; "Sed"; "Sed"; "Sed"; "Sed"; "Sed"; "Sed"; "Sed"; "Sed"; "Sed"; "Sed"; "Sed"; "Sed"; "Sed"]
SectionPoints := [
    InsertionPoint1L, Long11, Long12;
    InsertionPoint2L, Long21, Long22;
    InsertionPoint3L, Long31, Long32;
    InsertionPoint4L, Long41, Long42;
    InsertionPoint5L, Long51, Long52;
    InsertionPoint6L, Long61, Long62;
    InsertionPoint7L, Long71, Long72;
    InsertionPoint8L, Long81, Long82;
    InsertionPoint1T, Trans11, Trans12;
    InsertionPoint2T, Trans21, Trans22;
    InsertionPoint3T, Trans31, Trans32;
    InsertionPoint4T, Trans41, Trans42;
    InsertionPoint5T, Trans51, Trans52;
    InsertionPoint6T, Trans61, Trans62;
    InsertionPoint7T, Trans71, Trans72
]
PrepLayouts := stack("laythw", concat("-layout", sp, "t", sp, "AguaClara", sp, Lang), "View", concat("layout", sp, "d", sp, "Layout1"), concat(sp, "d", sp, "Layout2"))
SetUpLayouts(Names, Points) :=
    Layout ← CreateLayout(Names[0])
    a ← 0
    for i ∈ 0 .. last(Names)
        Layout ← CreateLayout(Names[i])
        Layout ← stack(Layout, SetLayout(Names[i]), VPortErase([0; 0]*m, [10; 7.7]*m), VPortNew(Points[:, 0][i], Points[:, 0][i] + Points[:, 2][i] - Points[:, 1][i]), ChangeView([0; 0]*m, [(Points[:, 2][i] - Points[:, 1][i])[0]; (Points[:, 2][i] - Points[:, 1][i])[1]])) if a == 0
        Layout ← stack(Layout, CreateLayout(Names[i]), SetLayout(Names[i]), VPortErase([0; 0]*m, [10; 7.7]*m), VPortNew(Points[:, 0][i], Points[:, 0][i] + Points[:, 2][i] - Points[:, 1][i]), ChangeView([0; 0]*m, [(Points[:, 2][i] - Points[:, 1][i])[0]; (Points[:, 2][i] - Points[:, 1][i])[1]])) if a > 0
        a ← a + 1
    return Layout
SetUpSectionCutsLayouts := SetUpLayouts(SectionNames, SectionPoints)
VPortNew(SectionPoints[:, 0][0], SectionPoints[:, 0][0] + SectionPoints[:, 2][0] - SectionPoints[:, 1][0]) =  # error: This variable is undefined.
ReturnToModelSpace := concat("layout", sp, "s", sp, "model", sp)
CreateLayout(SectionNames[0]) = "-layout n Floc "
SetUpLayouts(SectionNames, SectionPoints)
LongitudinalCutsStack == stack(BackViewPlant, SectCut1L, SectCut2L, SectCut3L, SectCut4L, SectCut5L, SectCut6L, SectCut7L, SectCut8L, FrontViewPlant)  # Old
LongitudinalCutsStack := stack(TopViewPlant, SectCut1L, SectCut3L, SectCut4L, SectCut5L, SectCut6L, SectCut7L, SectCut8L, FrontViewPlant)
TransversalCutsStack == stack(LeftViewPlant, SectCut1T, RightViewPlant, SectCut2T, SectCut3T, SectCut4T, SectCut5T, SectCut6T, SectCut7T, SectCutAD1, SectCutAD2)
# Old
TransversalCutsStack := stack(SectCut1T, SectCut2T, SectCut3T, SectCut4T, SectCut5T, SectCut7T, SectCutAD1, SectCutAD2)
AC_SectionCuts := stack(LongitudinalCutsStack, TransversalCutsStack)
# Note that the 'view' of the plant is important to set before each cut and should be changed accordingly during individual cut testing.
# I'm not sure that the transversal cuts are working...
# This has to come first in the beta server but does not go into testing on other computers.
netload := stack("netload", "sectionplanetoblock.ddl")
TestMe := stack(MakeLayers_start, Copy_Trans1, rotatecopy_Trans1, Copy_Trans2, Copy_Trans3, SliceCopy2, SliceCopy3, SectCut1L, SectCut2L, SectCut1T, SectCut2T, SectCut3T, SectCut4T, SectCut5T)
Test2 := stack(LoadTop, SectCut1L, SectCut2L, SectCut1T, SectCut2T)
# [component: inputs TestMe]
# The 'baby test' format has been added to the above code. Important things to do are:
# --to 'slice' or delete sections of the copied plant to ensure that there are no confusing background lines for the transversal cuts.
# --to use layout view to look at each cut in its own layer view. Some of this functionality was available before; yet this has not been added into the new code
# --to create a guide on the original drawing to show where each cut happens. Are there ways to paste text boxes into AutoCAD?
# baby test!
MakeLayers := stack("-layer", "n", "long1,long2,trans1,trans2", Enter, SelectLayer("long1"))
tor := stack("torus", "0,0,0", "5", "2", "sphere", "0,0,0", "2", "sphere", "-2,-2,0", 1, "box", "c", "3,3,3", "5,5,0")
disp := [-40 m; -40 m; 0 m]
layer_freeze("*")
copyme := stack("-copytolayer", "all", Enter, "trans1", "0,0,0", point(disp))
degs := 90
rotatecopy := stack("rotate3d", "last", Enter, "z", point(disp), degs)
# simple 3D rotation matrix about z axis
disp2 := [-80 m; -40 m; 0 m]
rotatez(degrees) := [cos(degrees*π/180), -sin(degrees*π/180), 0; sin(degrees*π/180), cos(degrees*π/180), 0; 0, 0, 1]
spin := rotatez(degrees) = [0, -1, 0; 1, 0, 0; 0, 0, 1]
copyme2 := stack(layer_freeze("*"), SelectLayer("trans1"), "-copytolayer", "all", Enter, "trans2", "0,0,0", point(disp2))
Lpt1 := [7 m; 2 m; 0 m]
Lpt2 := [-7 m; 2 m; 0 m]
Ins1 := [20 m; 0 m; 0 m]
babyL1 := stack(layer_freeze("*"), SelectLayer("long1"), SectionCut(Lpt1, Lpt2, 1, 1, "LOne", Ins1, Angle11, Angle12))
Lpt4 := [-7 m; -4 m; 0 m]
Lpt3 := [7 m; -4 m; 0 m]
Ins2 := [40 m; 0 m; 0 m]
babyL2 := stack(SectionCut(Lpt3, Lpt4, 1, 0, "LOne", Ins2, Angle11, Angle12), layer_freeze("*"))
Lpt6 := [-7 m; -2 m; 0 m]
Lpt5 := [7 m; -2 m; 0 m]
Ins5 := [60 m; 0 m; 0 m]
# NOT USING YET!
babyL3 := SectionCut(Lpt5, Lpt6, 1, 0, "LOne", Ins5, Angle11, Angle12)
Tpt2 := [-1 m; 7 m; 0 m]
Tpt1 := [-1 m; -7 m; 0 m]
Ins3 := [20 m; 20 m; 0 m]
babyT1 := stack(SelectLayer("trans1"), layer_freeze("long1"), SectionCutSpin(Tpt1, Tpt2, 0, 0, "LOne", Ins3, Angle11, Angle12, disp2, spin))
Tpt4 := [4.5 m; 7 m; 0 m]
Tpt3 := [4.5 m; -7 m; 0 m]
Ins4 := [40 m; 20 m; 0 m]
spin*Tpt2 = [-7; -1; 0] m
babyT2 := stack(SectionCutSpin(Tpt3, Tpt4, 0, 1, "LOne", Ins4, Angle11, Angle12, disp, spin), layer_freeze("*"))
# This is related to some of the slices above, but is implemented first.
# slice before T
sliceT(p1, p2, Dir, disp, spin) :=
    pt1 ← spin*p1 + disp
    pt2 ← spin*p2 + disp
    Forward ← 1 if Dir == 1
    Forward ← -1 otherwise
    offset ← tiny_x*Forward
    slice ← stack("slice", "last", Enter, point(pt1 + offset), point(pt2 + offset), point(p1))
    return slice  # Note: December 2015-- slicing does not work do to difficulty selecting things. Perhaps layers would be a solution to this?
sliceFirstCopy := sliceT(Tpt1, Tpt2, 0, disp, spin)
copyspin := stack("copy", "p", Enter, point(disp), point(disp2))
sliceSecondCopy := sliceT(Tpt3, Tpt4, 1, disp2, spin)
babytest := stack(MakeLayers, tor, copyme, rotatecopy, copyme2, babyL1, babyL2, babyT1, babyT2)
# [component: inputs babytest]
