# Fitting Cheat Sheet
# mrf222 2-21-16
# array of vertices
ND_Pipe := 2 in
# [reference: PipeDatabase.xmcd]
# [reference: MtoATranslators.xmcd]
# [reference: MtoATranslatorsWrapped.xmcd]
# [reference: PlumbingF.xmcd]
# Array number displacement
elbows(array) := array*1
tees(array) := array + [10 m; 0 m; 0 m]
# Degree Changes
# Floor 1: all alone
floor1 := layer_new("floorone", blue)
yzero := [0; 0; 0]*deg
xzero := [0; 0; 0]*deg
zzero := [0; 0; 0]*deg
yplus := [0; 90; 0]*deg
xplus := [90; 0; 0]*deg
zplus := [0; 0; 90]*deg
xminus := [-90; 0; 0]*deg
yminus := [0; -90; 0]*deg
zminus := [0; 0; -90]*deg
floor1frz := FreezeLayer("floorone")
# Floor 2: all x 90
floor2 := layer_new("floortwo", green)
yzero_2 := [90; 0; 0]*deg
xzero_2 := [90; 0; 0]*deg
zzero_2 := [90; 0; 0]*deg
yplus_2 := [90; 90; 0]*deg
xplus_2 := [90; 0; 0]*deg
zplus_2 := [90; 0; 90]*deg
xminus_2 := [90; 0; 0]*deg
yminus_2 := [90; -90; 0]*deg
zminus_2 := [90; 0; -90]*deg
floor2frz := FreezeLayer("floortwo")
# Floor 3: all y 90
floor3 := layer_new("floorthree", red)
yzero_3 := [0; 90; 0]*deg
xzero_3 := [90; 90; 0]*deg
zzero_3 := [0; 90; 0]*deg
yplus_3 := [90; 90; 0]*deg
xplus_3 := [90; 90; 0]*deg
zplus_3 := [0; 90; 90]*deg
xminus_3 := [-90; 90; 0]*deg
yminus_3 := [0; 90; 0]*deg
zminus_3 := [0; 90; -90]*deg
floor3frz := FreezeLayer("floorthree")
# Floor 4: all z 90
yzero_4 := [0; 0; 90]*deg
xzero_4 := [0; 0; 90]*deg
zzero_4 := [0; 0; 90]*deg
yplus_4 := [0; 90; 90]*deg
xplus_4 := [90; 0; 90]*deg
zplus_4 := [0; 0; 90]*deg
xminus_4 := [90; 0; 90]*deg
yminus_4 := [0; -90; 90]*deg
zminus_4 := [0; 0; 90]*deg
# Floor 5: random (change these if your orientation doesn't show up
floor5 := layer_new("floorfive", purple)
yzero_5 := [90; -90; 90]*deg
xzero_5 := [90; 90; 90]*deg
zzero_5 := [180; 90; -90]*deg
yplus_5 := [90; -90; -90]*deg
xplus_5 := [-90; 90; 90]*deg
zplus_5 := [180; 180; 180]*deg
xminus_5 := [-90; 90; -90]*deg
yminus_5 := [90; 90; -90]*deg
zminus_5 := [-90; -90; -90]*deg
floor5frz := FreezeLayer("floorfive")
# Make a nested array of all of these values
degrees := [
    xzero, xzero_2, xzero_3, xzero_4, xzero_5;
    xplus, xplus_2, xplus_3, xplus_4, xplus_5;
    xminus, xminus_2, xminus_3, xminus_4, xminus_5;
    yzero, yzero_2, yzero_3, yzero_4, yzero_5;
    yplus, yplus_2, yplus_3, yplus_4, yplus_5;
    yminus, yminus_2, yminus_3, yminus_4, yminus_5;
    zplus, zzero_2, zzero_3, zzero_4, zzero_5;
    zplus, zplus_2, zplus_3, zplus_4, zplus_5;
    zminus, zminus_2, zminus_3, zminus_4, zminus_5
]
makescript :=
    i ← 0
    cord ← [0; 0; 0]*m
    while i < 10
        j ← 0
        cord ← cord + [0; 0; 1]*m
        while j < 9
            k ← 0
            cord ← cord + [0; 1; 0]*m
            while k < 3
                cord ← cord + [1; 0; 0]*m
                k ← k + 1
            j ← j + 1
        i ← i + 1
    return script  # error: This placeholder is empty.
