# Engineer Entered Values:
Q_Plant := 3000*L/min
# sed tank parameters
W_SedSingle := 42.5 in  # width of lamella = width of sed tank bay
EN_PipeSpec := 4
EN_DrillSeries := 1
# floc parameteres
T_FlocBaffle := 2 mm
# Values used to Draw Plant:
T_PlantWall := 15 cm
W_MpWalkway := 1 m
C_FcmDoseMax := 90*mg/L
C_FcmAlum := 120*gm/L
EN_FcmTube := 0
Ti_StockMin := 30 hr
