# [reference: MasterProgram.xmcd]
seddrainvalves
# [reference: floctank.xmcd]
seddrainadapter
# [reference: SedTank- with pieces.xmcd]
D_SedDrainValve
SedDrainAdapterScript :=
    Local ← layer_new("SedDrainAdapter", green)
    for i ∈ 0 .. N_SedBays - 1
        Local ← stack(Local, MaleAdapterSUBF([-L_Sed - T_PlantWall; W_SedBay*(N_SedBays - i) - 0.5*W_SedBay; Plant_Origin[2]], [0; 0]*deg, ND_SedDrainAdapter, EN_PipeSpec, ["tank"]))
    Local2 ← FreezeLayer("SedDrainAdapter")
    for i ∈ 0 .. N_SedBays - 1
        Local2 ← stack(Local2, CylinderF([-L_Sed - T_PlantWall; W_SedBay*(N_SedBays - i) - 0.5*W_SedBay; Plant_Origin[2]], outerradius(ND_SedDrainAdapter), -T_PlantWall, [0; 0]*deg))
    Group ← GroupAll("DeleteMe")
    Select ← SelectLayer("tank")
    Subtract ← SubtractF(["tank"], "DeleteMe")
    Freeze ← FreezeLayer("tank")
    return stack(Local, Local2, Group, Select, Subtract, Freeze)
L_FlocTank := N_FlocChannels*L_Sed = 55.2943 m
Z_FlocTank := HW_Sed - HW_FlocChannel = 0 m  # Z.FlocTank is the elevation of the flocculator with respect to the bottom of the sed tank.
# Sedimentation Tank Sludge Drain:
N_SedSludgeOrifices = 110  # per cell
Ti_SludgeDrain = 30 min
W_SedSludge = 16.8638 cm  # Width of the sludge channel
B_SedSludgeOrifices = 10 cm
H_SedSludge = 8.43189 cm  # Depth of the sludge channel
T_SedSludge = 5 cm
T_SedSludge = 5 cm
# Thickness of the plate topping the sludge channel
# through which drain holes are formed
W_SedDrainCover = 26.8638 cm
D_SedSludgeOrifice = 0.01 m  # Diameter of drain orifices
W_SedInletBottom = 0.395681 m
N_SedSludgeOrifices = 110
ND_SedSludgeValve = 4 in
# Sedimentation Tank Dimensions:
Seddrainvalvescript :=
    local ← stack(layer_new("seddrainvalves", blue3), viewtop1)
    insert1 ← insertdwg("VAL-Scaled-Gate-Valve-Threaded", [Plant_Origin[0] - T_PlantWall - L_Sed; W_SedBay*N_SedBays - 0.5*W_SedBay; 0 m], D_SedScale, 0)
    arraybay ← concat("-array", sp, "ALL", sp, sp, "r", sp, stringit_nounits(N_SedBays), sp, "1", sp, stringit(-W_SedBay))
    local ←
        stack(local, insert1, layer_set("0"), layer_freeze("seddrainvalves")) if N_SedBays == 1
        stack(local, insert1, arraybay, layer_set("0"), layer_freeze("seddrainvalves")) otherwise
    return local
Z_SedSludge = 0.134319 m  # Height from 0 of the top of the sludge drain
Z_SedSlopes = 0.776357 m  # Height from 0 of the top of the inlet manifold
W_Sed = 4.24 m  # Total tank wall height
L_Sed = 11.0589 m  # Total tank length
ASSUMPTIONS
S_Walkway := 50 cm  # Distance from the border of the wall
H_Walkway := 30 cm  # Thickness of the walkway
W_Walkway := 1.5 m
# ORIGIN POINTS
Walkway_Origin := [
    floc_origin[0] - L_FlocTank - T_PlantWall;
    floc_origin[1] - (W_FlocChannel*N_FlocChannels) - (T_PlantWall*N_FlocChannels) - T_PlantWall;
    floc_origin[2] + H_Floc - S_Walkway
]
Drainboxes_Origin := [Walkway_Origin[0]; Walkway_Origin[1]; Walkway_Origin[2]]  # CALCULAR EL ORIGEN DE LOS DRAIN BOXES
# DIMENSION POINTS
Walkway_Dimensions := [
    -W_Walkway;
    ((W_FlocChannel*N_FlocChannels) - (T_PlantWall*N_FlocChannels)) + W_Sed + (4*T_PlantWall);
    H_Walkway
]
Drainboxes_Dimensions := [0; 0; 0]
# WALKWAY SCRIPT
Walkway_Script :=
    WalkwayLayer ← layer_new("Walkway", grey)
    WalkwayBox ← BoxF(Walkway_Origin, Walkway_Origin + Walkway_Dimensions, [0; 0; 0]*deg)
    for i ∈ 0 .. N_SedBays - 1
        DrainBoxes ← BoxF([-L_Sed - T_PlantWall; W_SedBay*(N_SedBays - i) - 0.5*W_SedBay; Plant_Origin[2]], [-L_Sed - T_PlantWall; W_SedBay*(N_SedBays - i) - 0.5*W_SedBay; Plant_Origin[2]] + Drainboxes_Dimensions, [0; 0; 0]*deg)
    FreezeWalkwayBox ← FreezeLayer("Walkway")
    Group ← GroupAll("DeleteMe")
    Subtract ← SubtractF(["Walkway"], "DeleteMe")
    return stack(WalkwayLayer, WalkwayBox, DrainBoxes, FreezeWalkwayBox, DrainBoxes, Group, Subtract)
# [component: inputs stack(Walkway_Script)]
