# Sed Manifold Inlet Drop Tubes
# [reference: MasterProgram.xmcd]
SedInletChimney_origin := [Plant_Origin[0]; Plant_Origin[1]; Plant_Origin[2]]
SedInletChimney_dim := [
    SedInletChimney_origin[0] + W_InletChannel + T_ChannelWall - T_SedManifoldEntrance;
    SedInletChimney_origin[1] - W_SedInlet + T_SedManifoldEntrance;
    SedInletChimney_origin[2] + (H_Sed - H_InletChannel - T_ChannelWall - H_SedSludge - T_SedSludge)
]
SedInletChimneyOuter_dim := [
    SedInletChimney_origin[0] + SedInletChimney_dim[0] + T_SedManifoldEntrance;
    SedInletChimney_origin[1] - W_SedInlet;
    SedInletChimney_dim[2]
]
SedInletChimneyPort_origin := [SedInletChimney_dim[0]; SedInletChimney_origin[1]; SedInletChimney_origin[2]]
SedInletChimneyPort_dim := [
    SedInletChimneyPort_origin[0] + T_SedManifoldEntrance;
    SedInletChimneyPort_origin[1] - W_SedManifoldPort;
    SedInletChimneyPort_origin[2] + H_SedManifoldPort
]
SedInletChimneyEntrance_origin := [
    SedInletChimney_origin[0] + T_SedManifoldEntrance;
    SedInletChimney_origin[1] - T_SedManifoldEntrance;
    SedInletChimney_dim[2]
]
SedInletChimneyEntrance_dim := [
    SedInletChimneyEntrance_origin[0] + W_SedManifoldEntrance;
    SedInletChimneyEntrance_origin[1] - L_SedManifoldEntrance;
    SedInletChimneyEntrance_origin[2] + T_ChannelWall
]
SedInletChimneyScript :=
    win1 ← [SedInletChimney_origin[0] - zc; SedInletChimney_origin[1] + zc]
    win2 ← [SedInletChimneyOuter_dim[0] + zc; SedInletChimneyOuter_dim[1] - zc]
    zoom1 ← zoom_win(win1, win2)
    box1 ← box(SedInletChimney_origin, SedInletChimney_dim)
    box2 ← box(SedInletChimney_origin, SedInletChimneyOuter_dim)
    subtract1 ← subtractD(SedInletChimneyOuter_dim, SedInletChimney_dim)
    box3 ← box(SedInletChimneyPort_origin, SedInletChimneyPort_dim)
    subtract2 ← subtractD(SedInletChimney_dim, SedInletChimneyPort_origin)
    box4 ← box(SedInletChimneyEntrance_origin, SedInletChimneyEntrance_dim)
    subtract3 ← subtractD(SedInletChimney_dim, SedInletChimneyEntrance_origin)
    rotate3d1 ← rotate_3d(origin, origin, "x", 90)
    mirror4 ← mirror3d(SedInletChimney_dim, [
        SedInletChimney_dim[0];
        SedInletChimney_dim[1] - (2*T_SedManifoldEntrance + W_SedSludgeFlat);
        SedInletChimney_dim[2]
    ])
    one ← stack(zoom1, box1, box2, subtract1, box3, subtract2, box4, subtract3, mirror4)
    return one
# [component: inputs SedInletChimneyScript]
