# [reference: MasterProgram.xmcd]
Sedbottomslopes_origin := [0; 0; 0]*m
Sedbottomslopes_dim := [W_SedBayActual; H_SedSludge + T_SedSludge; L_Sed] = [1.0045; 0.164384; 9.52822] m
SedDrain_origin := [
    Sedbottomslopes_origin[0] + Sedbottomslopes_dim[0]/2 - W_SedSludge/2;
    Sedbottomslopes_origin[1];
    Sedbottomslopes_origin[2]
] = [0.412507; 0; 0] m  # add origin points and dimension points
SedDrain_dim := [W_SedSludge; H_SedSludge; L_Sed] = [0.179485; 0.0897425; 9.52822] m
SedDrainCover_origin := [
    Sedbottomslopes_origin[0] + Sedbottomslopes_dim[0]/2 - W_SedDrainCover/2;
    Sedbottomslopes_origin[1] + H_SedSludge;
    Sedbottomslopes_origin[2]
]
SedDrainCover_dim := [W_SedDrainCover; T_SedSludge; L_Sed]
win1 := [Sedbottomslopes_origin[0] - zc; Sedbottomslopes_origin[1] - zc; Sedbottomslopes_origin[2] - zc]
Sedbottomslant_origin := [□; □; □]  # error: This placeholder is empty.
win2 := [Sedbottomslopes_dim[0] + zc; Sedbottomslopes_dim[1] + zc; Sedbottomslopes_dim[2] + zc]
Sedbottomslant_dim := [□; □; □]  # error: This placeholder is empty.
sedbottomslopescript(origin, pline1, pline2, pline3, mirror_point, tank_length, slope_width, slope_height, win1, win2) :=
    zoom1 ← zoom_win(win1, win2)
    pline1 ← pline(pline1, pline2, pline3)
    extrude1 ← extrude(origin, tank_length)
    mirror3d1 ← mirror3d(origin, mirror_point)
    box1 ← box(Sedbottomslopes_origin, Sedbottomslopes_dim)
    box2 ← box(SedDrain_origin, SedDrain_dim)
    box3 ← box(SedDrainCover_origin, SedDrainCover_dim)
    subtract1 ← subtractD(Sedbottomslopes_origin, SedDrain_origin)
    subtract2 ← subtractD(Sedbottomslopes_origin, SedDrainCover_origin)
    unionall ← union_allA
    rotate3d1 ← rotate_3d(origin, origin, "x", 90)
    rotate3d2 ← rotate_3d(origin, origin, "z", 270)
    one ← stack(zoom1, pline1, extrude1, rotate3d1, rotate3d2, mirror3d1, unionall)
sedslopeb(origin, slope_dim, slope_width, slope_offset, slope_height, angle) := sedbottomslopescript([origin[0]; origin[1]; origin[2]], [origin[0]; origin[1]], [origin[0] - slope_width; origin[1]], [origin[0]; origin[1] + slope_height], [origin[0]; origin[1] + slope_width + slope_offset; origin[2]], slope_dim[0], slope_width, slope_height, [origin[0] - slope_width - zc; origin[1] - zc; origin[2]], [origin[0] + zc; origin[1] + slope_height + zc; origin[2]])
sedslopebottom(origin, slope_dim, slope_offset, angle) := sedslopeb(origin, slope_dim, slope_dim[1]/2, slope_offset, slope_dim[1]*tan(angle)/2, angle)
AC_SedBottomSlopeScript :=
    zoom1 ← zoom_win(win1, win2)
    box1 ← box(Sedbottomslopes_origin, Sedbottomslopes_dim)
    box2 ← box(SedDrain_origin, SedDrain_dim)
    box3 ← box(SedDrainCover_origin, SedDrainCover_dim)
    subtract1 ← subtractD(Sedbottomslopes_origin, SedDrain_origin)
    subtract2 ← subtractD(Sedbottomslopes_origin, SedDrainCover_origin)
    rotate3d1 ← rotate_3d(origin, origin, "x", 90)
    rotate3d2 ← rotate_3d(origin, origin, "z", 270)
    one ← stack(zoom1, box1, box2, box3, subtract1, subtract2, rotate3d1, rotate3d2)
    return one
# [component: inputs AC_SedBottomSlopeScript]
