# Flocculation Function
# The Flocculator program should be calculating the spacing between baffles for all sections. the number of baffles in each section and the placement of the baffles throughout the flocculator.
# References:
HW_Sed := 2 m
# The length of one channel of the flocculator is equal to the length of a sed tank . Therefore the total length is equal to the number of channels times the length of a sed tank. The width of a flocculator is equal to the width of a sed tank divided by the number of channels (to make "upward velocity" equal in the two tanks. The water depth at the end of the flocculaor must be the same as the water depth in the sed tank.
# [reference: BasicInputs.xmcd]
# [reference: ExpertInputs.xmcd]
# [reference: DesignAssumptions.xmcd]
# [reference: MathFunctions.xmcd]
# [reference: PipeDatabase.xmcd]
# [reference: MinorLossCoefficients.xmcd]
# [reference: FluidsFunctions.xmcd]
# [reference: Influent Sed Manifold.xmcd]
# [reference: SludgeDrain.xmcd]
# [reference: Sedimentation Dimensions.xmcd]
# [reference: Inlet Channel.xmcd]
# [reference: Launder.xmcd]
# [reference: Exit Channel.xmcd]
# [reference: Lamella.xmcd]
# I changed the Π.FlocBod. This is great because this parameter actually makes sense with the model predictions. I had reduced the value from the model predictions previously to get the value of 30 m^2/3 because I erroneously thought that the model predictions were giving too large a residence time.
# [reference: Floc Hopper.xmcd]
# [reference: EntranceTankDim.xmcd]
# Floc Calculations:
# Add equation here to check for minimum width that gives a baffle spacing that is
HW_FlocEnd := HW_Sed = 2 m
# possible ED values
S_FlocBaffleEnd := 1/2*HW_FlocEnd = 1 m
6.4, 1.6, 0.4
W_FlocChannel := max(2*Q_Plant/HW_FlocEnd*(K_FlocBaffle180/(2*Pi_Epsilon*HW_FlocEnd*ED_Floc[last(ED_Floc)]))^(1/3), W_FlocChannelMin) = 71.9212 cm
# Change the Bod to have ED.FlocBod insteadof G to eliminate this step
S_FlocBaffle := Q_Plant/W_FlocChannel*(K_FlocBaffle180/(2*Pi_Epsilon*HW_FlocEnd*ED_Floc))^(1/3) = [0.39685; 0.629961; 1] m
# The distance between baffles was set by the energy dissipation desired for each section. The Width
# of the flocculator was set to be the equal to the large baffle spacing and the depth of the flocculator was set to be Pi.FlocCell times the largest baffle spacing.
B_FlocBaffle := S_FlocBaffle + T_FlocBaffle = [0.43685; 0.669961; 1.04] m
Pi_FlocBaffleCP := (K_FlocBaffle180*(Pi_Epsilon*HW_FlocEnd)^2/2)^(1/3) = 1.78053 m^(2/3)
i := 0 .. last(ED_Floc)
N_FlocBaffleSectionRequired[i] := ceil(CP_Floc/(length(ED_Floc)*Pi_FlocBaffleCP))
# This makes the total collision potential in each baffle spacing section be the same. Hopefully someday we will have a method of choosing this section length based on theory or experiments.
N_FlocBaffleSectionRequired = [21; 21; 21]  # The number of baffles in each section.
# Assume an equal number of baffles in each section
L_FlocSections := vectorize(B_FlocBaffle*N_FlocBaffleSectionRequired) = [9.17386; 14.0692; 21.84] m
# Should this be B.FlocBaffle or S.FlocBaffle. THis isn't really important, just thinking about this conceptually. I think the answer is neither... and that we would need to figure out the volume of the submerged baffles and subtract that from the total volume of the flocculator. But I don't really care because the difference is insignificant!
L_FlocTankEst := sum(L_FlocSections) = 45.083 m  # Estimated total length of floc tanks
N_FlocChannelsEst := ceil(L_FlocTankEst/L_Sed) = 5
L_FlocTank := N_FlocChannelsEst*L_Sed = 47.6411 m  # Total length of floc tanks
Ti_Floc := HW_FlocEnd*L_FlocTank*W_FlocChannel/Q_Plant = 22.8427 min
# A better design will use longer sed tanks and thus will have shorter channels. I think the sed tanks should be made much longer than they are currently. The total wall length including floc channel walls should be calculated and minimized.
HL_FlocBaffle := h_erect(Q_Plant, W_FlocChannel, S_FlocBaffle, K_FlocBaffle180) = [0.625867; 0.248376; 0.0985679] cm
# calculates the head loss per baffle and then finds the total headloss
# This head loss calculation is based on the ideal design that doesn't yet account for how the baffles are actually placed in the channels. The error will be small since it is the last section of baffle spacings that might have a different number of baffles
HL_Floc := HL_FlocBaffle*N_FlocBaffleSectionRequired = 20.429 cm
HW_FlocStart := HW_FlocEnd + HL_Floc = 2.20429 m  # Calculate the water level at the entrance to the floc tank
H_Floc := HW_FlocStart + H_PlantFreeboard = 2.30429 m
# G at the port is based on the G at the end of the flocculator because the low G region of the flocculator is so long.
W_FlocPort := B_FlocBaffle = [43.685; 66.9961; 104] cm  # The width of the floc port that connects channels will be based on the baffle spacing in that channel
A_FlocPort := A_Port(Pi_FlocDissipation, K_PipeEnt, Q_Plant, ED_Floc[last(ED_Floc)], Pi_VenaContractaOrifice)
H_FlocPort := A_FlocPort/W_FlocPort = [143.871; 93.8115; 60.4327] cm  # This keeps the velocity through the port the same as the velocity in the channel
W_GritWeir := 15 cm  # This length needs to be defined by the floating floc team.
# The baffles in each channel will have the same spacing
L_AvailFirst[0] := L_Sed - W_FlocPort[0] - W_GritWeir = 8.94137 m
# Each channe's available length decreases because the ports that connect the channels increase since the spacing between baffles increases.
# This insures that the number of baffle spaces is an even number since there needs to be an odd number of baffles (to start on a lower baffle and end on a lower baffle).
N_BaffleSpaceFirst := round(L_AvailFirst[0]/B_FlocBaffle[0]/2)*2 = 20
N_FlocBaffleSpaceRequired := N_FlocBaffleSectionRequired + 1 = [22; 22; 22]
N_BaffleSpaceRemainingFirst := ceil(N_FlocBaffleSpaceRequired[0] - N_BaffleSpaceFirst) = 2
N_ChannelBaffles :=
    N_ChannelBaffleSpace[0] ← N_BaffleSpaceFirst
    B_ChannelBaffleSpace[0] ← B_FlocBaffle[0]
    i ← 0
    j ← 0
    if (N_BaffleSpaceRemainingFirst ≤ 0) or (N_BaffleSpaceRemainingFirst < N_BaffleSpaceFirst/2)
        i ← i + 1
        j ← j + 1
        B_ChannelBaffleSpace[i] ← B_FlocBaffle[j]
        L_Avail[i] ← L_Sed - W_FlocPort[j] - W_FlocPort[j - 1]
        N_ChannelBaffleSpace[i] ← round(L_Avail[i]/B_FlocBaffle[j]/2*2)
        N_BaffleSpaceRemaining[i] ← 0
    otherwise
        i ← i + 1
        B_ChannelBaffleSpace[i] ← B_FlocBaffle[j]
        L_Avail[i] ← L_Sed - 2*W_FlocPort[j]
        N_ChannelBaffleSpace[i] ← round(L_Avail[i]/B_FlocBaffle[j]/2*2)
        N_BaffleSpaceRemaining[i] ← ceil(N_FlocBaffleSpaceRequired[j] - N_ChannelBaffleSpace[i] - N_ChannelBaffleSpace[0])
    while i ≤ N_FlocChannelsEst - 2
        if (N_BaffleSpaceRemaining[i] ≤ 0) or (N_BaffleSpaceRemaining[i] < N_ChannelBaffleSpace[i]/2)
            i ← i + 1
            j ← j + 1
            B_ChannelBaffleSpace[i] ← B_FlocBaffle[j]
            L_Avail[i] ← L_Sed - W_FlocPort[j] - W_FlocPort[j - 1]
            N_ChannelBaffleSpace[i] ← round(L_Avail[i]/B_FlocBaffle[j]/2*2)
            N_BaffleSpaceRemaining[i] ← ceil(N_FlocBaffleSpaceRequired[j] - N_ChannelBaffleSpace[i])
        otherwise
            i ← i + 1
            B_ChannelBaffleSpace[i] ← B_FlocBaffle[j]
            L_Avail[i] ← L_Sed - 2*W_FlocPort[j]
            N_ChannelBaffleSpace[i] ← round(L_Avail[i]/B_FlocBaffle[j]/2*2)
            N_BaffleSpaceRemaining[i] ← ceil(N_FlocBaffleSpaceRequired[j] - N_ChannelBaffleSpace[i] - N_ChannelBaffleSpace[i - 1])
    return [N_ChannelBaffleSpace - 1, B_ChannelBaffleSpace/m]
# i counts the channel number
# j counts the spacing number
# The number of baffles for the first channel is calculated separately since the length available is different
# The number of baffles remaining either needs to be less than zero or no more than half the number that can fit in the channel for the baffle spacing to advance
# The available length for each channel is dependent on the baffle spacing from the previous channel as well as the baffle spacing of this channel
# The calculates the baffle space in the channel and makes sure it is an even number
# This calculates the number of baffle spaces in the rest of the channels
# The length available is dependent on the size of the port at the beginning and end, which depend on the baffle spacing in the previous and current channel
# If the required number of baffles is not met, then the next channel will have the same baffle spacing and the same port widths at either end.
# Subtracting 1 will give you the number of baffles in each tank, not spaces
# For some reason we're not getting an odd number of baffles
N_FlocChannelBaffles := N_ChannelBaffles[0, 0] = [19; 12; 7; 6; 6]
# The number of baffles in each tank may not be the same because the lengths of each tank vary due to the different sized ports.
B_ChannelBaffleSpace := N_ChannelBaffles[0, 1]*m = [0.43685; 0.669961; 1.04; 1.04; 1.04] m  # This shows the baffle spacing for each channel
N_FlocChannels := rows(N_FlocChannelBaffles) = 5  # Adjusts the number of floc channels based on the required number of baffles and baffle spacing.
# Now we need to assign positions, lengths and elevations to floc baffles
L_FlocBaffleLower := HW_FlocEnd - S_FlocBaffle*Pi_FlocBaffle = [1.60315; 1.37004; 1] m
L_FlocBaffleUpper := H_Floc - S_FlocBaffle*Pi_FlocBaffle = [1.90744; 1.67433; 1.30429] m
L_BaffleSection :=
    for i ∈ 0 .. last(N_FlocBaffleSectionRequired)
        L[i] ← N_FlocBaffleSectionRequired[i]*B_FlocBaffle[i]
    return L
    = [9.17386; 14.0692; 21.84] m  # This calculates the length of flocculator taken up by each section of baffles
# I think this needs to be updated based on channel length now
# First baffle is a lower baffle because rapid mix pipe enters low
# Ideally have odd number of baffles in first channel (enter low, exit low)
# Ideally have even number of baffles in 2nd channel (enter low, exit high), but I haven't done any coding to get the right number of baffles (odd or even). The fit of the baffles could potentially be improved by
Loc_FlocBaffles :=
    X[0, N_FlocChannels - 1] ← 0 m
    L[0, N_FlocChannels - 1] ← 0 m
    Z[0, N_FlocChannels - 1] ← 0 m
    section ← 0
    BafflesInSection ← 0
    N_FlocBaffles ← 0
    N_FlocDrainPort ← 0
    W_RapidMix ← W_GritWeir
    X[0, 0] ← T_ChannelWall
    for Channel ∈ 0 .. N_FlocChannels - 1
        i ← 0
        j ← 0
        Baffles ← 0
        Loc_FlocPortSide[0, Channel] ← 1
        X_FirstBaffleInChannel ← W_GritWeir if Channel == 0
        X_FirstBaffleInChannel ← W_FlocPort[section] otherwise
        X[i, Channel] ← X_FirstBaffleInChannel
        L[i, Channel] ← L_FlocBaffleUpper[section]
        Z[i, Channel] ← 0 m
        while Baffles < N_FlocChannelBaffles[Channel]
            i ← i + 1
            N_FlocBaffles ← N_FlocBaffles + 1
            Baffles ← Baffles + 1
            X[i, Channel] ← X[i - 1, Channel] + B_ChannelBaffleSpace[Channel]
            if mod(i, 2) == 0
                L[i, Channel] ← L_FlocBaffleUpper[section]
                Z[i, Channel] ← S_FlocBaffle[section]*Pi_FlocBaffle
            otherwise
                j ← j + 1
                L[i, Channel] ← L_FlocBaffleLower[section]
                Z[i, Channel] ← 0 m
                N_FlocDrainPort ← N_FlocDrainPort + 1
                Loc_FlocPortSide[j, Channel] ← 1 if mod(i, 4) == 0
                Loc_FlocPortSide[j, Channel] ← 2 otherwise
        section ← section + 1 if Channel > 0 and B_ChannelBaffleSpace[Channel] ≠ B_ChannelBaffleSpace[Channel - 1]
        for k ∈ 0 .. last(X[:, 0])
            X[k, Channel] ← L_Sed - X[k, Channel] if mod(Channel + N_FlocChannels, 2) == 1 and X[k, Channel] ≠ 0
    return [X, L, Z, N_FlocBaffles*m, Loc_FlocPortSide*m, N_FlocDrainPort*m]
# section is index of the spacing of baffles
# First baffle is away from wall to allow elbow to deflect water downward
# This code works with any number of flocculator channels
# i is the number of baffles in a channel
# X placement starts with an offset equal to the channel wall thickness
# The first baffle is place in the channel by an offest required for the
# rapid mix apparatus. Which is subject to change?!
# j is the index that counts lower baffles only
# PortSide keeps track of what side the port in the baffle will be on. These ports will be used for draining the floc tank.
# Each channel starts with a lower baffle
# Move to the next spacing if baffles in section equals target number of baffles in section and if the section isn't the last section
# Mod handles the odd and even baffles
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# Mod = 1 means the number is odd
# Mod = 0 means the numbeer is even
# Reverse the direction of odd numbered channels
[X, L, Z, N_FlocBaffle*m, PortSide*m]
# Do we need to reverse the Z array too?
# Lower baffles are on even indexes, so every fourth baffle (second lower baffle) will have ports on the same side so that they alternate sides and don't shortcircuit the flow.
# Count the number of drain ports by counting the number of lower floc baffles.
# artificially attach units of meters to the number of baffles so all dimensions are the same.
X ← L_Sed - X if mod(N_FlocChannels, 2) == 1
# For some reason it's giving 1 extra baffle
X_FlocBaffles := Loc_FlocBaffles[0, 0]
N_FlocChannelBaffles = [19; 12; 7; 6; 6]
L_FlocBaffles := Loc_FlocBaffles[0, 1]
Z_FlocBaffles := Loc_FlocBaffles[0, 2]
# strip artificial units
# These values don't match what was calculated early. The problem is somewhere within the code above.
N_FlocBaffles := Loc_FlocBaffles[0, 3]/m
X_FlocBaffles = [
    9.37822, 0.43685, 8.85826, 1.04, 8.48822;
    8.94137, 1.10681, 7.81826, 2.08, 7.44822;
    8.50452, 1.77677, 6.77826, 3.12, 6.40822;
    8.06767, 2.44673, 5.73826, 4.16, 5.36822;
    7.63082, 3.11669, 4.69826, 5.2, 4.32822;
    7.19397, 3.78665, 3.65826, 6.24, 3.28822;
    6.75712, 4.45661, 2.61826, 7.28, 2.24822;
    6.32027, 5.12657, 1.57826, 0, 0;
    5.88342, 5.79653, 0, 0, 0;
    5.44657, 6.46649, 0, 0, 0;
    5.00972, 7.13646, 0, 0, 0;
    4.57287, 7.80642, 0, 0, 0;
    4.13602, 8.47638, 0, 0, 0;
    3.69917, 0, 0, 0, 0;
    3.26232, 0, 0, 0, 0;
    2.82547, 0, 0, 0, 0;
    2.38862, 0, 0, 0, 0;
    1.95177, 0, 0, 0, 0;
    1.51492, 0, 0, 0, 0;
    1.07807, 0, 0, 0, 0
] m
Loc_FlocPortSide := Loc_FlocBaffles[0, 4]/m
N_FlocBaffles = 50
N_FlocDrainPort := Loc_FlocBaffles[0, 5]/m = 26
# Drains are added to each flocculator channel so they can be drained.
# The side that the ports are lcoated on the lower baffles is determined above, and is labled Loc.FlocPortSide
# For an individual floc channel
Q_FlocDrain := W_FlocChannel*L_Sed*HW_FlocStart/Ti_SludgeDrain = 25.176 L/s  # Use the same drain time as the sed tank. Correct assumption??
ID_FlocDrainPort := ID_Manifold(Q_FlocDrain, HW_FlocStart, L_Sed, Pi_QSludgeOrifices, EN_PipeSpec, Nu_Water, E_Pvc, 0, N_FlocDrainPort) = 4.29164 in
A_FlocDrain := π/4*ID_FlocDrainPort^2 = 93.3261 cm^2
# If head is constant within each flocculator, we can treat each port as an orifice. Therefore we can use the manifold equation to calculate the total port size needed to drain the tank, and then divide that by the number of ports.
A_FlocDrainPort := A_FlocDrain/N_FlocDrainPort = 3.58947 cm^2
# Is this valid?? Should the flocculator actually be considered a series of separate tanks??
W_FlocDrainPort := sqrt(A_FlocDrainPort) = 1.89459 cm
# Assume square ports for the flow to drain out of
H_FlocDrainPort := W_FlocDrainPort
Q_FlocDrainInitial := Q_orifice(ID_FlocDrainPort, HW_FlocStart, Pi_VenaContractaOrifice) = 38.6592 L/s
