# AguaClara Water Treatment Plants
# Automated Design
# Add variable descriptions next to every varible so it is easy to interpret what this all means.
# Design References
# [reference: BasicInputs3Sed1Bay.xmcd]
# Use BasicClientInputs and ExpertClientInputs when this is run by LabVIEW.
# Use BasicInputs and ExpertInputs to use the program in MathCAD
# Change the reference by
# - right clicking
# - select properties
# - reference tab
# - type in the correct file name
# [reference: ExpertInputs.xmcd]
# [reference: DesignAssumptions.xmcd]
# [reference: MathFunctions.xmcd]
# [reference: PipeDatabase.xmcd]
# [reference: MinorLossCoefficients.xmcd]
# [reference: FluidsFunctions.xmcd]
# [reference: Sedimentation Tank.xmcd]
# [reference: Floc Hopper - New Design.xmcd]
# [reference: FCM.xmcd]
# [reference: Flocculator 3.xmcd]
# [reference: RapidMixer.xmcd]
# [reference: EntranceTankDim.xmcd]
# [reference: Materials List.xmcd]
# [reference: Vertical Flocculator baffle port drain design.xmcd]
Q_Plant = 6.33426 L/s
N_SedTanks = 2
W_ExitChannelMin = 0.114 m
W_SedBay = 0.92 m
N_SedBays = 1
# Sed Tanks and Slopes:
Geom_ExitChannel = 0
B_SedPort = 3.91009 cm  # Height of the narrowest part of the manifold ports
N_SedTanks = 2
W_SedPort = 3.91009 cm
H_SedBetween = 0 cm  # Distance from the top of the inlet manifold to the bottom of the ledge supporting the lamella frame
A_SedPort = 15.2888 cm^2  # Port Area
L_Sed = 4.24907 m
W_SedSludgeFlat = 5 cm  # Distance between tips of manifold plates (space alloted for the drain holes
N_SedBays = 1  # Number of bays of inlet manifolds in each sed tank
AN_SedTopInlet = 60 deg  # Angle of the top of the inlet manifold
L_SedPort = 4.51498 cm  # Length of the port through which water exits the inlet manifold
AN_SedBottom = 10 deg  # Angle of the bottom of inlet manifold
W_SedSlopePlate = 30 cm  # Width of ferrous cement plates in whice one manifold port is cut
Q_SedBay = 3.16713 L/s
W_SedBayActual = 0.92 m
L_SedSlopeManifold = 0.800718 m  # This is the extra distance between the last slope and the wall
# Sedimentation Tank Sludge Drain:
N_SedSludgeOrifices = 28  # per cell
Ti_SludgeDrain = 30 min  # Tank Drain time
W_SedSludge = 9.18636 cm  # Width of the sludge channel
B_SedSludgeOrifices = 15 cm  # Distance center to center between drain orifices
H_SedSludge = 4.59318 cm  # Depth of the sludge channel
T_SedSludge = 6 cm
T_SedSludge = 6 cm
# Thickness of the plate topping the sludge channel
# through which drain holes are formed
W_SedDrainCover = 19.2376 cm
D_SedSludgeOrifice = 0.011 m  # Diameter of drain orifices
W_SedInletBottom = 0.363812 m
N_SedSludgeOrifices = 28
ND_SedSludgeValve = 3 in
# Sedimentation Tank Dimensions:
Z_SedSludge = 0.105932 m  # Height from 0 of the top of the sludge drain
H_SedBottomSlope = 0.0617326 m  # Height of the bottom slope
H_SedTopSlope = 0.693442 m  # Height of the top of the inlet manifold
Z_SedSlopes = 0.799374 m  # Height from 0 of the top of the inlet manifold
W_Sed = 0.92 m  # Total tank wall height
L_Sed = 4.24907 m  # Total tank length
# Inlet Channel:
HW_InletChannel = 0.220583 m  # Width of the drop chimneys connecting channel to sed inlet manifolds
W_InletChannel = 0.28352 m  # length of drop chimmneys
L_Channel = 2.29 m
W_SedManifoldEntrance = 0.28352 m
L_SedManifoldEntrance = 0.211412 m
H_SedManifoldPort = 0.181992 m  # Ports at bottom of inlet chimney are set to be triangles
W_SedManifoldPort = 0.298759 m
N_SedInletPipes = 2  # per sed bay
H_InletChannel = 0.320583 m
# Sedimentation Tank Effluent Launder:
N_SedLaunderOrifices = 70  # Number of orifices per launder
Q_SedLaunderOrifices = 2.26223e-5 m^3/s  # More Launder Dimensions
ND_SedLaunder = 4 in
B_SedLaunderOrifices = 0.1 m  # Center to center launder spacing
L_SedLaunder = 3.66812 m
# Exit Channel:
D_SedLaunderOrifice = 0.275591 in
W_ExitChannel = 0.147426 m
H_ExitChannel = 0.320583 m
L_ExitChannel = 2.29 m
H_PltWeir = 0.142794 m  # height of the weir carrying water to the distribution tank
HW_ExitChannel = 0.180583 m  # water height in exit channel from 0
# Lamella:
L_SedPlate = 0.36576 m
B_SedPlate = 1.96236 cm  # center to center distance between lamella
S_SedPlate = 1.7 cm  # spacing between lamella
N_SedPlates = 149  # Number of Sed Plates per Sedimentation Tank Bay.
AN_SedPlate = 60 deg
ZW_ExitChannel = 1.39695 m
V_SedC = 10.2272 m/day
L_SedActive = 2.81909 m
T
V_SedUp = 70 m/day
Z_SedLaunder = 1.3398 m
H_SedPlate = 0.316757 m
H_SedAbove = 0.1543 m  # Height of water needed above the lamella
N_SedPlates = 149
HW_Sed = 1.43695 m
H_Sed = 1.53695 m
Z_Mp = 1.21637 m
N_SedPorts = 12
H_SedBayDivider = 0.869374 m
W_SedSlopePlateRemaining = 0.649066 m
W_SedBayDivider = 0.15 m
# Sedimentation Tank Floc Hopper:
A_FlocHopper =  # error: This variable is undefined.
L_FlocHopper = 0.92 m  # Length of the hopper cement plate
L_FlocHopperOffset = 0.18288 m  # distance from the edge of the channel to the bottom of the first lamella (collection distance)
W_FlocHopper = 0.05 m  # width of the hopper set within each bay
# Flow Controller:
N_Fcm = 1
ID_FcmTube = 3.175 mm
ID_FcmTube = 0.125 in
L_FcmTube = 99.0481 cm
Q_FcmTubeMax = 285.042 mL/min
HL_FcmValve = 15.0951 cm
# Flocculator: | Look at Flocculator Positioning arrays
W_FlocChannel = 0.45 m
# Fill last channel with bafffles from last channel
# Fix port width to be based on energy dissipation in that channel
ED_Floc = [20; 2] mW/kg
# Adjust spacing after the number of baffles per channel is known.
# Check the residence time of the flocculator should be at least 20minutes
HW_FlocEnd = 1.43695 m
X_FlocBaffles = [
    0.102969, 0.124964, 0.174453, 0.33352;
    0.245938, 0.289928, 0.388907, 0.546219;
    0.388907, 0.454892, 0.60336, 0.758919;
    0.531875, 0.619856, 0.817813, 0.971618;
    0.674844, 0.78482, 1.03227, 1.18432;
    0.817813, 0.949784, 1.24672, 1.39702;
    0.960782, 1.11475, 1.46117, 1.60972;
    1.10375, 1.27971, 1.67563, 1.82242;
    1.24672, 1.44468, 1.89008, 2.03511;
    1.38969, 1.60964, 2.10453, 2.24781;
    1.53266, 1.7746, 2.31899, 2.46051;
    1.67563, 1.93957, 2.53344, 2.67321;
    1.8186, 2.10453, 2.74789, 2.88591;
    1.96156, 2.2695, 2.96235, 3.09861;
    2.10453, 2.43446, 3.1768, 3.31131;
    2.2475, 2.59943, 3.39125, 3.52401;
    2.39047, 2.76439, 3.60571, 3.73671;
    2.53344, 2.92935, 3.82016, 3.94941;
    2.67641, 3.09432, 4.03461, 0;
    2.81938, 3.25928, 0, 0;
    2.96235, 3.42425, 0, 0;
    3.10532, 3.58921, 0, 0;
    3.24828, 3.75417, 0, 0;
    3.39125, 3.91914, 0, 0;
    3.53422, 4.0841, 0, 0;
    3.67719, 0, 0, 0;
    3.82016, 0, 0, 0;
    3.96313, 0, 0, 0;
    4.1061, 0, 0, 0
] m
L_FlocBaffles = [
    1.33398, 1.31199, 1.2625, 1.53437;
    1.61714, 1.59514, 1.54565, 1.25121;
    1.33398, 1.31199, 1.2625, 1.53437;
    1.61714, 1.59514, 1.54565, 1.25121;
    1.33398, 1.31199, 1.2625, 1.53437;
    1.61714, 1.59514, 1.54565, 1.25121;
    1.33398, 1.31199, 1.2625, 1.53437;
    1.61714, 1.59514, 1.54565, 1.25121;
    1.33398, 1.31199, 1.2625, 1.53437;
    1.61714, 1.59514, 1.54565, 1.25121;
    1.33398, 1.31199, 1.2625, 1.53437;
    1.61714, 1.59514, 1.54565, 1.25121;
    1.33398, 1.31199, 1.2625, 1.53437;
    1.61714, 1.59514, 1.54565, 1.25121;
    1.33398, 1.31199, 1.2625, 1.53437;
    1.61714, 1.59514, 1.54565, 1.25121;
    1.33398, 1.31199, 1.2625, 1.53437;
    1.61714, 1.59514, 1.54565, 1.25121;
    1.33398, 1.31199, 1.2625, 1.53437;
    1.61714, 1.59514, 0, 1.25121;
    1.33398, 1.31199, 0, 1.53437;
    1.61714, 1.59514, 0, 1.25121;
    1.33398, 1.31199, 0, 1.53437;
    1.61714, 1.59514, 0, 1.25121;
    1.33398, 1.31199, 0, 1.53437;
    1.61714, 0, 0, 1.25121;
    1.33398, 0, 0, 1.53437;
    1.61714, 0, 0, 1.25121;
    1.33398, 0, 0, 1.53437
] m
Z_FlocBaffles = [
    0, 0, 0, 0.18574;
    0.102969, 0.124964, 0.174453, 0;
    0, 0, 0, 0.18574;
    0.102969, 0.124964, 0.174453, 0;
    0, 0, 0, 0.18574;
    0.102969, 0.124964, 0.174453, 0;
    0, 0, 0, 0.18574;
    0.102969, 0.124964, 0.174453, 0;
    0, 0, 0, 0.18574;
    0.102969, 0.124964, 0.174453, 0;
    0, 0, 0, 0.18574;
    0.102969, 0.124964, 0.174453, 0;
    0, 0, 0, 0.18574;
    0.102969, 0.124964, 0.174453, 0;
    0, 0, 0, 0.18574;
    0.102969, 0.124964, 0.174453, 0;
    0, 0, 0, 0.18574;
    0.102969, 0.124964, 0.174453, 0;
    0, 0, 0, 0.18574;
    0.102969, 0.124964, 0, 0;
    0, 0, 0, 0.18574;
    0.102969, 0.124964, 0, 0;
    0, 0, 0, 0.18574;
    0.102969, 0.124964, 0, 0;
    0, 0, 0, 0.18574;
    0.102969, 0, 0, 0;
    0, 0, 0, 0.18574;
    0.102969, 0, 0, 0;
    0, 0, 0, 0.18574
] m
N_FlocChannels = 4
L_FlocTank = 16.9963 m
HL_Floc = 18.3157 cm
HW_FlocStart = 1.62011 m
S_FlocBaffle = [10.2969; 12.4964; 17.4453; 18.574] cm
B_FlocBaffle = [14.2969; 16.4964; 21.4453; 22.574] cm
N_FlocChannelBaffles = [29; 25; 19; 18]
W_FlocPort = [0.0529689; 0.0749641; 0.124453; 0.13574] m
HL_FlocChannels = [9.15033; 5.30995; 2.08964; 1.76574] cm
L_FlocBaffleLower = [1.33398; 1.31199; 1.2625; 1.25121] m
L_FlocBaffleUpper = [1.61714; 1.59514; 1.54565; 1.53437] m
H_FlocPort = [0.874778; 0.750144; 0.630791; 0.615758] m
Ti_Floc = 28.9175 min  # residence time of the flocculator
N_FlocBaffles = 91
# Rapid Mix Unit and Entrance Tank:
L_Et = 0.88421 m
W_Et = 0.88421 m
H_Et = 2.02011 m  # Height of Entrance Tank Orifice
W_EtOrifice[30] = 0.031 m
L_trueET[30] = 0.163758 m  # Length of Entrance Tank Orifice
Pi_EtFlow[30] = 0.278388  # Ratio of the minimum flow divided by the maximum flow through the plant.
L_FlocEntryOrifice = 45 cm  # Length of orifice entering into flocculator from Rapid Mix Unit
W_FlocEntryOrifice = 1.95203 cm  # Height of orifice entering into flocculator
ED_Diffusion =  # error  # Minimum Energy Dissipation needed
HL_FlocEntryOrifice = 3.95659 cm  # Head loss caused by entering flocculation tank.
A_FlocEntry = 0.00878413 m^2
A_EtOrifice = 50.765 cm^2
HW_EtTotal =  # error  # Total Height of water at beginning of rapid mix unit
HW_Channel2 =  # error  # Height of water at the back of the entrance tank channel (from channel bottom)
HW_EtChannel = 4.73223 cm  # Height of Waterfall into flocculator
W_EtChannel = 10.2969 cm  # Widt of entrance tank channel
Vol_Stock = 513.075 L  # Volume of chemical stock tanks
ZW_ExitChannel = 1.39695 m  # Water Level at the end of the plant in the exit channel and exit channel box
HW_Sed = 1.43695 m
HW_FlocStart = 1.62011 m  # Water level at the beginning of the floc tank
HL_Floc = 18.3157 cm  # just for ref. the head loss throught the floc tank
HW_EtTotal =  # error  # Height of the water in the entrance channel
# Materials List:
L_LaunderPipe =  # error
N_Launders = 4
L_LaunderPipeTotal = 14.6725 m
N_Valves = 2
N_LaunderCouplings = 4
N_ValveCouplings = 2
N_SedPlatesTotal = 298
N_SedPlatesPerSheet = 10
N_SedPlateSheets = 30
N_PipeSedPlateStand =  # error
A_SedTank =  # error
# [reference: AutoCADMasterProgram.xmcd]
# AutoCAD References
AC_SedTank = [
    "_-view o t"; "-layer m tank"; "c t 132,132,132"; "tank"; "  "; "_-view o t _zoom w 0.16,-0.16,0 -4.40907,1.08,1.53695 _box 0,0,0 -4.24907,0.92,1.53695 _box 0.15,-0.15,-0.15 -4.39907,1.07,1.53695 _subtract 0.15,-0.15,-0.15  0,0,0 "; "-layer s 0"; "  "; "-layer f tank"; "  "
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]
AC_EntranceTank = [
    "-layer m entrancetank";
    "c t 214,214,214";
    "entrancetank";
    "  ";
    "_-view o t _zoom w 0.16,4.38,0 -1.04421,5.58421,2.02011 _box 0,4.54,0 -0.88421,5.42421,2.02011 _box 0.15,4.39,-0.15 -1.03421,5.57421,2.02011 _subtract 0.15,4.39,-0.15  0,4.54,0 ";
    "-layer s 0";
    "  ";
    "-layer f entrancetank";
    "  ";
    "-layer s entrancetank";
    "  ";
    "_box -0.88421,4.39,1.97011 -0.78124,4.54,2.02011";
    "-layer s 0";
    "  ";
    "-layer t entrancetank";
    "  ";
    "_-view o t";
    "_subtract 0.15,4.54,0  -0.88421,4.39,1.97011 ";
    "-layer f entrancetank";
    "  "
]
AC_FlocTank = [
    "-layer m floctank";
    "c t 91,91,91";
    "floctank";
    "  ";
    "_-view o t _zoom w 0.16,1.98,0 -4.40907,4.55,1.72011 _box 0,2.14,0 -4.24907,4.39,1.72011 _box 0.15,1.99,-0.15 -4.39907,4.54,1.72011 _subtract 0.15,1.99,-0.15  0,2.14,0 ";
    "_box -4.39907,2.59,0 0.15,2.74,1.72011";
    "_box -0.12445,2.59,0.87478 0,2.74,0";
    "_subtract -4.39907,2.59,0  -0.12445,2.59,0.87478 ";
    "_box -4.39907,3.19,0 0.15,3.34,1.72011";
    "_box -4.24907,3.19,0.75014 -4.1741,3.34,0"
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]
