# [reference: BasicInputs3Sed1Bay.xmcd]
# [reference: ExpertInputs.xmcd]
# [reference: DesignAssumptions.xmcd]
# [reference: MathFunctions.xmcd]
# [reference: PipeDatabase.xmcd]
# [reference: MinorLossCoefficients.xmcd]
# [reference: FluidsFunctions.xmcd]
# [reference: Sedimentation Tank.xmcd]
# [reference: Floc Hopper - New Design.xmcd]
# [reference: FCM.xmcd]
# [reference: Flocculator 3.xmcd]
# [reference: RapidMixer.xmcd]
# [reference: EntranceTankDim.xmcd]
# [reference: Materials List.xmcd]
D_Port := 0.6 m
K_Valve := 0.6
# This is a program to calculate how much time is required to drain out a flocculator section. Each section of the flocculator is connected to one another with alternating holes on the bottom of the baffles. These holes are small enough not to disrupt flow over the baffles and big enough such that one drain will empty out all the sections.
K_Port := 0.6
D_Valve := D_Port
# Initially, the tank is full. This is denoted at time=t(0).
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# Once the tanks start draining, at time=t(1) all the water is level.
D_Valvem := [0.0508; 0.0762; 0.1016; 0.127; 0.1524; 0.1778; 0.2032]*m
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# At time=t(2), section 1 has begun to drain quicker than sections 2, 3 & 4.
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D_Valvem = [2; 3; 4; 5; 6; 7; 8] in
# Each hole on the bottom of the baffles is treated as an orifice.
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h(V, A) := V/A
Q_minor(K_minor, D, h1, h2) :=
    Q ← (π*D^2/4*sqrt(2*g*(h1 - h2)/K_minor)) if h1 - h2 > 0
    Q ← 0*m^3/s otherwise
# Base and width are defined as the base and width of a single channel
# We need to calculate 'n' different h values plus an extra 'h'
# which would be the value emptied from tank 1. The tanks are
# numbered from 1 to n
# There will only be n-1 different flows out from each tank
.
t_master(base, width, D_Port, K_Port, D_Valve, K_Valve, h_initial, H_LowerBaffle, nChannel_tanks) :=
    time ← (sqrt(h_initial) - sqrt(H_LowerBaffle[last(H_LowerBaffle)]))/((π*D_Valve^2/(8*(N_FlocChannels + N_FlocBaffles + 1)*base*width))*sqrt(2*g/K_Valve))
    Δt ← base*width*H_LowerBaffle[0]/(Q_minor(K_Port, D_Port, H_LowerBaffle[0], 0 m)*100)
    for j ∈ 0 .. last(nChannel_tanks)
        for i ∈ 0 .. nChannel_tanks[j]
            h_tank[sum(nChannel_tanks[k], k = 0 .. j) + (i + 1 - nChannel_tanks[j])] ← H_LowerBaffle[j]
    h_tank[0, 0] ← 0 m
    while h_tank[N_FlocChannels + N_FlocBaffles + 1] > 1 mm
        time ← time + Δt
        for i ∈ 0 .. N_FlocChannels + N_FlocBaffles + 1
            Q[i] ← Q_minor(K_Port, D_Port, h_tank[i], h_tank[i + 1]) if i < nChannel_tanks
            Q[i] ← 0*m^3/s otherwise
            h_tank[i] ← h_tank[i] + (Q[i] - Q[i - 1])*Δt/(base*width) if i > 0
            h_tank[i] ← 0 m otherwise
        time
    return time  # initial guess for time based on the total number of tanks in each channel
# The factor of 100 gives a fast solution and an error that is less that 0.1%.
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# delta t is based on the height of the lower baffle in the first channel
N_FlocChannelSpaces = [30; 26; 20; 19]
N_FlocBaffles = 91
N_FlocChannels = 4
nChannel_tanks := □  # error: This placeholder is empty.
last(nChannel_tanks) =  # error: This variable is undefined.
height(nChannel_tanks, H_LowerBaffle) :=
    for j ∈ 0 .. last(nChannel_tanks)
        for i ∈ 0 .. nChannel_tanks[last(nChannel_tanks)]
            h_tank[i, j] ← H_LowerBaffle[j]
    h_tank
(sqrt((HW_FlocEnd + HW_FlocStart)/2) - sqrt(L_FlocBaffleLower[last(L_FlocBaffleLower)]))/((π*D_Valve^2/(8*sum(N_FlocChannelSpaces[i], i = 0 .. last(N_FlocChannelSpaces))*L_FlocTank*N_FlocChannels/((N_FlocBaffles + N_FlocChannels)/2)*W_FlocChannel))*sqrt(2*g/K_Valve)) = 8.98671 s
h2oheight := height(N_FlocChannelSpaces, L_FlocBaffleLower) = [
    1.33342, 1.31132, 1.26158, 1.25024;
    1.33342, 1.31132, 1.26158, 1.25024;
    1.33342, 1.31132, 1.26158, 1.25024;
    1.33342, 1.31132, 1.26158, 1.25024;
    1.33342, 1.31132, 1.26158, 1.25024;
    1.33342, 1.31132, 1.26158, 1.25024;
    1.33342, 1.31132, 1.26158, 1.25024;
    1.33342, 1.31132, 1.26158, 1.25024;
    1.33342, 1.31132, 1.26158, 1.25024;
    1.33342, 1.31132, 1.26158, 1.25024;
    1.33342, 1.31132, 1.26158, 1.25024;
    1.33342, 1.31132, 1.26158, 1.25024;
    1.33342, 1.31132, 1.26158, 1.25024;
    1.33342, 1.31132, 1.26158, 1.25024;
    1.33342, 1.31132, 1.26158, 1.25024;
    1.33342, 1.31132, 1.26158, 1.25024;
    1.33342, 1.31132, 1.26158, 1.25024;
    1.33342, 1.31132, 1.26158, 1.25024;
    1.33342, 1.31132, 1.26158, 1.25024;
    1.33342, 1.31132, 1.26158, 1.25024
] m
L_FlocTank*N_FlocChannels/((N_FlocBaffles + N_FlocChannels)/2)*W_FlocChannel*L_FlocBaffleLower[last(L_FlocBaffleLower)]/(Q_minor(K_Port, D_Port, L_FlocBaffleLower[last(L_FlocBaffleLower)], 0 m)*100) = 0.00447707 s
Q_minor(K_Port, D_Port, 2 m, 0 m) = 2.28616 m^3/s
N_FlocChannelSpaces[last(N_FlocChannelSpaces)] = 19
N_FlocChannelSpaces[last(N_FlocChannelSpaces)] = 19
L_FlocTank*N_FlocChannels/((N_FlocBaffles + N_FlocChannels)/2) = 1.43839 m
h2oheight[N_FlocChannelSpaces[last(N_FlocChannelSpaces)], last(N_FlocChannelSpaces)] = 1.25024 m
D_Valvem = [0.0508; 0.0762; 0.1016; 0.127; 0.1524; 0.1778; 0.2032] m
L_FlocBaffleLower = [1.33342; 1.31132; 1.26158; 1.25024] m
t_master(L_FlocTank*N_FlocChannels/((N_FlocBaffles + N_FlocChannels)/2), W_FlocChannel, D_Valvem[0], K_Valve, D_Valvem[0], K_Valve, (HW_FlocEnd + HW_FlocStart)/2, L_FlocBaffleLower, N_FlocChannelSpaces) =  # error: This value must be a scalar.
# nChannel.tanks is a matrix based on N.FlocChannelSpaces
D_Valvem[last(D_Valvem)] = 0.2032 m
nChannel_tanks := [30; 26; 20; 19]
D_Valvem[last(D_Valvem)] = 0.2032 m
sum(nChannel_tanks[i], i = 0 .. last(nChannel_tanks)) = 95
# H.LowerBaffle is a matrix based on L.FlocBaffleLower
# Solution path to get port area and valve diameter
# FInd area of ports assuming all including valve are same area.
# Try solution with valve one size smaller
# find required port area
# If that doesn't work, then increase valve size
# find required port area
# These equations are from integration of the flow out of a tank with changing depth
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# available valve diameters
# is this in a database?
Ti_Wanted := 2 s
# If the valve is the flow limiter, the relationship is linear; if the ports are limiting, the relationship is quadratic(maybe)
# The following function returns a port size based on allowable valve sizes
PortSize(desiredT) :=
    tankDrainTime ← 100 hr
    i ← 0
    D_port ← 0 m
    D_port ← D_Valvem[last(D_Valvem)] if desiredT ≤ t_master(L_FlocTank*N_FlocChannels/((N_FlocBaffles + 1)/2), W_FlocChannel, D_Valvem[last(D_Valvem)], K_Valve, D_Valvem[last(D_Valvem)], K_Valve, (HW_FlocEnd + HW_FlocStart)/2, L_FlocBaffleLower, N_FlocChannelSpaces)
    while i < rows(D_Valvem) and D_port == 0 m
        tankDrainTime ← t_master(L_FlocTank*N_FlocChannels/((N_FlocBaffles + 1)/2), W_FlocChannel, D_Valvem[i], Pi_VenaContractaOrifice, D_Valvem[i], Pi_VenaContractaOrifice, (HW_FlocEnd + HW_FlocStart)/2, L_FlocBaffleLower, N_FlocChannelSpaces)
        D_port ← D_Valvem[i] if tankDrainTime < 1.1*desiredT
        i ← i + 1 otherwise
        D_port
    return D_port
# The hieghts of lower baffles change between channels
# If the time difference is < 10%, use smaller ports to save on material costs (see if statement)
# Assupmtions:
# The Flocculator can be assumed as one straight channel rather than wrapping back and forth
# The volume of each "tank" is equal
# The size of a port is equal to the size of the valve
# Do we need to consider the fact that if the port is directly next to the wall, the water will flow into the slot, creating turbulence
# The minor loss through the port is the same as the minor loss through the valve (K.VenaContractaOrifice)
D_port := PortSize(Ti_wanted) = 2 in  # error: This value must be a scalar.
A_port := π/4*D_port^2 = 3.14159 in^2  # error: This variable is undefined.
L_BafflePort := sqrt(A_port) = 1.77245 in  # error: This variable is undefined.
t_diff(base, width, D_Port, K_Port, D_Valve, K_Valve, h_initial, H_LowerBaffle, 1) =  # error
