# Pumped LFSRSF System for India
# [reference: ExpertInputs.xmcd]
# [reference: MathFunctions.xmcd]
# [reference: PipeDatabase.xmcd]
# [reference: MaterialsDatabase.xmcd]
# [reference: FluidsFunctions.xmcd]
# [reference: CdcFunctions.xmcd]
# Assumptions
Vol_OverheadTank := 30000*L
N_Fills := 2  # number of times you run the system per day
T_OperationIdeal := 3 hr  # per fill
Q_FiEst := Vol_OverheadTank/T_OperationIdeal = 2.77778 L/s
PS_Fi := 2
V_FiUpflow := 11*mm/s
ND_FiPipe := NominalPipeSize(sqrt(4*Q_FiEst/V_FiUpflow/π)) = 24 in
ND_FiPipe := 12 in
Q_Fi := π*innerdiameter(ND_FiPipe, PS_Fi)^2/4*V_FiUpflow = 0.794352 L/s
30000*L/Q_Fi = 10.4907 hr
T_Operation := Vol_OverheadTank/Q_Fi = 10.4907 hr  # per fill
V_Storage := Q_Fi*T_Operation/3 = 10 m^3  # change this based on actual pumping rates
H_Freeboard := 10 cm
Q_Plant := Q_Fi
HL_FiDirty := 40 cm
Ti_CoagStock := T_Operation
Ti_ChlorineStock := T_Operation
# [reference: LFOM.xmcd]
L_Et := 1 m
W_Et := S_EtFloat + 2*ConRadius(ND_EtFloat) + ND_RMPipe + 2*S_Fitting = 0.474637 m
H_Et := 2*CapHeight(ND_EtFloat) + HL_Lfom + H_Freeboard
ND_EtOverflow := D_pipeschedule(Q_Fi, PS_Fi, H_Et, H_Et, Nu_Water, E_Pvc, K_El90) = 0.75 in
HL_EtOverflow := Headloss_weir(Q_Fi, 2*π*outerradius(ND_EtOverflow)) = 0.0296172 m
# Entrance Tank
# [reference: LinearCdc.xmcd]
# [reference: ChemStorageTanks.xmcd]
Vol_CoagTank = 18.93 L  # use 6.5 gallon bucket
D_ChemTank := 12 in
Vol_ChlorineTank = 18.93 L
H_ChemTank := 17.5 in
# AutoCAD drawing programs:
# Translators:
# These are the codes that take MathCAD outputs and create AutoCAD scripts that are used to draw the plant (formerly Basics)
# [reference: MtoATranslators.xmcd]
# The wrapped MtoA translator contains the functions that the user will want to access. These functions will draw pieces with full functionality - specifying the location, dimension, and orientation of the object. Also, it contains layer control and subtraction capabilities for grouped objects.
# [reference: MtoATranslatorsWrapped.xmcd]
# Drawing functions:
# [reference: ChannelF.xmcd]
# [reference: PlumbingF.xmcd]
# [reference: TankF.xmcd]
# [reference: StairsF.xmcd]
# [reference: DrainChannelF.xmcd]
Rho_FiSand*ε_FiSand*π*innerdiameter(ND_FiPipe, PS_Fi)^2/4*120*cm*1.1 = 101.042 kg
# Low Flow Stacked Rapid Sand Filter
# AutoCAD Dimesions and Origins
ND_RMPipe = 1.5 in
ND_RMPipe := 4 in
L_FiPipe := 205 cm
N_FiLayer = 6
S_FiInletMan := 40 cm
# Internal Manifold
ND_FiManTrunk := 3 in
ND_FiManBranch := 1 in
H_FiManCap := CapHeight(ND_FiManTrunk)/2
T_FiLayer := 20 cm
H_FiSand := T_FiLayer*N_FiLayer
L_FiManBulkheadOffset := 0.5*innerdiameter(ND_FiPipe, PS_Fi) - BulkheadSocketOuterD(ND_FiManTrunk)*0.5/tan(asin(BulkheadSocketOuterD(ND_FiManTrunk)/innerdiameter(ND_FiPipe, PS_Fi))) = 0.0021611 m
# offset of the coupling trunk from inner filter body
L_FiManCapOffset := 0.5*innerdiameter(ND_FiPipe, PS_Fi) - ConRadius(ND_FiManBranch)/tan(asin(2*ConRadius(ND_FiManBranch)/innerdiameter(ND_FiPipe, PS_Fi)))
# offset of the cap branch from inner filter body
S_FiManBranchEnds := L_FiManBulkheadOffset + CouplingLength(ND_FiManTrunk) + outerdiameter(ND_FiManBranch)/2 = 0.118874 m
L_FiManTrunk := innerdiameter(ND_FiPipe, PS_Fi) - BulkheadLength(ND_FiManTrunk) + BulkheadThreadLength(ND_FiManTrunk) - CapThickness(ND_FiManTrunk) - L_FiManBulkheadOffset - L_FiManCapOffset = 0.279117 m
N_FiManBranch := 6  # number of branches on either side
# distance from inner end of filter body to center of nearest branch
S_FiManBranch := (innerdiameter(ND_FiPipe, PS_Fi) - 2*S_FiManBranchEnds)/(N_FiManBranch - 1) = 0.0130954 m
# cut coupling down
L_FiManBranch :=
    for i ∈ 0 .. N_FiManBranch - 1
        L[i] ←
            0.5*innerdiameter(ND_FiPipe, PS_Fi)*sin(acos((0.5*innerdiameter(ND_FiPipe, PS_Fi) - S_FiManBranchEnds + ConRadius(ND_FiManBranch) - S_FiManBranch*i + BulkheadLength(ND_FiManTrunk) - BulkheadThreadLength(ND_FiManTrunk))/(0.5*innerdiameter(ND_FiPipe, PS_Fi)))) - (0.5*innerdiameter(ND_FiManTrunk, PS_FiBranch) + CapThickness(ND_FiManBranch)) if i < N_FiManBranch/2
            (0.5*innerdiameter(ND_FiPipe, PS_Fi) - innerdiameter(ND_FiManTrunk, PS_FiBranch) - L_FiManCapOffset - CapThickness(ND_FiManBranch)) if i + 0.5 == N_FiManBranch/2
            L[N_FiManBranch - 1 - i] otherwise
    L
L_FiManBranch = [0.0939599; 0.0996471; 0.103945; 0.103945; 0.0996471; 0.0939599] m
H_FiSandFluidizedSafe := Pi_FiFluidized*H_FiSand + T_FiLayer  # add T.FiLayer for safety
# Slot Design
# slotted manifold design and areas
L_SlotsPipeAvail := 2*sum(L_FiManBranch - 1.5*CapHeight(ND_FiManBranch)) = 0.475834 m
N_slots := 16/in
W_slots := 0.2 mm
L_slots := 0.9 in
A_slots := L_SlotsPipeAvail*N_slots*W_slots*L_slots = 0.0013704 m^2
CapHeight(ND_FiManBranch) = 1.5625 in
D_slots := sqrt(4*A_slots/π) = 0.0417714 m
innerdiameter(ND_FiManTrunk, PS_Fi) = 3.068 in
.5*CapHeight(ND_FiManBranch) = 0.78125 in
# Filtration Head Loss
K_ballValve := 0.05
K_tee90 := 1
K_bushing := 0.20
K_checkValve := 2.5
HL_FiOutPipe := h_l(Q_Plant, innerdiameter(ND_RMPipe, PS_Fi), H_FiSandFluidizedSafe, K_ballValve + 2*K_El90, Nu_Water, 0) + HL_Manifold(Q_Plant, innerdiameter(ND_RMPipe, PS_Fi), H_FiSandFluidizedSafe, 0, Nu_Water, 0, 3) = 0.126958 cm
HL_FiSlottedOut := HL_Manifold(Q_Plant/3, innerdiameter(ND_FiManTrunk, PS_Fi), L_FiManTrunk, K_checkValve + K_bushing, Nu_Water, 0, N_FiManBranch) + h_orifice(D_slots*sqrt(ε_FiSand), Pi_VenaContractaOrifice, Q_Plant/3) = 3.01616 cm
HL_SandBed := h_lKozeny(20 cm, D_FiSand60, Q_Plant/(6*A_circle(innerdiameter(ND_FiPipe, PS_Fi))), ε_FiSand, Nu_Water) = 5.56209 cm
HL_FiSlottedIn := HL_Manifold(Q_Plant/4, innerdiameter(ND_FiManTrunk, PS_Fi), innerdiameter(ND_FiPipe, PS_Fi), K_checkValve + K_bushing, Nu_Water, 0, N_FiManBranch) + h_orifice(D_slots*sqrt(ε_FiSand), Pi_VenaContractaOrifice, Q_Plant/4) = 1.69669 cm
HL_FiInPipe := h_l(Q_Plant, innerdiameter(ND_RMPipe, PS_Fi), L_FiPipe, K_ballValve + 2*K_tee90, Nu_Water, 0) + HL_Manifold(Q_Plant, innerdiameter(ND_RMPipe, PS_Fi), L_FiPipe, 0, Nu_Water, 0, 4) = 0.141399 cm
HL_Filtration := HL_FiOutPipe + HL_FiSlottedOut + HL_SandBed + HL_FiSlottedIn + HL_FiInPipe = 10.5433 cm
FiPipe_Origin := [0 m; 0 m; 0 m]
FiManBulkhead_Origin := [
    L_FiManBulkheadOffset - innerdiameter(ND_FiPipe, PS_Fi)/2;
    0;
    T_Flange + BulkheadSocketOuterD(ND_FiManTrunk)
] + FiPipe_Origin
FiManInletPipe_Origin := [L_FiManTrunk; 0 m; 0] + FiManBulkhead_Origin
FiBranch_Origin(i) := [
    FiPipe_Origin[0] + innerdiameter(ND_FiPipe, PS_Fi)/2 - S_FiManBranchEnds - S_FiManBranch*i;
    FiPipe_Origin[1] + innerdiameter(ND_FiManTrunk, PS_FiBranch)/2;
    FiManInletPipe_Origin[2]
]
# Backwash Plumbing
HL_FiBwSand := H_FiSand*(Rho_FiSand - Rho_H2O)*(1 - ε_FiSand)/Rho_H2O = 1.188 m
ND_FiBwDrain := D_pipeschedule(Q_Fi, PS_Fi, L_FiPipe - N_FiLayer*T_FiLayer, L_FiPipe, Nu_Water, E_Pvc, 3*K_El90) = 1 in
ND_FiBwDrain := ND_RMPipe = 4 in
L_FiBwBulkheadOffset := 0.5*innerdiameter(ND_FiPipe, PS_Fi) - BulkheadSocketOuterD(ND_FiBwDrain)*0.5/tan(asin(BulkheadSocketOuterD(ND_FiBwDrain)/innerdiameter(ND_FiPipe, PS_Fi))) = 0.00358947 m
L_FiBwMan := innerdiameter(ND_FiPipe, PS_Fi) - L_FiBwBulkheadOffset - CapThickness(ND_FiBwDrain) - BulkheadSocketDepth(ND_FiBwDrain) = 0.279391 m
L_FiBwManAvail := L_FiBwMan - 0.5*CapHeight(ND_FiBwDrain) - BulkheadSocketDepth(ND_FiBwDrain) = 0.226603 m
B_FiBwOrificesEst := 2 cm
N_FiBwOrifices := floor(L_FiBwManAvail/B_FiBwOrificesEst) + 1 = 12
N_FiBwOrifices := 36
D_FiBwOrifices := innerdiameter(ND_FiBwDrain, PS_Fi)/sqrt(N_FiBwOrifices) = 0.671 in
D_FiBwOrifices := 1/2*in
B_FiBwOrifices := (L_FiBwManAvail - 1.01*D_FiBwOrifices)/(N_FiBwOrifices - 1) = 0.0061079 m
L_FiBwOrificeOffsetR := BulkheadLength(ND_FiBwDrain) + 1.01*D_FiBwOrifices - BulkheadThreadLength(ND_FiBwDrain) = 3.12029 cm
# distance of first orifice from right side of manifold
BulkheadSocketDepth(ND_FiBwDrain) = 0.0131005 m
# headloss analysis during backwash
K_exit := 1
K_enter := 0.5
HL_BwDrain := h_l(Q_Plant, innerdiameter(ND_FiBwDrain, PS_Fi), L_FiPipe, 1*K_El90 + K_exit, Nu_Water, 0) = 0.00120322 m
HL_FiBwManBranch := HL_Manifold(Q_Plant, innerdiameter(ND_FiBwDrain, PS_Fi), L_FiBwMan, 0, Nu_Water, 0, N_FiBwOrifices) = 1.40614e-5 m
HL_FiBwOrifice := h_orifice(D_FiBwOrifices, Pi_VenaContractaOrifice, Q_Plant/N_FiBwOrifices) = 0.00389758 m
HL_FiBwInlet := HL_Manifold(Q_Plant, innerdiameter(ND_RMPipe, PS_Fi), L_FiPipe, K_El90 + K_tee90, Nu_Water, 0, 4) = 0.00056401 m
HL_FiBwManTrunk := HL_Manifold(Q_Plant, innerdiameter(ND_FiManTrunk, PS_FiBranch), L_FiBwMan, K_enter, Nu_Water, 0, 3) = 0.000442559 m
HL_SlotOrifice := h_orifice(D_slots, Pi_VenaContractaOrifice, Q_Plant) = 0.0431617 m
HL_FiBwTotal := HL_FiBwSand + HL_BwDrain + HL_FiBwManBranch + HL_FiBwOrifice + HL_FiBwInlet + HL_FiBwManTrunk + HL_SlotOrifice = 1.23728 m
ZW_FiOutPipe := H_FiSand
ZW_FiInPipeClean := ZW_FiOutPipe + HL_Filtration = 1.30543 m
ZW_FiInPipeDirty := ZW_FiOutPipe + HL_FiDirty
0.3640
# inner diameter of check valve
Z_FiBwOutlet := ZW_FiInPipeDirty - 1.1*HL_FiBwTotal = 0.238989 m
Z_EtBottom := ZW_FiInPipeDirty + H_Freefall + T_PlantWall
H_FiBottomToChemTanks := Z_EtBottom + H_Et + 20 cm + H_ChemTank = 3.21835 m
# AutoCAD Drawing of Filter
# Filter Body
LayerFiBody := layer_new("FiBodyPlu", blue3)
DrawFiBody := PipeF(FiPipe_Origin, L_FiPipe, [0; 90]*deg, ND_FiPipe, PS_FiBranch)
FreezeFiBody := FreezeLayer("FiBodyPlu")
FiBodyOrificeInlet := CylinderF(FiManBulkhead_Origin, outerdiameter(ND_FiManTrunk)/2, CouplingLength(ND_FiManTrunk), [0; 0]*deg)
ArrayInletOrifice := ArrayLast(N_FiLayer/2 + 1, 1, T_FiLayer*2)
FiBodyOrificeOutlet := CylinderF([
    FiPipe_Origin[0] + ConRadius(ND_FiPipe) + CouplingLength(ND_FiManTrunk)/2;
    FiManBulkhead_Origin[1];
    T_FiLayer + FiManBulkhead_Origin[2]
], outerdiameter(ND_FiManTrunk)/2, CouplingLength(ND_FiManTrunk), [0; 0]*deg)
ArrayOutletOrifice := ArrayLast(N_FiLayer/2, 1, T_FiLayer*2)
# GroupDelete
SubtractFiInletsOutlets := SubtractF(["FiBodyPlu"], "DeleteMe")
FiBodyPipe := stack(LayerFiBody, DrawFiBody, FreezeFiBody, FiBodyOrificeInlet, view("f"), ArrayInletOrifice, view("t"), FiBodyOrificeOutlet, view("f"), ArrayOutletOrifice, view("t"), GroupDelete, SubtractFiInletsOutlets)
# Piping
FiManTrunkLyr := layer_new("FiManTrunkPlu", blue3)
FiManTrunk := PipeF(FiManInletPipe_Origin, L_FiManTrunk, [0; 0]*deg, ND_FiManTrunk, PS_FiBranch)
FiManTrunkFrz := FreezeLayer("FiManTrunkPlu")
FiManTrunkOrifice := CylinderF(FiBranch_Origin(0) + [0; 1.5*ConRadius(ND_FiManTrunk); 0], outerdiameter(ND_FiManBranch)/2, 3*ConRadius(ND_FiManTrunk), [90; 0]*deg)
ArrayTrunkOrifice := ArrayLast(1, N_FiManBranch, -S_FiManBranch)
# GroupDelete
SubtractFiOrifices := SubtractF(["FiManTrunkPlu"], "DeleteMe")
FiManPlu :=
    Local ← layer_new("FiManBranchPlu", blue3)
    for i ∈ 0 .. N_FiManBranch - 1
        Local ← stack(Local, PipeF(FiBranch_Origin(i), L_FiManBranch[i], [270; 0]*deg, ND_FiManBranch, PS_FiBranch))
    Local
FiManFreeze := FreezeLayer("FiMan*Plu")
DrawFiManPipes := stack(FiManTrunkLyr, FiManTrunk, FiManTrunkFrz, FiManTrunkOrifice, ArrayTrunkOrifice, GroupDelete, SubtractFiOrifices, FiManPlu, FiManFreeze)
FiManBranchCaps :=
    Local ← layer_new("FiManCapsPlu", red)
    for i ∈ 0 .. N_FiManBranch - 1
        Local ← stack(Local, CutCapF(FiBranch_Origin(i) + [0; L_FiManBranch[i]; 0], H_FiManCap, [90; 0]*deg, ND_FiManBranch))
    Local
FiManTrunkCap := CapF(FiManInletPipe_Origin, [0; 0]*deg, ND_FiManTrunk)
FiManCapFrz := FreezeLayer("FiManCapsPlu")
ThawFiManPlu := ThawMultiple(["FiManBranchPlu"; "FiManCapsPlu"])
MirrorFiMan := MirrorAll([FiPipe_Origin[0]; FiPipe_Origin[1]], [FiPipe_Origin[0] + zc; FiPipe_Origin[1]], "n")
3.5
# 7.5 | from the center of the pipe
FiManPluFrz := FreezeMultiple(["FiMan*"])
10.5
L_CenterOuterPipes := 28.3 cm
FiManBulkheadLyr := layer_new("FiManBulkheadPlu", green)
FiManBulkhead := InsertDwg(BulkheadDwg, FiManBulkhead_Origin, ND_FiManTrunk, 180 deg) = ["-insert C:\Users\May\Desktop\Final Designs\Drawings and Templates\bulkheadfitting.dwg"; "-0.14945,0,0.06101 x 0.68385 0.68385  180"]
FiManBulkheadFrz := FreezeLayer("FiManBulkheadPlu")
DrawFiManFittings := stack(FiManBranchCaps, FiManTrunkCap, FiManCapFrz, ThawFiManPlu, MirrorFiMan, FiManPluFrz, FiManBulkheadLyr, FiManBulkhead, FiManBulkheadFrz)
MirrorFiManSet :=
    Local ← stack(ThawMultiple(["FiMan*"]), view("f"), array_all(N_FiLayer + 1, 1, T_FiLayer), view("f"))
    for i ∈ 0 .. N_FiLayer/2 - 1
        ManWin[i, 0] ← [
            -ConRadius(ND_FiPipe) + FiPipe_Origin[0] - BulkheadLength(ND_FiManTrunk);
            T_FiLayer*(2*i + 1) - 0.5*T_FiLayer + FiManInletPipe_Origin[2];
            0
        ]
        ManWin[i, 1] ← [
            ConRadius(ND_FiPipe) + FiPipe_Origin[0];
            T_FiLayer*(2*i + 1) + 0.5*T_FiLayer + FiManInletPipe_Origin[2];
            0
        ]
    SelectMans ← SelectWindow(ManWin)
    MirrorMans ← MirrorSelection([FiPipe_Origin[0]; FiPipe_Origin[2]], [FiPipe_Origin[0]; FiPipe_Origin[2] + zc], "y")
    Local ← stack(Local, SelectMans, MirrorMans)
    Local
FrzFiMan := FreezeMultiple(["FiMan*"])
ArrayFiManifolds := stack(MirrorFiManSet, view("t"), FrzFiMan)
# left is smaller
# origin is socket of right side
# in is the right side
# Bed Tester
reducerF(OriginPoint, AngleVector, ND_in, ND_out, ReducerLength, EN)
ND_FiTesterOuter := 1.5 in
ND_FiTesterInner := 1.25 in
L_FiTesterReducer := 2*SocketDepth(ND_FiTesterInner) + SocketDepth(ND_FiTesterOuter)
L_FiTesterOuter := outerdiameter(ND_FiPipe) + SocketDepth(ND_FiTesterOuter)
L_FiTesterInner := L_FiTesterOuter + L_FiTesterReducer + SocketDepth(ND_FiTesterInner) + 2*CapHeight(ND_FiTesterInner)
FiTesterOuter_Origin := [outerradius(ND_FiPipe) + SocketDepth(ND_FiTesterOuter); 0; T_FiLayer/2] + FiPipe_Origin
FiTesterInner_Origin := FiTesterOuter_Origin + [L_FiTesterReducer - SocketDepth(ND_FiTesterOuter) + 2*CapHeight(ND_FiPipe); 0; 0]
FiTesterLyr := layer_new("FiTesterPlu", blue)
FiTesterOuterPipe := PipeSUBF(FiTesterOuter_Origin, L_FiTesterOuter, [0; 0], ND_FiTesterOuter, PS_Fi, ["FiBodyPlu"])
FiTesterInnerPipe := PipeF(FiTesterInner_Origin, L_FiTesterInner, [0; 0], ND_FiTesterOuter, PS_Fi)
FiTesterFrz := FreezeLayer("FiTesterPlu")
FiTesterFitLyr := layer_new("FiTesterFittingsPlu", green)
FiTesterReducer := reducerF(FiTesterOuter_Origin, [180; 0; 0]*deg, ND_FiTesterInner, ND_FiTesterOuter, L_FiTesterReducer, PS_Fi)
FiTesterCap := CapF(FiTesterInner_Origin, [0; 0]*deg, ND_FiTesterInner)
FiTesterFitFrz := FreezeLayer("FiTesterFittingsPlu")
FiTesterScript := stack(FiTesterLyr, FiTesterOuterPipe, FiTesterInnerPipe, FiTesterOuterPipe, FiTesterFrz, FiTesterFitLyr, FiTesterReducer, FiTesterCap, FiTesterFitFrz)
# Backwash
FiBwBulkhead_Origin := [
    innerdiameter(ND_FiPipe, PS_Fi)/2 - L_FiBwBulkheadOffset;
    0;
    L_FiPipe - T_Flange - 1.25*ConRadius(ND_FiBwDrain)
] + FiPipe_Origin = [0.148023; 0; 1.95963] m
FiBwCoupling_Origin := FiBwBulkhead_Origin + [
    BulkheadThreadLength(ND_FiBwDrain) - 2*SocketDepth(ND_FiBwDrain) + CouplingLength(ND_FiBwDrain);
    0;
    0
]
FiBwElbow_Origin := FiBwCoupling_Origin + [2*SocketDepth(ND_FiBwDrain) + ElbowRadius(ND_FiBwDrain); 0; -ElbowRadius(ND_FiBwDrain)]
BulkheadThreadLength(ND_FiBwDrain) = 0.125906 m
BallValveLength(ND) := ValveLength(ND)
FiBwBallValve_Origin := [
    FiBwElbow_Origin[0] + ElbowRadius(ND_FiBwDrain);
    FiBwElbow_Origin[1];
    FiPipe_Origin[2] + T_Flange + 2*BallValveLength(ND_FiBwDrain)
]
BallValveSocket(ND) := SocketDepth(ND)
FiBwDrainLyr := layer_new("FiBwDrainPlu", blue3)
FiBwMan := PipeF(FiBwBulkhead_Origin, L_FiBwMan, [0; 0]*deg, ND_FiBwDrain, PS_Fi)
FiBwDrainFrz := FreezeLayer("FiBwDrainPlu")
FiBwManOrifice := CylinderF(FiBwBulkhead_Origin - [L_FiBwOrificeOffsetR; 0; 0], D_FiBwOrifices/2, 1.1*ConRadius(ND_FiBwDrain), [0; 270]*deg)
ArrayFiBwManOrifices := ArrayLast(1, N_FiBwOrifices, -B_FiBwOrifices)
GroupDelete
SubtractFiBwManOrifices := SubtractF(["FiBwDrainPlu"], "DeleteMe")
SelectBwDrain := SelectLayer("FiBwDrainPlu")
FiBwNipple := PipeF(FiBwCoupling_Origin + [2*SocketDepth(ND_FiBwDrain); 0; 0], 2*SocketDepth(ND_FiBwDrain), [0; 0]*deg, ND_FiBwDrain, PS_Fi)
FiBwPipeVert := PipeF(FiBwElbow_Origin, FiBwElbow_Origin[2] - FiBwBallValve_Origin[2] + BallValveSocket(ND_FiBwDrain), [0; 270]*deg, ND_FiBwDrain, PS_Fi)
FiBwDrainPlu := stack(FiBwDrainLyr, FiBwMan, FiBwDrainFrz, FiBwManOrifice, ArrayFiBwManOrifices, GroupDelete, SubtractFiBwManOrifices, SelectBwDrain, FiBwNipple, FiBwPipeVert, FiBwDrainFrz)
FiBwDrainFittingsLyr := layer_new("FiBwDrainFittingsPlu", green)
FiBwManBulkhead := InsertDwg(BulkheadDwg, FiBwBulkhead_Origin, ND_FiBwDrain, 0 deg) = ["-insert C:\Users\May\Desktop\Final Designs\Drawings and Templates\bulkheadfitting.dwg"; "0.14802,0,1.95963 x 0.87923 0.87923  0"]
FiBwCoupling := CouplingF(FiBwCoupling_Origin, [0; 0]*deg, ND_FiBwDrain, PS_Fi)
FiBwElbow := ElbowF(FiBwElbow_Origin, [0; 0; 90]*deg, ND_FiBwDrain, PS_Fi)
FiBwBallValve := □  # error: This placeholder is empty.
FiBwManCap := CapF(FiBwBulkhead_Origin - [L_FiBwMan; 0; 0], [180; 0]*deg, ND_FiBwDrain)
SubtractFiBwManCapOrifices := SubtractF(["FiBwDrainFittingsPlu"], "DeleteMe")
SelectFiBwDrainFittings := SelectLayer("FiBwDrainFittingsPlu")
FiBwDrainFittingsFrz := FreezeLayer("FiBwDrainFittingsPlu")
FiBwDrainFittings := stack(FiBwDrainFittingsLyr, FiBwManCap, FiBwDrainFittingsFrz, FiBwManOrifice, ArrayFiBwManOrifices, GroupDelete, SubtractFiBwManCapOrifices, SelectFiBwDrainFittings, FiBwManBulkhead, FiBwElbow, FiBwCoupling, FiBwDrainFittingsFrz)
FiBwPlu := stack(FiBwDrainFittings, FiBwDrainPlu)
L_TeeDistance := 0.6 m
# In/Out Plumbing
FiInletTeeBottom_Origin := [-L_TeeDistance; 0; ShortTeeLength(ND_RMPipe)] + FiManBulkhead_Origin
FiInletTee2_Origin := FiInletTeeBottom_Origin + [ShortTeeLength(ND_RMPipe); 0; -ShortTeeLength(ND_RMPipe) + 2*T_FiLayer]
FiInletTee3_Origin := FiInletTee2_Origin + [0; 0; 2*T_FiLayer]
FiInletElbow_Origin := [-ShortTeeLength(ND_RMPipe) + ElbowRadius(ND_RMPipe); 0; 2*T_FiLayer] + FiInletTee3_Origin
FiInletManifoldFittingsLyr := layer_new("FiInletManFittingsPlu", green)
FiInletBottomTee := TeeF(FiInletTeeBottom_Origin, [0; 0; 90]*deg, ND_RMPipe, PS_Fi)
FiInletTee2 := TeeF(FiInletTee2_Origin, [270; 0; 90]*deg, ND_RMPipe, PS_Fi)
FiInletTee3 := TeeF(FiInletTee3_Origin, [270; 0; 90]*deg, ND_RMPipe, PS_Fi)
FiInletElbow := ElbowF(FiInletElbow_Origin, [90; 0; 90]*deg, ND_RMPipe, PS_Fi)
FiInletManifoldFittingsFrz := FreezeLayer("FiInletManFittingsPlu")
FiInletFittings := stack(FiInletManifoldFittingsLyr, FiInletBottomTee, FiInletTee2, FiInletTee3, FiInletElbow, FiInletManifoldFittingsFrz)
FiInletPipesLyr := layer_new("FiInletManPlu", blue)
FiInletManBottomPipeV := PipeF(FiInletTeeBottom_Origin, FiInletTee2_Origin[2] - FiInletTeeBottom_Origin[2] - ShortTeeLength(ND_RMPipe), [0; 90]*deg, ND_RMPipe, PS_Fi)
FiInletManPipe2V := PipeF(FiInletTee2_Origin + [-ShortTeeLength(ND_RMPipe); 0; ShortTeeLength(ND_RMPipe)], FiInletTee3_Origin[2] - FiInletTee2_Origin[2] - TeeLength(ND_RMPipe), [0; 90]*deg, ND_RMPipe, PS_Fi)
FiInletManPipe3V := PipeF(FiInletTee3_Origin + [-ShortTeeLength(ND_RMPipe); 0; ShortTeeLength(ND_RMPipe)], FiInletElbow_Origin[2] - FiInletTee3_Origin[2] - ShortTeeLength(ND_RMPipe) - ElbowRadius(ND_RMPipe), [0; 90]*deg, ND_RMPipe, PS_Fi)
FiInletPipesFrz := FreezeLayer("FiInletManPlu")
FiInletPipes := stack(FiInletPipesLyr, FiInletManBottomPipeV, FiInletManPipe2V, FiInletManPipe3V, FiInletPipesFrz)
FiOutletFittingsLyr := layer_new("FiOutletManFittingsPlu", green)
FiOutletCheckValves := □  # error: This placeholder is empty.
FiInletPlu := stack(FiInletFittings, FiInletPipes)
FiInExManPlu := stack(FiInletPlu)
# AutoCAD Drawing of Other Parts
AC_LFSRSF := stack(FiBodyPipe, DrawFiManPipes, DrawFiManFittings, ArrayFiManifolds, FiBwPlu, FiInExManPlu)
# [component: inputs AC_LFSRSF]
