# Reference Master Program
# [reference: MasterProgram.xmcd]
# [reference: PipeDatabase.xmcd]
couplingscript(o, outerradiusocket, outerradius, innerradiussocket, innerradius, L, L_socket) :=
    zoom ← zoom_win([o[0] - outerradiusocket; o[1] + outerradiusocket; o[2]], [o[0] + outerradiusocket; o[1] - outerradiusocket; o[2]])
    cylinder1 ← cylinderC(o, outerradius, -L)
    cylinder3 ← cylinderC([o[0]; o[1]; o[2]], outerradiusocket, L_socket)
    cylinder4 ← cylinderC([o[0]; o[1]; o[2] - zc], innerradiussocket, L_socket + zc)
    subtract2 ← subtractD([o[0] - outerradiusocket; o[1]; o[2]], [o[0] - innerradiussocket; o[1]; o[2]])
    union1 ← union_allA
    cylinder2 ← cylinderC([o[0]; o[1]; o[2] - L - zc], innerradius, L + L_socket + 2*zc)
    zoom ← zoom_win([o[0] - outerradiusocket; o[1] + outerradiusocket; o[2]], [o[0] + outerradiusocket; o[1] - outerradiusocket; o[2]])
    subtract1 ← subtractD([o[0] - outerradius; o[1]; o[2]], [o[0] - innerradius; o[1]; o[2]])
    one ← stack(zoom, cylinder1, cylinder3, cylinder4, subtract2, union1, cylinder2, zoom, subtract1)
    return one
# Draw outside of pipe
# Draw outside of socket
# Draw inside of socket
# Subtract inner socket from outer socket
# Draw inner pipe
# Subtract inner pipe from outer pipe
couplingIDpipe(o, ID_pipe, L, EN) := couplingscript([o[0]; o[1]; o[2] - SocketDepth(ID_pipe)], ElbowRadius(NominalDiameter(ID_pipe, EN))/2, outerradius(NominalDiameter(ID_pipe, EN)), outerradius(NominalDiameter(ID_pipe, EN)), NominalDiameter(ID_pipe, EN)/2, L, SocketDepth(ID_pipe))
couplingIDsocket(o, ID_socket, L, EN) := couplingscript([o[0]; o[1]; o[2] - SocketDepth(Pipesizes[index(ID_socket), 0])], ElbowRadius(Pipesizes[index(ID_socket), 0]), outerradius(Pipesizes[index(ID_socket), 0]), outerradius(Pipesizes[index(ID_socket), 0]), NominalDiameter(Pipesizes[index(ID_socket), 0], EN)/2, L, SocketDepth(Pipesizes[index(ID_socket), 0]))
Pipesizes[index(4 in), 1] = 4.5 in
match(4 in, Pipesizes) = [[12; 0]; [11; 1]]
NominalDiameter(0.152 m, 2) = 0.1524 m
# L is T.wall-L.socket+IH.cap
