# Fluids Functions
# [reference: FluidsFunctions.xmcd]
# Pipe Database
# [reference: PipeDatabase.xmcd]
# Design Assumptions
# [reference: DesignAssumptions.xmcd]
# User Inputs
# [reference: MasterProgram.xmcd]
# Gives an array of the vertical location of each set of holes given hole spacing and the maximum head:
heads(Spacing, Change) :=
    for i ∈ 0 .. Change/Spacing
        h_grit[i] ← i*Spacing
    return h_grit
# This function provides the flow rate for a given head.  Requires an array with hole numbers at each level up to the current head level.
Q(h, n, Orifice_spacing, A_drillbit, K_orifice) :=
    Q ← 0
    return Q if h == 0
    otherwise
        levels ← floor(h/Orifice_spacing)
        Q ← Q + K_orifice*A_drillbit*n[0]*sqrt(2*g*h) if levels == 0
        otherwise
            for i ∈ 0 .. levels - 1
                Q ← Q + K_orifice*A_drillbit*n[i]*sqrt(2*g*(h - Orifice_spacing*i))
        return Q
# This returns an array with the number of holes required to create a linear relationship between flow and depth at each vertical orifice spacing:
N_holes(h_grit, Base, MaxHeadChange, Orifice_spacing, FirstFlow, A_drillbit, K_orifice) :=
    n_holes[0] ← Base
    for p ∈ 1 .. MaxHeadChange/Orifice_spacing - 1
        n_holes[p] ← 0
        while Q(h_grit[p + 1], n_holes, Orifice_spacing, A_drillbit, K_orifice) ≤ FirstFlow*(p + 1)
            n_holes[p] ← n_holes[p] + .1
        n_holes[p] ← round(n_holes[p])
    return n_holes
# Given the number of holes at each vertical orifice spacing above, what are the actual flow rates what art the flow rates when the water reaches just below each set of holes?
Orifice_spacing := 2 cm
OurFlows(h, n, Orifice_spacing, A_drillbit, K_orifice) :=
    for i ∈ 0 .. length(h) - 1
        Flows[i] ← Q(h[i], n, Orifice_spacing, A_drillbit, K_orifice)
    return Flows
D_avail := AvailPipeSizes1(PipeSpecification)
K_sum := K_sum(0, n_elbowsgrit, 0, n_tgrit, 0, 0, 0, 0, 0)
h_grit := heads(Orifice_spacing, h_lmax)
D_riser := D_pipe(Q_plant, D_avail, h_lmax, L_rmpipe, ν, ε_pvc, K_sum)
n_risers := ceil(4*A_orifice(h_lorificemax, K_orifice, Q_plant)/(π*D_pipe(Q_plant, D_avail, h_lmax, L_rmpipe, ν, ε_pvc, K_sum)^2*A_ratio))
Q_ideal := h_grit*Q_plant/h_riser
FirstFlow := Q_plant/(h_lmax/Orifice_spacing)
h_riser := 20 cm
D_drill :=
    D_engdrill if english
    D_metdrill otherwise
Q_error := 30
# Initial error between ideal and actual
# flow rates in grit chamber
D_engdrill := [
    2/16*in;
    3/16*in;
    4/16*in;
    5/16*in;
    6/16*in;
    7/16*in;
    8/16*in;
    9/16*in;
    10/16*in;
    11/16*in;
    12/16*in
]
D_orifice :=
    i ← last(D_drill)
    while Q_error > Max_error
        A_drillbit ← π*D_drill[i]^2/4
        BaseHoles ← round(FirstFlow/Q_orifice(D_drill[i], h_lmax, K_orifice))
        n_orifices ← N_holes(h_grit, BaseHoles, h_lmax, Orifice_spacing, FirstFlow, A_drillbit, K_orifice)
        Q_actual ← OurFlows(h_grit, n_orifices, Orifice_spacing, A_drillbit, K_orifice)
        Q_error ← 100*max(|Q_actual - Q_ideal|)/Q_plant
        i ← i - 1
    return D_drill[i + 1]/m
D_metdrill := [
    3 mm;
    4 mm;
    5 mm;
    6 mm;
    7 mm;
    8 mm;
    9 mm;
    10 mm;
    11 mm;
    12 mm;
    13 mm;
    14 mm;
    15 mm;
    16 mm;
    17 mm;
    18 mm;
    19 mm;
    20 mm
]
D_orifice = 0.01905
PipeSpecification = 0
TeeLength(1/4*in) = 0 m
AvailPipeSizes(PipeSpecification)[3, 1] = 0.5 in
AvailPipeSizes(PipeSpecification)[:, 1] = [0.125; 0.25; 0.375; 0.5; 0.75; 1; 1.25; 1.5; 2; 2.5; 3; 4; 5; 6; 8; 10; 12; 14; 16; 18; 20; 24] in
AvailPipeSizes(8)[1, 1] = 0.03175 m
TeeLength(AvailPipeSizes(PipeSpecification)[1, 1]) = 0 m
L_elbow := 4 in
L_t := 4 in
ElbowRadius(NominalPipeSize)
grit_width :=
    grit_width ← n_tgrit*L_t + n_elbowsgrit*L_elbow
    D_drum ← 2*r_drum
    grit_width if grit_width > D_drum
    D_drum otherwise
gritchamber(Q_plant, DrillSize, r_drum, PipeSpecification) :=
    D_avail ← AvailPipeSizes1(PipeSpecification)
    K_sum ← K_sum(0, n_elbowsgrit, 0, n_tgrit, 0, 0, 0, 0, 0)
    D_riser ← D_pipe(Q_plant, D_avail, h_lmax, L_rmpipe, ν, ε_pvc, K_sum)
    A_orif ← A_orifice(h_lorificemax, K_orifice, Q_plant)
    n_risers ← ceil(4*A_orif/(π*D_riser^2*A_ratio))
    A_drillbit ← π*DrillSize^2/4
    h_grit ← heads(Orifice_spacing, h_lmax)
    FirstFlow ← Q_plant/(h_lmax/Orifice_spacing)
    Q_ideal ← h_grit*Q_plant/h_riser
    D_orifice ← DrillSize
    BaseHoles ← round(FirstFlow/Q_orifice(DrillSize, h_lmax, K_orifice))
    n_orifices ← N_holes(h_grit, BaseHoles, h_lmax, Orifice_spacing, FirstFlow, A_drillbit, K_orifice)
    Q_actual ← OurFlows(h_grit, n_orifices, Orifice_spacing, A_drillbit, K_orifice)
    Q_error ← 100*max(|Q_actual - Q_ideal|)/Q_plant
    Q ← Q(h_lmax, h_grit)
    riser_area ← D_riser^2/4*π
    riser_areaTotal ← riser_area*n_risers
    drum_circumference ← r_drum^2*π
    riser_areaTotal ← drum_circumference if drum_circumference > riser_areaTotal
    grit_length ← sqrt(riser_areaTotal)
    grit_width ← r_drum*2 + sqrt(riser_areaTotal)
    grit_depth ← 2 m
    grit_dim ← [grit_length; grit_width; grit_depth]
    return [grit_dim/m, n_risers, n_orifices, D_riser/m, D_orifice/m]  # error: This value must be a function, but has the form: Unitless.
D_orifice = 0.75 in/m
