# [reference: DesignAssumptions.xmcd]
# [reference: PipeDatabase.xmcd]
# [reference: FluidsFunctions.xmcd]
# [reference: Pipe Design and minor loss coefficients.xmcd]
d_orifice(Q_manifoldratio, Q_tank, d_pipe, L_s, L_l, K_total, n_orifice, ν, ε, K_or) := nthroot((1 - Q_manifoldratio)*d_pipe^4/(((K_total + f(Q_tank, d_pipe, ν, ε)*L_l/d_pipe)*Q_manifoldratio - K_total - f(Q_tank, d_pipe, ν, ε)*L_s/d_pipe)*K_or^2*n_orifice^2), 4)
# Launderer Design
Launder(Q_plant, PipeSpecification, L_sedtank, lamella_spacing, HW_sedtank, spaceabove, width_channel, SedTank_width, platform_thick, walkway) :=
    Q_tank ← Q_plant/n_sedtanks
    orifice_dist ← 2*lamella_spacing
    n_orifices ← 2*floor(L_sedtank/orifice_dist)
    Q_orifice ← Q_tank/n_orifices
    manifold_depth ← spaceabove/2
    D_avail ← AvailPipeSizes1(PipeSpecification)
    Diam_launder ← D_manifold(Q_tank, manifold_depth, 2*L_sedtank, Q_ratioLaunderOrf, D_avail, ν, ε_pvc, 0, n_orifices)
    SedPipe_length ← L_sedtank
    L_longlaunder ← 2*SedTank_width + 0.5*SedTank_width + width_channel + 3*platform_thick + walkway + 0.8 m + SedPipe_length
    L_shortlaunder ← 0.5*SedTank_width + width_channel + 3*platform_thick + walkway + 0.8 m + SedPipe_length
    K_sum ← K_sum(0, 4, 0, 0, 0, 0, 0, 0, 0)
    D_orifice ← d_orifice(Q_ratioLaunders, Q_tank, Diam_launder, L_shortlaunder, L_longlaunder, K_sum, n_orifices, ν, ε_pvc, K_orifice)
    h_orif ← h_orifice(D_orifice, K_orifice, Q_orifice)
    HL_laundorif ← h_orif*n_orifices*n_sedtanks
    h_losslaunder ← h_lmanifold(Q_tank, Diam_launder, 2*L_sedtank, 0, ν, ε_pvc, n_orifices)
    HL_launder ← h_losslaunder*n_sedtanks
    HL_laundertotal ← HL_launder + HL_laundorif + h_e(Q_tank, Diam_launder, K_sum)
    D_launder1 ← PipeSize(Q_tank, PipeSpecification, L_longlaunder, K_sum, HL_laundertotal)
    D_launder ← D_launder1 if D_launder1 ≥ Diam_launder
    D_launder ← Diam_launder otherwise
    if D_launder > 6 in
        Diam_launder ← 6 in
        D_launder ← Diam_launder
        D_orifice ← d_orifice(Q_ratioLaunders, Q_tank, Diam_launder, L_shortlaunder, L_longlaunder, K_sum, n_orifices, ν, ε_pvc, K_orifice)
        h_orif ← h_orifice(D_orifice, K_orifice, Q_orifice)
        HL_laundorif ← h_orif*n_orifices*n_sedtanks
        h_losslaunder ← h_lmanifold(Q_tank, Diam_launder, 2*L_sedtank, 0, ν, ε_pvc, n_orifices)
        HL_launder ← h_losslaunder*n_sedtanks
        HL_laundertotal ← HL_launder + HL_laundorif + h_e(Q_tank, Diam_launder, K_sum)
    mayor_hl ← h_f(Q_tank, D_launder, L_longlaunder, ν, ε_pvc)
    offfloor_length ← 1.5*D_launder
    return [SedPipe_length/m, D_orifice/m, orifice_dist/m, manifold_depth/m, D_launder/m, n_orifices, HL_laundertotal/m, h_orif/m, D_launder1/m, mayor_hl/m, Diam_launder/m]
# The orifices will be located on the sides of the launder and will be spaced at twice the lamella spacing
# The launder will be located between the top of the lamella and the surface of the water in the sedimentation tank, the orifices will be at the center of the launders
# Using the iterative program from above, and the available pipe sizes from the pipe database, the launder diameter is determined
# The head loss through the launder is calculated by using the orifice equation,and the manifold head loss equation found the Fluids Functions file. By multiplying by the number of sedtanks, the total head loss is determined, and the water level in the plant leveling tank can be determined.
Launder(110*gpm, 8, 2.515*m, 0.05 m, 1.96 m, 0.267*m, 0.5 m, 1 m, 0.15 m, 1 m) = [2.515, 0.00896706, 0.1, 0.1335, 0.081534, 50, 10.3949, 0.0689469, 0.029845, 0.025288, 0.081534]
Launder(500*gpm, 8, 8.916 m, 0.05 m, 1.96 m, 0.267*m, 0.5 m, 1.067 m, 0.15 m, 1 m) = [8.916, 0.0173811, 0.1, 0.1335, 0.1524, 178, 4.35678, 0.00796265, 0.081534, 0.0348658, 0.1524]
