# AguaClara Water Treatment Plants
# Automated Design
# References
# [reference: Channel design.xmcd]
# [reference: Chemical Feed.xmcd]
# [reference: Flocculation Function.xmcd]
# [reference: GritChamber.xmcd]
# [reference: HydraulicDesign.xmcd]
# [reference: Launder.xmcd]
# [reference: Plant Elevation Design.xmcd]
# [reference: plantleveltank.xmcd]
# [reference: Sedimentation Function.xmcd]
# User Inputs:
# Choose either a Pipe Schedule Number or an SDR rating:
# [component: outputs PipeSpecification]
# Engineer Entered Values: | Values used to Draw Plant:
tank_thick := 20 cm
Q_plant := 100*gpm = 10153.4 L*m/(mi*s)
lvltank_thick := 20 cm
# sed tank parameters
stockplat_thick := lvltank_thick
beta := 45 deg
grit_thick := lvltank_thick
SedTank_width := 42 in  # Width of the lamella
platform_thick := .5 m
# length of the lamella
channel_thick := 10 cm
L_lamella := 80 cm
lamella_spacing := 5 cm  # lamella spacing
walkway_width := 1 m
# grit chamber parameters
# Would you like to use Metric of English drill bits?
# [component: outputs DrillSeries]
# Calls Functions Here:
# Chemical Feed Design
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Q_alum := ChemicalFeed(Q_plant) = 189.271 mL/min
# Channel Design
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Channel_dim := Channel(Q_plant, SedTank_width, tank_thick) = [3.6004; 0.268616; 0.7] m
# Sedimentation Tank Design
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SedTank := SedTankDesign(Q_plant, SedTank_width, lamella_spacing, L_lamella, beta, Channel_dim) = [[2.10322; 1.0668; 2.05952], 24, 1.95952, 1.35952, 12.6132, 0.2667]
# outputs:
[sedtank_dim/m, N_lamella, water_depth/m, z_plat/m, v_c*day/m, spaceabove/m]  # disabled
# Flocculator Design
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# The baffle positions are reported in the following way:
# There is one matrix for each channel. The first column is the x position
# of the baffle. The 2nd column is the starting y position of a baffle (ie top of the tank (0),
# or bottom of tank), the 3rd column is the final position of the baffle.
# Therefore a baffle at position x extends between the two y coordinates.
[floc_dim/m, baffle_spacing/m, tot_baffle, total_hl/m, uturnhole_dim/m, baffle_length/m, baffle_positions, Gθ_newmin, length_duetobaffles/m]  # disabled
Flocculator := flocculator(Q_plant, SedTank[:, 0][0]) = [[4.20644; 0.5334; 2.16494], [0.0819206; 0.17122; 0.242142], 38, 0.105416, [0.0669206; 1.36474], [1.83664; 1.70269; 1.59631], [[
    0.0819206, 2.16494, 0.328297;
    0.163841, 0, 1.83664;
    0.245762, 2.16494, 0.328297;
    0.327682, 0, 1.83664;
    0.409603, 2.16494, 0.328297;
    0.491523, 0, 1.83664;
    0.573444, 2.16494, 0.328297;
    0.655365, 0, 1.83664;
    0.737285, 2.16494, 0.328297;
    0.819206, 0, 1.83664;
    0.901126, 2.16494, 0.328297;
    0.983047, 0, 1.83664;
    1.06497, 2.16494, 0.328297;
    1.14689, 0, 1.83664;
    1.22881, 2.16494, 0.328297;
    1.31073, 0, 1.83664;
    1.39265, 2.16494, 0.328297;
    1.47457, 0, 1.83664;
    1.55649, 2.16494, 0.328297;
    1.63841, 0, 1.83664;
    1.72033, 2.16494, 0.328297;
    1.80225, 0, 1.83664;
    1.88417, 2.16494, 0.328297;
    1.96609, 0, 1.83664
], [
    2.0213, 2.16494, 0.328297;
    1.93938, 0, 1.83664;
    1.85746, 2.16494, 0.328297;
    1.77554, 0, 1.83664;
    1.69362, 2.16494, 0.328297;
    1.6117, 0, 1.83664;
    1.52978, 2.16494, 0.328297;
    1.35856, 0, 1.70269;
    1.18734, 2.16494, 0.462247;
    1.01612, 0, 1.70269;
    0.844897, 2.16494, 0.462247;
    0.673677, 0, 1.70269;
    0.502457, 2.16494, 0.462247;
    0.331237, 0, 1.70269
]], [[3792.88; 856.456; 0], 4649.33], 4.70665]
# Grit Chamber Design
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Grit := gritchamber(Q_plant, PipeSpecification, DrillSeries, lamella_spacing, L_lamella, beta, Channel_dim, SedTank[:, 0][0]*m, SedTank[:, 2][0]*m, Flocculator[:, 3][0]*m) = [[1.08585; 0.9048; 2.64881], 2, [2; 8; 2; 2; 1; 2; 1; 2; 1; 1], 0.108204, [0.01905]]
[grit_dim, n_risers, n_orifices, D_riser/m, D_orifice]  # disabled
# Launderer Design
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Laund := Launder(Q_plant, PipeSpecification, SedTank[:, 0][0][0]*m, lamella_spacing, SedTank[:, 2][0]*m, SedTank[:, 5][0]*m, Channel_dim[1], SedTank[:, 0][0][1]*m, platform_thick, walkway_width) = [2.10322, 0.0378799, 0.1, 0.13335, 0.066929, 42, 0.129489, 0.000253592, 0.066929, 0.0398548, 0.066929]
[SedPipe_length/m, D_orifice/m, orifice_dist/m, manifold_depth/m, D_launder/m, n_orifices, HL_laundertotal/m, h_orifice/m, D_launder1/m, mayor_hl/m, Diam_launder/m]  # disabled
# Sludge Pipe Design
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SludgePipe := Sludge(Q_plant, PipeSpecification, SedTank[:, 0][0][0]*m, lamella_spacing) = [0.082804, 0.00483264, 0.1] m
[waste_inr, D_orifice, orifice_dist]  # disabled
# Plant Leveling Tank
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PLT := PlantLevelingTank(Q_plant, PipeSpecification, Laund[:, 4][0]*m, Laund[:, 6][0]*m) = [[0.236048; 0.666929; 0.7], 0.0278638, 0.370511, 0.470511] m
[lvltank_dim, D_weir, H_weir, HW_plantleveling]  # disabled
# Plant Elevation Design
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Z_elevation := PlantElevations(Q_plant, Grit, Laund, SedTank, Q_alum, PLT[:, 2][0], PLT[:, 1][0], Flocculator[:, 3][0]*m, L_lamella, 10 cm) = [3.43874; 2.83874; 2.73874; 1.53874; 2.63874; 2.58874; 2.38874; 2.68874; 2.58874; 2.38874; 2.21691; 2.21691; 2.16494; 2.06494; 2.05952; 1.95952; 1.63923; 1.31894; 0.62612; 1.35952; 1.71361; 1.83061; 2.05952] m
# Constructing Tables of Parameters:
# Defining components of Output Arrays:
[sedtank_dim, N_lamella, water_depth, z_plat, v_c, spaceabove] := SedTank
[floc_dim, baffle_spacing, tot_baffle, floctotal_hl, uturnhole_dim, baffle_length, baffle_positions, Gθ_newmin, length_duetobaffles, floc_inleth] := Flocculator  # error: This array index is invalid for this array.
[SedPipe_length, D_laundOrf, laundOrf_dist, manifold_depth, D_launder, n_laundOrf, HL_laundertotal, h_laundOrf, D_launder1, mayor_hl, Diam_launder] := Laund
[waste_inr, D_sludgeOrf, sludgeOrf_dist] := SludgePipe/m
[lvltank_dim, D_weir, H_weir, HW_plantleveling] := PLT/m
[grit_dim, n_GritRisers, n_GritOrf, D_GritRiser, D_GritOrf] := Grit
# Defining components of Table Arrays:
headerrow := ["Parameter"; "Value"; "Units"]
Units := [" "; " meter per day"; "meter"; " "; "meter"; "meter"; "centimeter"; "meter"; "meter"; "meter"; " "; "inches"; "centimeter"; "meter"; "meter"; "meter"; "meter"; "meter"; "meter"; "centimeter"]
headercolumn := [
    "Number of lamella in sedimentation tanks";
    "critical velocity in sed tank";
    "height of the inlet to the flocc tank";
    "number of baffles in flocculator";
    "total headloss through flocculator";
    "length of the sedimentation inlet launder";
    "diameter of orifices in the launder";
    "distance between orifices in the launder";
    "depth of the launder below the water level";
    "diameter of the sedimentation inlet launder";
    "number of orifices in the launder";
    "diameter of sedimentation outlet sludge pipe";
    "diameter of orifices in sludge pipe";
    "distance between orifices in sludge pipe";
    "Diameter of weir in Plant Leveling Tank";
    "Height of weir in PLT";
    "Height of the Water in the PLt";
    "number of risers in grit chamber";
    "diameter of risers in grit chamber";
    "diameter of orifices in grit chamber"
]
Z := [
    N_lamella;
    v_c;
    floc_inleth;
    tot_baffle;
    floctotal_hl;
    SedPipe_length;
    D_laundOrf*m/cm;
    laundOrf_dist;
    manifold_depth;
    D_launder1;
    n_laundOrf;
    waste_inr*m/in;
    D_sludgeOrf*m/cm;
    sludgeOrf_dist;
    D_weir;
    H_weir;
    HW_plantleveling;
    n_GritRisers;
    D_GritRiser;
    D_GritOrf*m/cm
]  # error: This variable is undefined.
length(headercolumn) = 20
length(Z) =  # error: This variable is undefined.
table(headerrow, headercolumn, Z) :=
    for i ∈ 0 .. length(headercolumn)
        for j ∈ 0 .. last(headerrow)
            table[i, j] ← headerrow[j] if i == 0
            otherwise
                table[i, j] ← headercolumn[i - 1] if j == 0
                table[i, j] ← Z[i - 1] if j == 1
                table[i, j] ← Units[i - 1] if j == 2
    return table
headercolumn_Dim := [" Sedimentation Tank"; "Dimensions of Flocculator"; "Dimensions of Grit Chamber"; "Dimensions of Leveling Tank"; "Dimensions of Channel"]
headerrow_Dim := ["Component"; "Length"; "Width"; "Height"; "Units"]
Dim_y := [sedtank_dim[1]; floc_dim[1]; grit_dim[1]; lvltank_dim[1]; Channel_dim[1]/m]  # error: This variable is undefined.
Dim_z := [sedtank_dim[2]; floc_dim[1]; grit_dim[2]; lvltank_dim[2]; Channel_dim[2]/m]  # error: This variable is undefined.
Dim_x := [sedtank_dim[0]; floc_dim[0]; grit_dim[0]; lvltank_dim[0]; Channel_dim[0]/m]  # error: This variable is undefined.
Units2 := ["meter"; "meter"; "meter"; "meter"; "meter"]
tableDim(headerrow_Dim, headercolumn_Dim, Dim_x, Dim_y, Dim_z, Units2) :=
    for i ∈ 0 .. length(headercolumn_Dim)
        for j ∈ 0 .. last(headerrow_Dim)
            tableDim[i, j] ← headerrow_Dim[j] if i == 0
            otherwise
                tableDim[i, j] ← headercolumn_Dim[i - 1] if j == 0
                tableDim[i, j] ← Dim_x[i - 1] if j == 1
                tableDim[i, j] ← Dim_y[i - 1] if j == 2
                tableDim[i, j] ← Dim_z[i - 1] if j == 3
                tableDim[i, j] ← Units2[i - 1] if j == 4
    return tableDim
# Constructing Plant Elevation Tables:
headerrow_elevation := ["Element"; "Elevation from bottom of the sed tank (m)"; "Elevation from platform (m)"]
# top of alum stock tank
# port on alum stock tank
# bottom of alum stock tank
# alum platform height
# valve level in the FCM
# water level in the FCM
# end of the FCM tube at maximum alum dose
# grit chamber wall
# grit chamber maximum water level
# orifice elevation in the grit chamber
# horizontal pipe centerline where it leaves the grit chamber
# water level in rapid mix
# wall height for beginning of flocculator
# water level at beginning of flocculator
# wall height for the sedimentation tank
# water level in the sedimentation tank and channel
# top of the effluent launder
# top of the plate settlers
# bottom of the plate settlers
# platform height
# weir height
# level control water height
headercolumn_elevation := [
    "top of alum stock tank";
    "port on alum stock tank";
    "bottom of alum stock tank";
    "alum platform height";
    "valve level in the FCM";
    "water level in the FCM";
    "end of the FCM tube at maximum alum dose";
    "grit chamber wall";
    "grit chamber maximum water level";
    "orifice elevation in the grit chamber";
    "horizontal pipe centerline where it leaves the grit chamber";
    "water level in rapid mix";
    "wall height for beginning of flocculator";
    "water level at beginning of flocculator";
    "wall height for the sedimentation tank";
    "water level in the sedimentation tank and channel";
    "centerline of the effluent launder";
    "top of the plate settlers";
    "bottom of the plate settlers";
    "platform height";
    "weir height";
    "level control water height";
    "level control wall height"
]
tableElevation(headerrow_elevation, headercolumn_elevation, Z_elevation) :=
    for i ∈ 0 .. length(headercolumn_elevation)
        for j ∈ 0 .. last(headerrow_elevation)
            table[i, j] ← headerrow_elevation[j] if i == 0
            otherwise
                table[i, j] ← headercolumn_elevation[i - 1] if j == 0
                table[i, j] ← Z_elevation[i - 1] if j == 1
                table[i, j] ← Z_elevation[i - 1] - Z_elevation[22] if j == 2
    return table
# Tables:
# top
# [component: inputs table(headerrow, headercolumn, Z)]
# [component: inputs tableDim(headerrow_Dim, headercolumn_Dim, Dim_x, Dim_y, Dim_z, Units2)]
# [component: inputs tableElevation(headerrow_elevation, headercolumn_elevation, Z_elevation)]
# the negative sign here for alum platform height shows that the height chosen
# for the height of the chemical platform column is larger than
# that calculated based on the headloss through the FCM and
# Grit Chamber, so that from the platform the height of the platform
# is actually below the platform to make up for the shorter height needed
