L_act := L_sed - L_lam*cos(α)
Vupact := V_up*(L_sed/L_act)
b_lam := L_lam*cos(α)*sin(α)/(Vupact/V_c - 1)
H_lam := 38 cm
L_la := H_lam/sin(α)
b_lam =  # error: This variable is undefined.
H_lamella := L_lam*sin(α)  # Vertical length of the Lamella
H_lamella =  # error
AN_SedBottom := 45 deg
Q_Plant := 100*L/min
Q_SedSB := 24*L/min
W_Sed := 42 in
H_SedAbovePlate := 12 cm  # Available water height above the plate settlers
AN_SedPlate := 60 deg
L_SedPlateEstimated := 44 cm
H_PlantFreeboard := 4 in
V_SedUpBod := 50*m/day
# This program produces the critical parameters for a single sed tank. All sed tanks are built identically.
Q_Sed := Q_Plant - Q_SedSB = 76 L/min
# Each tank should have the same flowrate. The total space below the tank is 1 m (design assumption). Part of this space will have sloped walls (to help with draining) and part might have
# straight walls. The length of the sloped walls is determined by the tank width and the
# slope of the walls (they should be between 45 and 60 deg). The space between the top
# of the plate settlers and the water surface is equal to .25*spacing between adjacent launders.
# Since each tank has 1 launderer, the space between adjacent ones is equal to the tank width.
# This should ensure equal flow of effluent through these pipes. The depth of the middle section of
# the tank is determined by the length and slope of the plate settlers. The total depth of the tank is
# equal to the sum of these three depths, plus a freeboard depth. Freeboard space is empty space between the top of the tank and the water surface
H_SedBelowSlope := (W_Sed/2)*tan(AN_SedBottom) = 0.5334 m
H_SedBelow := H_SedBelowSlope
H_SedBelowStraight := (H_SedBelow - H_SedBelowSlope) = 0 m  # The bottom of the plate settlers will meet the top of the slope
Pi_SedAboveW := H_SedAbovePlate/W_Sed
H_SedAbove := Pi_SedAboveW*W_Sed = 0.12 m
H_SedPlate := L_SedPlateEstimated*sin(AN_SedPlate) = 0.381051 m
HW_Sed := (H_SedPlate + H_SedAbove + H_SedBelow) = 1.03445 m
H_Sed := (HW_Sed + H_PlantFreeboard)
Z_Mp := (HW_Sed - HW_Channel)
# The critical velocity is calculated and verfied against a max value. If the critical
# velocity is too large, some of the particles will not settle out in the sed tank.
# We need to make sure that both design constraints are met.
# VSedUp is based on the entire area in the bottom of the sed tank
# VSedC is based on the plate settlers.
# Calculate the inactive Length of the tank
L_SedVUp := Q_Sed/(V_SedUpBod*W_Sed) = 2.05174 m
ND_LaunderEstimated := ND_Manifold(Q_Sed, HL_SedLaunderBod, L_SedVUp, Pi_QLaunderOrifices, EN_PipeSpec, Nu_Water, E_Pvc, 0, L_SedVUp/B_SedLaunderOrifices)
L_SedInactive := L_SedPlateEstimated*cos(AN_SedPlate) + W_Channel + T_ChannelWall + ND_LaunderEstimated
# Calculate minimum number of plate settlers
V_SedUpActiveMax := V_SedCBod*(1 + L_SedPlateEstimated/(B_SedPlate - T_SedPlate)*cos(AN_SedPlate)*sin(AN_SedPlate))
L_SedActiveMin := Q_Sed/(V_SedUpActiveMax*W_Sed)  # Note this doesn't include the area occupies by the thickness of the plate settlers
# Number of spaces where water is traveling is one less than the number of plates used to create those spaces
N_SedPlatesMin := ceil(L_SedActiveMin*sin(AN_SedPlate)/(B_SedPlate - T_SedPlate)) + 1
L_Sed := max(L_SedVUp, L_SedInactive + ((N_SedPlatesMin*T_SedPlate + (N_SedPlatesMin - 1)*(B_SedPlate - T_SedPlate))/sin(AN_SedPlate)))
# Now calculate actual values of all parameters!
L_SedPlate := L_Sed - L_SedInactive
N_SedPlates := (L_SedPlate - T_SedPlate/sin(AN_SedPlate))*sin(AN_SedPlate)/B_SedPlate + 1
L_SedActive := L_SedPlate - N_SedPlates*T_SedPlate/sin(AN_SedPlate)
V_SedUp := Q_Sed/(L_Sed*W_Sed)
V_SedUpActive := Q_Sed/(L_SedActive*W_Sed)
V_SedC := V_SedUpActive/(1 + L_SedPlate/(B_SedPlate - T_SedPlate)*cos(AN_SedPlate)*sin(AN_SedPlate))
