# [reference: MasterProgram.xmcd]
# [reference: DesignAssumptions.xmcd]
# This file does not yet calculate
# height of drain pipes
# entrance height of pipe entering floc tank
# drain tank elevations
# chlorine feed elevations
# [reference: FluidsFunctions.xmcd]
# This program calculates the water levels throughout the plant
# Inputs:
# Basic Parameters:
# D.sedinlet is the diameter of
# the sedimentation inlet pipes
D_sedinlet := 6 in
HW_channel := 50.5 cm
# ** In all variable names, Z will represent a height from the reference point, HL will represent headloss
# Sedimentation Tank:
# D is always a diameter
HW_sed := 2 m
ZW_sed := HW_sed
# HT is height of tank walls
# Flocculation Tank: | HW is depth of water in a tank
# HL.floc is the headloss through the
# floc tank as determined by baffle
# program (for now use 20 cm so
# we have plenty of room)
HL_floc := .20 m  # ZW is a water elevation relative to inside bottom of sed tanks
# ZT is a tank wall elevation relative to inside bottom of sed tanks
# Z is height of an object from the inside bottom of the sed tanks
# Rapid Mix Pipe:
# n.GCorf is the total number
# of orifices in all the grit chamber risers
n_GCorf := Grit[:, 1][0]*sum(Grit[:, 2][0]) = 1164
# D.rm is the diameter of the
# rapid mix pipe carrying the water
# from the grit chamber to the
# floc tank
D_rm := Grit[:, 3][0]*m
HL_GCorf := h_lmax
# HL.GCorf is the design flow measurement head loss
# n.rmturns is the number of ninety
# degree turns in the rapid mix pipe
n_rmturns := 6
D_orf := DrillSize
# Plant Leveling Tank:
# D.laun is the diameter of the
# sedimentation exit launder pipes
D_laun := 6 in
# D.launorf is the diameter of the
# orifices in the launder pipes
D_launorf := 2 cm
# n.launorf is the number of
# orifices in each launder
n_launorf := 44
# H.weir is the height of the weir above the platform
H_weir := 42.83 cm
# D.weir is the diameter of
# the exit weir of the tank
D_weir := 6 in
# L.launturns is the length of the
# sedimentation launder pipes
L_laun := 5 m
# n.launturns is the number of turns
# in the launder pipe (this value
# should be zero)
n_launturns := 0
# L.exit is the length of the sedimentation exit launder pipes a, b, and c
# n.exitturn is the number of ninety degree turns in each sedimentation tank exit pipe a, b, and c
L_sedexits := [3.56 m; 4.39 m; 6.0 m]
n_sedexitturns := [5; 4; 4]
Z_platebottoms := 1 m
# *These parameters would be better if we  could make an array with them . . . but this is tricky when the number of sedimentation tanks can change*
# FCM parameters
H_stocktank := 36 in
H_stocktankport := 10 cm
H_chemplatformblocks := 20 cm
Q_alum := Q_plant*Al_maxdose/Al_stock = 370 mL/min
# head loss from stocktank to FCM valve
# Calculations:
# The headloss through the weir, will determine the height of water in the level tank:
HL_weir := Headloss_weir(Q_plant, D_weir) = 0.0589234 m
Z_platform := HW_sed - HW_channel = 1.495 m
n_lamella := trunc(l_sedactive/(lamella_spacing/sin(α))) = 64
# First calculate the headloss through the launder pipes:
HL_launorf := h_orifice(D_launorf, K_orifice, Q_plant/(n_launorf*n_sedtanks)) = 1.13627 cm  # This is the head loss through the orifices
# This is the head loss in the launder
HL_launder := h_lmanifold(Q_plant/n_sedtanks, D_laun, L_laun, 0, ν, ε_pvc, n_lamella) = 0.0724571 cm
# Sedimentation Tank:
HT_sed := HW_sed + freeboard_sed = 2.1 m
Z_platetops := Z_platebottoms + L_lamella*sin(α) = 1.69282 m
Z_launderCL := (ZW_sed - Z_platetops)/2 + Z_platetops = 1.84641 m  # center the effluent launder in the water above the plate settlers
# The head loss through the pipes that take the water to the level tank needs to take into account that the flow won't divide quite equally between the pipes because of different total loss coefficients. We use conservation of mass and the fact that the head loss through each of the paths is the same to determine the actual head loss.
L_sedexits = [3.56; 4.39; 6] m
K_exits := n_sedexitturns*K_el90 + K_exit = [5.5; 4.6; 4.6]
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# To get an estimate of the major head loss we assume the flow is divided equally.
C_p(Q_plant/length(L_sedexits), D_laun, L_sedexits[0], K_exits, ν, ε_pvc) = [6.08388; 5.18388; 5.18388]
HL_sedexits(Q_plant, D_laun, L_exits, K_exits, ν, ε) :=
    sum ← 0
    for i ∈ 0 .. last(L_exits)
        C_plocal[i] ← C_p(Q_plant/length(L_exits), D_laun, L_exits[i], K_exits[i], ν, ε)
        sum ← sum + 1/sqrt(C_plocal[i])
    8*Q_plant^2/(g*π^2*D_laun^4*sum^2)
HL_sedexits(Q_plant, D_laun, L_sedexits, K_exits, ν, ε_pvc) = 1.46306 cm
# double check to see if head loss estimate is reasonable by assuming flow divides equally.
# Do we include a check for this?
#
# What % difference is okay?
h_l(Q_plant/n_sedtanks, D_laun, L_sedexits, K_exits, ν, ε_pvc) = [1.57554; 1.37772; 1.4461] cm  # okay!
# Now add all of the head losses from the sed tank to the level tank
HL_sedtolevel := HL_sedexits(Q_plant, D_laun, L_sedexits, K_exits, ν, ε_pvc) + HL_launorf + HL_launder = 2.67179 cm
ZT_sed := ZW_sed + freeboard_sed = 2.1 m
ZW_level := ZW_sed - HL_sedtolevel = 1.97328 m
Z_weir := ZW_level - HL_weir = 1.91436 m
ZT_level := ZT_sed = 2.1 m  # Headloss is so insignificant that the level tank walls can be the same height as the sed tanks
# Sedimentation Inlet:
# The head loss through the sedimentation tank is assumed to be negligible.  Water will enter each sed tank through 4 pipes with long radius elbows.  These pipes will add a very small amount of headloss.  Headloss through the channel is assumed to be negligible.
# We will not use this in subsequent calculations. If we want this level of detail we would also need to calcuate open channel flow head loss in the channel...
HL_sedinlet := h_l(Q_plant/(n_sedtanks*n_sedinlet), D_sedinlet, L_sedinlet, n_siturns*K_lturn + K_ent, ν, ε_pvc) = 0.315729 mm
# Flocculation Tank:
# The headloss through the flocculation tank will be determined by the baffle program. For now a value of 20 cm is used to ensure that there will be enough headloss to achieve good flocculation.  Perhaps this potion could be updated to represent the sloping level of the floc tank rather than the maximum level.
ZW_floc_max := ZW_sed + HL_floc = 2.2 m
ZT_floc_max := ZW_floc_max + freeboard_sed = 2.3 m
# Rapid Mix Pipe:
Q_plant = 740 L/min
D_rm = 13.4493 cm
# The rapid mix has been updated and no longer includes mixing elements.  It is modeled as a normal pipe with turns.
Q_plant, D_rm, L_rmpipe, ΣK_rm, ν, ε_pvc
ΣK_rm := K_el90*n_rmturns + K_ent = 5.9  # Is this still true?
HL_rm := h_l(Q_plant, D_rm, L_rmpipe, ΣK_rm, ν, ε_pvc)
ZW_rm := ZW_floc_max + HL_rm = 2.43908 m  # water surface inside rapidmix
# Grit Chamber:
# The water level in the grit chamber must allow there to be free fall from the orifices in the riser pipes to the water in the rapid mix.
HL_freefall := 3*D_rm/2 + D_orf/2 = 20.4914 cm
# We are assuming the water level due to head loss thru rapid mix is at the centerline of the horizontal pipe leaving the grit chamber. The orifice must be located above teh slip connection of an elbow or T and we estimate that to be a height D above the top of the pipe (hence the 1.5D.rm).
Z_GCorf := ZW_rm + HL_freefall = 2.644 m  # This is the elevation of the orifice
H_GCorf := Z_GCorf - Z_platform = 1.149 m  # This is the relative height of the orifice above the bottom of the grit chamber
ZW_GC := Z_GCorf + HL_GCorf = 2.844 m
HW_GC := ZW_GC - Z_platform = 1.349 m
ZT_GC := ZW_GC + freeboard_sed = 2.944 m
Z_rmhorizontalpipecenterline := ZW_rm = 2.43908 m
# Equations to calculate the chemical feed elevations
Z_FCMlowestport := Z_GCorf = 2.644 m
D_alumtube := 0.25 in
L_alumtube := 1 m
Z_FCMhighestport := Z_GCorf + HL_FCM = 2.844 m  # also is water level in the FCM
Z_FCMvalve := HL_FCMvalvefreefall + Z_FCMhighestport = 2.894 m
Z_botAldrum := Z_FCMhighestport + HL_FCMvalvefreefall + HL_FCMinlet - H_stocktankport = 2.994 m
Z_topAldrum := Z_botAldrum + H_stocktank = 3.9084 m
Z_Aldrumport := Z_botAldrum + H_stocktankport = 3.094 m
Z_chemplatform := Z_botAldrum - H_chemplatformblocks = 2.794 m
# We need to decide if the chlorine stock tanks are at the same elevation as the alum tanks. If we ever want to prechlorinate they need to be at the same level. If we don't want the option of prechlorination, then they could be placed at a lower elevation.
# Outputs:
headerrow := ["Element"; "Elevation from bottom of the sed tank (m)"; "Elevation from platform (m)"]
# top of alum stock tank
# port on alum stock tank
# bottom of alum stock tank
# alum platform height
# valve level in the FCM
# water level in the FCM
# end of the FCM tube at maximum alum dose
# grit chamber wall
# grit chamber maximum water level
# orifice elevation in the grit chamber
# horizontal pipe centerline where it leaves the grit chamber
# water level in rapid mix
# wall height for beginning of flocculator
# water level at beginning of flocculator
# wall height for the sedimentation tank
# water level in the sedimentation tank and channel
# top of the effluent launder
# top of the plate settlers
# bottom of the plate settlers
# platform height
# weir height
# level control water height
Z := [
    Z_topAldrum;
    Z_Aldrumport;
    Z_botAldrum;
    Z_chemplatform;
    Z_FCMvalve;
    Z_FCMhighestport;
    Z_FCMlowestport;
    ZT_GC;
    ZW_GC;
    Z_GCorf;
    Z_rmhorizontalpipecenterline;
    ZW_rm;
    ZT_floc_max;
    ZW_floc_max;
    ZT_sed;
    ZW_sed;
    Z_launderCL;
    Z_platetops;
    Z_platebottoms;
    Z_platform;
    Z_weir;
    ZW_level;
    ZT_level
]
headercolumn := [
    "top of alum stock tank";
    "port on alum stock tank";
    "bottom of alum stock tank";
    "alum platform height";
    "valve level in the FCM";
    "water level in the FCM";
    "end of the FCM tube at maximum alum dose";
    "grit chamber wall";
    "grit chamber maximum water level";
    "orifice elevation in the grit chamber";
    "horizontal pipe centerline where it leaves the grit chamber";
    "water level in rapid mix";
    "wall height for beginning of flocculator";
    "water level at beginning of flocculator";
    "wall height for the sedimentation tank";
    "water level in the sedimentation tank and channel";
    "centerline of the effluent launder";
    "top of the plate settlers";
    "bottom of the plate settlers";
    "platform height";
    "weir height";
    "level control water height";
    "level control wall height"
]
table(headerrow, headercolumn, Z) :=
    for i ∈ 0 .. length(headercolumn)
        for j ∈ 0 .. last(headerrow)
            table[i, j] ← headerrow[j] if i == 0
            otherwise
                table[i, j] ← headercolumn[i - 1] if j == 0
                table[i, j] ← Z[i - 1] if j == 1
                table[i, j] ← Z[i - 1] - Z_platform if j == 2
    return table
# [component: inputs table(headerrow, headercolumn, Z)]
# Single Function:
PlantElevations(Q_plant, L_sedexits, Grit, D_alumTube, L_alumTube) :=
    D_rm ← Grit[:, 3][0]*m
    n_GCorf ← Grit[:, 1][0]*sum(Grit[:, 2][0])
    HL_weir ← Headloss_weir(Q_plant, D_weir)
    Z_platform ← HW_sed - HW_channel
    n_lamella ← trunc(l_sedactive/(lamella_spacing/sin(α)))
    HL_launorf ← h_orifice(D_launorf, K_orifice, Q_plant/(n_launorf*n_sedtanks))
    HL_launder ← h_lmanifold(Q_plant/n_sedtanks, D_laun, L_laun, 0, ν, ε_pvc, n_lamella)
    HT_sed ← HW_sed + freeboard_sed
    Z_platetops ← Z_platebottoms + L_lamella*sin(α)
    Z_launderCL ← (ZW_sed - Z_platetops)/2 + Z_platetops
    K_exits ← n_sedexitturns*K_el90 + K_exit
    HL_sedtolevel ← HL_sedexits(Q_plant, D_laun, L_sedexits, K_exits, ν, ε_pvc) + HL_launorf + HL_launder
    ZT_sed ← ZW_sed + freeboard_sed
    ZW_level ← ZW_sed - HL_sedtolevel
    Z_weir ← ZW_level - HL_weir
    ZT_level ← ZT_sed
    HL_sedinlet ← h_l(Q_plant/(n_sedtanks*n_sedinlet), D_sedinlet, L_sedinlet, n_siturns*K_lturn + K_ent, ν, ε_pvc)
    ZW_floc_max ← ZW_sed + HL_floc
    ZT_floc_max ← ZW_floc_max + freeboard_sed
    ΣK_rm ← K_el90*n_rmturns + K_ent
    ZW_rm ← ZW_floc_max + HL_rm
    HL_freefall ← 3*D_rm/2 + D_orf/2
    Z_GCorf ← ZW_rm + HL_freefall
    H_GCorf ← Z_GCorf - Z_platform
    ZW_GC ← Z_GCorf + HL_GCorf
    HW_GC ← ZW_GC - Z_platform
    ZT_GC ← ZW_GC + freeboard_sed
    Z_rmhorizontalpipecenterline ← ZW_rm
    Z_FCMlowestport ← Z_GCorf
    Z_FCMhighestport ← Z_GCorf + HL_FCM
    Z_FCMvalve ← HL_FCMvalvefreefall + Z_FCMhighestport
    Z_botAldrum ← Z_FCMhighestport + HL_FCMvalvefreefall + HL_FCMinlet - H_stocktankport
    Z_topAldrum ← Z_botAldrum + H_stocktank
    Z_Aldrumport ← Z_botAldrum + H_stocktankport
    Z_chemplatform ← Z_botAldrum - H_chemplatformblocks
    Z ← [
        Z_topAldrum;
        Z_Aldrumport;
        Z_botAldrum;
        Z_chemplatform;
        Z_FCMvalve;
        Z_FCMhighestport;
        Z_FCMlowestport;
        ZT_GC;
        ZW_GC;
        Z_GCorf;
        Z_rmhorizontalpipecenterline;
        ZW_rm;
        ZT_floc_max;
        ZW_floc_max;
        ZT_sed;
        ZW_sed;
        Z_launderCL;
        Z_platetops;
        Z_platebottoms;
        Z_platform;
        Z_weir;
        ZW_level;
        ZT_level
    ]
    return Z
