# Test Space
# References
# Hydraulic Design
# [reference: HydraulicDesign.xmcd]
# Unit Processes
# [reference: UnitProcesses.xmcd]
# User Inputs
# [reference: UserInputs.xmcd]
# Pipes and Orifices
Q_plant := 120*L/min
PipeSpecification = 8
h_lmax = 0.2 m
K_sum := .63
L_pipe = 7.116 m
PipeSize(Q_plant, PipeSpecification, h_lmax, K_sum, L_pipe) = 0.0551942 m
# Launderer Design
b_plate := 1 m
Launder(Q_plant, PipeSpecification, b_plate, L_sedtank) =  # error: This variable is undefined.
# Sludge Pipe Design
Sludge(Q_plant, PipeSpecification) = [0.05, 2, 23]
# Channel Design
SedTank_width := 1 m
tank_thick := .5 m
Channel(Q_plant, SedTank_width, tank_thick) = [4; 0.3; 0.265915] m
# Grit Chamber Design
DrillSize := 1/4*in
r_drum := 12 in
gritchamber(Q_plant, DrillSize, r_drum, PipeSpecification) = [2, [0.540244; 1.14984; 2], 3, [5; 25; 4; 5; 5; 4; 4; 4; 4; 3], 0.0551942, 0.00635]
# Plant Leveling Tank
PlantLevelingTank(Q_plant, PipeSpecification) = [3, 3, [2; 2; 2], 5]
# Plant Elevation Design
PlantElevationDesign(Q_plant, n_sedtanks, sedtank_dim, FlocTank_dim) =  # error
# Hydraulic Design Function
# Sedimentation Tank Design
# Flocculator Design
# Chemical Feed Design
