# Unit Processes Design
# References
# Fluids Functions
# [reference: FluidsFunctions.xmcd]
# Design Assumptions
# [reference: DesignAssumptions.xmcd]
# Hydraulic Design:
# [reference: HydraulicDesign.xmcd]
# Sedimentation Tank Design
SedTankDesign(Q_plant, SedTank_width, lamella_spacing, L_lamella, β, tank_thick) :=
    Q_tank ← Q_plant/n_sedtanks
    spacebelow_slanted ← (SedTank_width/2)*tan(β)
    spacebelow_straight ← spacebelow_total - spacebelow_slanted
    angle_toosteep ← "Failure: Slope of walls too steep (should be less than 60 deg)."
    return angle_toosteep if spacebelow_slanted > 1 m
    spaceabove ← ratio_waterdepthtolaunderspacing*SedTank_width
    H_lamella ← L_lamella*sin(α)
    H_tank ← H_lamella + spaceabove + spacebelow_total + freeboard_sed
    v_c ← v_up/(1 + L_lamella/lamella_spacing*cos(α)*sin(α))
    vc_toobig ← "Failure: Critical velocity is greater than the suggested value"
    return vc_toobig if v_c > criticalvelocity_toobig
    A_active ← Q_tank/v_up
    L_active ← A_active/SedTank_width
    L_tank ← (L_lamella*cos(α) + L_active)
    Channel_dim ← Channel(Q_plant, SedTank_width, tank_thick, n_sedtanks)
    Channel_width ← Channel_dim[1]
    N_lamella ← floor((L_active - Channel_width)/(lamella_spacing/sin(α)))
    sedtank_vol ← 3*((SedTank_width*(H_tank - spacebelow_total)*L_tank) + .5*(SedTank_width*spacebelow_total*L_tank))
    sedtank_dim ← [L_tank; SedTank_width; H_tank]
    water_depth ← H_tank - freeboard_sed
    z_plat ← water_depth - HW_channel
    return [sedtank_dim/m, N_lamella, water_depth/m, z_plat/m, v_c*day/m]
floor(8/5) = 1
# Flocculator Design
flocculator(Q_plant, SedTank_width, L_lamella, β, lamella_spacing, tank_thick) :=
    SedTankDim ← SedTankDesign(Q_plant, SedTank_width, lamella_spacing, L_lamella, β, tank_thick)[0, 0]*m
    FlocTank_length ← SedTankDim[0]*n_channels
    FlocTank_width ← SedTankDim[1]/n_channels
    FlocTank_enddepth ← SedTankDim[2] - freeboard_sed
    baffle_spacing ← (1/G)^(1/2)*(k_b*Q_plant^3/(2*Π_cell*ν*FlocTank_width^3))^(1/4)
    G_min ← G*flowratio_hightolowflow^(3/2)
    θ_min ← Π_cell*FlocTank_width*baffle_spacing^2/Q_plant
    Gθ_minpersection ← Gθ_min*G_min/sum(G_min)
    n_baffle ← ceil(vectorize(Gθ_minpersection/(G_min*θ_min)))
    tanklength_duetobaffles ← baffle_spacing*n_baffle
    spaceleftover ← FlocTank_length - tanklength_duetobaffles
    while tanklength_duetobaffles ≠ FlocTank_length
        while spaceleftover > 0
            if spaceleftover < baffle_spacing[2]
                n_baffle[2] ← n_baffle[2] - 1
                tanklength_duetobaffles ← baffle_spacing*n_baffle
            if spaceleftover ≥ 2*baffle_spacing[2]
                n_baffle[2] ← n_baffle[2] + 1
                tanklength_duetobaffles ← baffle_spacing*n_baffle
            tanklength_duetobaffles ← FlocTank_length if spaceleftover ≥ baffle_spacing[2] and spaceleftover < 2*baffle_spacing[2]
            spaceleftover ← FlocTank_length - tanklength_duetobaffles
        while spaceleftover < 0
            if |spaceleftover| ≥ baffle_spacing[0]
                n_baffle[2] ← n_baffle[2] - 2
                tanklength_duetobaffles ← baffle_spacing*n_baffle
            if |spaceleftover| < baffle_spacing[0]
                n_baffle[0] ← n_baffle[0] - 1
                tanklength_duetobaffles ← FlocTank_length
            spaceleftover ← FlocTank_length - tanklength_duetobaffles
    newGθ_totalpersection ← G_min*θ_min*n_baffle
    newGθ_total ← sum(newGθ_totalpersection)
    lowGθ ← "Failure: Your Gθ for the flocculator is too low. It should not fall below 4500. Consider increasing the length."
    return lowGθ if newGθ_total < Gθ_absmin
    v ← Q_plant/(FlocTank_width*baffle_spacing)
    h_l ← vectorize(n_baffle*(k_b*v^2/(2*g)))
    total_hl ← sum(h_l)
    d_start ← FlocTank_enddepth + total_hl
    FlocTank_height ← d_start + freeboard_floc
    uturnhole_area ← baffle_spacing[2]*FlocTank_width
    uturnhole_width ← baffle_spacing[1] - uturnhole_unusedspace if FlocTank_length/n_channels > baffle_spacing[0]*n_baffle[0]
    uturnhole_width ← baffle_spacing[0] - uturnhole_unusedspace otherwise
    uturnhole_height ← uturnhole_area/uturnhole_width
    uturnhole_dim ← [uturnhole_width; uturnhole_height]
    gap ← spacingratio*baffle_spacing
    baffle_length ← FlocTank_enddepth - gap
    baffle_overlap ← FlocTank_enddepth - 2*gap
    spacingratio_new ← (FlocTank_enddepth - overlap_min)/(2*baffle_spacing)
    i ← 0
    while i < length(baffle_spacing)
        baffle_length[i] ← FlocTank_enddepth - spacingratio_new[i]*baffle_spacing[i] if baffle_overlap[i] ≤ 0
        i ← i + 1
    floc_dim ← [FlocTank_length; FlocTank_width; FlocTank_height]
    floc_inleth ← 1.5 m
    return [floc_dim/m, baffle_spacing/m, floc_inleth/m, n_baffle, total_hl/m, uturnhole_dim/m, baffle_length/m]
# General Algorithm:
# Obtain sedimentation tank length
# Multiply by the number of channels
# Floc width - sedtankWidth/channels
# water height- sed tank depth - free board
flocculator(500*gpm, 42 in, 1 m, 0 deg, 5 cm, 10 cm) = [[18.0322; 0.5334; 2.4273], [0.273918; 0.572509; 0.809651], 1.5, [25; 6; 8], 0.194571, [0.542509; 0.796056], [1.72185; 1.27396; 1.07636]]
flocculator(500*gpm, 42 in, 1 m, 0 deg, 5 cm, 10 cm)[0, 1]*flocculator(500*gpm, 42 in, 1 m, 0 deg, 5 cm, 10 cm)[0, 3] = 16.7602
bafflepositions(Q_plant, SedTank_width, L_lamella, β, lamella_spacing, tank_thick) :=
    myfloc ← flocculator(Q_plant, SedTank_width, L_lamella, β, lamella_spacing, tank_thick)
    flocDim ← myfloc[0, 0]
    n_baffles ← myfloc[0, 3]
    b_lengths ← myfloc[0, 6]
    b_spacings ← myfloc[0, 1]
    n ← 0
    k ← 0
    j ← 0
    while n < sum(n_baffles)
        if j > n_baffles[k] - 1
            k ← k + 1
            j ← 0
        bafflelength[n, 0] ← b_lengths[k]
        baffle_xposition[n] ← b_spacings[k] if n == 0
        baffle_xposition[n] ← baffle_xposition[n - 1] + b_spacings[k] otherwise
        n ← n + 1
        j ← j + 1
    i ← 0
    while i < sum(n_baffles)
        j ← 0
        if mod(i + 1, 2) == 0
            while j < 3
                baffleposition[i, j] ← baffle_xposition[i] if j == 0
                baffleposition[i, j] ← flocDim[2] if j == 1
                baffleposition[i, j] ← flocDim[2] - bafflelength[i] if j == 2
                j ← j + 1
            i ← i + 1
        otherwise
            while j < 3
                baffleposition[i, j] ← baffle_xposition[i] if j == 0
                baffleposition[i, j] ← 0 if j == 1
                baffleposition[i, j] ← bafflelength[i] if j == 2
                j ← j + 1
            i ← i + 1
    return baffleposition
bafflepositions(500*gpm, 42 in, 1 m, 0 deg, 5 cm, 10 cm) = [
    0.273918, 0, 1.72185;
    0.547836, 2.4273, 0.705448;
    0.821754, 0, 1.72185;
    1.09567, 2.4273, 0.705448;
    1.36959, 0, 1.72185;
    1.64351, 2.4273, 0.705448;
    1.91743, 0, 1.72185;
    2.19134, 2.4273, 0.705448;
    2.46526, 0, 1.72185;
    2.73918, 2.4273, 0.705448
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]
# Chemical Feed Design
ChemicalFeed(Q_plant) :=
    Q_alum ← Q_plant*Al_maxdose/Al_stock
    return Q_alum
