# User Inputs
Q_plant := 100*L/min  # plant flowrate
# Types of pipes to be used
PipeSpecification := 8
# Chem stock tank sizes
h_drum := 1 m  # height of chemical stock tank
# Grit chamber parameters
D_drill := 1/4*in  # Diameter of drill used for orifices in grit chamber riser pipe
# Floc tank parameters
# Sed tank parameters
SedTank_width := 100 cm  # Width of the lamella
L_lamella := 80 cm  # length of the lamella
lamella_spacing := 5 cm  # lamella spacing
β := 45 deg  # Angle of the bottom of the sed tank
