ReadPath = "C:\Program Files\National Instruments\LabVIEW 8.0\user.lib\mathcad\datafile.PRN"
data := READPRN(ReadPath)
data = [56, 567, 2, 475.85; 5.6, 6, 5.5, 589; 5.563, 5.56, 2, 53.65; 9.58, 53.5, 0, 53.5]
WritePath := "c:\test.dat"
outputdata := data*10
WRITEPRN(WritePath) := outputdata
